# 土壤修复;原位修复;原位化学氧化;修复过程;得到修复的土壤

Dataset: ILCD process, Unit process, single operation
Geography: CN
Reference year: 2021
Classification: Unit processes / Other Services / Repair and maintenance
Generated by: 浩骅, wangyp@caep.org.cn
Owner: 天工LCI数据工作小组
Review: Dependent internal review by 天工LCI数据工作小组
Amounts: no units in this file; such an amount is in the reference unit of its flow, which a separate flow dataset defines
copyright: false
licenseType: Free of charge for all users and uses

## General comment
修复过程

## Technology and included processes
对有机污染物的分子结构进行破坏

## Technical purpose
该数据集涉及原位土壤修复过程，具体是原位化学氧化，用于破坏土壤中有机污染物的分子结构。此技术用于环境工程和土地复垦，其中可行的直接处理现场的污染土壤。

## Reference product
- Remediated soil: 1; input; measured

## Inputs
- Electricity: 1945.44; measured
- Stainless Steel: 50; measured
- contaminated soil: 1000; measured

## Outputs
- sulfate: 12.492; measured
- chloride: 15; measured
- carbon dioxide (fossil): 30.4; measured
- contaminated soil: 1; measured

## Use advice
使用该数据集的用户应注意，它包括原位土壤修复过程中原位化学氧化单元过程的所有主要原材料和必要的能源消耗。务必考虑修复过程的完整生命周期，包括预处理、实际氧化和后处理阶段。用户在模拟使用阶段行为时应计入氧化过程的效率和潜在的环境排放。在预期应用的背景下，对任何共产品或回收的排除应给出合理的解释。

## Review details
清单： 内部审查通过几个迭代步骤完成，涉及原始数据验证、原始数据记录、代表性、完整性、与 ISO 14040 和 14044 有关的建模的一致性。

## Data sources
- 王顺扬. 基于多目标决策方法改进LCA的污染场地修复技术比选研究.山西大学（硕士论文）,2021.
