# 铁塔制造 ; 40个电缆线塔

Dataset: ILCD process, Unit process, single operation
Geography: NMG-CN
Reference year: 2017
Classification: Unit processes / Systems / Construction
Functional unit: The functional unit is 1.5 MW wind turbine
LCI method principle: Attributional
LCI method approaches: Allocation
Generated by: 赵云志, ll10088@163.com
Owner: 天工LCI数据工作小组
Review: Dependent internal review by 天工LCI数据工作小组
Amounts: no units in this file; such an amount is in the reference unit of its flow, which a separate flow dataset defines
copyright: false
licenseType: Free of charge for all users and uses

## General comment
制造的铁塔配备有40条电缆线，专门用于风电场的建设。这些塔是基础设施的一部分，支持安装33台国产1.5兆瓦（MW）风力发电机，用于生成可再生能源，并通过替代效应减少环境影响。

## Geography
风电功率参数的数据来自Wang ( 2012 )。以装有33台国产1.5兆瓦( MW )风电机组的风电场为案例，分析其环境影响及其替代效应。该风电场位于我国风电装机最多的省份- -内蒙古东北部。

## Reference product
- Wind foundation tower: 40; estimated
  Cable tower

## Inputs
- iron: 2.4e6; calculated
  Steel and iron

## Deviations from the LCI method approaches
风电的生命周期清单如下所示。生产制造阶段包括风电机组、变电站、电缆的生产，这些设备消耗大量能源，排放污染物( Xue et al . , 2015)。

## Use advice
本生命周期评估数据集的用户应考虑位于内蒙古东北部风电场的上下文，那里是风力发电安装最普遍的地区，以评估环境影响的适当性。使用此数据时，用户必须考虑包括风力涡轮机、变电站和电缆生产在内的制造阶段，同时特别注意Xue等人（2015年）记录的这些过程中消耗的能源和排放的污染物。确保评估的功能单元与1.5 MW风轮机的生命周期相对应。

## Review details
清单： 内部审查通过几个迭代步骤完成，涉及原始数据验证、原始数据记录、代表性、完整性、与 ISO 14040 和 14044 有关的建模的一致性。

## Data sources
- Li, H., Jiang, H.-D., Dong, K.-Y., Wei, Y.-M. & Liao, H. A comparative analysis of the life cycle environmental emissions from wind and coal power: Evidence from China. Journal of Cleaner Production 248, 119192 (2020).
