# 铝空白箔（阳极）生产 ; 0.12 mm铝板卷 ; 铝锭

Dataset: ILCD process, Unit process, single operation
Geography: JS-CN
Reference year: 2020
Classification: Unit processes / Materials production / Metals and semimetals
Generated by: 常慧敏, huiminchang@tsinghua.edu.cn
Owner: 天工LCI数据工作小组
Review: Dependent internal review by 天工LCI数据工作小组
Amounts: no units in this file; such an amount is in the reference unit of its flow, which a separate flow dataset defines
copyright: false
licenseType: Free of charge for all users and uses

## General comment
铝空白箔（阳极）生产 ; 铝电解电容器（AEC）生产 ; 420V 680uf

## Time period
The investigated manufacturer produced about 1.183 billion AECs of all kinds in 2020.

## Technical purpose
本数据集中讨论的铝空白箔（阳极）是为制造铝电解电容器（AEC）而生产的，特别是用于420V 680uf单元过程。这些AEC主要用于电子电路作为滤波器、去耦电容器以及储能，支持电源供应、汽车电子和消费电子等应用。

## Reference product
- 0.12mm Al blank coil: 1000; measured
  0.12mm Al blank coil [kg] ; Production of Al blank foil (anode)

## Inputs
All rows: measured
- electricity, high voltage, aluminium industry: 2273.68
  Electricity [kWh] ; Al smelting preparation (anode)
- electricity, high voltage, aluminium industry: 111.06
  Electricity [kWh] ; Casting rolling (anode)
- electricity, high voltage, aluminium industry: 186.829
  Electricity [kWh] ; Cold rolling 1 (anode)
- electricity, high voltage, aluminium industry: 504.72
  Electricity [kWh] ; Intermediate annealing 1 (anode)
- electricity, high voltage, aluminium industry: 1061.52
  Electricity [kWh] ; Cold rolling 2 (anode)
- electricity, high voltage, aluminium industry: 180.36
  Electricity [kWh] ; Intermediate annealing 2 (anode)
- electricity, high voltage, aluminium industry: 1796.42
  Electricity [kWh] ; Foil rolling (anode)
- electricity, high voltage, aluminium industry: 467.64
  Electricity [kWh] ; Final annealing (anode)
- aluminium, primary, ingot: 1052.63
  Al ingots (99.99%) [kg] ; Al smelting preparation (anode)
- argon, liquid: 0.189
  Ar gas [kg] ; Al smelting preparation (anode)
- Graphitic lubricant: 0.032
  Graphitic lubricant [kg] ; Casting rolling (anode)
- water, deionised: 2.56
  Deionized water [kg] ; Casting rolling (anode)
- tap water: 1368.42
  Tap water [kg] ; Casting rolling (anode)
- water, deionised: 12.093
  Deionized water [kg] ; Cold rolling 1 (anode)
- heavy fuel oil: 0.387
  Rolling oil [kg} ; Cold rolling 1 (anode)
- water, deionised: 226.748
  Deionized water [kg] ; Cold rolling 2 (anode)
- heavy fuel oil: 7.256
  Rolling oil [kg} ; Cold rolling 2 (anode)
- water, deionised: 302.33
  Deionized water [kg] ; Foil rolling (anode)
- heavy fuel oil: 9.675
  Rolling oil [kg} ; Foil rolling (anode)
- sodium hydroxide, without water, in 50% solution state: 31.8
  NaOH solution (30%) [kg] ; Final annealing (anode)
- nitrogen, liquid: 1.29
  N2 gas[kg] ; Final annealing (anode)

## Outputs
All rows: measured
- aluminium scrap, new: 52.24
  Al scraps [kg] ; Al smelting preparation (anode)
- Dust: 0.389
  Dust[kg] ; Al smelting preparation (anode)
- wastewater, average: 1197.54
  Wastewater [kg] ; Production of Al blank foil (anode)
- Chemical Oxygen Demand (COD): 0.084
  COD [kg] ; Production of Al blank foil (anode)
- Suspended solids, unspecified: 0.084
  SS [kg] ; Production of Al blank foil (anode)
- BOD5, Biological Oxygen Demand: 0.527
  BOD [kg] ; Production of Al blank foil (anode)
- ammonia: 0.024
  NH3-N [kg] ; Production of Al blank foil (anode)

## Data selection and combination
电容器生产的库存数据来自 AEC 位于中国江苏省的生产工厂。每道工序的 LCI 数据收集的截止标准是至少覆盖输入流和输出流 95% 的质量和能量。阳极箔生产和阴极箔生产的库存数据是根据生产工艺和相应工艺参数分析获得的。上游数据（即铝锭、分选纸、运输、电力和水）来自 Gabi 软件（版本：10.6.1.35）。具体而言，《中国电力年鉴》中的中国电网概况以 2016 年为基准年。铝锭生产的基准年为 2015 年。无法获取的柠檬酸铵、五硼酸铵、NH4H2PO4 和 HBO3 数据是根据 Gabi 软件中现有材料（反应物）的化学方程式估算的。使用和报废阶段的库存数据是通过分析和计算获得的。

## Use advice
本LCA数据的用户应当正确归属所需质量和能量流的覆盖率，确保至少有95%的过程输入和输出被计入。数据集基于AEC生产的阳极和阴极的制造过程，上游数据来自Gabi软件，包括铝锭、隔离纸、运输、电力和水。电力和铝锭生产的参考年分别是2016年和2015年。用户应注意，特定化学物质的数据是基于软件内可用的相似化学组成进行估算的。可能需要对使用和生命周期结束阶段库存数据进行方法学调整，以反映特定的使用阶段行为及废弃或回收实践。

## Review details
清单： 内部审查通过几个迭代步骤完成，涉及原始数据验证、原始数据记录、代表性、完整性、与 ISO 14040 和 14044 有关的建模的一致性。

## Data sources
- Zhang, C., Jing, J., Yun, L., Zheng, Y. & Huang, H. A cradle-to-grave life cycle assessment of high-voltage aluminum electrolytic capacitors in China. J. Clean. Prod. 370, (2022).
