# 生物质航空燃油生物油脂加氢

Dataset: ILCD process, Unit process, black box
Geography: CN
Classification: Unit processes / Energy carriers and technologies / Renewable fuels
Functional unit: 1 MJ aviation fuel
LCI method principle: Attributional
LCI method approaches: Allocation - gross calorific value
Generated by: 张艺璇, zhangyixuan0444@igsnrr.ac.cn
Owner: 天工LCI数据工作小组
Review: Dependent internal review by 天工LCI数据工作小组
Amounts: no units in this file; such an amount is in the reference unit of its flow, which a separate flow dataset defines
licenseType: Free of charge for all users and uses

## General comment
生物油脂加氢技术（HEFA）能够以植物油、废弃油脂以及废弃动物脂肪为 原料，通过将油中的甘油三酯、饱和或是不饱和的脂肪酸进行转化，生产具有良 好品质的生物航油。

## Technical purpose
生物油脂加氢技术（HEFA）适用于生产生物航空燃油，使用植物油、废弃油脂及废弃动物脂肪作为原料。该过程转化了这些油脂中的甘油三酯和脂肪酸，制成适用于飞机引擎的高品质生物航空燃油，旨在作为可持续替代品，以代替传统的航空燃料。

## Model description
Build a simulation model of the complete process using Aspen Plus software and perform simulation calculations to obtain the mass flow, energy flow, thermodynamic parameters, and reactor power consumption of each process based on mass balance

## Reference product
- Electricity: 0.0396; input; calculated

## Inputs
- Diesel: 5.04e-5; calculated
- Electricity: 0.0052; calculated
- sodium hydroxide: 6.2e-5; calculated
- Electricity: 1.908e-5; calculated
  加氢裂解

## Outputs
- waste water - untreated: 0.00011, 2.4e-6 (2 entries); calculated
- carbon monoxide (biogenic): 6.6e-5; calculated
  原文未区分bio和fossil，根据专家判断此处为bio
- hydrocarbons (unspecified): 6.8e-6; calculated

## Deviations from the LCI method approaches
按照能量分配的方式分配环境影响值，即在排放分配的过程中，根据航油以及其他燃料的能量分配给每 MJ 的航油生产

## Use advice
使用此数据集进行生命周期评估时，必须考虑能量分配原则。环境影响值必须根据生物航空燃油及任何其他共生产燃料的能量含量来分配。分配应与每MJ生产的生物航空燃油所提供的能量成比例。必须确保与系统边界保持方法论的一致性，并且选择分配方法需与研究目标相符合，并有适当的理由。

## Review details
清单： 内部审查通过几个迭代步骤完成，涉及原始数据验证、原始数据记录、代表性、完整性、与 ISO 14040 和 14044 有关的建模的一致性。

## Data sources
- 朱啸南. 基于生命周期评价的生物航油制备及利用对环境的影响研究. (浙江大学, 2022).
