# cement production|cement, portland-composite cement|new dry process|mixed solid wastes

Dataset: ILCD process, Unit process, black box
Geography: CN
Reference year: 2013
Classification: Materials production / Other mineralic materials
Generated by: Siqi Yang
Amounts: no units in this file; such an amount is in the reference unit of its flow, which a separate flow dataset defines
copyright: false

## General comment
Use the new dry cement production technology as the technical object.
The main raw materials required for portland-composite cement production include limestone, clay, iron powder, gypsum, granulated blast furnace slag and fly ash. During the production process, granulated blast furnace slag and fly ash are added to the cement instead of clinker.

## Model description
The LCA function unit is 1T portland-composite cement. The system boundary includes the transportation and grinding process of ranulated blast furnace slag and fly ash, excluding its production process; the mining and transportation of limestone, iron ore, clay, gypsum and coal; cement production and electricity production. Cement system boundary consideration of the main production process of cement includes: ① the mining and transportation of raw materials, transportation of industrial slag; ② processing and pre -measuring of raw materials; ③ cooperation of raw materials; ④ raw material grinding; ⑤ raw materials homogenization; ⑥ clinker calcination; ⑦clinker, gypsum, industrial waste grinding treatment; ⑧ cement grinding.

## Reference product
- cement, portland-composite cement: 1000
  Composite silicate cement (PC)

## Inputs
- limestone, crushed, for mill: 848.37; calculated
  Limestone. Taking the average value of GB-175-2007 General Portland Cement as the raw material data, where the proportion of gypsum addition is 5% of the cement mass and the proportion of clinker addition is 60% of the cement mass. The clinker is made by blending limestone, clay, and iron powder as raw materials and then artificially calcining. Based on the material balance equation in the cement production process, the raw material consumption is obtained, where the material balance equation is: M_raw = M_material + M_decomposition + M_water + M_dust - M_fly_ash, where M_raw is the amount of raw material fed into the system, M_material is the amount of clinker, M_decomposition is the mass of CO2 and H2O decomposed from the raw material, M_water is the moisture content in the raw material, M_dust is the amount of dust in the exhaust gas, and M_fly_ash is the amount of fly ash.
- clay: 143.55; calculated
  Clay. Taking the average value of GB-175-2007 General Portland Cement as the raw material data, where the proportion of gypsum addition is 5% of the cement mass and the proportion of clinker addition is 60% of the cement mass. The clinker is made by blending limestone, clay, and iron powder as raw materials and then artificially calcining. Based on the material balance equation in the cement production process, the raw material consumption is obtained, where the material balance equation is: M_raw = M_material + M_decomposition + M_water + M_dust - M_fly_ash, where M_raw is the amount of raw material fed into the system, M_material is the amount of clinker, M_decomposition is the mass of CO2 and H2O decomposed from the raw material, M_water is the moisture content in the raw material, M_dust is the amount of dust in the exhaust gas, and M_fly_ash is the amount of fly ash.
- iron, powder: 26.04; calculated
  Iron powder. Taking the average value of GB-175-2007 General Portland Cement as the raw material data, where the proportion of gypsum addition is 5% of the cement mass and the proportion of clinker addition is 60% of the cement mass. The clinker is made by blending limestone, clay, and iron powder as raw materials and then artificially calcining. Based on the material balance equation in the cement production process, the raw material consumption is obtained, where the material balance equation is: M_raw = M_material + M_decomposition + M_water + M_dust - M_fly_ash, where M_raw is the amount of raw material fed into the system, M_material is the amount of clinker, M_decomposition is the mass of CO2 and H2O decomposed from the raw material, M_water is the moisture content in the raw material, M_dust is the amount of dust in the exhaust gas, and M_fly_ash is the amount of fly ash.
- gypsum (desulphurized): 50; calculated
  Gupsum. Taking the average value of GB-175-2007 General Portland Cement as the raw material data, where the proportion of gypsum addition is 5% of the cement mass and the proportion of clinker addition is 60% of the cement mass. The clinker is made by blending limestone, clay, and iron powder as raw materials and then artificially calcining. Based on the material balance equation in the cement production process, the raw material consumption is obtained, where the material balance equation is: M_raw = M_material + M_decomposition + M_water + M_dust - M_fly_ash, where M_raw is the amount of raw material fed into the system, M_material is the amount of clinker, M_decomposition is the mass of CO2 and H2O decomposed from the raw material, M_water is the moisture content in the raw material, M_dust is the amount of dust in the exhaust gas, and M_fly_ash is the amount of fly ash.
- granulated blast furnace slag: 100; calculated
  Gravated blast furnace slag. Taking the average value of GB-175-2007 General Portland Cement as the raw material data, where the proportion of gypsum addition is 5% of the cement mass and the proportion of clinker addition is 60% of the cement mass. The clinker is made by blending limestone, clay, and iron powder as raw materials and then artificially calcining. Based on the material balance equation in the cement production process, the raw material consumption is obtained, where the material balance equation is: M_raw = M_material + M_decomposition + M_water + M_dust - M_fly_ash, where M_raw is the amount of raw material fed into the system, M_material is the amount of clinker, M_decomposition is the mass of CO2 and H2O decomposed from the raw material, M_water is the moisture content in the raw material, M_dust is the amount of dust in the exhaust gas, and M_fly_ash is the amount of fly ash.
- ash: 200; calculated
  Fly ash. Taking the average value of GB-175-2007 General Portland Cement as the raw material data, where the proportion of gypsum addition is 5% of the cement mass and the proportion of clinker addition is 60% of the cement mass. The clinker is made by blending limestone, clay, and iron powder as raw materials and then artificially calcining. Based on the material balance equation in the cement production process, the raw material consumption is obtained, where the material balance equation is: M_raw = M_material + M_decomposition + M_water + M_dust - M_fly_ash, where M_raw is the amount of raw material fed into the system, M_material is the amount of clinker, M_decomposition is the mass of CO2 and H2O decomposed from the raw material, M_water is the moisture content in the raw material, M_dust is the amount of dust in the exhaust gas, and M_fly_ash is the amount of fly ash.
- hard coal, run-of-mine: 68.4; article inperiodical
  Coal. The coal consumption is calculated based on the standard coal consumption and calorific value of large and medium-sized pre-decomposition kilns in China's production lines.
- electricity, medium voltage: 354.06; article inperiodical
  Electricity. Due to limited data on electricity consumption, the electricity consumption of various stages of composite Portland cement production is simplified based on the average electricity consumption in China.

## Outputs
- carbon dioxide: 604; calculated
  CO2. The data on pollutant emissions from limestone and gypsum mining, as well as transportation, electricity production (using national average electricity grid mix and transmission data), and coal mining are obtained from the China Life Cycle Reference Database (CLCD). CO2 emissions during cement production come from two sources: the decomposition of calcium carbonate and magnesium carbonate in raw materials during calcination, and the combustion of coal as fuel.
- sulfur dioxide: 0.372; article inperiodical
  SO2. Data on SO2 emission is from the first survey of pollution sources in China's cement manufacturing industry.
- Nitrogen oxides: 1.92; article inperiodical
  NOx. Data on NOx emission is from the first survey of pollution sources in China's cement manufacturing industry.
- particles (> PM10): 0.341; article inperiodical
  Dust, with an unspecified particle size, is treated as PM > 10 micrometers in diameter. Data on dust emissions during cement production is based on the upper limit of the atmospheric pollutant emissions standard for China's cement industry.
- chemical oxygen demand: 0.0102; article inperiodical
  COD. Data on COD emission is from the first survey of pollution sources in China's cement manufacturing industry.
- Oils, unspecified: 0.261; software or database
  Oil. Pollutant emission data for limestone and gypsum mining, as well as transportation, electricity production (using national average electricity mix and transmission data) and coal mining data are all from the Chinese Life Cycle Database (CLCD).
- methane: 0.733; software or database
  Methane. Pollutant emission data for limestone and gypsum mining, as well as transportation, electricity production (using national average electricity mix and transmission data) and coal mining data are all from the Chinese Life Cycle Database (CLCD).
- mercury: 0.0079; software or database
  Mercury. Pollutant emission data for limestone and gypsum mining, as well as transportation, electricity production (using national average electricity mix and transmission data) and coal mining data are all from the Chinese Life Cycle Database (CLCD).

## Data sources
- 徐小宁, 陈郁, 张树深, 张芸, & 宋国宝. (2013). 复合硅酸盐水泥的生命周期评价. 环境科学学报, 33(9), 2632–2638.
