# 玻璃生产 ;有机玻璃单体MMA生产;两级冷凝过程

Dataset: ILCD process, Unit process, single operation
Geography: JX-CN
Classification: Unit processes / Materials production / Glass and ceramics
Generated by: 和夏夏, 18616148319@163.com
Owner: 天工LCI数据工作小组
Review: Dependent internal review by 天工LCI数据工作小组
Amounts: no units in this file; such an amount is in the reference unit of its flow, which a separate flow dataset defines
copyright: false
licenseType: Free of charge for all users and uses

## General comment
此数据集涉及聚甲基丙烯酸甲酯(PMMA)的生产，通常被称为有机玻璃或亚克力玻璃。该过程包括两级缩合反应来合成PMMA单体。所得的PMMA是一种透明热塑性塑料，经常用于需要透明性和高抗冲击性的应用，比如制造窗户玻璃、透镜和显示器。

## Reference product
- methyl methacrylate: 997.513; measured

## Inputs
- Electricity: 405.36; measured
- methyl methacrylate: 1015.48; measured

## Outputs
- waste heat: 17.964; measured

## Use advice
使用此数据集的用户应当特别注意在生命周期评估中应用双级冷凝过程时的具体边界条件。包括所有相关的能源和材料输入，并考虑潜在的生命周期终点情景，如回收或能源回收，这些可能会影响LCA结果。数据集的技术适用性和假设应与正在评估的具体PMMA应用一致。如果适用，需计算中间产品或最终产品的任何运输。

## Review details
清单： 内部审查通过几个迭代步骤完成，涉及原始数据验证、原始数据记录、代表性、完整性、与 ISO 14040 和 14044 有关的建模的一致性。

## Data sources
- 江西旺达新材料有限公司年产20000吨有机玻璃原料生产项目
