# 水泥生产|水泥, 普通硅酸盐水泥, 42.5MPa|新型干法, 2000 t/d|混合固废

Dataset: ILCD process, LCI结果
Geography: CN
Classification: Materials production / Other mineralic materials
Generated by: 杨思琪
Amounts: no units in this file; such an amount is in the reference unit of its flow, which a separate flow dataset defines
copyright: false

## General comment
新型干法生产普通硅酸盐水泥。混合固废指粉煤灰和矿渣。

## Model description
功能单位为1t水泥。系统边界为水泥生产工艺过程。

## Reference product
- cement, ordinary portland cement, 42.5MPa: 1000
  P.O.42.5

## Inputs
All rows: measured
- limestone, crushed, for mill: 1073.71
  石灰石
- sandstone: 69.77
  砂岩
- iron, powder: 28.59
  铁粉
- gypsum (desulphurized): 51.14
  石膏
- ash: 98.02
  粉煤灰
- blast furnace slag: 137.55
  矿渣
- hard coal, run-of-mine: 130.18
  煤。原文数据为130.2，但是同一个作者的另一篇文献“建筑材料生命周期中物化环境状况的定量评价研究”中数据为130.18，更为精确，故这里选用130.18。原文也给出了热耗（即煤耗）为2745617KJ。其中煤的空气收到基低位热值按23301kJ/kg计算。每吨熟料烧成用煤为139.7kq，烘干用煤为2.5kg（这里燃煤为干燥的）。由于烘干用煤只占总用煤量的1.76%，为计算方便，假设燃煤量全部用于熟料烧成过程。（含水的）
- electricity, medium voltage: 435.237
  电耗

## Outputs
All rows: missing unimportant
- carbon dioxide: 729.2
  CO2
- sulfur dioxide: 0.0663
  SO2
- Nitrogen oxides: 0.787
  NOx
- Carbon monoxide, non-fossil: 0.00256
  CO
- chemical oxygen demand: 0.0258
  COD
- Suspended solids, unspecified: 0.0196
  SS
- Oils, unspecified: 8.3e-5
  油
- particles (> PM10): 0.804
  粉尘，未标明粒径，按PM>10处理。

## Sampling procedure
某水泥厂两条2000t/d的新型干法生产线。

## Data sources
- 龚志起 & 张智慧. (2004). 水泥生命周期中物化环境状况的研究. 土木工程学报, 5, 86–91.
