# Treatment of waste reverse osmosis module | mix of incineration and landfilling, CN

Dataset: ILCD process, Unit process, single operation
Geography: CN
Reference year: 2022
Classification: Materials production / Other mineralic materials
Functional unit: 1 item of reverse osmosis module
Generated by: Jiaqi Lu, wilsherelu@foxmail.com
Review: Dependent internal review by Tiangong LCI Data Working Group
Amounts: no units in this file; such an amount is in the reference unit of its flow, which a separate flow dataset defines

## Reference product
- waste incineration of plastics (unspecified) fraction in municipal solid waste (MSW): 1; input; measured
  1 waste RO module

## Outputs
All rows: measured
- waste incineration of plastics (unspecified) fraction in municipal solid waste (MSW): 0.052
  废弃PVC
- waste incineration of plastics (unspecified) fraction in municipal solid waste (MSW): 0.088
  废弃PVDF膜
- waste incineration of plastics (unspecified) fraction in municipal solid waste (MSW): 0.129
  废弃PP膜
- waste incineration of plastics (unspecified) fraction in municipal solid waste (MSW): 1.643
  废弃胶带（缠绕外壳）
- waste incineration of plastics (unspecified) fraction in municipal solid waste (MSW): 0.016
  废弃挤压塑料管
- waste incineration of plastics (unspecified) fraction in municipal solid waste (MSW): 0.012
  废弃注塑塑料
- waste incineration of plastics (unspecified) fraction in municipal solid waste (MSW): 0.032
  废弃PU填充剂

## Review details
Inventory: The internal review was done by several iteration steps concerning raw data validation, raw data documentation, representativity, completeness and consistency of modelling with regard to ISO 14040 and 14044.; Documentation: The review of the documentation was performed by Ecobilan and is in compliance with ISO 14040 and 14044. The data set documentation is correct in view of the appropriateness of the information provided. It includes all relevant information in view of data quality and scope of application of the respective LCI result.
