# 铝再生 ; 再生铝锭 ; 废铝 ; 2013年

Dataset: ILCD process, Unit process, single operation
Geography: CN
Reference year: 2021
Classification: Unit processes / Materials production / Metals and semimetals
Generated by: 蔡梓萌, caizm6178@163.com
Owner: 天工LCI数据工作小组
Review: Dependent internal review by 天工LCI数据工作小组
Amounts: no units in this file; such an amount is in the reference unit of its flow, which a separate flow dataset defines
copyright: false
licenseType: Free of charge for all users and uses

## General comment
再生铝锭在汽车、建筑和包装等多个行业中使用。这些锭子是通过回收过程从废铝中生产出来的。数据集展示了铝回收如何减少对初级铝的需求，因此降低了与铝土矿开采、氧化铝精炼和初级铝生产相关的环境影响。在不严格要求初级铝的物理和机械属性或重视成本效益的应用中可以使用该材料。

## Time period
文献发表日期

## Reference product
- secondary aluminium ingot: 1000; missing unimportant
  ingot

## Inputs
- electricity, high voltage, aluminium industry: 1148.4; missing unimportant
  electricity
- aluminium scrap, unspecified: 1180; missing unimportant
  aluminum scrap

## Data selection and combination
本研究的数据参考了PA、SA、电力等背景数据的LCA数据。PA数据来自统计数据源，SA数据主要来自文献。背景数据主要来自中国科学院生态环境研究中心CASRCEES 2018建立的中国本地化LCA数据库，涵盖能源、材料、交通、废物管理等LCA数据。

## Use advice
再生铝锭的生命周期评估数据应考虑回收过程中使用的特定能源来源和工艺。使用这一数据集的用户应确保他们根据地理环境适当地应用数据，因为环境影响依据地区的能源构成和回收技术可能会有显著差异。使用确切的数据年份（在本例中为2013年）对于捕捉技术相关性至关重要。根据废料来源和回收过程，铝锭的技术适用性和质量可能会有所不同；因此，用户必须考虑这些数据是否适合其特定的最终用途应用。

## Review details
清单： 内部审查通过几个迭代步骤完成，涉及原始数据验证、原始数据记录、代表性、完整性、与 ISO 14040 和 14044 有关的建模的一致性。

## Data sources
- Ding, N., Liu, N., Lu, B. & Yang, J. Life cycle greenhouse gas emissions of aluminum based on regional industrial transfer in China. J. Ind. Ecol. 25, 1657–1672 (2021).
