# Steelmaking | crude steel | converter steelmaking | hot metal/scrap steel

Dataset: ILCD process, Unit process, single operation
Geography: CN
Reference year: 2006
Classification: Materials production / Other mineralic materials
Generated by: Wanghuanyu, wanghuanyu00@126.com
Review: Dependent internal review by Tiangong LCI Data Working Group
Amounts: no units in this file; such an amount is in the reference unit of its flow, which a separate flow dataset defines

## Reference product
- Steel sections: 1.8926, 1.4982, 1.5342, 0.5146, 0.5202, 0.3968, 0.514, 0.6126, 0.2698, 0.2768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 (17 entries); measured

## Inputs
- iron: 1084, 1110, 1095, 1127, 1108, 1106, 1090, 1088, 1119, 1108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 (17 entries); measured
- Alloy steel: 11.8, 11.9, 16.4, 6.7, 606, 16.9, 13, 13, 20, 10.6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 (17 entries); measured
  合金钢

## Outputs
- Flue dust: 0.039, 2.616, 0.04, 1.413, 3.62, 1.048, 0.128, 0.023, 0.198, 0.155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 (17 entries); measured
- municipal solid waste deposition: 120, 123, 121, 212, 144, 164, 171, 101, 202, 218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 (17 entries); measured
  钢坯

## Review details
Inventory: The internal review was done by several iteration steps concerning raw data validation, raw data documentation, representativity, completeness and consistency of modelling with regard to ISO 14040 and 14044.; Documentation: The review of the documentation was performed by Ecobilan and is in compliance with ISO 14040 and 14044. The data set documentation is correct in view of the appropriateness of the information provided. It includes all relevant information in view of data quality and scope of application of the respective LCI result.

## Data sources
- 1.
