# NMC523湿法回收（LCC）

Dataset: ILCD process, Unit process, single operation
Geography: CN
Reference year: 2021
Classification: End-of-life treatment / Material recycling
Functional unit: 333.9 kg of the degraded NMC532 can be sorted from per 1 ton of degraded battery
Generated by: 马清源, m1120498928@163.com
Owner: 天工LCI数据工作小组
Review: Dependent internal review by 天工LCI数据工作小组
Amounts: no units in this file; such an amount is in the reference unit of its flow, which a separate flow dataset defines
copyright: false
licenseType: Free of charge for all users and uses

## General comment
使用过的NMC电池首先经过预处理，然后进行酸浸得到金属硫酸盐，通过添加碱进行共沉淀得到NMC前驱体，通过烧结得到新的NMC。

## Technical purpose
NMC532湿法回收工艺旨在从使用过的NMC（镍锰钴）电池中回收有价值的金属。该工艺主要适用于回收利用行业，目的是从降解的锂离子电池中提取和回收镍、钴和锰，并将这些提取的材料转化为新的NMC阴极材料，以便在电池制造中重新使用。

## Reference product
- Degraded NMC532: 226680; input; calculated

## Inputs
- P204（95%）P507（95%）: 17401.9; calculated
- Nickel sulfate: 160034; calculated
- sodium hydroxide: 12149.6; calculated
- nitrogen: 162; measured
- Liquid ammonia: 3990; measured
- Lithium Hydroxide Monohydrate: 369684; calculated
- Average labor (Disassemble degraded battery): 5475; measured
- Average labor（Material preparation）: 10950; measured
- water,water: 36000; measured
- Electricity: 83700; calculated
- Equipment Depreciation: 45187.5; measured

## Outputs
- Sewage treatment: 6000; measured
- Ni-Co-Mn precursor,Ni-Co-Mn precursor: 1.4475e6; measured

## Data treatment and extrapolations
① 我们计算了每吨回收阴极材料的成本。回收过程可分为四个步骤：分解降解电池、提取镍/钴/锰硫酸盐、NCM（OH）2前驱体制备和锂化。②在拆卸过程中，我们使用降解的NMC532作为原材料。③在萃取过程中，生成了Ni/Co/Mn硫酸盐，我们建议产率可达100%。

## Use advice
在使用该数据集进行生命周期评估（LCA）时，请确保考虑完整的过程链，包括预处理、酸浸、共沉淀和烧结。考虑萃取过程中金属硫酸盐的回收率，建议可达到100%。准确地模型化使用阶段的行为，包括拆解的效率和从废旧电池中得到NMC的产率。注意，每吨退役电池可以产出约333.9公斤的废旧NMC532，该物料作为回收过程的输入原材料。

## Review details
清单： 内部审查通过几个迭代步骤完成，涉及原始数据验证、原始数据记录、代表性、完整性、与 ISO 14040 和 14044 有关的建模的一致性。

## Data sources
- Qian, G. et al. Value-creating upcycling of retired electric vehicle battery cathodes. Cell Reports Physical Science 3, 100741 (2022).
