# 变速箱的制造 ; 1.5 MW 风轮机变速箱

Dataset: ILCD process, Unit process, single operation
Geography: NMG-CN
Reference year: 2017
Classification: Systems / Other machines
Functional unit: The functional unit is 1.5 MW wind turbine
LCI method principle: Attributional
LCI method approaches: Allocation
Generated by: 赵云志, ll10088@163.com
Owner: 天工LCI数据工作小组
Review: Dependent internal review by 天工LCI数据工作小组
Amounts: no units in this file; such an amount is in the reference unit of its flow, which a separate flow dataset defines
copyright: false
licenseType: Free of charge for all users and uses

## General comment
本数据集所描述的变速箱专为1.5兆瓦风力发电机设计。这些变速箱是风电场运行的关键组件之一，尤其是在风力发电安装密集的地区，如中国内蒙古东北部。该数据支持变速箱在能源行业中的应用，侧重于清洁和可再生的风能发电。

## Geography
风电功率参数的数据来自Wang ( 2012 )。以装有33台国产1.5兆瓦( MW )风电机组的风电场为案例，分析其环境影响及其替代效应。该风电场位于我国风电装机最多的省份- -内蒙古东北部。

## Reference product
- Gearbox: 1; article inperiodical

## Inputs
- iron: 25000; article inperiodical
  Steel and iron
- copper: 1850; article inperiodical

## Deviations from the LCI method approaches
风电的生命周期清单如下所示。生产制造阶段包括风电机组、变电站、电缆的生产，这些设备消耗大量能源，排放污染物( Xue et al . , 2015)。

## Use advice
使用此数据集的用户在评估1.5兆瓦风轮机变速箱制造过程的环境影响及其替代效应时，应仔细考虑地理和技术背景。重要的是要注意，从Wang (2012)和Xue等人(2015)获取的生命周期清单数据可能需要更新或地区化，以反映当前的制造实践和能源消费模式。用户还应确保生命周期评估的功能单元与评估中所用风力发电机的特定应用和容量（1.5兆瓦）相匹配。

## Review details
清单： 内部审查通过几个迭代步骤完成，涉及原始数据验证、原始数据记录、代表性、完整性、与 ISO 14040 和 14044 有关的建模的一致性。

## Data sources
- Li, H., Jiang, H.-D., Dong, K.-Y., Wei, Y.-M. & Liao, H. A comparative analysis of the life cycle environmental emissions from wind and coal power: Evidence from China. Journal of Cleaner Production 248, 119192 (2020).
