# 散户生猪饲养 ; 畜禽饲养阶段

Dataset: ILCD process, Unit process, single operation
Geography: SD-CN
Reference year: 2014
Classification: Unit processes / Materials production / Agricultural production means
Functional unit: 1kg pork
Generated by: 杨瑞, 1632707028@qq.com
Owner: 天工LCI数据工作小组
Review: Dependent internal review by 天工LCI数据工作小组
Amounts: no units in this file; such an amount is in the reference unit of its flow, which a separate flow dataset defines
copyright: false
licenseType: Free of charge for all users and uses

## General comment
畜禽饲养阶段的污染物排放主要来自于畜禽胃肠道发酵的污染物排放，及畜 禽取暖、照明、设备运转的能源消耗所产生的污染物排放。禽类因生理结构不同， 其在肠道发酵方面产生的 CH4 数量极少，故忽略不计

## Geography
本研究于 2014~2015 年，针对畜禽饲养周期、肉料比、饲料配方、饲料消耗 量、煤和电的消耗量等，先后对山东省高密正大种猪场、莱西市知双奶牛场、即 墨市段泊岚镇姜家坡村养猪场、即墨市刘家庄镇畜禽养殖场、日照市莒县长岭镇 上官庄村、莒县寨里河镇东兴农牧公司、莒县峤山镇东辰奶牛场、莒县峤山镇刘 家义水养猪场、诸城市外贸有限责任公司凤凰父母代种鸭场，新疆阜康宏发养殖 专业合作社、九运街镇旭鸿蛋鸡合作社、九运街镇六运村自成养殖场、中澳控股 集团有限公司、德州市庆云县洼于村、山东省庆云县四柳社区肉牛养殖基地、德 州市庆云青年鸡养殖基地、庆云县永利禽业蛋鸡育成公司、庆云县兴晨青年鸡养 殖专业合作社、庆云县东泰肉鸡养殖专业合作社、河北省盐山县博远饲料有限公 司、盐山县大华人饲料有限公司、无棣县六和饲料有限公司、中澳东方希望饲料 公司等地进行了实地调研。

## Time period
本研究于 2014~2015 年

## Technology and included processes
本文将畜禽养殖生命周期 分为饲料作物种植、饲料加工、畜禽饲养、粪便处理、屠宰、运输等 6 个阶段。 畜禽养殖的生命周期具体流程如图 2-1 所示。由于部分数据的缺乏和基础条件的 限制，未对农药、地膜、饲料添加剂等生产、运输、使用进行分析，其他相关的 基础设施建设、运输工具生产、人力成本所引起的环境影响也不再考虑的范畴内。

## Technical purpose
该数据集代表散户生猪养殖过程中畜禽养殖阶段的环境影响评估。它适用于从事养殖业、环境评估、政策制定和农业商业规划的组织或个人使用。该数据可以提供有关猪的胃肠道发酵和取暖、照明及设备运转的能源消耗产生的污染物排放的洞察。主要适用于小规模生猪养殖者和分析生猪养殖实践环境影响的研究人员。

## Reference product
- pig: 1; measured
  猪肉

## Inputs
All rows: measured
- maize grain: 2.79
- soybean: 0.5
- wheat: 5.3
- Electricity: 0.2088
- hard coal: 0.037

## Outputs
All rows: measured
- methane (biogenic): 0.00704
  生猪散户
- carbon dioxide (biogenic): 0.13377
  生猪散户
- sulfur dioxide: 0.00214
  生猪散户
- nitrogen, total (excluding N2): 0.00036
  生猪散户
- carbon monoxide (fossil): 7e-5
  生猪散户

## Data selection and combination
直接数据：畜禽饲养阶段数据皆来自实地调研，通过现场收集及企业可公开 数据获得。背景数据：化肥、电力、燃煤等数据来自相关统计年鉴及国家统计局、农业 部网站的公开数据。

## Use advice
请注意，此数据直接适用于散户规模的生猪养殖，并可能不完全适合大规模商业运营。在使用这些数据时，必须考虑所测量的具体变量，例如饲养周期、肉料比、饲料配方以及饲料、煤炭和电能的消耗量。另外，禽类产生的CH4排放被认为可以忽略不计并已排除。关于化肥、电力和煤炭消耗的数据应与相关统计年鉴和国家统计机构或农业部门的公开记录进行交叉参考，以便全面性和核查目的。

## Review details
清单： 内部审查通过几个迭代步骤完成，涉及原始数据验证、原始数据记录、代表性、完整性、与 ISO 14040 和 14044 有关的建模的一致性。

## Data sources
- 周景月. 基于生命周期评价的畜禽养殖环境影响分析. (青岛科技大学, 2017).
