# 电力生产 ; 混合电力 ; 陕西

Dataset: ILCD process, Unit process, single operation
Geography: SAX-CN
Reference year: 2019
Classification: Unit processes / Energy carriers and technologies / Electricity
Generated by: 熊若熙, xiongrx0126@163.com
Owner: 天工LCI数据工作小组
Review: Dependent internal review by 天工LCI数据工作小组
Amounts: no units in this file; such an amount is in the reference unit of its flow, which a separate flow dataset defines
copyright: false
licenseType: Free of charge for all users and uses

## General comment
混合电力产生形式包括火力发电、水力发电、风力发电、核能发电和太阳能发电

## Technical purpose
该电力混合数据集涉及陕西地区，包括多种形式的电力生产，用于满足多个部门的电力需求。这包括热力（如煤炭、天然气）、水力、风力、核能和太阳能发电。混合电力可以被用于区域电网，为陕西的居民、商业和工业应用提供电力，确保电力消费者拥有多样化的能源组合。

## Reference product
- Electricity: 3.6; missing unimportant
  [{'text': '3.6', 'type': 'text'}]

## Inputs
All rows: missing unimportant
- electricity for thermal power: 3.09152
  [{'text': '3.6', 'type': 'text'}]
- electricity from hydroelectric power plant: 0.214358
  [{'text': '3.6', 'type': 'text'}]
- electricity for nuclear power: 0
  [{'text': '3.6', 'type': 'text'}]
- electricity from wind power: 0.137923
  [{'text': '3.6', 'type': 'text'}]
- electricity for solar power: 0.1562
  [{'text': '3.6', 'type': 'text'}]

## Use advice
电力混合数据集的用户在将这些数据应用于生命周期评估或其他环境分析时，应考虑数据的区域特异性。混合电力中每种发电类型的比例受到当地资源可用性和能源政策的影响，因此可能不具有其他地区的代表性。用户还应考虑到时间变异性，如能源生产的季节性和年度波动。另外，如果可再生能源在混合中的比例发生变化，应在评估中反映出来以保持准确性。

## Review details
清单： 内部审查通过几个迭代步骤完成，涉及原始数据验证、原始数据记录、代表性、完整性、与 ISO 14040 和 14044 有关的建模的一致性。

## Data sources
- 能源统计年鉴2020
