# Sludge treatment and disposal|landfilling

Dataset: ILCD process, Unit process, single operation
Geography: CN
Classification: Materials production / Other mineralic materials
Functional unit: The functional unit used for GHGs in this LCA is one dry ton (DT) of sludge.
Generated by: Jin Sitian, 2331276@tongji.edu.cn
Review: Dependent internal review by Tiangong LCI Data Working Group
Amounts: no units in this file; such an amount is in the reference unit of its flow, which a separate flow dataset defines

## Geography
Tai Lake Watershed

## Reference product
- Sludge: 1000; input; estimated
  one dry ton (DT) of sludge

## Inputs
- Polymer: 5.65; measured
- Electricity: 252; measured
- Diesel: 0.0031; measured

## Review details
Inventory: The internal review was done by several iteration steps concerning raw data validation, raw data documentation, representativity, completeness and consistency of modelling with regard to ISO 14040 and 14044.

## Data sources
- Life cycle GHG emissions of sewage sludge treatment and disposal options in Tai Lake Watershed, China
