# 铝电解 ; 液态原铝 ; 预焙 ; 冶金用氧化铝 ; 2009年

Dataset: ILCD process, Unit process, single operation
Geography: CN
Reference year: 2021
Classification: Unit processes / Materials production / Metals and semimetals
Generated by: 蔡梓萌, caizm6178@163.com
Owner: 天工LCI数据工作小组
Review: Dependent internal review by 天工LCI数据工作小组
Amounts: no units in this file; such an amount is in the reference unit of its flow, which a separate flow dataset defines
copyright: false
licenseType: Free of charge for all users and uses

## General comment
本文描述的铝电解工艺用于通过预焙方法生产液态原铝。该液态原铝专门用于冶金。该数据集与涉及铸造、精炼和进一步制造铝制品的应用相关。它包括工业操作，如铝合金的创建、汽车工业的组件、建筑材料和需要冶金级铝的航空航天部件。

## Time period
文献发表日期

## Reference product
- aluminium, primary, liquid: 1000; software or database

## Inputs
All rows: software or database
- Integrated AC power consumption: 49174.3
- aluminium oxide, metallurgical: 1918.21
- fluoride salt: 22.37
- anode, prebake, for aluminium electrolysis: 422.8
- Water, unspecified natural origin: 3.75
  water consumption

## Data selection and combination
本研究的数据参考了PA、SA、电力等背景数据的LCA数据。PA数据来自统计数据源，SA数据主要来自文献。背景数据主要来自中国科学院生态环境研究中心CASRCEES 2018建立的中国本地化LCA数据库，涵盖能源、材料、交通、废物管理等LCA数据。

## Use advice
在使用该数据集进行生命周期评估（LCA）时，从业者需要确保技术范围与预焙铝电解技术及其在冶金中的使用相对应。注意数据的时间相关性也很重要，因为它代表了2009年的实践和效率。用户还应了解，原铝（PA）数据来源于统计数据，再生铝（SA）数据主要来源于文献，背景数据则来自中国科学院生态环境研究中心（CAS RCEES）2018年建立的中国本地化LCA数据库。在反映当前实践或本地条件时可能需要进行调整。理解地理背景（中国）并在将数据应用到其他地区时相应地适应数据也是至关重要的。

## Review details
清单： 内部审查通过几个迭代步骤完成，涉及原始数据验证、原始数据记录、代表性、完整性、与 ISO 14040 和 14044 有关的建模的一致性。

## Data sources
- Ding, N., Liu, N., Lu, B. & Yang, J. Life cycle greenhouse gas emissions of aluminum based on regional industrial transfer in China. J. Ind. Ecol. 25, 1657–1672 (2021).
