# 水电解槽采用质子交换膜制氢;去离子水;PEM技术

Dataset: ILCD process
Geography: US
Reference year: 2022
Classification: Unit processes / Energy carriers and technologies / Electricity
Functional unit: Production of 1kg hydrogen gas
Generated by: 刘晓华, lxh01311@163.com
Owner: 天工LCI数据工作小组
Review: Dependent internal review by 天工LCI数据工作小组
Amounts: no units in this file; such an amount is in the reference unit of its flow, which a separate flow dataset defines
copyright: false
licenseType: Free of charge for all users and uses

## General comment
该数据集描述了在水电解槽中使用质子交换膜（PEM）技术生产高纯度氢气的过程，这种氢气通常用于对氢气的精确组成和纯度要求严格的行业，例如电子制造、制药行业或作为清洁能源载体。

## Reference product
- Green Hydrogen: 1; measured
  绿氢

## Inputs
- Electricity: 198; measured
  电
- Deionized Water: 12; measured
  去离子水

## Outputs
- waste heat: 28.8; measured
  热量输出
- oxygen: 8; measured
  氧气

## Use advice
在使用此数据集进行生命周期评估时，请确保考虑为电解过程供电的电力来源，因为它显著影响所产生氢气的环境特性。用户还应计算氢气生产过程中的潜在损失，并纳入适当的上游和下游流程，包括去离子水的净化和PEM设备的生命周期管理。

## Review details
清单： 内部审查通过几个迭代步骤完成，涉及原始数据验证、原始数据记录、代表性、完整性、与 ISO 14040 和 14044 有关的建模的一致性。

## Data sources
- Climate change performance of hydrogen production based on life cycle assess
