# 聚丙烯隔膜生产;聚丙烯隔膜;干法;聚丙烯

Dataset: ILCD process, Unit process, single operation
Geography: SZ-GD-CN
Classification: Materials production / Plastics
Functional unit: Production of 1kg polypropylene diaphragm
LCI method principle: Attributional
Generated by: 陈鑫, xinchen@mail.nankai.edu.cn
Owner: 天工LCI数据工作小组
Review: Dependent internal review by 天工LCI数据工作小组
Amounts: no units in this file; such an amount is in the reference unit of its flow, which a separate flow dataset defines
copyright: false
licenseType: Free of charge for all users and uses

## General comment
将高分子聚合物、添加剂等原料混合形成均匀熔体，挤出时在拉伸应力下形成片晶结构，热处理片晶结构获得硬弹性的聚合物薄膜，之后在一定的温度下拉伸形成狭缝状微孔，热定型后制得微孔膜

## Geography
深圳市星源材质科技股份有限公司

## Technology and included processes
采用干法工艺生产聚丙烯隔膜

## Technical purpose
干法生产的聚丙烯隔膜用于电池制造。它作为电池中阴极与阳极分隔的关键部件，防止电路短路，同时促进汽车、消费电子产品和能源存储应用等电池中的离子转移。

## Inputs
- polypropylene granulate (PP): 1.09
  数据来源于深圳市星源材质科技股份有限公司的环境影响评价报告，对数据应该有做简单的乘除处理，这里的数据忽略交通运输的输入部分
- Diesel: 0.00399
  数据来源于深圳市星源材质科技股份有限公司的环境影响评价报告，对数据应该有做简单的乘除处理，这里的数据忽略交通运输的输入部分
- Electricity: 14.076
  数据来源于深圳市星源材质科技股份有限公司的环境影响评价报告，对数据应该有做简单的乘除处理，这里的数据忽略交通运输的输入部分
- Natural gas, at consumer EU-27: 0.322
  数据来源于深圳市星源材质科技股份有限公司的环境影响评价报告，对数据应该有做简单的乘除处理，这里的数据忽略交通运输的输入部分

## Outputs
- non-methane volatile organic compounds: 0.00038
  数据来源于深圳市星源材质科技股份有限公司的环境影响评价报告，对数据应该有做简单的乘除处理，这里的数据忽略交通运输的输入部分
- sulfur dioxide: 0.000144
  数据来源于深圳市星源材质科技股份有限公司的环境影响评价报告，对数据应该有做简单的乘除处理，这里的数据忽略交通运输的输入部分
- nitrogen dioxide: 0.000636
  数据来源于深圳市星源材质科技股份有限公司的环境影响评价报告，对数据应该有做简单的乘除处理，这里的数据忽略交通运输的输入部分
- particles (PM10): 7.87e-5
  数据来源于深圳市星源材质科技股份有限公司的环境影响评价报告，对数据应该有做简单的乘除处理，这里的数据忽略交通运输的输入部分

## Data selection and combination
数据来源于深圳星材质科技股份有限公司的环境影响评价报告

## Data treatment and extrapolations
对数据应该有做简单的乘除操作

## Use advice
使用这个聚丙烯隔膜生产的生命周期评估数据集时，请确保根据您评估所需的隔膜具体质量进行必要的算术运算（乘法和除法）。考虑输入/输出能源、材料和排放数据的完整性。请注意，这些数据反映了基于深圳星材质科技股份有限公司使用干法工艺生产1kg聚丙烯隔膜的环境绩效。

## Review details
清单： 内部审查通过几个迭代步骤完成，涉及原始数据验证、原始数据记录、代表性、完整性、与 ISO 14040 和 14044 有关的建模的一致性。

## Data sources
- Yin, R., Hu, S. & Yang, Y. Life cycle inventories of the commonly used materials for lithium-ion batteries in China. Journal of Cleaner Production227, 960–971 (2019).
