# 电力生产 ; 混合电力 ; 江苏

Dataset: ILCD process, Unit process, single operation
Geography: JS-CN
Reference year: 2019
Classification: Unit processes / Energy carriers and technologies / Electricity
Generated by: 熊若熙, xiongrx0126@163.com
Owner: 天工LCI数据工作小组
Review: Dependent internal review by 天工LCI数据工作小组
Amounts: no units in this file; such an amount is in the reference unit of its flow, which a separate flow dataset defines
copyright: false
licenseType: Free of charge for all users and uses

## General comment
混合电力产生形式包括火力发电、水力发电、风力发电、核能发电和太阳能发电

## Technical purpose
该数据集介绍了江苏地区的电力生产工业流程，包括了多种能源来源：火力（可能是燃烧煤炭、天然气或石油）、水力、风能、核能和太阳能发电。这种混合电力被用于多种应用，从居民和商业电力需求到需要可靠电力供应的工业操作。

## Reference product
- Electricity: 3.6; missing unimportant
  [{'text': '3.6', 'type': 'text'}]

## Inputs
All rows: missing unimportant
- electricity for thermal power: 3.11367
  [{'text': '3.6', 'type': 'text'}]
- electricity from hydroelectric power plant: 0.0216
  [{'text': '3.6', 'type': 'text'}]
- electricity for nuclear power: 0.229234
  [{'text': '3.6', 'type': 'text'}]
- electricity from wind power: 0.128203
  [{'text': '3.6', 'type': 'text'}]
- electricity for solar power: 0.107302
  [{'text': '3.6', 'type': 'text'}]

## Use advice
在使用该数据集进行生命周期评估时，重要的是要考虑具体的能源组合及各类型发电的相关环境影响。用户应注意数据的时间和区域边界，必要时更新数据以用于未来评估，并确保模型中反映的电力消费模式与实际最终用途相对应。如果某个产品或服务的流程严重依赖于电力，那么在生命周期评估模型中应准确反映每种发电类型的比例影响。

## Review details
清单： 内部审查通过几个迭代步骤完成，涉及原始数据验证、原始数据记录、代表性、完整性、与 ISO 14040 和 14044 有关的建模的一致性。

## Data sources
- 能源统计年鉴2020
