# 玻璃生产 ;夹层玻璃;手工切割

Dataset: ILCD process, Unit process, single operation
Geography: SX-ZJ-CN
Reference year: 2004
Classification: Unit processes / Materials production / Glass and ceramics
Generated by: 和夏夏, 18616148319@163.com
Owner: 天工LCI数据工作小组
Review: Dependent internal review by 天工LCI数据工作小组
Amounts: no units in this file; such an amount is in the reference unit of its flow, which a separate flow dataset defines
copyright: false
licenseType: Free of charge for all users and uses

## General comment
此数据集代表夹层平板玻璃生产中的单一操作过程，具体应用于建筑、车辆和各种工业用途的安全防护玻璃。手工切割阶段表明是为特殊尺寸或设计量身定制的或小规模生产操作，这通常不适用于大规模生产技术。

## Reference product
- Glass (formed & finished): 22930; measured

## Inputs
- Glass (formed & finished): 23560; measured
  玻璃原片

## Outputs
- Waste (solid): 630; measured

## Use advice
使用此数据集的用户应注意与自动化生产方法相比，手工切割精确过程可能导致的更高能源消耗和潜在的增加废物。在将此数据外推至可能具有不同过程效率和废物管理的大规模应用时，必须格外小心。此外，这些数据应反映生产的定制性质，可能无法完全代表标准化的大规模玻璃制造操作。

## Review details
清单： 内部审查通过几个迭代步骤完成，涉及原始数据验证、原始数据记录、代表性、完整性、与 ISO 14040 和 14044 有关的建模的一致性。

## Data sources
- 年产5600吨钢化玻璃及250吨夹层玻璃生产线建设项目环境影响报告
