# 华北(高密)玉米生产 ; 农业生产资料生产

Dataset: ILCD process, Unit process, single operation
Geography: WF-SD-CN
Reference year: 2016
Valid until: 2017
Classification: Unit processes / Materials production / Agricultural production means
Functional unit: 1t
LCI method principle: Attributional
LCI method approaches: Consequential
Generated by: Haoran Zhang, hrzhang@whu.edu.cn
Owner: 天工LCI数据工作小组
Review: Dependent internal review by 天工LCI数据工作小组
Amounts: no units in this file; such an amount is in the reference unit of its flow, which a separate flow dataset defines
copyright: false
licenseType: Free of charge for all users and uses

## General comment
本研究在山东省高密市进行，该地区位于我国 的冬小麦-夏玉米轮作核心区域——黄淮海平原。研 究以问卷调查的形式进行，共访问经营小麦-玉米轮 作的农户 56 户。问卷内容包括粮食生产过程中的投 入和产出情况：（1）粮食产量；（2）种子、肥料、除草剂、 杀菌剂和杀虫剂等农资投入；（3） 农业机械能耗情况， 包括播种、耕作和粮食运输等过程的油耗等；（4）灌溉 能耗等

## Geography
高密

## Technology and included processes
研究核算了粮食生产过程从摇篮到门口的温 室气体排放，核算系统边界包括：农资（例如种子、农 药、肥料等）投入的温室气体排放；农机使用过程（耕 作、播种、收获和粮食运输等）的温室气体排放；肥料 施用造成的田间 N2O 排放；灌溉能耗温室气体排放等 （图 1）

## Technical purpose
华北（高密）玉米生产主要用于农业目的。该数据集反映了与玉米生产相关的碳足迹，考虑到粮食产量、农业投入（包括种子、肥料和农药）以及农业机械和灌溉过程的能耗等因素。这一农业过程对于评估玉米作物的环境影响方面的温室气体排放非常重要，并且可以为类似地区或条件下的类似农业实践提供基准。

## Reference product
- maize grain: 9962.95; measured

## Inputs
- Corn Seeds: 31.51; measured

## Deviations from the LCI method approaches
核算系统边界包括：农资（例如种子、农药、肥料等）投入的温室气体排放；农机使用过程（耕作、播种、收获和粮食运输等）的温室气体排放；肥料施用造成的田间N2O 排放；灌溉能耗温室气体排放等

## Data selection and combination
由于本研究为调研数据，无法获得农户土壤碳的本底状况，且由于不同农户管理方式的不同，其土壤碳的本底状况不同，故没有在核算土壤碳的变化。本研究选取的功能单元为单位面积和单位产量的碳足迹

## Data treatment and extrapolations
温室气体排放核算采用《2006 IPCC 国家温室气体清单指南》推荐的方法学[20]，并依照国际标准《ISO/DIS 14067》[12]进行

## Sampling procedure
问卷内容包括粮食生产过程中的投入和产出情况：（1）粮食产量；（2）种子、肥料、除草剂、杀菌剂和杀虫剂等农资入；（3） 农业机械能耗情况，包括播种、耕作和粮食运输等过程的油耗等；（4）灌溉能耗等。

## Use advice
使用这份数据集的用户应考虑到由于不同农户的土壤碳本底差异和管理实践的多样性，土壤碳变化的评估存在限制，因为这不包括在碳核算中。在将数据应用于其他土壤管理技术不同的地区或农业系统进行比较，或者在整合土壤碳固存因素时应谨慎使用。应遵循《2006 IPCC 国家温室气体清单指南》和《ISO/DIS 14067》提供的方法学指导，以确保温室气体排放核算的准确性。用户还应注意功能单元是基于单位面积和单位产量的，这可能会影响对碳足迹数据的解读。

## Review details
清单： 内部审查通过几个迭代步骤完成，涉及原始数据验证、原始数据记录、代表性、完整性、与 ISO 14040 和 14044 有关的建模的一致性。

## Data sources
- 朱永昶,李玉娥,姜德锋等.基于生命周期评估的冬小麦-夏玉米种植系统碳足迹核算——以山东省高密地区为例[J].农业资源与环境学报,2017,34(05):473-482.
