# Finishedsausagecasing|Semi-finishedsausagecasing|Cleaning + flushing circuit + grading + salting|All sizes / /|成品肠衣|半成品肠衣|清洗+冲水分路+定级+盐腌|所有规模

Dataset: ILCD process, Partly terminated system
Geography: CN
Reference year: 2019
Classification: Materials production / Other mineralic materials
Generated by: The data was created by the Office of the Second National Pollution Source Census of the Ministry of Ecology and Environment, and the data was organized by the TianGong Plan team for ILCD format / 生态环境部第二次全国污染源普查工作办公室创建数据，天工计划团队常慧敏整理数据为ILCD格式
Amounts: no units in this file; such an amount is in the reference unit of its flow, which a separate flow dataset defines
copyright: false

## Technology and included processes
the Technical of end-of-pipe management technology for pollution phosphorus, totalisPrecipitation separation + anaerobic biological treatment，Its Technical efficiency of end-of-pipe management20，The formula for calculating the actual operation rate (k-value) of the end-of-pipe treatment facility is k = opreating time of treatment facilities (hours/year) / normal production time (hours/year)
污染物指标总磷的末端治理技术是沉淀分离+厌氧生物处理法，其效率为20，末端治理设施实际运行率（k值）计算公式为k=污水治理设施运行时间（天/年）/生产时间（天/年）

## Reference product
- Semi-finished sausage casing: 1000; input; calculated
  原文件中描述污染物类别为Product，污染物指标为半成品肠衣，此处对其进行了匹配工作，将其匹配到LCAflow库里面相最符合的流

## Outputs
- chemical oxygen demand: 3, 2.4, 2.4, 0.09, 0.75, 0.15, 0.12, 0.75, 1.5 (9 entries); calculated
  原文件中描述污染物类别为废水，污染物指标为化学需氧量，此处对其进行了匹配工作，将其匹配到LCAflow库里面相最符合的流
- Ammonia Nitrogen: 0.248, 0.2232, 0.2232, 0.0124, 0.0372, 0.0744, 0.0744, 0.1984, 0.0248 (9 entries); calculated
  原文件中描述污染物类别为废水，污染物指标为氨氮，此处对其进行了匹配工作，将其匹配到LCAflow库里面相最符合的流
- Nitrogen, organic bound: 0.375, 0.3375, 0.3375, 0.01875, 0.225, 0.3, 0.1125, 0.075, 0.225 (9 entries); calculated
  原文件中描述污染物类别为废水，污染物指标为总氮，此处对其进行了匹配工作，将其匹配到LCAflow库里面相最符合的流
- phosphorus, total: 0.048, 0.0432, 0.0432, 0.0024, 0.0288, 0.0096, 0.0144, 0.0288, 0.0384 (9 entries); calculated
  原文件中描述污染物类别为废水，污染物指标为总磷，此处对其进行了匹配工作，将其匹配到LCAflow库里面相最符合的流

## Data sources
- 第二次全国污染源普查产排污核算系数手册（试用版）,四级代码1353文件，在完整版文件中第2569页
