# 碳酸锂生产;碳酸锂;锂精矿、硫酸、碳酸钙、氧化钙、氢氧化钠、碳酸钠

Dataset: ILCD process, Unit process, single operation
Geography: JS-CN
Classification: Materials production / Inorganic chemicals
Functional unit: Produce 1kg of lithium carbonate
Generated by: 陈鑫, xinchen@mail.nankai.edu.cn
Owner: 天工LCI数据工作小组
Review: Dependent internal review by 天工LCI数据工作小组
Amounts: no units in this file; such an amount is in the reference unit of its flow, which a separate flow dataset defines
copyright: false
licenseType: Free of charge for all users and uses

## General comment
碳酸锂是制备含锂正极材料最常用的锂源之一。 目前我国碳酸锂生产工艺流程为：首先通过高温煅烧将锂精矿晶型由α型转变为β型，然后冷却球磨，将球磨细粉与浓硫酸反应 生产硫酸锂，然后加入氧化钙、碳酸钙和碳酸钠分别进行除钙和沉淀锂，最后经过精制过程（搅拌洗涤、离心过滤和干燥）得到碳酸锂。

## Geography
通用锂业

## Technical purpose
通过此工艺生产的碳酸锂是制造锂离子电池的关键原料，特别是用于含锂正极材料。它适用于电子、汽车（电动汽车电池）和可再生能源储存系统等各种行业。

## Reference product
- Lithium carbonate: 1
  研究参考江苏省通用企业（年产量6000吨）

## Inputs
- Lithium concentrates: 8.08
  研究参考江苏省通用企业（年产量5000吨）
- Sulfuric acid: 2.08
  研究参考江苏省通用企业（年产量6000吨）
- Calcium carbonate (> 63 microns): 0.54
  研究参考江苏省通用企业（年产量6000吨）
- Calcium oxide: 0.54
  研究参考江苏省通用企业（年产量6000吨）
- sodium hydroxide: 0.05
  研究参考江苏省通用企业（年产量6000吨）
- Sodium carbonate: 1.57
  研究参考江苏省通用企业（年产量6000吨）
- electricity: 11.88
  研究参考江苏省通用企业（年产量6000吨）
- Hard coal, at consumer EU-27: 0.675
  研究参考江苏省通用企业（年产量6000吨）
- process steam: 15.2
  研究参考江苏省通用企业（年产量6000吨）

## Outputs
- sulfur dioxide: 0.00157
  研究参考江苏省通用企业（年产量6000吨）
- Dust: 0.0079
  研究参考江苏省通用企业（年产量6000吨）
- chemical oxygen demand: 0.00042
  研究参考江苏省通用企业（年产量6000吨）
- ammonium: 4.25e-5
  研究参考江苏省通用企业（年产量6000吨）
- Suspended solids, unspecified: 0.00024
  研究参考江苏省通用企业（年产量6000吨）

## Data selection and combination
数据取自江苏省通用锂业（年产6000吨碳酸锂）

## Use advice
该数据集代表用于高性能电池应用的碳酸锂生产，应相应使用。在建模环境影响时，用户应考虑方法论的一致性，确保数据集的单元过程与技术时代和区域适用性相匹配。在影响分析中，应注意数据集中给出的电力、硬煤和蒸汽的消耗率，确保分析的准确性。考虑的功能单位是生产1千克碳酸锂。

## Review details
清单： 内部审查通过几个迭代步骤完成，涉及原始数据验证、原始数据记录、代表性、完整性、与 ISO 14040 和 14044 有关的建模的一致性。

## Data sources
- Feng, T., Guo, W., Li, Q., Meng, Z. & Liang, W. Life cycle assessment of lithium nickel cobalt manganese oxide batteries and lithium iron phosphate batteries for electric vehicles in China. Journal of Energy Storage52, 104767 (2022).
