# 铝电解 ; 液态原铝 ; 预焙 ; 冶金用氧化铝 ; 2010年

Dataset: ILCD process, Unit process, single operation
Geography: CN
Reference year: 2021
Classification: Unit processes / Materials production / Metals and semimetals
Generated by: 蔡梓萌, caizm6178@163.com
Owner: 天工LCI数据工作小组
Review: Dependent internal review by 天工LCI数据工作小组
Amounts: no units in this file; such an amount is in the reference unit of its flow, which a separate flow dataset defines
copyright: false
licenseType: Free of charge for all users and uses

## General comment
所描述的工业过程涉及使用预焙技术对冶金用氧化铝进行电解生产液态原铝。这是一个2010年的单元过程数据集，旨在用于铝行业生命周期评估研究，反映铝生产制造阶段，适用于需要高品质冶金级铝材的各种产品。

## Time period
文献发表日期

## Reference product
- aluminium, primary, liquid: 1000; software or database

## Inputs
All rows: software or database
- Integrated AC power consumption: 48791.1
- aluminium oxide, metallurgical: 1919.06
- fluoride salt: 21.88
- anode, prebake, for aluminium electrolysis: 425.48
- Water, unspecified natural origin: 3.19

## Data selection and combination
本研究的数据参考了PA、SA、电力等背景数据的LCA数据。PA数据来自统计数据源，SA数据主要来自文献。背景数据主要来自中国科学院生态环境研究中心CASRCEES 2018建立的中国本地化LCA数据库，涵盖能源、材料、交通、废物管理等LCA数据。

## Use advice
LCA数据集的使用者应确保他们将其应用于适合冶金级铝生产的场景。原铝（PA）和再生铝（SA）数据应分别根据统计和文献来源进行考虑。精确使用中国本地化生命周期评估数据库CAS RCEES 2018中的背景数据至关重要。使用者应确保数据与被模拟的技术范围保持一致，并特别注意方法论选择，包括在LCA模型中是否考虑回收影响。数据的年代（2010年）应在评估其对当前应用的相关性和准确性时予以考虑。

## Review details
清单： 内部审查通过几个迭代步骤完成，涉及原始数据验证、原始数据记录、代表性、完整性、与 ISO 14040 和 14044 有关的建模的一致性。

## Data sources
- Ding, N., Liu, N., Lu, B. & Yang, J. Life cycle greenhouse gas emissions of aluminum based on regional industrial transfer in China. J. Ind. Ecol. 25, 1657–1672 (2021).
