# 铝锭铸造 ; 原生铝锭 ; 铝合金轮毂制造工艺 ; 液态原铝

Dataset: ILCD process, Unit process, single operation
Geography: CN
Reference year: 2018
Classification: Unit processes / Materials production / Metals and semimetals
Generated by: 傅晨玲, fu-chenling@tsinghua.edu.cn
Owner: 天工LCI数据工作小组
Review: Dependent internal review by 天工LCI数据工作小组
Amounts: no units in this file; such an amount is in the reference unit of its flow, which a separate flow dataset defines
copyright: false
licenseType: Free of charge for all users and uses

## General comment
铝合金轮毂铸造工艺

## Time period
文献发表日期

## Technical purpose
从铸造工艺中获得的原生铝锭用于制造铝合金轮毂。这种高纯度铝适合需要超强强度和轻质特性的应用，特别是为汽车工业量身定制。铝合金轮毂为各种车辆提供了耐用性、性能和美观性的平衡。

## Reference product
- aluminium, primary, ingot: 55.5; missing unimportant

## Inputs
All rows: missing unimportant
- electricity, high voltage, aluminium industry: 785.232
- flux, for wave soldering: 0.22
- hard coal; 26.3 MJ/kg: 4.32
- heavy fuel oil: 2.16
- Gas, mine, off-gas, process, coal mining: 17.26
- natural gas, high pressure: 2.32
  Natural gas

## Outputs
All rows: missing unimportant
- carbon dioxide (fossil),carbon dioxide (fossil): 45.62
- carbon monoxide (fossil),carbon monoxide (fossil): 0.04
- sulfur dioxide: 0.12
- Nitrogen oxides: 0.17
- methane (fossil): 0.51
- particles, unspecified: 0.13
- Aluminum slag: 0.22

## Use advice
在使用此数据进行生命周期评估或其他环境影响研究时，确保考虑特定的制造过程排放和能源要求。应重点关注铝材料可能回收的生命周期末期，这可以减少整体环境负担。使用数据集时应了解技术进步和生产实践可能的变化，因为铝合金轮毂制造可能会随着时间的发展而演变。还必须考虑数据集的发表日期，因为较新的数据可能更准确地反映当前流程。

## Review details
清单： 内部审查通过几个迭代步骤完成，涉及原始数据验证、原始数据记录、代表性、完整性、与 ISO 14040 和 14044 有关的建模的一致性。

## Data sources
- Yi Qiu-ping & Tang Chang-ping. Environmental impact assessment of magnesium alloy automobile hub based on life cycle assessment. JOURNAL OF CENTRAL SOUTH UNIVERSITY 25, 1870–1878 (2018).
