# Ultrafiltration module production | hollow fiber membrane, CN

Dataset: ILCD process, Unit process, single operation
Geography: CN
Reference year: 2022
Classification: Materials production / Other mineralic materials
Functional unit: 1 item of ultrafiltration module
Generated by: Jiaqi Lu, wilsherelu@foxmail.com
Review: Dependent internal review by Tiangong LCI Data Working Group
Amounts: no units in this file; such an amount is in the reference unit of its flow, which a separate flow dataset defines
copyright: false

## Reference product
- Ultrafiltration Component; measured
  1Ultrafiltration module

## Inputs
All rows: measured
- plastic pipes: 11.75
  挤压塑料管
- Plastic (unspecified): 4.27
  注塑塑料
- Polyurethane (PU) Filler: 2.42
  聚氨酯（PU）填充剂
- Polyvinylidene fluoride: 21.97
  聚偏二氟乙烯（PVDF）膜
- polyvinylchloride resin (E-PVC): 29.28
  聚氯乙烯(PVC)外壳
- electricity mix: 12.06
  过程电耗
- natural gas: 0.166
  过程消耗天然气

## Outputs
- waste water - treated: 0.143; measured
  废水处理
- municipal solid waste deposition: 0.287; measured
  固体废物

## Review details
Inventory: The internal review was done by several iteration steps concerning raw data validation, raw data documentation, representativity, completeness and consistency of modelling with regard to ISO 14040 and 14044.; Documentation: The review of the documentation was performed by Ecobilan and is in compliance with ISO 14040 and 14044. The data set documentation is correct in view of the appropriateness of the information provided. It includes all relevant information in view of data quality and scope of application of the respective LCI result.
