# 榛子生产

Dataset: ILCD process, Unit process, black box
Geography: TR
Reference year: 2019
Valid until: 2020
Classification: Materials production / Agricultural production means
Functional unit: One-kilogram of in-shell hazelnut
Generated by: 朱娴, zzhu0918@163.com
Owner: 天工LCI数据工作小组
Review: Dependent internal review by 天工LCI数据工作小组
Amounts: no units in this file; such an amount is in the reference unit of its flow, which a separate flow dataset defines
copyright: false
licenseType: Free of charge for all users and uses

## General comment
栽培榛子幼苗，在培育阶段进行施肥、修剪、除草，成熟后通过人工或者机械的手段收获果实。

## Geography
位于土耳其黑海地区的奥尔杜省

## Technical purpose
该数据代表一公斤带壳榛子的生产过程。这种方式生产的榛子通常用于食品工业，包括制作酱料、糖果、烘焙食品以及直接食用的烤坚果。

## Reference product
- Biological yield: 25; article inperiodical

## Inputs
All rows: measured
- Nitrogenous fertilizer: 157.9; min 30; max 382
- Phosphate fertilizer: 61.1; min 14.4; max 132
- Potassium fertilizer: 76.4; min 18; max 165
- Diesel: 0.0106; min 0.0048; max 0.028
- Gasoline (regular): 0.0085; min 0.004; max 0.0198
- Labor: 33.1042; min 174.75; max 7.75

## Use advice
在使用本数据集进行生命周期评估时，确保与系统边界定义保持一致至关重要。排除与榛子主要栽培过程无关的任何运输过程。考虑产品的终生阶段情况，特别是榛子壳是否可以作为副产品利用，例如用于生物质能源生产。确保与地理和技术相关性保持一致，因为这个数据集特定于土耳其黑海地区的奥尔杜省。

## Review details
清单： 内部审查通过几个迭代步骤完成，涉及原始数据验证、原始数据记录、代表性、完整性、与 ISO 14040 和 14044 有关的建模的一致性。
