# 秸秆燃烧发电｜电力｜生物质锅炉（15MW*2）

Dataset: ILCD process, Unit process, single operation
Geography: CN
Reference year: 2020
Classification: Unit processes / Energy carriers and technologies / Electricity
Functional unit: Taking 1 ton of straw as the functional unit
LCI method principle: Consequential
Generated by: 刘超硕, liucs22@mails.jlu.edu.cn
Owner: 天工LCI数据工作小组
Review: Dependent internal review by 天工LCI数据工作小组
Amounts: no units in this file; such an amount is in the reference unit of its flow, which a separate flow dataset defines
copyright: false
licenseType: Free of charge for all users and uses

## General comment
该数据代表使用秸秆燃烧生物质锅炉发电的过程。具体来说，它描述了一个拥有两台15兆瓦锅炉的系统，这些锅炉被设计用于在电网中发电。所产生的电力可以用于居民和工业应用，特别是在优先使用可再生生物质作为能源的情况下。

## Reference product
- electricity from waste incineration: 2721.6; measured

## Inputs
- Crop straw: 1000; measured
- electricity from waste incineration: 468; measured

## Outputs
- carbon dioxide (biogenic),carbon dioxide (biogenic): 1620; measured
  原文未区分排放源为生物源或化石源，根据专家判断此处为生物源。
- sulfur dioxide: 2.4; measured
- nitrogen dioxide: 0.634; measured
- particles (> PM10),particles (> PM10): 0.147; measured

## Use advice
在使用这些数据时，重要的是要持续将1吨秸秆作为功能单位，以确保跨评估的可比性。用户应该考虑到包括稻草的种植、收割、运输和燃烧在内的系统边界。应该包括稻草末端处理情景的考量，如灰烬处理和潜在的养分回收。此外，评估与替代非可再生燃料相关的间接环境影响以及将稻草转移出其他潜在用途的影响。

## Review details
清单： 内部审查通过几个迭代步骤完成，涉及原始数据验证、原始数据记录、代表性、完整性、与 ISO 14040 和 14044 有关的建模的一致性。

## Data sources
- Dai, Y., Zheng, H., Jiang, Z. & Xing, B. Comparison of different crop residue-based technologies for their energy production and air pollutant emission. Science of The Total Environment 707, 136122 (2020).
