# 玻璃重熔;重熔玻璃;重熔

Dataset: ILCD process, Unit process, single operation
Geography: CN
Classification: Unit processes / End-of-life treatment / Material recycling
Generated by: 王楠, 1209824595@qq.com
Owner: 天工LCI数据工作小组
Review: Dependent internal review by 天工LCI数据工作小组
Amounts: no units in this file; such an amount is in the reference unit of its flow, which a separate flow dataset defines
copyright: false
licenseType: Free of charge for all users and uses

## General comment
玻璃需要重熔，EVA(乙烯醋酸乙烯)需要热处理，铝需要重熔和化学处理，然后才能在模块组装过程中替代原始材料。同时，在多晶硅生产和多硅光伏电池中，硅和银在回收前都需要进行化学处理。

## Technical purpose
所描述的工业过程包括回收和处理用于制造多晶硅光伏（multi-Si PV）组件的材料。具体来说，玻璃需要重熔，乙烯醋酸乙烯（EVA）需经热处理，铝要经过重熔和化学处理，以便它们可以用作光伏模块装配中原始材料的替代品。硅和银的回收也需要化学处理，作为多晶硅生产和多硅光伏电池生产过程的一部分。

## Reference product
- Glass for recovery (shards): 47.5; input; software or database

## Inputs
- Oxidant: 9.47; software or database
  氧化剂
- Standard coal: 6.8; software or database
  标煤

## Outputs
All rows: software or database
- Glass for recovery (shards): 42.3
- oxygen: 3.5
- sulfur dioxide: 4.3
- carbon dioxide: 8.5
- nitrogen dioxide: 2.6
- nitrogen: 2.5

## Data selection and combination
多硅光伏组件的库存数据来源于多个来源:(1)Fu(2013)等文献，其中包含江苏省多家光伏企业的材料库存;Diao和Shi(2011)，其中包含北京两家光伏企业的材料库存;He(2013)，其中包含甘肃和四川四家光伏企业的材料库存。(2)四川(环评-四川，2008)、河南(环评-河南，2009)和重庆(环评-重庆，2008)多硅光伏生产企业环境影响评价报告(eia)。(3)《中国光伏发展市场前瞻与投资展望行业报告(2014)》和《中国多晶硅发展市场前瞻与投资展望行业报告(2014)》。当特定材料有不同的数据源时，应用平均值。

## Use advice
在使用多晶硅光伏组件的库存数据时，如果针对特定材料遇到不同的数据来源，请确保使用平均值。这一指导对于保持生命周期评估的一致性和可靠性是必要的。数据来源包括学术文献、环境影响评价报告（EIAS）以及与中国光伏企业相关的行业报告。在详细的生命周期评估建模时，注意地理和技术相关性，适时验证和更新数据以确保所评估过程的准确性。

## Review details
清单： 内部审查通过几个迭代步骤完成，涉及原始数据验证、原始数据记录、代表性、完整性、与 ISO 14040 和 14044 有关的建模的一致性。

## Data sources
- Huang, B. et al. Environmental influence assessment of China’s multi-crystalline silicon (multi-Si) photovoltaic modules considering recycling process. Solar Energy 143, 132–141 (2017).
