# Pig production | intensive feeding | feed raw materials production

Dataset: ILCD process, Unit process, single operation
Geography: SC-CN
Reference year: 2006
Classification: Materials production / Other mineralic materials
Functional unit: In this study, the functional unit (FU) was defined as "1kg pig carcass", which included skin, bone and fat. Foreign studies generally only considered lean meat, but in China's consumption mode, skin and viscera were also fully utilized as edible foods. The concept of carcass was adopted in this study. Although the bone included in this study is an inedible part, it can play a certain compensative role because it does not contain internal organs. In addition, the current data can be easily converted into carcass weight, so it is more in line with the actual situation.
Generated by: Rui Yang, 1632707028@qq.com
Review: Dependent internal review by Tiangong LCI Data Working Group
Amounts: no units in this file; such an amount is in the reference unit of its flow, which a separate flow dataset defines
copyright: false

## General comment
Large-scale intensive feeding in hilly and plain areas. It provides about 1.5% of Sichuan's commercial pigs, and plays a major role in modern pig farming in Sichuan. The main scenarios and parameters of this pig raising scenario are as follows: (1) Energy feed is mainly corn and other grains, all feed raw materials are purchased from outside the system, the feeding period is about 170d, and the average output is 95kg; ② The average number of listed is 5000 per year, most of the varieties are foreign three yuan hybrid pigs (such as DLY, a few are PIC commercial pigs), the slaughter rate is 76%, and the whole feed meat ratio is 3.0:1; ③ The feeding management is more advanced, the use of a large number of modern pig technology, generally self-breeding, the use of limit column and high bed feeding. ④ Fecal treatment and utilization: fecal and sewage anaerobic fermentation treatment. 70% is shipped out to return to the field (at present, this level has not been reached, assuming that this goal can be achieved in the next 5 years due to the strict implementation of environmental protection laws and regulations) long-term storage accounted for 45%, 30% after anaerobic fermentation treatment and put into the surrounding environment  discharge water COD is 200mg/L.

## Geography
Since the agricultural resource consumption is allocated according to the occupied land, the specific crop yield is no longer considered in scenario A, and the concentrated feed and the full-priced feed under various scenarios are converted into equivalent land area according to the corresponding average yield of main grains in the whole country or Sichuan province according to the set two situations.

## Time period
The average level of energy consumption and the amount of fertilizer, pesticide and mulch used in feed raw materials production in Sichuan Province was calculated according to China Statistical Yearbook 2006.

## Technology and included processes
Soybean meal (70%) and rapeseed meal (10%) were analyzed in concentrate, and other components were not considered. The components of the full price feed are mainly corn based grains (70%) and soybean meal (25%), and the other components are not considered. Minerals, disinfectants and various small equipment facilities are not included.

## Reference product
- pig: 1; measured
  pig carcass

## Inputs
- hard coal: 1.5198; calculated
  Scenario C
- Gasoline (regular): 0.149674; calculated
  Scenario C
- nitrogen: 0.07; measured
  Scenario C
- phosphorus: 0.0162; measured
  Scenario C
- potassium: 0.0055; measured
  Scenario C
- polyvinylchloride resin (E-PVC): 0.0051; measured
  Scenario C
- Diesel: 1.20633; calculated
  Scenario C
- Electricity: 0.0706899; calculated
  Scenario C

## Deviations from the LCI method approaches
This study combined LCA methodology and scenario analysis method to conduct systematic environmental impact assessment for three typical pig production scenarios in Sichuan, explore the specific algorithms applied to the current environmental impact assessment of pig production, and reveal the environmentally friendly and unfavorable aspects of various pig production systems and their non-renewable energy utilization efficiency. The results are helpful to the understanding of environmental impact of pig industry and provide reference for the establishment of sustainable development model of pig industry.

## Data selection and combination
1) The basic situation of Sichuan pig industry and the setting of various scenarios in this study, on the one hand, the opinions of a number of pig experts in Sichuan Province were solicited, and on the other hand, field investigations were carried out. 2) The relevant data in crop production are mainly from the 2005 statistics given in the annual yearbook. The production data of feed raw materials in Sichuan and the national average data are used to distinguish the two cases of raw materials coming from within the province and outside the province.

## Data treatment and extrapolations
The production data of feed raw materials in Sichuan and the national average data are used to distinguish the two cases of raw materials coming from within the province and outside the province. The consumption of agricultural materials is calculated according to the corresponding raw material consumption and the average yield of main grains in the whole country or Sichuan Province, and then calculated according to the area. Due to the large differences in the feed formulations used in the three scenarios, the assumption of the proportion of main raw material consumption was made, and then adjusted according to the sample survey data.

## Review details
Inventory: The internal review was done by several iteration steps concerning raw data validation, raw data documentation, representativity, completeness and consistency of modelling with regard to ISO 14040 and 14044.; Documentation: The review of the documentation was performed by Ecobilan and is in compliance with ISO 14040 and 14044. The data set documentation is correct in view of the appropriateness of the information provided. It includes all relevant information in view of data quality and scope of application of the respective LCI result.

## Data sources
- 白林. 四川养猪业清洁生产系统LCA及猪粪资源化利用关键技术研究. (四川农业大学, 2007).
