# 烧碱生产 ; 氢氧化钠 ; 摇篮

Dataset: ILCD process, Unit process, single operation
Geography: CN
Reference year: 2019
Classification: Unit processes / Materials production / Inorganic chemicals
Generated by: 蔡梓萌, caizm6178@163.com
Owner: 天工LCI数据工作小组
Review: Dependent internal review by 天工LCI数据工作小组
Amounts: no units in this file; such an amount is in the reference unit of its flow, which a separate flow dataset defines
copyright: false
licenseType: Free of charge for all users and uses

## General comment
在此过程中生产的氢氧化钠（俗称烧碱）被广泛应用于多个行业。它是造纸和纸浆制造、纺织、饮用水、肥皂和洗涤剂生产以及作为管道清洁剂的关键化学品。此外，它在食品工业中用于清洁和消毒设备、剥皮水果和蔬菜以及食品准备过程中。在化学工业中，它用于pH调节、作为各种化合物生产中的试剂，以及石油精炼中。

## Time period
文献发表日期

## Reference product
- Sodium hydroxide: 1000; software or database
  caustic soda

## Inputs
- hard coal; 26.3 MJ/kg: 2062.56; software or database
  Fuel mix: raw coal (20%), electricity (80%)
- electricity, high voltage, aluminium industry: 8251.04; software or database
  Fuel mix: raw coal (20%), electricity (80%)

## Data selection and combination
能源输入和物流的清单来自更新的年鉴、发表的论文、官方报告和数据库。清单的详细信息如表1所示。需要注意的是，材料运输假设的数据基于相关研究，可能与实际情况略有不同。每种最终使用能源类型的生命周期强度基于我们之前研究的结果。

## Use advice
在使用此数据进行生命周期评估时，请仔细参考表1中呈现的能源投入和物料流动清单。考虑此数据集所用运输假设与实际运输情况之间可能存在的偏差。此外，根据您研究涉及的具体子过程和最终使用能源类型，可能需要进行调整。确保您的LCA建模准确反映数据集中呈现的每种能源类型的生命周期强度，并考虑数据集中突出的以往研究结果，以进行全面评估。此外，该过程仅有能源数据，仅作为能源消耗的参考数据，如需使用请根据实际情况补全其它信息。

## Review details
清单： 内部审查通过几个迭代步骤完成，涉及原始数据验证、原始数据记录、代表性、完整性、与 ISO 14040 和 14044 有关的建模的一致性。

## Data sources
- Peng, T., Ou, X., Yan, X. & Wang, G. Life-cycle analysis of energy consumption and GHG emissions of aluminium production in China. in Energy Procedia vol. 158 3937–3943 (2019).
