# 育肥猪生产 ; 作物种植过程

Dataset: ILCD process, Unit process, single operation
Geography: LN-CN
Reference year: 2010
Classification: Unit processes / Materials production / Agricultural production means
Functional unit: The evaluation unit was 1000 fattening pigs
Generated by: 杨瑞, 1632707028@qq.com
Owner: 天工LCI数据工作小组
Review: Dependent internal review by 天工LCI数据工作小组
Amounts: no units in this file; such an amount is in the reference unit of its flow, which a separate flow dataset defines
copyright: false
licenseType: Free of charge for all users and uses

## General comment
作物种植过程中涉及到的能源消耗主要为施肥、 除草以及收割过程中农用机械的油耗。根据黄虎等的 研究，农机油耗（柴油）取固定道保护性耕作与非固定 道保护性耕作的平均值 56.25 L·hm-2。柴油的燃烧 值是 9 800 kcal·kg-1，柴油的密度是 0.85 kg·L-1。因此 燃烧 1 L 柴油可释放 8 330 kcal 的热量，1 kcal 可以 换算为 4.2 kJ，则燃烧 1 L 柴油可产生 34.99 MJ 能量。

## Geography
辽宁省 2010 年玉米、大豆和小麦每公顷产量分 别为 ···

## Time period
辽宁省2010年玉米、大豆和小麦每公顷产量分别为······

## Technology and included processes
评价内容包括：使用农用机械油耗所产生的气体排放

## Technical purpose
所描述的工业流程主要用于农业领域的育肥猪生产。这包括用于饲料的作物种植，其中能源消耗在施肥、除草和收割期间的农用机械操作中是一个关键因素。同时，农用机械柴油的使用也被纳入，以提供对全球变暖、环境酸化和富营养化有贡献的气体排放的见解。这些数据对于农业生产分析和猪场运营的环境影响评估具有相关性。

## Reference product
- pig: 1000; estimated
  作为参考定量，非实际输出

## Inputs
- Diesel: 4.52925; calculated

## Outputs
All rows: measured
- carbon dioxide (fossil),carbon dioxide (fossil): 14371.3
- carbon monoxide (fossil): 4.92
- nitrogen, total (excluding N2): 24.24
  1氮氧化物
- sulfur oxides: 44.69
  1硫氧化物
- maize grain: 216000
- soybean: 33100
- wheat: 144000

## Data selection and combination
本文数据来自辽宁省36家规模化育肥猪养殖场调查；并参照《辽宁统计年鉴》提供的相关数据计算出育 肥猪生产过程中全球变暖、环境酸化和富营养化的影 响潜力。

## Use advice
在使用所提供的数据集时，研究人员和从业者应注意用于计算环境影响的具体方法论。对分析单位（每1000头出栏育肥猪）的仔细考虑至关重要。应将农用机械的燃油消耗值纳入总能源消耗分析。在将数据集成入更广泛的生命周期评估框架时，用户应适当转换能量单位，并确保在影响潜力计算中充分计入燃料消耗产生的气体排放。

## Review details
清单： 内部审查通过几个迭代步骤完成，涉及原始数据验证、原始数据记录、代表性、完整性、与 ISO 14040 和 14044 有关的建模的一致性。

## Data sources
- 刘鸣达, 赵妍, 刘显军, & 王耀晶. 辽宁省育肥猪生产环境影响的生命周期评价. 农业环境科学学报 31, 1250–1255 (2012).
