# Solvent extraction of REE|REE|baseline|REE containing ore

Dataset: ILCD process, Unit process, single operation
Geography: NMG-CN
Reference year: 2012
Classification: Materials production / Other mineralic materials
Functional unit: Not Mentationed
LCI method principle: Attributional
LCI method approaches: Allocation - market value
Generated by: Tao Wang, twang@iue.ac.cn
Review: Dependent internal review by Tiangong LCI Data Working Group
Amounts: no units in this file; such an amount is in the reference unit of its flow, which a separate flow dataset defines
copyright: false

## Technology and included processes
Ore is recovered from the open pit mine using conventional surface mining techniques such as drilling and blasting. The mine contains 750 million tons of ore at 4.1% REO

## Reference product
- Neodymium oxide: 1; software or database

## Inputs
All rows: software or database
- Chemicals, organic: 0.317
- transport in t*km,transport in t*km: 1.43
  lorry >16t
- transport in t*km,transport in t*km: 25.7
  freight, rail
- Hydrochloric acid: 0.72
- Sodium hydroxide: 1.86
- Ammonium bicarbonate: 1.1
- heavy fuel oil: 3.9
- Hazardous organic waste for disposal (unspecific): 0.2
- Kerosene: 5.31
- Electricity: 3.348
- REO: 4.91

## Outputs
All rows: software or database
- REO: 3.87
  Other 99.99% REO's, at solvent extraction, primary, baseline
- waste heat: 3.35
- chloride: 0.0163
- carbon dioxide (fossil): 2.27
- hydrogen fluoride: 0.0143
- Suspended solids, unspecified: 0.0107
- thorium-232: 0.271
- antimony-122: 1

## Deviations from the LCI method approaches
In this section, we discuss the life cycle inventory (LCI) in detail. Each subsection discusses one process of the LCA. Section 3.1 describes the conventional method of rare earths in China from mineral sources. Section 3.2 describes the production process used to transform neodymium oxide into an NdFeB magnet. Finally, section 3.3 describes two alternative recycling processes that could be used. Detailed information on the LCI, assumptions, and allocation choices can be found in the Supporting Information.

## Review details
Inventory: The internal review was done by several iteration steps concerning raw data validation, raw data documentation, representativity, completeness and consistency of modelling with regard to ISO 14040 and 14044.; Documentation: The review of the documentation was performed by Ecobilan and is in compliance with ISO 14040 and 14044. The data set documentation is correct in view of the appropriateness of the information provided. It includes all relevant information in view of data quality and scope of application of the respective LCI result.

## Data sources
- Sprecher, B. et al. Life Cycle Inventory of the Production of Rare Earths and the Subsequent Production of NdFeB Rare Earth Permanent Magnets. Environ. Sci. Technol. 48, 3951–3958 (2014).
