# VanadiumSlag|steelscrap,iron(lump)，ferroalloy,slaggingagent|Converter method|All sizes / 钒渣|废钢、铁水（块）、铁合金、造渣剂|转炉法|所有规模

Dataset: ILCD process, Unit process, single operation
Geography: CN
Reference year: 2019
Classification: Materials production / Metals and semimetals
Generated by: The data was created by the Office of the Second National Pollution Source Census of the Ministry of Ecology and Environment, and the data was organized by the TianGong Plan team for ILCD format / 生态环境部第二次全国污染源普查工作办公室创建数据，天工计划团队常慧敏整理数据为ILCD格式
Owner: Tiangong LCI Data Working Group / 天工LCI数据工作小组
Amounts: no units in this file; such an amount is in the reference unit of its flow, which a separate flow dataset defines
copyright: false
licenseType: Free of charge for all users and uses

## Technology and included processes
the Technical of end-of-pipe management technology for pollution particles (PM2.5 - PM10)isBag filter，Its Technical efficiency of end-of-pipe management99.6

## Reference product
- Vanadium Slag: 1000; calculated
  源文件中描述为为钒渣，此处对其进行了匹配工作，将其匹配到LCAflow库里面相最符合的流，污染物指标备注为提钒转炉二次烟气废气量，产污系数备注为专指提钒转炉对应的产污系数

## Outputs
- Exhaust gas: nan; calculated
  污染物指标提钒转炉二次烟气废气量的末端治理技术是/，其效率为0。原文件中描述污染物类别为废气，污染物指标为提钒转炉二次烟气废气量，此处对其进行了匹配工作，将其匹配到LCAflow库里面相最符合的流，污染物指标备注为提钒转炉二次烟气废气量，产污系数备注为专指提钒转炉对应的产污系数
- particles (PM2.5 - PM10): nan; calculated
  污染物指标颗粒物(提钒转炉二次烟气有组织)的末端治理技术是布袋除尘，其效率为99.6，末端治理设施实际运行率（k值）计算公式为k=除尘设备年正常运行小时数（小时）/生产系统年运行小时数（小时）。原文件中描述污染物类别为废气，污染物指标为颗粒物(提钒转炉二次烟气有组织)，此处对其进行了匹配工作，将其匹配到LCAflow库里面相最符合的流，污染物指标备注为提钒转炉二次烟气有组织颗粒物，产污系数备注为专指提钒转炉对应的产污系数

## Data sources
- 第二次全国污染源普查产排污核算系数手册（试用版）,四级代码3120文件，在完整版文件中第4111页
