# 污泥处理与处置|焚烧

Dataset: ILCD process, Unit process, single operation
Geography: HF-AH-CN
Classification: Materials production / Other mineralic materials
Generated by: Jin Sitian, JSTian0302@163.com
Review: Dependent internal review by Tiangong LCI Data Working Group
Amounts: no units in this file; such an amount is in the reference unit of its flow, which a separate flow dataset defines

## Geography
合肥望塘污水处理厂

## Reference product
- Sludge: 1000; input; estimated
  1t含水率为80.94%的剩余污泥

## Outputs
All rows: article inperiodical
- carbon dioxide: 209.127
- sulfur dioxide: 1.182
- mineral waste (ash): 98.185
- methane
- Nitrogen oxides: 2.204
- carbon monoxide: 0.8288
- nitrous oxide
- volatile organic compound
- Flue dust: 1.885
- cadmium
- zinc: 0.059835
- copper: 0.02677
- lead: 0.002443
- nickel: 0.001146
- chromium: 0.00203

## Review details
Inventory: The internal review was done by several iteration steps concerning raw data validation, raw data documentation, representativity, completeness and consistency of modelling with regard to ISO 14040 and 14044.; Documentation: The review of the documentation was performed by Ecobilan and is in compliance with ISO 14040 and 14044. The data set documentation is correct in view of the appropriateness of the information provided. It includes all relevant information in view of data quality and scope of application of the respective LCI result.

## Data sources
- 基于生命周期评价的典型剩余污泥处理方法的环境影响比较研究
