# Coke production|Coke| Coking

Dataset: ILCD process, Unit process, single operation
Geography: CN
Reference year: 2014
Classification: Materials production / Other mineralic materials
Generated by: Fuxiang, 1162850692@qq.com
Review: Dependent internal review by Tiangong LCI Data Working Group
Amounts: no units in this file; such an amount is in the reference unit of its flow, which a separate flow dataset defines
copyright: false

## Time period
基于 A 钢厂 2014 年的生产数据进行计算和分析对比。

## Reference product
- Coke: 367.5
  焦炭

## Inputs
- process steam: 150
- oxygen: 3.32
- Electricity: 58.68
- Cleaned coal: 512.6
  洗精煤
- Coke oven gas: 21
  焦炉煤气
- Blast furnace gas: 384
  高炉煤气

## Outputs
- process steam: 630
- benzene: 3.6
- Coal tar: 16.1
  煤焦油
- Electricity: 167.328
  干熄焦发电
- Coke oven gas: 165
  焦炉煤气
- carbon dioxide: 394300; calculated
- methane: 10; calculated
- nitrous oxide: 8; calculated

## Review details
Inventory: The internal review was done by several iteration steps concerning raw data validation, raw data documentation, representativity, completeness and consistency of modelling with regard to ISO 14040 and 14044.; Documentation: The review of the documentation was performed by Ecobilan and is in compliance with ISO 14040 and 14044. The data set documentation is correct in view of the appropriateness of the information provided. It includes all relevant information in view of data quality and scope of application of the respective LCI result.

## Data sources
- 1. 刘宏强, 付建勋, 刘思雨, 谢欣悦, & 杨笑楹. 钢铁生产过程二氧化碳排放计算方法与实践. 钢铁 51, 74–82 (2016).
