# 基础建设 ; 3.6 MW 风轮机铁塔基础

Dataset: ILCD process, Unit process, single operation
Geography: SH-CN
Reference year: 2009
Classification: Unit processes / Systems / Construction
Functional unit: The functional unit is 1 kWh on-grid electricity provision.
LCI method principle: Attributional
LCI method approaches: Allocation
Generated by: 赵云志, ll10088@163.com
Owner: 天工LCI数据工作小组
Review: Dependent internal review by 天工LCI数据工作小组
Amounts: no units in this file; such an amount is in the reference unit of its flow, which a separate flow dataset defines
copyright: false
licenseType: Free of charge for all users and uses

## General comment
该数据集代表3.6 MW风力涡轮机铁塔基础的建造过程，这是东海大桥海上风电场建设中不可或缺的一环。该海上风电场用于生产电网供电的电力，有助于提供可再生能源并减少对化石燃料的依赖。涡轮机基础对于风力发电场的结构稳定性和运行效率至关重要，特别是为了适应海上特有环境条件而设计。

## Geography
所研究的风电场- -东海大桥海上风电场( DBOWF )是中国在上海管辖范围内的第一个海上风电场，也是欧洲以外的第一个海上风电场。工程分两期施工，分别位于东海大桥两侧(图1 )。

## Reference product
- Wind tower foundation: 1; measured

## Inputs
- Concrete: 1475.5
  Marine/Core concrete
- steel rebar: 174900
  Steel bar
- Steel,Steel: 216000
- Pile foundation steel pipe column: 829900
  Steel pipe column
- aluminium: 3000
  Al alloy

## Deviations from the LCI method approaches
本研究采用PLCA建模方法计算了中国某典型海上风电场的能源和环境排放。从摇篮到坟墓的过程包括材料和设备制造、运输和安装、操作和维护、拆解和回收4个阶段(图2 )。

## Data selection and combination
风机、基础和电缆的技术参数从DBOWF的设计文件中获得(表2)。能源和排放因子(即单位材料和构件生产的能源消耗和环境排放)来源于Ecoinvent 2.2数据集(生态发明中心, 2009)，优先参考中国实践的系数。对于关键材料和设备，其海上运输能量由运输负荷和海运能量强度计算得到。根据施工方案，对设施安装能耗和排放进行了估算。风电场的运行和维护数据，如维护的频率和工作时间，是通过与工程技术人员的现场调查获得的。与模型参数和输入数据相关的不确定性在本文的敏感性分析部分进行了说明。

## Use advice
数据使用者在评估海上风力涡轮机基础建设的环境影响时，特别是针对上海管辖范围内类似东海大桥海上风电场项目的情况，应参考此数据集。该数据集基于PLCA建模方法，因此应与类似的方法框架集成以确保一致性。用户应注意从摇篮到坟墓生命周期中每个阶段的能源消耗和环境排放，并应用基于中国实践的相关系数。注意模型参数和输入数据的潜在不确定性，并咨询敏感性分析部分以指导这些差异。

## Review details
清单： 内部审查通过几个迭代步骤完成，涉及原始数据验证、原始数据记录、代表性、完整性、与 ISO 14040 和 14044 有关的建模的一致性。

## Data sources
- Yang, J. et al. The life-cycle energy and environmental emissions of a typical offshore wind farm in China. Journal of Cleaner Production 180, 316–324 (2018).
