# Solar grade multi-Si wafer production

Dataset: ILCD process, Unit process, single operation
Geography: SC-CN
Reference year: 2013
Classification: Materials production / Other materials
Functional unit: 1 kg solar grade multi-Si
LCI method principle: Attributional
LCI method approaches: Allocation
Generated by: Jinfeng Yang, yjfzfshn@163.com
Owner: Tiangong LCI Data Working Group
Review: Dependent internal review by Tiangong LCI Data Working Group
Amounts: no units in this file; such an amount is in the reference unit of its flow, which a separate flow dataset defines
copyright: false
licenseType: Free of charge for all users and uses

## General comment
Multi-Si

## Geography
Based on the collection of data and information on the production process of a solar multi-Si wafer company in Sichuan

## Time period
Available online

## Reference product
- Multi-Si wafer: 1e6; measured
  Polycrystalline silicon wafer (MW)

## Inputs
All rows: measured
- Solar grade multi-Si: 9670
  Solar grade polysilicon
- electricity: 595026
  Power consumption
- Water (fresh water): 1.53165e6
  fresh water
- Mortar: 36720
  mortar
- Hydrochloric acid: 90
  hydrochloric acid
- Hydrofluoric acid: 100
  hydrofluoric acid
- Nitric acid: 450
  nitric acid
- Lactic acid: 1620
  lactic acid
- Silicon nitride: 105
  silicon nitride
- Sodium hydroxide: 667
  NaOH

## Outputs
All rows: measured
- hydrogen chloride: 0.583
  HCl
- Nitrogen oxides: 3.06
- Dust (unspecified, from stack): 0.944
  dust
- chemical oxygen demand: 179.28
  COD
- nitrogen, total (excluding N2): 14.13
  TN
- chloride: 15.18
- fluoride: 11.46
  Fluoride
- Suspended solids, unspecified: 53.95
  suspended solids
- industrial waste (unspecified): 370
  Solid Waste

## Deviations from the LCI method approaches
In this paper, solar-grade polysilicon is taken as the research object, and the value of resource, energy input and environment emission of solar-grade polysilicon life cycle process at domestic and general production level is calculated quantitatively by using LCA evaluation method

## Data selection and combination
According to a Sichuan solar multi-Si wafer production process data

## Review details
Inventory: The internal review was done by several iteration steps concerning raw data validation, raw data documentation, representativity, completeness and consistency of modelling with regard to ISO 14040 and 14044.

## Data sources
- 何洋. 太阳能级多晶硅的生命周期评价. (西南交通大学, 2013).
