# 土壤和地下水修复;原位;土壤淋洗;修复后的土壤

Dataset: ILCD process, Unit process, single operation
Geography: KR
Reference year: 2023
Classification: Unit processes / Other Services / Repair and maintenance
Generated by: 黄悦, huangyue@caep.org.cn
Owner: 天工LCI数据工作小组
Review: Dependent internal review by 天工LCI数据工作小组
Amounts: no units in this file; such an amount is in the reference unit of its flow, which a separate flow dataset defines
copyright: false
licenseType: Free of charge for all users and uses

## General comment
包括土壤冲洗过程

## Geography
Incheon City, approximately 50 km east of Seoul, South Korea

## Technical purpose
所述过程用于地外土壤和地下水修复，特别是通过土壤淋洗和化学提取。这种修复技术是针对从其原始位置移至受控环境的受污染土壤，通常在原位处理不可行的情况下应用。该过程对多种污染物有效，用于环境工程项目。所引用使用的地点位于韩国首尔东部约50公里的仁川市。这种方法适用于土壤污染阻碍场地再开发或构成环境健康风险的工业应用。

## Reference product
- Remediated soil: 1; measured

## Inputs
All rows: measured
- Electricity: 61413.8
- hydrogen chloride: 174
- Tap Water: 5215
- Pre-treatment Soil: 1
- waste water - untreated: 1

## Outputs
- carbon dioxide (fossil): 317000; measured
- particles (PM10): 1.51; measured
- sulfur oxides: 30.6; measured
- nitrous oxide: 32.5; measured

## Data treatment and extrapolations
通过使用SiteWiseTM第2版分别计算每个阶段的环境足迹来分析总环境足迹

## Use advice
在使用该数据集进行生命周期评估（LCA）时，请将所有主要原材料和必要的能源消耗纳入分析中。确保土壤冲洗过程作为单元过程的一部分被包括在内。使用SiteWiseTM第2版分别计算每个阶段的环境足迹以得出总环境足迹。仔细审查方法论适配性，考虑技术适用性，适用于技术和地理环境与韩国仁川市类似的修复项目。

## Review details
清单： 内部审查通过几个迭代步骤完成，涉及原始数据验证、原始数据记录、代表性、完整性、与 ISO 14040 和 14044 有关的建模的一致性。

## Data sources
- Kim, D.-H., Hwang, B.-R., Moon, D.-H., Kim, Y.-S. & Baek, K. Environmental assessment on a soil washing process of a Pb-contaminated shooting range site: a case study. Environ Sci Pollut Res 20, 8417–8424 (2013).
