# 大黄鱼生产|大黄鱼成鱼|深水抗风浪网箱养殖

Dataset: ILCD process, Unit process, black box
Geography: ZS-ZJ-CN
Classification: Materials production / Other mineralic materials
Generated by: Kangni Wu, wukangni@xmu.stu.edu.cn
Review: Dependent internal review by Tiangong LCI Data Working Group
Amounts: no units in this file; such an amount is in the reference unit of its flow, which a separate flow dataset defines

## General comment
大黄鱼网箱养殖的系统边界包括大黄鱼网箱建设所需材料（木材、聚乙烯和水泥）的生产、大黄鱼养殖所需资料（配合饲料、甲醛和电冰箱等）的生产、各种材料的运输和养殖过程生产及各过程使用能源的生产和消耗。不包括大黄鱼鱼苗的孵化到半成鱼的养殖和大黄鱼成鱼的加工的过程。

## Geography
舟山市东极镇大黄鱼深水大网箱养殖基地

## Reference product
- Large Yellow Croaker: 1000; article inperiodical

## Inputs
All rows: article inperiodical
- Electricity: 48.708
- Polyethylene: 64.45
- Cement: 1.8
- trash fish: 3364
- Assorted Feed: 336
- Formaldehyde: 0.079
- Diesel: 46.21

## Review details
Inventory: The internal review was done by several iteration steps concerning raw data validation, raw data documentation, representativity, completeness and consistency of modelling with regard to ISO 14040 and 14044.; Documentation: The review of the documentation was performed by Ecobilan and is in compliance with ISO 14040 and 14044. The data set documentation is correct in view of the appropriateness of the information provided. It includes all relevant information in view of data quality and scope of application of the respective LCI result.

## Data sources
- 付晓洋. 基于生命周期评价的大黄鱼网箱养殖环境影响分析. (浙江海洋大学, 2016).
