# 露地蔬菜生产 ; 农作生产（大白菜）

Dataset: ILCD process, Unit process, single operation
Geography: CN
Classification: Unit processes / Materials production / Agricultural production means
Functional unit: hm2
Generated by: Haoran Zhang, hrzhang@whu.edu.cn
Owner: 天工LCI数据工作小组
Review: Dependent internal review by 天工LCI数据工作小组
Amounts: no units in this file; such an amount is in the reference unit of its flow, which a separate flow dataset defines
copyright: false
licenseType: Free of charge for all users and uses

## General comment
系统边界集中于露地蔬菜生产全过程 ( 从播种到收获过程) ，分为农资阶段和农作阶段． 农资阶段主要关注肥料( 化肥和有机肥) 、农药和农 膜等生产和运输过程产生的温室气体排放． 农作阶 段主要关注肥料和农药施用过程、农事操作( 耕作、 灌溉等) 过程柴油消耗和人工耗能产生的温室气体 排放，另外还关注蔬菜通过净初级生产力固定于本 身的碳和有机肥投入引起的土壤有机碳固定［16］． 选 取单位面积( 每 hm2 ) 为此系统评价单元．

## Technology and included processes
基于国家农业统计数据，以露地番茄、黄瓜、大白菜和萝卜为研究对象，应用生命周期评价( life cycle assessment，LCA) 方法，定量化我国 4 种典型露地蔬菜生产中的净温室气体排放( net greenhouse gas emission，NGHGE) ，并比较蔬菜种类间、省域间净温室气体排放差异和分析减排措施．

## Technical purpose
该数据集涉及基于中国情境中露地蔬菜（番茄、黄瓜、大白菜和萝卜）的农资（化肥和有机肥、农药和农膜）输入和农事操作（耕作、灌溉和劳动）对净温室气体排放的评估。它适用于环境影响评价，减排策略的政策制定，以及中国不同蔬菜类型和省份之间的比较。

## Reference product
- celery cabbage: 68700; software or database

## Inputs
All rows: software or database
- nitrogen: 323
  肥料
- phosphorus: 166
  肥料
- Diesel: 0.0668
- potassium: 158
  肥料
- nitrogen: 296
  化肥
- phosphorus: 148
  化肥
- potassium: 139
  化肥
- nitrogen: 26.9
  有机肥
- phosphorus: 17.1
  有机肥
- potassium: 18.9
  有机肥
- Agricultural film: 14.6
- Labor: 297

## Deviations from the LCI method approaches
分为农资阶段和农作阶段．农资阶段主要关注肥料( 化肥和有机肥) 、农药和农膜等生产和运输过程产生的温室气体排放． 农作阶段主要关注肥料和农药施用过程、农事操作( 耕作、灌溉等) 过程柴油消耗和人工耗能产生的温室气体排放，另外还关注蔬菜通过净初级生产力固定于本身的碳和有机肥投入引起的土壤有机碳固定

## Data selection and combination
根据蔬菜种类和数据库能查询的各类蔬菜种植分布情况，选择 4种典型露地蔬菜，分别为瓜果类( 番茄、黄瓜) 、叶菜类( 大白菜) 和块根类( 萝卜) ，并收集整理 2016 年全国不同省份 4 种露地蔬菜生产种植相关数据( 中国台湾省数据暂缺)

## Data treatment and extrapolations
各种蔬菜的肥料施用量、柴油用量、农膜投入量、劳动者用工和产量数据从文献获得，其中，柴油费用通过公式［18］: 柴油费用 =( 机械作业费 + 排灌费 － 水费) × 21% + 燃料动力费计算得出，柴油单价数据来源于我国油价网数据库［19］． 农药投入数据参考罗巍［20］对全国露地蔬菜农药施用大数据分析的研究结果． 从文献［15］中查询获得各省不同种类蔬菜播种面积．

## Use advice
使用此数据集时，确保清楚了解中国内部不同省份温室气体（GHG）排放的地区差异，因为各省之间的可变性可能会显著影响结果。此外，应考虑每种蔬菜类型的特性和当地农业实践。农业投入品的生产和运输以及其应用和相关的农业操作的温室气体排放是必须考虑的关键因素。台湾省的数据排除需要额外考虑，如果希望进行区域对比性分析，用户应相应调整分析。碳固定元素，如净初级生产力和土壤有机碳固定，也应纳入整体生命周期评价框架中。

## Review details
清单： 内部审查通过几个迭代步骤完成，涉及原始数据验证、原始数据记录、代表性、完整性、与 ISO 14040 和 14044 有关的建模的一致性。

## Data sources
- 张芬,程泰鸿,陈新平,王孝忠.我国典型露地蔬菜生产中的温室气体排放[J].环境科学,2020,41(07):3410-3417.
