# clinker production|clinker|new dry, 5000 t/d|mixed solid wastes

Dataset: ILCD process, Unit process, black box
Geography: HAIN-CN
Classification: Materials production / Other mineralic materials
Generated by: Siqi Yang
Amounts: no units in this file; such an amount is in the reference unit of its flow, which a separate flow dataset defines
copyright: false

## General comment
Papermaking dregs, known as the papermaking green dregs, is a solid waste that generated in the caustic alkali recovery process of pulp and paper mill. The dregs came from one of pulp and paper mill in Hainan Province China. The solid waste mixture includes fly ash and papermaking dregs.

## Model description
Definition of functional units: 1 t of cement clinker is defined as a functional unit. System boundary setting: the raw materials of the plant were set to the starting point of the life cycle, and the output of clinker cement was set to the end point.

## Reference product
- clinker: 1000
  Clinker

## Inputs
All rows: measured
- limestone, crushed, for mill: 1344
  Limestone
- clay: 93
  Clay
- ash: 63
  Fly ash
- iron ore: 32
  Ironstone
- Waste, solid, from paper production: 25
  Papermaking dregs
- hard coal, run-of-mine: 106
  Coal
- electricity, medium voltage: 288
  Power average consumption

## Outputs
- carbon dioxide (fossil): 264; calculated
  m-CO2. The CO2 emissions of coal burning (mc) are calculated with the heat carbon equivalent method. mc=standard coal x 2.93x10^7x 8.494x10^-8 = standard coal x 2.489 where the CO2 of 1 J heat releasing is equivalent to 8.494 × 10^-8 kg. 1 kg of standard coal is equivalent to 2.93 × 10^7 J of heat (calorific value).
- carbon dioxide: 532; calculated
  n-CO2. The CO2 emissions of limestone decomposition (nc) are calculated with Eq. nc = Limestone consumption x 90% x 44% = Limestone consumption x 0.396 where the percent of CaCO3 in the limestone is 90% according to its quality. The percent of CO2 in the CaCO3 is 44%.
- sulfur dioxide: 0.86; measured
  SO2. The data of SO2 emission mainly came from the online monitoring system of the plant.
- Nitrogen oxides: 1.71; measured
  NOx. The data of NOx emission mainly came from the online monitoring system of the plant.
- particles (> PM10): 0.05; measured
  Dust. The particle size is not specified. Here we treat it as PM>10. The data of dust emission mainly came from the online monitoring system of the plant.

## Data selection and combination
The dregs came from one of pulp and paper mill in Hainan Province China. The other raw material of cement production came from the mines of Hainan Province.

## Sampling procedure
The cement plant with 5000 t/d new dry process cement production line was selected and had the test in a city of Hainan Province. The dregs was mixed into the limestone and put into cement kiln with the other raw materials. It disposed the dregs 150 t/d.

## Data sources
- Kan Fu, Xiao Yu Ren, Jin Quan Lin, & Ping Yue. (2013). Comparative Analysis of Environmental Impacts between Dregs Disposal and Conventional Cement Production by Life Cycle Assessment (LCA). Advanced Materials Research 777, 461–466.
