# Pre-treatment-Cyanidation|Goldclayorgold-bearingcarbon|GoldConcentrate|Oxidative roasting - cyanation|All sizes / 预处理-氰化|金泥或载金炭|金精矿|氧化焙烧-氰化|所有规模

Dataset: ILCD process, Unit process, single operation
Geography: CN
Reference year: 2019
Classification: Materials production / Metals and semimetals
Generated by: The data was created by the Office of the Second National Pollution Source Census of the Ministry of Ecology and Environment, and the data was organized by the TianGong Plan team for ILCD format / 生态环境部第二次全国污染源普查工作办公室创建数据，天工计划团队常慧敏整理数据为ILCD格式
Owner: Tiangong LCI Data Working Group / 天工LCI数据工作小组
Amounts: no units in this file; such an amount is in the reference unit of its flow, which a separate flow dataset defines
copyright: false
licenseType: Free of charge for all users and uses

## Technology and included processes
the Technical of end-of-pipe management technology for pollution arsenicisBag filter + electrostatic precipitation + wet precipitation，Its Technical efficiency of end-of-pipe management99

## Reference product
- Gold concentrate: 1000; input; calculated
  源文件中描述为为金精矿，此处对其进行了匹配工作，将其匹配到LCAflow库里面相最符合的流，污染物指标备注为工业废水量

## Outputs
All rows: calculated
- Waste water: 1960
  污染物指标工业废水量的末端治理技术是/。原文件中描述污染物类别为废水，污染物指标为工业废水量，此处对其进行了匹配工作，将其匹配到LCAflow库里面相最符合的流，污染物指标备注为工业废水量
- chemical oxygen demand: 0.078
  污染物指标化学需氧量的末端治理技术是物理化学处理，其效率为70，末端治理设施实际运行率（k值）计算公式为k=废水治理设施年正常运行时间（小时）/企业年正常生产时间（小时）。原文件中描述污染物类别为废水，污染物指标为化学需氧量，此处对其进行了匹配工作，将其匹配到LCAflow库里面相最符合的流，污染物指标备注为化学需氧量
- Ammonia Nitrogen: 0.00198
  污染物指标氨氮的末端治理技术是物理化学处理，其效率为10，末端治理设施实际运行率（k值）计算公式为k=废水治理设施年正常运行时间（小时）/企业年正常生产时间（小时）。原文件中描述污染物类别为废水，污染物指标为氨氮，此处对其进行了匹配工作，将其匹配到LCAflow库里面相最符合的流，污染物指标备注为氨氮
- cyanide: 0.00093
  污染物指标氰化物的末端治理技术是化学混凝法，其效率为97，末端治理设施实际运行率（k值）计算公式为k=废水治理设施年正常运行时间（小时）/企业年正常生产时间（小时）。原文件中描述污染物类别为废水，污染物指标为氰化物，此处对其进行了匹配工作，将其匹配到LCAflow库里面相最符合的流，污染物指标备注为氰化物
- cadmium: 1.8e-5
  污染物指标镉的末端治理技术是物理化学处理，其效率为95，末端治理设施实际运行率（k值）计算公式为k=废水治理设施年正常运行时间（小时）/企业年正常生产时间（小时）。原文件中描述污染物类别为废水，污染物指标为镉，此处对其进行了匹配工作，将其匹配到LCAflow库里面相最符合的流，污染物指标备注为镉
- lead: 2.5e-5
  污染物指标铅的末端治理技术是物理化学处理，其效率为95，末端治理设施实际运行率（k值）计算公式为k=废水治理设施年正常运行时间（小时）/企业年正常生产时间（小时）。原文件中描述污染物类别为废水，污染物指标为铅，此处对其进行了匹配工作，将其匹配到LCAflow库里面相最符合的流，污染物指标备注为铅
- arsenic: 3e-7
  污染物指标砷的末端治理技术是物理化学处理，其效率为95，末端治理设施实际运行率（k值）计算公式为k=废水治理设施年正常运行时间（小时）/企业年正常生产时间（小时）。原文件中描述污染物类别为废水，污染物指标为砷，此处对其进行了匹配工作，将其匹配到LCAflow库里面相最符合的流，污染物指标备注为砷
- Mercury: 1e-8
  污染物指标汞的末端治理技术是物理化学处理，其效率为95，末端治理设施实际运行率（k值）计算公式为k=废水治理设施年正常运行时间（小时）/企业年正常生产时间（小时）。原文件中描述污染物类别为废水，污染物指标为汞，此处对其进行了匹配工作，将其匹配到LCAflow库里面相最符合的流，污染物指标备注为汞
- Exhaust gas: 2797
  污染物指标工业废气量的末端治理技术是/，末端治理设施实际运行率（k值）计算公式为k=废气治理设施年正常运行时间（小时）/企业年正常生产时间（小时）。原文件中描述污染物类别为废气，污染物指标为工业废气量，此处对其进行了匹配工作，将其匹配到LCAflow库里面相最符合的流，污染物指标备注为工业废气量
- particles (PM2.5 - PM10): 0.0391
  污染物指标颗粒物的末端治理技术是袋式除尘+静电除尘+湿式除尘，其效率为99，末端治理设施实际运行率（k值）计算公式为k=废气治理设施年正常运行时间（小时）/企业年正常生产时间（小时）。原文件中描述污染物类别为废气，污染物指标为颗粒物，此处对其进行了匹配工作，将其匹配到LCAflow库里面相最符合的流，污染物指标备注为颗粒物
- sulfur dioxide: 0.228
  污染物指标二氧化硫的末端治理技术是双氧水、碱液吸收，其效率为90，末端治理设施实际运行率（k值）计算公式为k=废气治理设施年正常运行时间（小时）/企业年正常生产时间（小时）。原文件中描述污染物类别为废气，污染物指标为二氧化硫，此处对其进行了匹配工作，将其匹配到LCAflow库里面相最符合的流，污染物指标备注为二氧化硫
- Nitrogen oxides: 0.2265
  污染物指标氮氧化物的末端治理技术是双氧水、碱液吸收，其效率为85，末端治理设施实际运行率（k值）计算公式为k=废气治理设施年正常运行时间（小时）/企业年正常生产时间（小时）。原文件中描述污染物类别为废气，污染物指标为氮氧化物，此处对其进行了匹配工作，将其匹配到LCAflow库里面相最符合的流，污染物指标备注为氮氧化物
- lead: 0.0015663
  污染物指标铅及其化合物的末端治理技术是袋式除尘+静电除尘+湿式除尘，其效率为99，末端治理设施实际运行率（k值）计算公式为k=废气治理设施年正常运行时间（小时）/企业年正常生产时间（小时）。原文件中描述污染物类别为废气，污染物指标为铅及其化合物，此处对其进行了匹配工作，将其匹配到LCAflow库里面相最符合的流，污染物指标备注为铅及其化合物
- arsenic: 0.0007538
  污染物指标砷及其化合物的末端治理技术是袋式除尘+静电除尘+湿式除尘，其效率为99。原文件中描述污染物类别为废气，污染物指标为砷及其化合物，此处对其进行了匹配工作，将其匹配到LCAflow库里面相最符合的流，污染物指标备注为砷及其化合物

## Data sources
- 第二次全国污染源普查产排污核算系数手册（试用版）,四级代码3221文件，在完整版文件中第5074页
