# 印花布生产|印花布|印花后处理

Dataset: ILCD process, Unit process, black box
Geography: CN
Reference year: 2014
Classification: Materials production / Other mineralic materials
Generated by: 段颖凡, 1300925579@qq.com
Review: Dependent internal review by 天工LCI数据工作小组
Amounts: no units in this file; such an amount is in the reference unit of its flow, which a separate flow dataset defines
copyright: false

## Inputs
- Electricity: 140.994; measured
- Water for industrial use: 4.976; measured
- natural gas: 14.938; measured
- process steam: 395; measured

## Review details
清单： 内部审查通过几个迭代步骤完成，涉及原始数据验证、原始数据记录、代表性、完整性、与 ISO 14040 和 14044 有关的建模的一致性。

## Data sources
- 王赛赛, 吴雄英 & 丁雪梅. 三种LCA核算软件对印花布碳足迹核算的比较. 印染 40, 41–44 (2014).
