# 苹果生产

Dataset: ILCD process, Unit process, black box
Geography: IR
Reference year: 2016
Valid until: 2016
Classification: Unit processes / Materials production / Food and renewable raw materials
Functional unit: One hectare apple orchard
Generated by: 朱娴, zzhu0918@163.com
Owner: 天工LCI数据工作小组
Review: Dependent internal review by 天工LCI数据工作小组
Amounts: no units in this file; such an amount is in the reference unit of its flow, which a separate flow dataset defines
copyright: false
licenseType: Free of charge for all users and uses

## General comment
培育苹果树苗，施用氮磷钾肥及农家肥，同时进行水资源灌溉，果树开花结果后进行采摘。

## Geography
在这项研究中，信息是通过问卷和咨询来自伊朗西阿塞拜疆省圣战农业公司的园丁和专家来收集的。

## Technical purpose
此数据集代表苹果生产过程，包括培育苹果树苗、施用氮、磷、钾肥和农家肥、使用水资源灌溉以及在果树开花结果后采摘苹果。该数据适用于农业规划、果园管理、食品供应链以及农业实践的环境影响评估的相关方。

## Reference product
- Apple: 27120; measured

## Inputs
All rows: measured
- Labor: 61.0396
- diesel oil: 0.13328
- Pesticide: 42.48
- Nitrogenous fertilizer: 139.56
- Phosphate fertilizer: 141.53
- Potassium fertilizer: 113.28
- Electricity: 4446.36
- Gasoline (regular): 14.42
- Farmyard manure: 9900
- Irrigation water: 4007.54

## Use advice
使用此数据集时，用户应考虑与其LCA研究范围的方法论一致性。应考虑地理相关性、与伊朗西阿塞拜疆省类似的气候条件和文化农业实践，以确保准确性。所包含的单元过程(黑箱)要求清楚理解，建模和假设是基于特定地区的数据，并且可能不具备全球苹果园林代表性。在将此数据集应用于其他区域时，应注意调整区域差异。

## Review details
清单： 内部审查通过几个迭代步骤完成，涉及原始数据验证、原始数据记录、代表性、完整性、与 ISO 14040 和 14044 有关的建模的一致性。
