# 土壤修复;异位修复;化学氧化;工程实施;场内转运;得到修复后的场地

Dataset: ILCD process, Unit process, single operation
Geography: AH-CN
Reference year: 2023
Classification: Unit processes / Other Services / Repair and maintenance
Generated by: 桑春晖, sangch@mail.bnu.edu.cn
Owner: 天工LCI数据工作小组
Review: Dependent internal review by 天工LCI数据工作小组
Amounts: no units in this file; such an amount is in the reference unit of its flow, which a separate flow dataset defines
copyright: false
licenseType: Free of charge for all users and uses

## General comment
处理后土壤转运29437.9 m3

## Geography
安徽省合肥市受重金属和有机物复合污染的钢铁厂地块

## Technology and included processes
转运修复后的土壤

## Technical purpose
该数据集描述了在中国安徽省合肥市一家受重金属和有机物污染的钢铁厂地块上使用的异位化学氧化土壤修复过程。这种修复过程应用于旨在净化工业场地的工程项目中，并且包括受污染土壤的现场转移，通过化学氧化的处理，以及处理后土壤的转移。它特别用于大批量受污染土壤的修复，如通过转移29,437.9立方米处理后的土壤所示。

## Reference product
- Remedied site: 1; estimated

## Inputs
- Diesel: 13.929; estimated
- Remediated soil: 29437.9; estimated
  清洁土壤

## Use advice
使用此数据集的用户应考虑土壤修复过程发生的具体情况，包括污染物类型（重金属和有机化合物）和正在处理的土壤体积（29,437.9立方米）。在将这些数据应用于类似的修复项目时，考虑数据集的代表性非常重要，确保当地条件如土壤组成和污染水平是可比的。用户应包括土壤转运过程中的能源和材料投入，并准确地表示用于现场转移和随后运输修复土壤的燃料相关的排放。

## Review details
清单： 内部审查通过几个迭代步骤完成，涉及原始数据验证、原始数据记录、代表性、完整性、与 ISO 14040 和 14044 有关的建模的一致性。

## Data sources
- 桑春晖,杨欣桐,李香兰等.基于SEFA方法的异位土壤修复环境足迹分析——以某钢铁厂为例[J].中国环境科学,2023,43(10):
