# 电力生产 ; 混合电力 ; 中国

Dataset: ILCD process, Unit process, single operation
Geography: CN
Reference year: 2019
Classification: Unit processes / Energy carriers and technologies / Electricity
Generated by: 熊若熙, xiongrx0126@163.com
Owner: 天工LCI数据工作小组
Review: Dependent internal review by 天工LCI数据工作小组
Amounts: no units in this file; such an amount is in the reference unit of its flow, which a separate flow dataset defines
copyright: false
licenseType: Free of charge for all users and uses

## General comment
混合电力产生形式包括火力发电、水力发电、风力发电、核能发电和太阳能发电

## Technical purpose
该数据集代表中国的混合电力生成，包括热电（煤炭、天然气和石油燃料）、水电、风电、核能和太阳能发电等一系列发电方法。所产生的电力混合适用于需要从国家电网获取电力的住宅、商业和工业环境。

## Reference product
- Electricity: 3.6; missing unimportant
  [{'text': '3.6', 'type': 'text'}]

## Inputs
All rows: missing unimportant
- electricity for thermal power: 2.50508
  [{'text': '3.6', 'type': 'text'}]
- electricity from hydroelectric power plant: 0.625982
  [{'text': '3.6', 'type': 'text'}]
- electricity for nuclear power: 0.167171
  [{'text': '3.6', 'type': 'text'}]
- electricity from wind power: 0.194849
  [{'text': '3.6', 'type': 'text'}]
- electricity for solar power: 0.106919
  [{'text': '3.6', 'type': 'text'}]

## Use advice
在使用此数据集进行生命周期评估时，数据用户应考虑基于当前或预测发电数据的电力混合比例。需注意的是，中国内部不同地区可能存在变化，这可能影响数据对特定地理位置的适用性。数据的时间相关性也应当检查，因为电力混合组成可能会随时间变化。应详细记录包括或排除上游过程（例如热电发电的燃料提取）和下游过程（例如废物处理和退役）的决定，并确保这与评估的目标和范围保持一致。

## Review details
清单： 内部审查通过几个迭代步骤完成，涉及原始数据验证、原始数据记录、代表性、完整性、与 ISO 14040 和 14044 有关的建模的一致性。

## Data sources
- 能源统计年鉴2020
