# secondary copper production |cathode copper|TSA process|waste wire

Dataset: ILCD process, Unit process, single operation
Geography: CN
Reference year: 2014
Classification: Materials production / Other mineralic materials
Functional unit: functional unit was defined as the production of 1 t of refined copper (i.e., cathode copper).
LCI method principle: Attributional
LCI method approaches: Allocation - market value
Generated by: Peng Wang, 2867919560@qq.com
Review: Dependent internal review by Tiangong LCI Data Working Group
Amounts: no units in this file; such an amount is in the reference unit of its flow, which a separate flow dataset defines
copyright: false

## Geography
Inventory data of copper production originated mainly from two plants that adopted different equipment and processes

## Technology and included processes
Secondary copper production begins with copper scraps collection, followed by disassembly, separation, transportation, and ending in the smelting plant or refinery for copper recovery. Copper scraps are contained mainly in waste electric and electronic equipment, end-of-life vehicles, industrial electrical equipment waste, municipal solid waste, construction and demolition waste.

## Reference product
- copper ore/(0.81%): 0; input; article inperiodical
  copper ore/(0.81%)需要补充

## Inputs
All rows: article inperiodical
- copper ore/(1.02%): 0
  copper ore/(1.02%)需要补充
- waste wire: 4302
  waste wire需要补充
- Limestone: 51.8
  imestone
- quartz sand: 45.53
- oxygen: 0
- Sulfuric acid(98%): 3
  sulfuric acid需要补充resourse
- steam: 1000
  steam需要补充
- AC electricity: 925.2
  AC electricity需要补充
- DC electricity: 972
  DC electricity需要补充
- hard coal: 0
  coal
- coke: 13781
  coke需要补充
- diesel oil: 0
  diesel oil需要补充
- Heavy fuel oil (1.0 wt.% S): 5983.5
  heavy fuel oil

## Outputs
All rows: article inperiodical
- carbon dioxide: 724.15
  CO2
- sulfur oxides: 6.45
  SO2
- chemical oxygen demand: 2.03
  COD需要补充
- particles (PM2.5 - PM10): 0.67
  dust需要补充
- Slag: 681.83
  slag

## Deviations from the LCI method approaches
The Eco-Indicator 99 (EI99), a damage-oriented method widely used as an impact assessment method in LCA [22], was applied for the life cycle impact assessment. The impact assessment was performed with the EI99 methodology (hierarchist perspective).

## Data selection and combination
published literature

## Data treatment and extrapolations
GaBi 4 software was used to model the copper production processes and determine the environmental burdens in this study.

## Review details
Inventory: The internal review was done by several iteration steps concerning raw data validation, raw data documentation, representativity, completeness and consistency of modelling with regard to ISO 14040 and 14044.; Documentation: The review of the documentation was performed by Ecobilan and is in compliance with ISO 14040 and 14044. The data set documentation is correct in view of the appropriateness of the information provided. It includes all relevant information in view of data quality and scope of application of the respective LCI result.

## Data sources
- Song, X., Yang, J., Lu, B., Li, B. & Zeng, G. Identification and assessment of environmental burdens of Chinese copper production from a life cycle perspective. Front. Environ. Sci. Eng. 8, 580–588 (2014).
