# Vegetable Production ; Agricultural Inputs (vinyl house)

Dataset: ILCD process, Unit process, single operation
Geography: CN
Classification: Materials production / Agricultural production means
Functional unit: hm2
Generated by: Rui Yang, 1632707028@qq.com
Owner: Tiangong LCI Data Working Group
Review: Dependent internal review by Tiangong LCI Data Working Group
Amounts: no units in this file; such an amount is in the reference unit of its flow, which a separate flow dataset defines
copyright: false
licenseType: Free of charge for all users and uses

## General comment
The boundary of the system is concentrated in the whole process of open field vegetable production (from sowing to harvesting), which is divided into agricultural phase and agricultural phase. The agricultural phase focuses on greenhouse gas emissions from the production and transportation of fertilizers (fertilizers and organic fertilizers), pesticides and agricultural film. The agricultural stage mainly focuses on the greenhouse gas emissions generated by the application process of fertilizer and pesticide, the diesel consumption and artificial energy consumption in the process of agricultural operation (tillage, irrigation, etc.), and the fixation of soil organic carbon caused by the net primary productivity of vegetables and the input of organic fertilizer [16]. Select unit area (per hm2) for this system evaluation unit.

## Technology and included processes
Based on national agricultural statistical data, using the life cycle assessment (LCA) method, the net greenhouse gas emissions (NGHGE) of four typical field vegetable productions in China, including open-field tomatoes, cucumbers, Chinese cabbage, and radishes, were quantified. The study compared the differences in net greenhouse gas emissions among vegetable types and provinces, and analyzed emission reduction measures.

## Technical purpose
This dataset represents the life cycle assessment of open-field vegetable production including tomatoes, cucumbers, Chinese cabbage, and radishes. It focuses on greenhouse gas emissions related to agricultural inputs such as fertilizers, pesticides, and agricultural films as well as farming operations including plowing and irrigation. It is intended for stakeholders in the agricultural sector, environmental scientists, and policy makers interested in understanding and reducing the environmental impacts of vegetable production in China.

## Reference product
- tomato: 1000
  plastic greenhouse

## Inputs
- steel: 17.625
  plastic greenhouse
- cement: 1.111
  plastic greenhouse
- Electricity: 96.0012
  plastic greenhouse
- Diesel: 0.000733
  plastic greenhouse
- polyethylene terephthalate fibres (PET): 3.022
  plastic greenhouse
- polyvinyl chloride: 1.206
  plastic greenhouse
- water: 53.333
  plastic greenhouse
- nitrogen: 5.337
  Plastic greenhouse fertilizer
- nitrogen: 7.027
  plastic greenhouse
- phosphorus: 5.054
  Plastic greenhouse fertilizer
- phosphorus: 6.467
  plastic greenhouse
- potassium: 7.471
  Plastic greenhouse fertilizer
- potassium: 3.389
  plastic greenhouse
- Rice Seeds: 0.071
  plastic greenhouse
- Insecticide: 0.119
  plastic greenhouse

## Deviations from the LCI method approaches
The process is divided into two phases: agricultural input and farming. The agricultural input phase mainly focuses on the greenhouse gas emissions produced and transported during the production of fertilizers (chemical and organic), pesticides, and agricultural films. The farming phase primarily concentrates on the greenhouse gas emissions from the application of fertilizers and pesticides, agricultural operations (such as plowing and irrigation), diesel consumption, and the energy consumed by human labor. Additionally, this phase considers the carbon sequestration in vegetables through net primary productivity and the fixation of soil organic carbon caused by the input of organic fertilizers.

## Data selection and combination
Based on the types of vegetables and the planting distribution information available in the database, four typical open-field vegetables were selected, namely fruit vegetables (tomatoes, cucumbers), leafy vegetables (Chinese cabbage), and root vegetables (radishes). The related planting production data from various provinces across the country for these four types of open-field vegetables were collected and organized for the year 2016 (data from Taiwan, China is temporarily unavailable).

## Data treatment and extrapolations
Various vegetables’ fertilizer application rates, diesel consumption, agricultural film usage, labor employment, and yield data are obtained from the literature. Diesel cost is calculated using the formula [18]: Diesel cost = (mechanical operation fee + irrigation fee - water fee) x 21% + fuel power fee, and the diesel price data comes from China's oil price network database [19]. Pesticide input data refer to Luo Wei’s [20] study results on the big data analysis of pesticide application in open-field vegetables across the country. The planting areas of various types of vegetables in different provinces were retrieved from the literature [15].

## Use advice
Users of this dataset should focus on Incorporating these life cycle data into comprehensive environmental impact assessments, ensuring that the system boundaries align with their study objectives. Emphasize the application of this data for comparison and analysis of different agricultural practices and their effects on greenhouse gas emissions. Additionally, users are advised to consider the potential for emission reduction through agricultural strategies and technologies. The temporal coverage of the data, specifically the year 2016, should be considered when integrating this dataset into broader research or policy recommendations.

## Review details
Inventory: The internal review was done by several iteration steps concerning raw data validation, raw data documentation, representativity, completeness and consistency of modelling with regard to ISO 14040 and 14044.

## Data sources
- 张芬,程泰鸿,陈新平,王孝忠.我国典型露地蔬菜生产中的温室气体排放[J].环境科学,2020,41(07):3410-3417.
