# 市政污水处理 ; 污水 ; 传统活性污泥法

Dataset: ILCD process, Unit process, black box
Geography: GR
Classification: Unit processes / End-of-life treatment / Waste water treatment
Generated by: 徐钱榕, 2331391@tongji.edu.cn
Owner: 天工LCI数据工作小组
Review: Dependent internal review by 天工LCI数据工作小组
Amounts: no units in this file; such an amount is in the reference unit of its flow, which a separate flow dataset defines
copyright: ['opt4ROkqig']
licenseType: Free of charge for all users and uses

## General comment
没有考虑可以直接从废水处理过程中释放的气体污染物。气体污染物是在生物废水降解过程中产生的，根据进水和出水废水的负荷（由COD、TN和SS浓度定义）以及流入和流出速率计算得出。

## Technology and included processes
废水在前一个硝化池中通过搅拌器混合，在后一个硝化池中通过扩散器充气。之后，废水进入一个工作容积为 78.5 立方米的二级沉淀池，然后在一个包括一个混合池（其中添加了 PAC 和聚电解质作为絮凝剂）、一个絮凝池和一个鼓式过滤器的系统中进行三级处理。

## Technical purpose
该数据集描述的传统活性污泥法用于市政污水处理。这种生物处理工艺设计用于去除城市污水中的污染物，并且通常用于市政污水处理设施。它适用于处理家庭污水或市政废水，可能包括来自厕所、浴室、淋浴间、厨房和排水进入下水道的水槽的家庭废液。

## Reference product
- Wastewater: 499; measured
  Treated

## Inputs
All rows: measured
- Wastewater: 528
- Electricity: 202.68
  influent pump
- Electricity: 103.68
  equalization tank mixer
- Electricity: 103.68
  denitrification mixer
- Electricity: 1728
  nitrification blowers
- Electricity: 64.8
  sedimentation bridge
- Electricity: 345.6
  sludge circulation pump
- Electricity: 5.4
  sludge removal pump
- transportation: 9.4255
  Lorry EURO610 tons
- Polyaluminum chloride: 90.6
  EcoSpold 2iron(II) chloride
- Polyelectrolyte: 0.97
  EcoSpold 2aluminium sulfate, powder
- Electricity: 35.424
  mixer
- Electricity: 34.56
  Polyelectrolyte Pump
- Electricity: 35.424
  Flocculation Mixer
- Electricity: 10.8
  Drum Filter

## Outputs
- Sludge: 269.3; measured
  to landfill

## Use advice
在使用这个数据集进行生命周期评估时，应考虑数据集与所研究特定案例的地理和技术相关性。该数据代表一个“黑箱”单元过程，用户在LCA模型中应谨慎处理系统边界和任何相关的分配程序。该数据集通常不包括污水处理设施的建设阶段和生命周期终点情景。回收水产出或污泥处理应根据当地系统的具体情况单独处理。

## Review details
清单： 内部审查通过几个迭代步骤完成，涉及原始数据验证、原始数据记录、代表性、完整性、与 ISO 14040 和 14044 有关的建模的一致性。

## Data sources
- Banti，D.C.、Tsangas，M.、Samaras，P.和Zorpas，A.膜生物反应器与活性污泥系统在城市污水处理中的LCA比较。膜10（2020）
