# 熟料生产|熟料, 硅酸盐水泥熟料, 52.5MPa

Dataset: ILCD process, LCI结果
Geography: CN
Classification: Materials production / Other mineralic materials
Generated by: 杨思琪
Amounts: no units in this file; such an amount is in the reference unit of its flow, which a separate flow dataset defines
copyright: false

## General comment
企业完全使用天然矿物制造水泥熟料。

## Model description
选取1t强度为52.5MPa的水泥熟料作为功能单位。 研究选取“从摇篮到大门”的系统边界，天然矿物生产水泥熟料产品系统包括原燃料的获取、运输以及水泥熟料生产过程

## Reference product
- clinker, portland cement clinker, 52.5MPa: 1000
  熟料52.5MPa

## Inputs
All rows: measured
- limestone, crushed, for mill: 1260
  石灰石
- clay: 231
  黏土
- sandstone: 96
  砂岩
- hard coal, run-of-mine: 161
  原煤
- electricity, medium voltage: 149.76
  电力

## Outputs
All rows: measured
- carbon dioxide: 842
  CO2
- Nitrogen oxides: 1.57
  NOx
- sulfur dioxide: 0.801
  SO2
- carbon monoxide: 0.356
  CO
- methane: 1.61
  CH4
- non-methane volatile organic compounds: 0.142
  NMVOC

## Deviations from the LCI method approaches
石灰石、黏土、砂岩等原材料的开采、能源生产、运输等过程的清单数据来自Ecoinvent数据库。

## Data sources
- 邵亦白, 刘宇, 郑焱, 任品桥, & 杜世伟. (2022). 利废水泥熟料产品系统的生命周期清单分析方法及应用. 中国水泥, 11, 59–62.
