# Soil and groundwater remediation;Ex-situ;groundwater pump and treat;construction;Treatment facilities

Dataset: ILCD process, Unit process, single operation
Geography: DK
Reference year: 2021
Classification: Other Services / Engineering and consulting
Generated by: Wang Ning, wang_ning@caep.org.cn
Owner: Tiangong LCI Data Working Group
Review: Dependent internal review by Tiangong LCI Data Working Group
Amounts: no units in this file; such an amount is in the reference unit of its flow, which a separate flow dataset defines
copyright: false
licenseType: Free of charge for all users and uses

## General comment
Construction of wastewater disposal facilities using activated carbon, high-density polyethylene, iron

## Technology and included processes
Construction of treatment facilities using electricity, quartz sand, high-density polyethylene, steel, activated carbon

## Technical purpose
The data set represents the construction process of wastewater treatment facilities specifically for soil and groundwater remediation. These facilities utilize materials such as activated carbon, high-density polyethylene, and iron in their construction, and are designed for ex-situ groundwater pump and treat applications.

## Reference product
- Treatment facilities: 1; estimated

## Inputs
All rows: estimated
- polyethylene high density granulate (PE-HD): 410
- Steel sections: 50
- Activated Carbon: 180
- Electricity: 38000
- quartz sand: 300000

## Use advice
When utilizing this data set, consider the specific construction materials and processes represented - activated carbon, quartz sand, high-density polyethylene, steel, and iron. Factor in the energy consumption during the construction phase. Ensure that the modeled use phase behavior accurately reflects the operational requirements of the wastewater treatment facilities, including the management of inputs and outputs. Users should also consider the end-of-life implications, such as potential recycling of materials or the environmental impact of disposal.

## Review details
Inventory: The internal review was done by several iteration steps concerning raw data validation, raw data documentation, representativity, completeness and consistency of modelling with regard to ISO 14040 and 14044.

## Data sources
- Sustainable remediation assessment of a chlorinated ethene plume: method evelopment, application, and assessment
