# 土壤修复;原位修复;土壤气相抽提;建设阶段;场地建设

Dataset: ILCD process, Unit process, single operation
Geography: KR
Reference year: 2011
Classification: Other Services / Repair and maintenance
Generated by: 雷秋霜, leiqs@caep.org.cn
Owner: 天工LCI数据工作小组
Review: Dependent internal review by 天工LCI数据工作小组
Amounts: no units in this file; such an amount is in the reference unit of its flow, which a separate flow dataset defines
copyright: false
licenseType: Free of charge for all users and uses

## General comment
该工业过程涉及土壤修复的建设阶段，具体为原位土壤气相抽提（SVE）技术。它包括建立场地基础以及办公室、储存设施和SVE系统的基础。该过程在环境工程中应用，用于去除污染土壤中的挥发性化合物，而无需挖掘大量土壤，即在污染发生地点进行。

## Reference product
- SVE site: 1; measured
  建成的SVE场地

## Inputs
- gravel: 9.6; measured
- Concrete: 19; measured
- Diesel: 0.021; measured
- Wire Mesh: 96; measured
  金属丝网

## Use advice
使用此数据集的用户应确保其生命周期评估的范围包括土壤修复项目的建设阶段。应关注地理位置和SVE系统针对的具体污染物。时间边界应包括建设和安装SVE系统的时间框架。用户必须区分建设阶段和运营阶段的影响。此外，他们应考虑使用原位修复方法可能带来的任何潜在环境效益或权衡，例如减少土壤挖掘和运输。

## Review details
清单： 内部审查通过几个迭代步骤完成，涉及原始数据验证、原始数据记录、代表性、完整性、与 ISO 14040 和 14044 有关的建模的一致性。

## Data sources
- Assessment of Environmental Impacts and CO2 Emissions from Soil Remediation Technologies using Life cycle Assessment - Case Studies on SVE and Biopile Systems
