# Steel products | steel | recycled steel production

Dataset: ILCD process, Unit process, single operation
Geography: JL-CN
Reference year: 2016
Classification: Materials production / Other mineralic materials
Generated by: Wanghuanyu, wanghuanyu00@126.com
Review: Dependent internal review by Tiangong LCI Data Working Group
Amounts: no units in this file; such an amount is in the reference unit of its flow, which a separate flow dataset defines

## Reference product
- iron: 1000; article inperiodical
  钢材

## Inputs
- Energy, geothermal, converted: 3244.94; article inperiodical
  标煤

## Outputs
- phenol,Sulphur oxides (as SO2): 0.102; article inperiodical
- nitrogen monoxide: 0.345; article inperiodical

## Review details
Inventory: The internal review was done by several iteration steps concerning raw data validation, raw data documentation, representativity, completeness and consistency of modelling with regard to ISO 14040 and 14044.; Documentation: The review of the documentation was performed by Ecobilan and is in compliance with ISO 14040 and 14044. The data set documentation is correct in view of the appropriateness of the information provided. It includes all relevant information in view of data quality and scope of application of the respective LCI result.

## Data sources
- 王宪恩, 栾天阳, 陈英姿, & 段海燕. 基于LCA的废旧资源循环利用节能减排效果评估模式与方法研究——以吉林省某钢铁企业为例. 中国人口·资源与环境 26, 69–77 (2016).
