# 葡萄生产

Dataset: ILCD process, Unit process, black box
Geography: CA
Reference year: 2006
Valid until: 2007
Classification: Unit processes / Materials production / Agricultural production means
Functional unit: 1 hectare vineyard
Generated by: 朱娴, zzhu0918@163.com
Owner: 天工LCI数据工作小组
Review: Dependent internal review by 天工LCI数据工作小组
Amounts: no units in this file; such an amount is in the reference unit of its flow, which a separate flow dataset defines
copyright: false
licenseType: Free of charge for all users and uses

## General comment
播种葡萄种子，在生长阶段进行化肥、农药以及人工肥料的施用，同时进行灌溉，待葡萄开花后的收获阶段获得葡萄果实。

## Geography
位于加拿大新斯科舍省

## Time period
利用2006年的葡萄园葡萄生产量，编制了葡萄园特有的库存数据，并对其进行加权，为新斯科舍省提供了具有代表性的葡萄园模型。

## Technical purpose
该葡萄生产过程数据集代表了葡萄园中葡萄的农业种植和收获过程。通常包括播种葡萄种子、施用化学和人工肥料、农药和使用灌溉方法。该过程以收获葡萄果实结束。生产的葡萄通常用于作为鲜食、用于生产果汁或在葡萄酒制造业中使用。

## Reference product
- Grape: 6370; measured

## Inputs
All rows: measured
- Nitrogenous fertilizer: 96
- Phosphate fertilizer: 73.12
- Potassium fertilizer: 166.98
- diesel oil: 0.23957
- sulfur: 27.2
- Pesticide: 16.91
- Gasoline (regular): 0.00557

## Outputs
All rows: measured
- carbon dioxide (biogenic): 741.85
  原文未区分bio和fossil，根据专家判断此处为biogenic。
- nitrous oxide: 3.43
- nitrogen monoxide: 3.62
- ammonia: 24.17
- nitrate: 90.7
- Phosphorus Pentoxide: 2.03

## Use advice
在使用该数据集进行葡萄生产的生命周期评估（LCA）时，重要的是要确保LCA的范围与数据中捕获的葡萄园特定条件相匹配。该模型基于2006年的数据，可能需要更新以反映当前的实践。考虑区域因素、灌溉实践和可能影响LCA结果的栽培技术进步。如果收获的葡萄用于多种目的，需谨慎处理分摊决策问题。如果技术或栽培实践与2006年加拿大新斯科舍省所用的有显著不同，则应调整方法论和数据集。

## Review details
清单： 内部审查通过几个迭代步骤完成，涉及原始数据验证、原始数据记录、代表性、完整性、与 ISO 14040 和 14044 有关的建模的一致性。
