# PV cell production

Dataset: ILCD process, Unit process, single operation
Geography: CN
Reference year: 2016
Classification: Materials production / Other mineralic materials
Functional unit: Grid-connected electricity generation from a 1 MWp multi-Si PV system, whose lifespan is 30 years of a 10 MWp power station has been taken as the research object and the functional unit
LCI method principle: Attributional
LCI method approaches: Allocation
Generated by: Jinfeng Yang, yjfzfshn@163.com
Review: Dependent internal review by Tiangong LCI Data Working Group
Amounts: no units in this file; such an amount is in the reference unit of its flow, which a separate flow dataset defines
copyright: false

## General comment
Multi-Si

## Geography
The power station is located in the central region of Ningxia, China, where the average annual solar radiation is approximately 5955.80 MJ m2 a-1, and the annual average number of peak sunshine hours are 1718 h.

## Time period
Available online

## Reference product
- Multi-Si solar cell: 1; article inperiodical
  PV cell

## Inputs
All rows: article inperiodical
- electricity: 1.98
  Electricity
- Multi-Si wafer: 1
  SoG-Si wafer
- Water (fresh water): 1.1
  Fresh water
- silver: 0.00043
  Silver paste
- aluminium: 0.00139
  Aluminum paste
- Ammonia: 0.00137
- Silane: 0.00053
- Phosphorus Oxychloride: 4e-5
  Phosphorus oxychloride
- Potassium hydroxide: 0.00137
  Potassium hydroxide (21%)
- Sodium hydroxide: 0.00099
  Caustic soda (30%)
- Hydrochloric acid: 0.00141
  Hydrochloric acid (37%)
- Hydrofluoric acid: 0.00191
  Hydrofluoric acid (40%)
- Nitric acid: 0.00495
  Nitric acid (70%)
- Sulfuric acid: 1e-5
  Sulfuric acid (98%)
- phosphoric acid: 4e-6
  Phosphoric acid (85%)
- oxygen: 0.00062
  Oxygen
- nitrogen: 0.0433
  Nitrogen
- Ethanol: 0.0001
- Carbon tetrafluoride: 0.00016
- Terpineol: 2e-7

## Outputs
All rows: article inperiodical
- chlorine: 8e-5
  Chlorine
- Nitrogen oxides: 0.00012
- ammonia: 4e-5
  Ammonia
- volatile organic compound: 7e-5
  Volatile organic compound
- hydrogen chloride: 1e-5
  Hydrogen chloride
- chloride: 0.00017
  Chloride
- fluoride: 0.00204
  Fluoride
- nitrogen, total (excluding N2): 5e-5
  TN
- hydrogen fluoride: 4e-6
  Hydrogen fluoride
- 000075-73-0: 2e-5
  Carbon tetrafluoride
- chemical oxygen demand: 0.00012
  Chemical oxygen demand
  (COD)
- waste water - untreated: 0.67
  Waste water
- Sludge: 0.12
- municipal solid waste deposition: 0.00026
  Solid waste
- hazardous waste (unspecified): 1e-6
  Solid waste (Hazardous
  waste)

## Deviations from the LCI method approaches
A life cycle assessment (LCA) has been performed for the grid-connected electricity generation from a metallurgical route multi-crystalline silicon (multi-Si) photovoltaic (PV) system in China.

## Data selection and combination
Survery of factories in Yunnan and Ningxia

## Review details
Inventory: The internal review was done by several iteration steps concerning raw data validation, raw data documentation, representativity, completeness and consistency of modelling with regard to ISO 14040 and 14044.; Documentation: The review of the documentation was performed by Ecobilan and is in compliance with ISO 14040 and 14044. The data set documentation is correct in view of the appropriateness of the information provided. It includes all relevant information in view of data quality and scope of application of the respective LCI result.

## Data sources
- Yu, Z. et al. Life cycle assessment of grid-connected power generation from metallurgical route multi-crystalline silicon photovoltaic system in China. Applied Energy 185, 68–81 (2017).
