# 铁矿开采;铁矿石;采矿（D01）

Dataset: ILCD process, Unit process, single operation
Geography: CN
Reference year: 1998
Classification: Unit processes / Materials production / Non-energetic raw materials
Generated by: 付翔, 1162850692@qq.com
Owner: 天工LCI数据工作小组
Review: Dependent internal review by 天工LCI数据工作小组
Amounts: no units in this file; such an amount is in the reference unit of its flow, which a separate flow dataset defines
copyright: false
licenseType: Free of charge for all users and uses

## General comment
来自表 4-17 D01 钢厂生产吨材环境负荷编目表

## Time period
论文提到钢铁企业环境总体数据为1998年的吨钢环境基础数据。

## Technical purpose
该数据集代表通过采矿过程提取的铁矿石，主要用于生产钢材。铁矿石作为钢铁制造设施的原料，用于高炉作业和钢铁精炼等工业过程。

## Reference product
- Iron ore: 1873; measured
  铁矿石

## Inputs
- Energy, geothermal, converted: 1541.4; measured
- water: 20603; measured

## Use advice
使用此数据集的用户应考虑与数据年份（1998年）相关的技术适用性，并谨慎将其应用于当前过程，因为从那时起可能发生了技术进步，影响了环境负荷因子。该数据集提供了钢铁企业单个单元过程每吨钢材生产的基础环境影响数据。在将数据整合到生命周期评估中时，应关注系统边界和是否包括所建模的钢铁潜在回收。还应考虑地理特定性，因为它可能显著影响环境影响结果。

## Review details
清单： 内部审查通过几个迭代步骤完成，涉及原始数据验证、原始数据记录、代表性、完整性、与 ISO 14040 和 14044 有关的建模的一致性。

## Data sources
- 周和敏. 钢铁材料生产过程环境协调性评价研究. (北京工业大学, 2001).
