# Oxygen Production | Oxygen | Air Separation Routes | Air

Dataset: ILCD process, Unit process, black box
Geography: ZJ-GD-CN
Reference year: 2018
Classification: Materials production / Other mineralic materials
Functional unit: A functional unit is defined as 4.69 ton of oxygen product
LCI method principle: Attributional
LCI method approaches: Allocation - mass
Generated by: Yanan Ren, renyn15@tsinghua.org.cn
Review: Dependent internal review by Tiangong LCI Data Working Group
Amounts: no units in this file; such an amount is in the reference unit of its flow, which a separate flow dataset defines
copyright: false

## General comment
ID14 Propylene Production | Propylene | Coal to Olefins Route | Coal | Subordinate Process 1

## Geography
The case plant of the catalytic cracking route comes from Sinopec Zhanjiang Dongxing Petrochemical Co., Ltd. The company is located in Zhanjiang City, Guangdong Province. Its catalytic cracking olefins process was built in 2018, with an annual production capacity of 116,000 tons of propylene.

## Time period
Craft built in 2018

## Reference product
- oxygen: 4690; measured
  氧气

## Inputs
- air: 21450; measured
  空气
- process steam: 590; measured
  低压蒸汽
- Cooling water: 230; measured
  循环冷却水
- electricity mix: 4342.39; measured
  电

## Outputs
- nitrogen: 6040; measured
  污氮气

## Data selection and combination
The detailed input-output data of the propylene production process comes from the company's public environmental impact assessment report, including the input of raw materials and auxiliary materials, energy and resource consumption, and discharge of waste gas, wastewater and solid waste.

## Review details
Inventory: The internal review was done by several iteration steps concerning raw data validation, raw data documentation, representativity, completeness and consistency of modelling with regard to ISO 14040 and 14044.; Documentation: The review of the documentation was performed by Ecobilan and is in compliance with ISO 14040 and 14044. The data set documentation is correct in view of the appropriateness of the information provided. It includes all relevant information in view of data quality and scope of application of the respective LCI result.

## Data sources
- 吕琳. 丙烯产品环境负荷及温室气体减排的碳税政策. (大连理工大学, 2022).
