# 聚合物铝电解电容器 (PAEC) 报废 ; 铝粉 ; 用过的电容器

Dataset: ILCD process, Unit process, single operation
Geography: CN
Reference year: 2022
Classification: Unit processes / End-of-life treatment / Material recycling
Generated by: 常慧敏, huiminchang@tsinghua.edu.cn
Owner: 天工LCI数据工作小组
Review: Dependent internal review by 天工LCI数据工作小组
Amounts: no units in this file; such an amount is in the reference unit of its flow, which a separate flow dataset defines
copyright: false
licenseType: Free of charge for all users and uses

## General comment
本数据集表示的聚合物铝电解电容器（PAEC）通常用于各种电子设备的能量存储，包括消费电子产品到工业应用中需要高容量和紧凑性的地方。这些电容器报废后得到的铝粉可以循环使用，用于各种冶金工艺或作为制造新电容器的材料。

## Time period
文献发表于2022-11-15，文献中 The reference year of the elementary data (alumminum ingots, separator paper, tansport, electricity, and water) is around 2016 and qcruired from the Gabi database (Version: 10.6.1.35)

## Reference product
- used capacitor: 1e6; input; measured
  Capacitors (waste)

## Outputs
All rows: measured
- electricity, high voltage, aluminium industry: 351.72
  Electricity
- Mixture of plastic and paper with electrolyte: 98.92
- iron, powder: 1.96
  Iron powder
- Aluminum powder: 754.6
- Rubber Powder: 121.52
  Rubber powder
- Dust: 0.0977

## Data selection and combination
基本数据的参考年份约为 2016 年。基本数据（即铝锭、分离纸、运输、电力和水）来自 Gabi 数据库（版本：10.6.1.35）。此外，一些背景数据，包括 3，4-乙烯二氧噻吩（EDOT）、己二酸铵、柠檬酸铵等，在 Gabi 数据库中无法获得。它们是根据 Gabi 数据库中现有原材料在材料制备过程中发生的化学反应估算出来的。用于制造 PHAECs 的分散溶液（PEDOT:PSS，1%wt）的制备过程数据是根据实验室数据按比例计算的。三种 AEC 的详细 LCI 数据和物质流的单位影响见辅助信息 B 的第 5-7 张和第 2 张。

## Use advice
应用这个生命周期评价(LCA)数据集需要认识到基础数据的参考年份是2016年左右，数据来源于Gabi数据库(版本10.6.1.35)。在使用这些数据时，应注意原材料的技术相关性，并确保运输数据反映了从原材料来源到终端用户的供应链。对于Gabi数据库中未找到的物质，应谨慎使用基于化学相似反应的现有原材料的估算。考虑到PHAECs的阴极箔制备过程和分散溶液的制备数据是基于与PAECs过程相似的实验室数据调整的，特别是在使用这些数据时要慎重。

## Review details
清单： 内部审查通过几个迭代步骤完成，涉及原始数据验证、原始数据记录、代表性、完整性、与 ISO 14040 和 14044 有关的建模的一致性。

## Data sources
- Zhang, C., Zheng, Y., Jing, J., Liu, Y. & Huang, H. A comparative LCA study on aluminum electrolytic capacitors: From liquid-state electrolyte, solid-state polymer to their hybrid. J. Clean. Prod. 375, (2022).
