# 铝锭铸造 ; 原生铝锭 ; 液态原铝 ; 2010年

Dataset: ILCD process, Unit process, single operation
Geography: CN
Reference year: 2021
Classification: Unit processes / Materials production / Metals and semimetals
Generated by: 蔡梓萌, caizm6178@163.com
Owner: 天工LCI数据工作小组
Review: Dependent internal review by 天工LCI数据工作小组
Amounts: no units in this file; such an amount is in the reference unit of its flow, which a separate flow dataset defines
copyright: false
licenseType: Free of charge for all users and uses

## General comment
本数据集描述的液态原铝铝锭铸造过程产出的原生铝锭主要用于需要高纯度铝的应用场景。这些应用场景可能包括建筑材料、运输部件（包括汽车零件、飞机零件）、消费电子、箔材和包装材料。数据集指出在特别重视铝的低密度、高导电性和抗腐蚀性的场景中的使用。

## Time period
文献发表日期

## Reference product
- aluminium, primary, ingot: 1000; software or database

## Inputs
- aluminium, primary, liquid: 1042.51; software or database

## Data selection and combination
本研究的数据参考了PA、SA、电力等背景数据的LCA数据。PA数据来自统计数据源，SA数据主要来自文献。背景数据主要来自中国科学院生态环境研究中心CASRCEES 2018建立的中国本地化LCA数据库，涵盖能源、材料、交通、废物管理等LCA数据。

## Use advice
当使用这份LCA数据集来评估包含原生铝锭的产品的环境影响时，用户应该注意数据发布的具体年份是2010年，因为自那时起技术和环境标准可能已经发展变化，这可能会影响数据在当今评估中的准确性。用户应该将这些数据与最新信息结合，并调整以适应技术改进或能源来源变化。用户还必须考虑数据的地理相关性，因为背景数据主要来源于中国本地化的LCA数据库。在考虑生命周期评估中的回收时，用户需要遵循与铝回收过程相关的具体方法指导。

## Review details
清单： 内部审查通过几个迭代步骤完成，涉及原始数据验证、原始数据记录、代表性、完整性、与 ISO 14040 和 14044 有关的建模的一致性。

## Data sources
- Ding, N., Liu, N., Lu, B. & Yang, J. Life cycle greenhouse gas emissions of aluminum based on regional industrial transfer in China. J. Ind. Ecol. 25, 1657–1672 (2021).
