# TiO2 module

Dataset: ILCD process
Classification: Materials production / Inorganic chemicals
Functional unit: 1平方米钙钛矿光伏模块
Generated by: Xijing Yao, 15898832265@163.com
Owner: Tiangong LCI Data Working Group
Review: Dependent internal review by Tiangong LCI Data Working Group
Amounts: no units in this file; such an amount is in the reference unit of its flow, which a separate flow dataset defines
licenseType: Free of charge for all users and uses

## Reference product
- Solar Module: 1; log-normal; article inperiodical

## Inputs
All rows: log-normal
- ethanol: 0.0271579, 0.0271579 (2 entries); article inperiodical
  Substrate cleaning solvent
- Water: 0.0327; article inperiodical
  Substrate cleaning solvent
- silver: 0.00881; article inperiodical
  Metallic mask
- hydrogen chloride: 0.00695; article inperiodical
  Metallic mask cleaning solvent
- Titanium dioxide, chloride and sulphate processes, >80% TiO2, production mix, at plant: 0.0183; calculated
  Layer thickness 100 nm
- water: 0.0327; article inperiodical
  Substrate cleaning solvent
- Titanium dioxide, chloride and sulphate processes, >80% TiO2, production mix, at plant: 0.00494; calculated
  Layer thickness 250 nm
- dimethyl formamide: 0.00283; calculated
  Solvent of PbI2
- isopropanol: 0.0112; calculated
  Solvent of CH3NH3I
- chlorobenzene: 0.0118; calculated
  Solvent of spiro-OMeTAD
- gold: 0.00165; article inperiodical
  Layer thickness 100 nm
- polyethylene terephthalate fibres (PET): 0.0617; article inperiodical
  Applied on 2 sides
- Adhesives: 0.0202; article inperiodical
  3 M 467 MPF
- Electricity: 28.008; calculated

## Outputs
All rows: log-normal
- ethanol: 0.0681; article inperiodical
  Substrate cleaning solvent
- silver: 0.00617; article inperiodical
  Silver paste
- hydrogen chloride: 0.00264; article inperiodical
  Silver paste thinner
- hydrogen chloride: 0.00208; article inperiodical
  Metallic mask cleaning solvent
- isopropanol: 0.0123; calculated
  Solvent of BL-TiO2 ink and CH3NH3I
- acetone: 0.000538; article inperiodical
  Solvent of BL-TiO2 ink
- dimethyl formamide: 0.00283; calculated
  Solvent of PbI2
- chlorobenzene: 0.0118; calculated
  Solvent of spiro-OMeTAD
- gold: 0.000297; article inperiodical
- acetic anhydride: 0.000946; article inperiodical
  Solvent of BL-TiO2 ink
- landfill of glas/inert waste: 5.13; article inperiodical
  Landfill

## Review details
Inventory: The internal review was done by several iteration steps concerning raw data validation, raw data documentation, representativity, completeness and consistency of modelling with regard to ISO 14040 and 14044.
