# 土壤修复;异位修复;热脱附修复;工程实施;土壤运输

Dataset: ILCD process, Unit process, single operation
Geography: SH-CN
Classification: Other Services / Repair and maintenance
Generated by: 王枫, wangfeng@caep.org.cn
Owner: 天工LCI数据工作小组
Review: Dependent internal review by 天工LCI数据工作小组
Amounts: no units in this file; such an amount is in the reference unit of its flow, which a separate flow dataset defines
copyright: false
licenseType: Free of charge for all users and uses

## General comment
异位热脱附修复1立方米污染土，使用运输车辆，将污染土壤从污染地运送到预处理大棚的过程，预处理大棚一般设 置在污染场内或者其附近，距离运输较近，最大不超过2 km

## Geography
我国华东区域5 个污染土壤异位热脱附修复工程案例

## Technology and included processes
使用运输车辆，将污染土壤从污染地运送到预处理大棚

## Technical purpose
所描述的工程流程主要用于环境修复领域中的土壤净化。异位热脱附修复过程涉及将受污染土壤从污染现场运输到预处理大棚进行处理，预处理大棚通常位于污染现场内部或附近。此方法通常应用于中国华东地区的土壤污染整治，运输距离通常不超过2公里。该数据集代表了5个华东区域异位热脱附土壤修复工程案例的实践。

## Reference product
- Transported soil: 1; measured

## Inputs
- Oils, unspecified: 0.00013; measured

## Use advice
在使用此数据集时，应关注该流程的规模和背景适用性。数据特别适用于受污染土壤的短距离运输和热脱附场景。用户必须确保其项目的条件与提供数据的案例一致。应考虑运输距离、污染水平和与中国华东地区一致的区域性因素等变量。模型中必须对任何差异进行调整。

## Review details
清单： 内部审查通过几个迭代步骤完成，涉及原始数据验证、原始数据记录、代表性、完整性、与 ISO 14040 和 14044 有关的建模的一致性。

## Data sources
- 刘爽,陈盼,宋慧敏等.我国华东地区污染土壤异位热脱附修复碳排放及减排策略[J].环境工程学报,2022,16(08):2663-2671.
