# 土壤修复;异位修复;水泥窑协同处置;准备阶段;原料开采运输

Dataset: ILCD process, Unit process, single operation
Geography: CN
Classification: Other Services / Repair and maintenance
Generated by: Cao Jiameng, 2979480760@qq.com
Owner: Tiangong LCI Data Working Group
Review: Dependent internal review by Tiangong LCI Data Working Group
Amounts: no units in this file; such an amount is in the reference unit of its flow, which a separate flow dataset defines
licenseType: Free of charge for all users and uses

## General comment
This industrial process pertains to soil remediation through off-site treatment, specifically using cement kiln co-processing during the preparation phase. The plant operates a modern dry production line of 4000 t/d, with an annual cement production capacity of 1.9 million tons and clinker production of 1.5 million tons. It serves the purpose of utilizing waste material (polluted soil, digested sewage sludge, waste oil sludge, etc.) as alternative raw materials and alternative fuels in cement production to save resources such as limestone and coal.

## Reference product
- carbon dioxide: 37.88

## Inputs
- Diesel: 4.18; article inperiodical
- Electricity: 47.664; article inperiodical

## Outputs
All rows: article inperiodical
- calcium carbonate: 1125.43
- shale: 1.23
- diatomite: 17.75
- iron powder: 27.25
- gypsum: 52.15
- fly ash: 124.24
- Slag: 203.78
- waste clay: 1.05
- Coating residue: 0.16
- oil sludge: 5.26
- Spent catalyst: 2.11
- contaminated soil: 5.26
- Digested Sludge: 15.79
- coal: 98.28

## Use advice
When utilizing this data set for Life Cycle Assessment, it is essential to consider the specifics of the remediation process, particularly the use of waste material in cement kiln co-processing. Note that industrial waste does not account for mining input but only for transportation. The transport distances for limestone, shale, fly ash, and other raw materials are approximately 1.5 km, while the distance for industrial waste is about 50 km. Special attention should be given to methodological considerations such as the boundaries of recycling operations and the modeling of the use-phase behavior for the co-processed material.

## Review details
Inventory: The internal review was done by several iteration steps concerning raw data validation, raw data documentation, representativity, completeness and consistency of modelling with regard to ISO 14040 and 14044.
