# 鸡蛋生产 ; 饲料加工

Dataset: ILCD process, Unit process, single operation
Geography: HLJ-CN
Reference year: 2009
Classification: Unit processes / Materials production / Agricultural production means
Functional unit: The main output product of laying hens is eggs, so the functional unit defined in this study is "1kg egg".
Generated by: 杨瑞, 1632707028@qq.com
Owner: 天工LCI数据工作小组
Review: Dependent internal review by 天工LCI数据工作小组
Amounts: no units in this file; such an amount is in the reference unit of its flow, which a separate flow dataset defines
copyright: false
licenseType: Free of charge for all users and uses

## General comment
在词料的加工过程中主要消耗电能

## Geography
黑龙江省集约化蛋鸡场的生命周期评价

## Technology and included processes
本研究采用定量方法。 这种评价包括对研究目标和范围的重新审查或修正， 从而决定如何才 能满足研究的目标。 依据 ， 结合蛋鸡生产的实际情况， 给出生命周期影响评价的技术框架（图 。 影响评价包括四个步骤分类、 特征化、 标 准 化、加权评估。 （1）分类： 将生命周期清单分析中输入输出数据分门别类的归纳到不同环境影响类型中， 针 对蛋鸡的生命周期清单分析结果， 本文分为以下四种环境影响类型进行评估： 全球变暖， 环境酸化， 富营养化， 光化学臭氧合成。 （2）特征化： 定量清单分析中的数据， 确定四种环境影响类型的影响程度。 这使本来不具可 比性的环境污染排放量具有可比性。 （3）标准化： 首先要建立标准化基准， 为全球变暖、 环境酸化、 富营养化、光化学臭氧合成 四种环境影响类型的相对大小提供可比较的标准。（4） 加权评估： 是将环境影响归为统一的指标 —环境负荷大小的过程， 从而直接对不同生 产系统进行对比。

## Technical purpose
该数据集涉及中国黑龙江省集约化家禽农场的鸡蛋生产 生命周期。它包括饲料加工阶段的能耗，特别是电力使用。此过程的主要产出产品为鸡蛋，因此，该数据集代表的材料用于生产鸡蛋。

## Reference product
- egg: 1; measured
  鸡蛋

## Inputs
- Electricity: 0.239263; calculated
  根据电能消耗系数和所需的饲料量计算
- maize grain: 1.721; measured
- bean pulp: 0.611; measured

## Outputs
- carbon monoxide (fossil): 3.4676e-5; measured
- nitrogen, total (excluding N2): 0.00019973; measured
- sulfur oxides: 0.000120478; measured
- carbon dioxide (fossil),carbon dioxide (fossil): 0.0679472; measured

## Data selection and combination
饲料在加工过程中的能源（电）在生产过程中的污染物排放系数来自 胡志远根据所要研究的目标，

## Use advice
在使用此数据集进行生命周期评估（LCA）时，用户应考虑 饲料加工阶段特定的能源（电力）消耗。研究定义的功能单位为'1公斤鸡蛋'。用户应确保此功能单位与他们评估的范围一致。此外，用户应考虑数据中提供的，来源于胡志远研究的污染物排放系数，以准确反映在所述生命周期阶段的环境影响。

## Review details
清单： 内部审查通过几个迭代步骤完成，涉及原始数据验证、原始数据记录、代表性、完整性、与 ISO 14040 和 14044 有关的建模的一致性。

## Data sources
- 高雪. 黑龙江省集约化蛋鸡场的生命周期评价. (东北农业大学, 2012).
