# Incineration Municipal of solid waste |Shanghai average,CN

Dataset: ILCD process
Geography: SH-CN
Classification: Materials production / Other mineralic materials
Generated by: Jiaqi Lu, wilsherelu@foxmail.com
Review: Dependent internal review by Tiangong LCI Data Working Group
Amounts: no units in this file; such an amount is in the reference unit of its flow, which a separate flow dataset defines
copyright: true

## Reference product
- waste incineration of municipal solid waste (MSW): 1000; input; measured
  焚烧1t城市生活垃圾

## Inputs
All rows: measured
- waste paper (unspecified): 420
  纸张/纸板
- Plastic (unspecified): 289
  塑料
- Wood: 8.4
  木材
- Textile: 35
  纺织品
- Food Debris: 170
  食物残渣
- Metal: 5.7
  金属
- Glass (formed & finished): 61
  玻璃
- Inert waste: 8.7
  其他，惰性废弃物
- electricity mix: 10.512
  预处理电耗
- Leachate: 0.117
  渗滤液量
- Diesel: 0.24
  柴油（助燃剂）
- natural gas: 0.14
  天然气（助燃剂）
- electricity mix: 185.904
  耗电量
- water: 0.59
  耗水量
- electricity mix: 0.936
  一年应急检修电网电量
- Urea: 0.16
  尿素
- Quicklime: 3.3
  生石灰
- hydrated lime dry slaked: 1.03
  熟石灰
- Active carbon: 0.11
  活性炭
- Sodium bicarbonate: 0.21
  碳酸氢钠
- Fume Treatment Chelating Agent: 53.85
  烟气处理螯合剂
- Fly ash treatment chelating agent: 35.3
  飞灰处理螯合剂
- Cement: 26
  水泥

## Outputs
- Slag: 1.18719e8; measured
  炉渣（年产生量）
- Fly ash solidification body: 9.14556e7; measured
  飞灰固化体（年产生量）
- waste incineration of municipal solid waste (MSW): 835.2; measured
  垃圾焚烧
- electricity from waste incineration: 893.7; measured
  上网电量

## Review details
Inventory: The internal review was done by several iteration steps concerning raw data validation, raw data documentation, representativity, completeness and consistency of modelling with regard to ISO 14040 and 14044.; Documentation: The review of the documentation was performed by Ecobilan and is in compliance with ISO 14040 and 14044. The data set documentation is correct in view of the appropriateness of the information provided. It includes all relevant information in view of data quality and scope of application of the respective LCI result.

## Data sources
- 上海市市政固废调研结果
