# Soil remediation ; In-situ remediation ; In Situ Thermal Desorption ; Construction preparation;Contaminated soil

Dataset: ILCD process, Unit process, single operation
Geography: HEN-CN
Reference year: 2022
Classification: Other Services / Repair and maintenance
Generated by: Zhang Jinying, zhangjy@caep.org.cn
Owner: Tiangong LCI Data Working Group
Review: Dependent internal review by Tiangong LCI Data Working Group
Amounts: no units in this file; such an amount is in the reference unit of its flow, which a separate flow dataset defines
copyright: false
licenseType: Free of charge for all users and uses

## General comment
The coking plant is located in the mid latitudes of northern China. The area with benzene content higher than 40 mg/kg and benzo [a] pyrene content higher than 15 mg/kg is defined as a high-risk area, and in-situ thermal desorption repair is carried out. Restoration area of 7567 square meters, earthwork volume of 30413 meters ³， The construction preparation phase takes about 50 days, including personnel and material preparation, site cleaning, and temporary facility construction.

## Technical purpose
The industrial process described is soil remediation through in-situ thermal desorption specifically tailored for a coking plant located in the mid-latitudes of northern China. This process targets high-risk areas where the concentration of benzene exceeds 40 mg/kg, and benzo[a]pyrene is over 15 mg/kg. It is applicable for large scale environmental restoration projects, especially in the treatment of contaminated soil within the defined area of 7567 square meters with a total soil volume of 30413 cubic meters.

## Reference product
- contaminated soil: 30413; measured

## Inputs
All rows: measured
- Electricity: 172800
- Diesel: 9.629
- water: 640
- iron: 27868
- Concrete: 2097
- cement: 300
- Polyethylene: 35
- heavy fuel oil: 4

## Use advice
When employing this data set for LCA studies, users should note the geographic specificity of the data (northern China, mid-latitude region) and the unique conditions of the coking plant site. The defined high-risk areas are based on specific contaminant thresholds, and this should be taken into account for proper context. The construction preparation phase duration of approximately 50 days, including preparation of personnel and materials, site clearing, and temporary facility construction, should be considered in project scheduling. Methodological advice: Model a scenario reflecting these specific conditions for more accurate impact assessment.

## Review details
Inventory: The internal review was done by several iteration steps concerning raw data validation, raw data documentation, representativity, completeness and consistency of modelling with regard to ISO 14040 and 14044.

## Data sources
- 刘文晓等.基于修复效果的污染土壤修复工程环境足迹分析[J].环境科学研究 35,2367-2377（2022）.
