# 压裂和完井阶段 - 射孔和压裂流程

Dataset: ILCD process
Geography: SC-CN
Reference year: 2014
Valid until: 2016
Classification: Materials production / Other mineralic materials
Generated by: 洪溥, 15695258655@163.com
Review: Dependent internal review by 天工LCI数据工作小组
Amounts: no units in this file; such an amount is in the reference unit of its flow, which a separate flow dataset defines

## Geography
我国页岩气开采工作目前集中在四川及重庆地区，选取四川及重庆的数据进行LCA计算。

## Time period
原始数据时间介于2014-2016之间

## Inputs
- freshwater: 2.6071e7; min 4.0237e7; max 1.0253e7; uniform; article inperiodical
  压裂液的组成
- sand: 1.253e6; min 1.91e6; max 304000; uniform; article inperiodical
  压裂液的组成
- Diesel: 6470; min 9920; max 2025; uniform; article inperiodical
  物料、水及废水运输
- Diesel: 209794; min 323791; max 82508; uniform; article inperiodical
  现场设备的使用

## Outputs
- waste water - untreated: 209000; min 322000; max 82000; uniform; article inperiodical
  产生的废水

## Review details
清单： 内部审查通过几个迭代步骤完成，涉及原始数据验证、原始数据记录、代表性、完整性、与 ISO 14040 和 14044 有关的建模的一致性。

## Data sources
- Wang, J., Liu, M., McLellan, B. C., Tang, X. & Feng, L. Environmental impacts of shale gas development in China: A hybrid life cycle analysis. Resources, Conservation and Recycling 120, 38–45 (2017).
