# Electricity production ; Electricity ; Thermal power (82.0%) + hydropower (2.5%) + wind power (12.6%) + solar power (2.9%)

Dataset: ILCD process, Partly terminated system
Geography: HLJ-CN
Reference year: 2019
Classification: Energy carriers and technologies / Electricity
LCI method principle: Other
Generated by: Ruoxi Xiong, xiongrx0126@163.com
Owner: Tiangong LCI Data Working Group
Review: Dependent internal review by Tiangong LCI Data Working Group
Amounts: no units in this file; such an amount is in the reference unit of its flow, which a separate flow dataset defines
copyright: false
licenseType: Free of charge for all users and uses

## General comment
Forms of electricity generation include thermal power, hydropower, wind power and solar power

## Time period
Calculated based on data from the 2019 Energy Statistics Yearbook

## Technical purpose
This dataset describes the composition of electricity generation in China, which consists of thermal power (82.0%), hydropower (2.5%), wind power (12.6%), and solar power (2.9%). It is intended for use in environmental impact assessments, specifically in the calculation of carbon emissions for various forms of electricity production as part of a Life Cycle Assessment (LCA).

## Reference product
- Electricity: 3.6; calculated

## Outputs
- carbon dioxide: 0.774; calculated
- sulfur dioxide: 0.000142; calculated
- Nitrogen oxides: 0.000223136; calculated
- Dust (unspecified, from stack): 2.7321e-5; calculated

## Data treatment and extrapolations
For the accounting method, please refer to the "Enterprise Greenhouse Gas Emissions Accounting Methods and Reporting Guidelines for Power Generation Facilities". Different forms of power generation and fuel consumption come from Chapter 3 (Energy Production) and Chapter 6 (Regional Energy Balance Sheet) in the "China Energy Statistical Yearbook 2020". The fuel parameters such as low calorific value and carbon content per unit calorific value used to calculate the carbon dioxide emission factor come from the "2019 China Regional Power Grid Carbon Dioxide Baseline Emission Factor Calculation Instructions OM" and the "Enterprise Greenhouse Gas Emission Accounting Method and Reporting Guide for Power Generation Facilities" 》

## Use advice
Users of this dataset should reference the 'Enterprise Greenhouse Gas Emissions Accounting Methods and Reporting Guidelines for Power Generation Facilities' for the methodology of carbon accounting. Consideration should be given to the specific fuel consumption and types of electricity generation as reported in the 'China Energy Statistical Yearbook 2020', particularly Chapter 3 on 'Energy Production' and Chapter 6 on 'Regional Energy Balance Sheet'. The use of fuel parameters such as low calorific value and carbon content per unit calorific value, which are essential in calculating the CO2 emission factor, should be sourced from the '2019 China Regional Power Grid Carbon Dioxide Baseline Emission Factor Calculation Instructions OM' and related guidelines.

## Review details
Inventory: The internal review was done by several iteration steps concerning raw data validation, raw data documentation, representativity, completeness and consistency of modelling with regard to ISO 14040 and 14044.

## Data sources
- 熊若熙. 中国电力生产和消费二氧化碳与污染物排放因子核算. (清华大学, 2023).
