# 处置后废水;土壤异位修复;异位热脱附;土壤挖掘;基坑降水

Dataset: ILCD process, Unit process, single operation
Geography: WH-HUB-CN
Reference year: 2022
Classification: Unit processes / Other Services / Repair and maintenance
Functional unit: The functional unit of LCA was defined as the treatment of 1000 m3 of contaminated soil to meet the risk-based remediation targets.
Generated by: 杨欣桐, yangxt@caep.org.cn
Owner: 天工LCI数据工作小组
Review: Dependent internal review by 天工LCI数据工作小组
Amounts: no units in this file; such an amount is in the reference unit of its flow, which a separate flow dataset defines
copyright: false
licenseType: Free of charge for all users and uses

## General comment
挖掘并运输到异位热脱附设备的土壤，在该环节进行热脱附，以实现污染物的去除。

## Geography
选择位于中国武汉的一个受污染场地作为案例研究。大约125万m3的土壤被受到污染，土壤中测量到40种VOC、SVOC和重金属污染物。

## Technology and included processes
受污染的土壤被挖掘并转移到旋转式热反应器中，在真空和低氧条件下进行处理。使用火焰、蒸汽或热油加热反应器，以去除土壤中的有机污染物（>99%）和水分。蒸发的污染物以气体或细颗粒的形式进入燃烧室，并被焚烧破坏。废气经过适当处理后排放。

## Technical purpose
土壤异位修复过程使用异位热脱附技术，主要用于工业场地受污染土壤的处理。该过程适用于去除各种土壤污染物，包括挥发性有机化合物（VOCs）、半挥发性有机化合物（SVOCs）和重金属。经处理的土壤适用于设定风险基准修复目标的场所，有效管理环境危害。

## Reference product
- waste water - treated: 1; measured

## Inputs
All rows: measured
- waste water - untreated: 1
- Activated Carbon: 28.62
- quartz sand: 87.2
- Electricity: 939.888
- Polyaluminium Chloride,Polyaluminium Chloride: 5.57

## Use advice
在使用该数据集进行土壤修复生命周期评价（LCA）时，用户应注意，仅评估了现场修复操作阶段的影响。因此，在比较研究中需要一致地排除设备制造影响。在衡量和比较该过程与其他过程的效果时，必须应用1000立方米受污染土壤处理的功能单元。此外，用户需要确保数据集适用于他们的具体区域背景，特别是如果在中国武汉以外的不同地理位置使用时。

## Review details
清单： 内部审查通过几个迭代步骤完成，涉及原始数据验证、原始数据记录、代表性、完整性、与 ISO 14040 和 14044 有关的建模的一致性。

## Data sources
- Guangji H ,Huan L ,Chang C , et al. Selection of green remediation alternatives for chemical industrial sites: An integrated life cycle assessment and fuzzy synthetic evaluation approach. Science of the Total Environment, 2022, 845 157211-157211.
