# 聚合物生产;通用聚碳酸亚丙酯;催化聚合工艺

Dataset: ILCD process
Geography: CN
Reference year: 2010
Classification: Unit processes / Materials production / Organic chemicals
Functional unit: 1kg polymer production
Generated by: 刘晓华, lxh01311@163.com
Owner: 天工LCI数据工作小组
Review: Dependent internal review by 天工LCI数据工作小组
Amounts: no units in this file; such an amount is in the reference unit of its flow, which a separate flow dataset defines
copyright: false
licenseType: Free of charge for all users and uses

## General comment
该数据集描述了聚丙烯碳酸酯（PPC）的生产过程。PPC是一种热塑性聚合物，通常用于包装、薄膜、粘合剂、涂料的制造，以及在某些应用中作为不可生物降解塑料的替代品。其特性，如可生物降解性和与各种材料的兼容性，使其适合绿色材料市场和环境友好型应用。

## Inputs
- carbon dioxide (fossil): 400
  CO2 原文未区分bio和fossil，根据专家判断此处为fossil

## Outputs
- Electricity: 504
  电力
- Steam: 6
  蒸汽

## Use advice
使用该数据集时，用户必须考虑将LCA的范围扩展到生产PPC所需的催化聚合过程中使用的原材料及能源的上游过程。数据集应该用于与所描述的技术适用性相一致的情景，例如在商业规模生产PPC的制造环境中。在将这些数据外推至其他地区或应用于不同的生产能力时，应注意地理和技术相关性。如果评价PPC的生命周期，应包括产品末端处理过程，如回收或生物降解，并且在这些阶段所做的任何假设都必须清楚地记录下来。

## Review details
清单： 内部审查通过几个迭代步骤完成，涉及原始数据验证、原始数据记录、代表性、完整性、与 ISO 14040 和 14044 有关的建模的一致性。

## Data sources
- 聚碳酸酯和聚乳酸的生命周期评价
