# Soil and groundwater remediation;Ex-situ;groundwater pump and treat;construction;Construction of grout curtains

Dataset: ILCD process, Unit process, single operation
Geography: JS-CN
Reference year: 2022
Classification: Other Services / Repair and maintenance
Generated by: Wang Ning, wang_ning@caep.org.cn
Owner: Tiangong LCI Data Working Group
Review: Dependent internal review by Tiangong LCI Data Working Group
Amounts: no units in this file; such an amount is in the reference unit of its flow, which a separate flow dataset defines
licenseType: Free of charge for all users and uses

## General comment
Construction of a 90-pile grout curtain using cement, tap water and steel

## Geography
a closed pesticide manufacturing plant located in Jiangsu Province, China.

## Technical purpose
The described industrial process is used for soil and groundwater remediation at a closed pesticide manufacturing plant located in Jiangsu Province, China. The remediation method involves the ex-situ construction of a 90-pile grout curtain using materials such as cement, tap water, and steel to contain or prevent the spread of contamination.

## Reference product
- Grout curtains: 1; article inperiodical

## Inputs
- Electricity: 212616; article inperiodical
- Steel sections: 500; article inperiodical
- cement: 365630; article inperiodical
- water: 548440; article inperiodical

## Use advice
When using this data set for Life Cycle Assessment, users need to consider this specific remediation process as part of the after-use phase of the pesticide plant. The data set may be specific to the local geographic and environmental conditions of Jiangsu Province, China. Users should verify regional applicability when applying this data to other locations. Additionally, the sustainability of the sourced materials and contributor to long-term containment should also be considered methodologically.

## Review details
Inventory: The internal review was done by several iteration steps concerning raw data validation, raw data documentation, representativity, completeness and consistency of modelling with regard to ISO 14040 and 14044.

## Data sources
- Ding, D. et al. Assessing the environmental impacts and costs of biochar and monitored natural attenuation for groundwater heavily contaminated with volatile organic compounds. Science of The Total Environment 846, 157316 (2022).
