# 稀土元素浸出;稀土元素;氟碳铈矿路线;含稀土元素矿石

Dataset: ILCD process, Unit process, single operation
Geography: NMG-CN
Reference year: 2014
Classification: Materials production / Non-energetic raw materials
Functional unit: The functional unit of this study is the production of 1 kg of the basket REO from each corresponding mineralogical and processing route.
LCI method principle: Attributional
LCI method approaches: Allocation - market value
Generated by: 汪涛, twang@iue.ac.cn
Owner: 天工LCI数据工作小组
Review: Dependent internal review by 天工LCI数据工作小组
Amounts: no units in this file; such an amount is in the reference unit of its flow, which a separate flow dataset defines
copyright: false
licenseType: Free of charge for all users and uses

## General comment
所描述的工业过程涉及使用氟碳铈矿路线从矿石中浸出稀土元素(REE)。这一过程是REE生产系统的一部分,通常用于提取和精炼REE以制造各种高科技产品。这些产品包括用于电动机的永磁材料、电池、电子产品、显示设备的发光材料以及化学反应的催化剂。

## Technology and included processes
在这项研究中，对稀土生产系统进行了分析，从采矿到溶剂萃取，其中包含沉淀和煅烧等产品精加工过程

## Reference product
- Rare Earth chloride solution: 1; calculated
  RE chloride solution

## Inputs
All rows: calculated
- Sodium carbonate: 1
  Soda ash
- transport in t*km,transport in t*km: 0.53, 9.54 (2 entries)
- Hydrochloric acid: 1
- Rare Earth Element sulfate: 1.77
  RE sulfate solution
- water: 0.00756

## Outputs
- Water (sea water from technosphere, waste water): 7.56; calculated

## Deviations from the LCI method approaches
In this study, the REE production system was analyzed from mining up to and including solvent extraction which contains product finishing processes such as precipitation and calcination (Fig. 1). The other categories assessed in the literature review were mineral type, radioactivity, waste treatment, and co-mining. For mineral type, it was noted that the mineralogy accounted for in each study was different, which makes comparison difficult. For radioactivity, we marked with an X those studies which exemplified radioactivity flows in the LCI (if provided). For waste, we distinguished those LCIs which quantified waste treatment flows. For co-mining, since all REE are co-products of each other, this column is meant to highlight the co-products in addition to REE.

## Use advice
用户应注意，生命周期评估(LCA)数据集是为REE生产的氟碳铈矿路线量身定制的，其中包括采矿、溶剂萃取、沉淀和煅烧。使用这些数据时，必须考虑所研究路线的具体矿物学，因为不同的矿物可能会影响结果的可比性。应注意包括辐射流量，废物处理量化，以及共采方面。用户必须根据REE的具体应用模型使用阶段行为，并综合考虑技术适用性。

## Review details
清单： 内部审查通过几个迭代步骤完成，涉及原始数据验证、原始数据记录、代表性、完整性、与 ISO 14040 和 14044 有关的建模的一致性。

## Data sources
- Bailey, G. et al. Review and new life cycle assessment for rare earth production from bastnäsite, ion adsorption clays and lateritic monazite. Resources, Conservation and Recycling 155, 104675 (2020).
