# 挖掘的土壤;土壤异位修复;异位热脱附;土壤挖掘

Dataset: ILCD process, Unit process, single operation
Geography: WH-HUB-CN
Reference year: 2022
Classification: Unit processes / Other Services / Repair and maintenance
Functional unit: The functional unit of life cycle assessment is defined as the excavation and transportation of 1000m3 contaminated soil to achieve subsequent ectopic heat desorption.
Generated by: 杨欣桐, yangxt@caep.org.cn
Owner: 天工LCI数据工作小组
Review: Dependent internal review by 天工LCI数据工作小组
Amounts: no units in this file; such an amount is in the reference unit of its flow, which a separate flow dataset defines
copyright: false
licenseType: Free of charge for all users and uses

## General comment
污染的土壤被挖掘并转移到旋转式热反应器中

## Geography
选择位于中国武汉的一个受污染场地作为案例研究。大约125万m3的土壤被受到污染，土壤中测量到40种VOC、SVOC和重金属污染物。

## Technology and included processes
使用挖掘机，沿着污染土壤的边界进行挖掘。挖掘过程产生的污染土运送至场外，等待处置，挖掘过程产生的废水，等待原位处置后达标排放。

## Technical purpose
该工艺用于土壤污染场地的环境修复。它专门用于开挖和处理含有VOCs、SVOCs和重金属污染物的土壤。场外热脱附技术针对大规模的土壤除污项目，例如中国武汉的这个项目，处理约125万立方米的污染土壤。

## Reference product
- Excavated soil,Excavated soil: 1000; measured

## Inputs
- Diesel,Diesel: 699.58; measured
- Tap Water: 323.21; measured
- Gasoline (regular): 13.82; measured
- Electricity: 6015.49; measured

## Outputs
- waste water - untreated: 1; measured

## Use advice
在使用该数据集进行生命周期评估时，应注意其仅包括场地修复的运营阶段。数据用户应注意，设备制造的影响已被排除，如果要评估全部的环境影响，可能需要单独考虑。功能单元被定义为挖掘和运输1000m3受污染土壤。数据用户应确保其研究边界与这些参数一致，并相应地缩放其分析，以获得准确的结果。

## Review details
清单： 内部审查通过几个迭代步骤完成，涉及原始数据验证、原始数据记录、代表性、完整性、与 ISO 14040 和 14044 有关的建模的一致性。

## Data sources
- Guangji H ,Huan L ,Chang C , et al. Selection of green remediation alternatives for chemical industrial sites: An integrated life cycle assessment and fuzzy synthetic evaluation approach. Science of the Total Environment, 2022, 845 157211-157211.
