# 水泥生产;水泥, 通用硅酸盐水泥;中国平均

Dataset: ILCD process, Unit process, black box
Geography: CN
Reference year: 2010
Classification: Materials production / Other mineralic materials
Generated by: 杨思琪, ysqsophia@gmail.com
Owner: 天工LCI数据工作小组
Review: Dependent internal review by 天工LCI数据工作小组
Amounts: no units in this file; such an amount is in the reference unit of its flow, which a separate flow dataset defines
copyright: false
licenseType: Free of charge for all users and uses

## General comment
中国的平均数据是基于各水泥生产工艺技术和规模的市场份额以及各自的原材料消耗计算获得。水泥生产工艺技术和规模的市场份额：大型新型干法（>4000吨-熟料/日），29.32%；中型新型干法（2000~4000吨-熟料/日），23.21%；小型新型干法（<2000吨-熟料/日），9.29%；立窑（<2000吨-熟料/日），38.18%。

## Technology and included processes
水泥生产工艺技术和规模的市场份额：大型新型干法（>4000 吨-熟料/日），29.32%；中型新型干法 （2000~4000 吨-熟料/日），23.21%；小型新型干法（<2000 吨-熟料/日），9.29%；立窑（<2000 吨-熟料/日，38.18%。

## Technical purpose
本数据集用于代表中国普通硅酸盐水泥生产过程的平均环境影响。这些信息与建筑行业的研究相关，水泥是建筑基础设施、商业和住宅建筑物建设的基本材料，并且通过与骨料和水混合，用于制造混凝土。

## Model description
取中国生产1t熟料含量为70%的通用水泥作为功能单元。水泥生产包括生料制备、熟料煅烧和水泥磨粉。

## Reference product
- cement, common portland cement: 1000
  熟料含量为70%的通用水泥。

## Inputs
- limestone, crushed, for mill: 920
  石灰石
- clay: 130
  粘土
- gypsum stone (CaSO4-dihydrate): 50
  石膏
- hard coal; 26.3 MJ/kg: 126.49
  熟料烧成阶段原煤消耗。烧成煤耗按不同生产工艺和规模的吨熟料标煤耗折算。
- hard coal; 26.3 MJ/kg: 3.5
  原料烘干阶段原煤消耗。本研究取烘干原煤耗为3.50kg/t-水泥。
- electricity, medium voltage: 187.272
  烧成电耗。电力消耗按不同生产工艺和规模的综合电耗计算。
- electricity, medium voltage: 153.36
  其他电耗。电力主要用于原料破碎、生料磨、水泥磨、除尘设备等机械的驱动，电力消耗按不同生产工艺和规模的综合电耗计算。

## Outputs
- carbon dioxide: 597.48
  CO2的排放量来自于理论计算，包括两方面：一方面来源于煅烧熟料燃煤的使用，另一方面来源于煅烧石灰石（CaCO3）等原料生成石灰（CaO）过程碳酸盐的分解。
- sulfur dioxide: 0.28
  SO2。SO2、NOx和COD排放量来自于近年中国水泥工业污染源普查统计结果。
- Nitrogen oxides: 0.78
  NOx。SO2、NOx和COD排放量来自于近年中国水泥工业污染源普查统计结果。
- particles (PM2.5): 0.3995
  <PM2.5。本研究根据污染源普查对不同水泥生产工艺和规模的颗粒物产污系数的调查，以及不同水泥生产设备产生的颗粒物比例和除尘技术的应用份额及分级除尘效率，计算功能单元水泥产品的颗粒物分级排放量。
- particles (PM2.5 - PM10): 0.1392
  PM2.5-10。本研究根据污染源普查对不同水泥生产工艺和规模的颗粒物产污系数的调查，以及不同水泥生产设备产生的颗粒物比例和除尘技术的应用份额及分级除尘效率，计算功能单元水泥产品的颗粒物分级排放量。
- particles (> PM10): 0.0582
  >PM10。本研究根据污染源普查对不同水泥生产工艺和规模的颗粒物产污系数的调查，以及不同水泥生产设备产生的颗粒物比例和除尘技术的应用份额及分级除尘效率，计算功能单元水泥产品的颗粒物分级排放量。
- chemical oxygen demand: 0.000158
  COD。SO2、NOx和COD排放量来自于近年中国水泥工业污染源普查统计结果。

## Use advice
本生命周期评价（LCA）数据集基于不同水泥生产技术及其运营规模的市场份额。用户应注意，平均数据反映了横跨不同生产规模和技术的原材料加权消耗，包括大型、中型、小型新型干法装置以及立窑。方法论上的考虑必须是将这些数据用于含有70%熟料的水泥的背景下。数据假定了中国特定的技术组合，只应当作为此类使用，未经适当调整不宜外推至其他地区。此外，希望研究特定类型或质量的水泥生产的用户应该获取更详细的数据，而不是依赖这个平均值。

## Review details
清单： 内部审查通过几个迭代步骤完成，涉及原始数据验证、原始数据记录、代表性、完整性、与 ISO 14040 和 14044 有关的建模的一致性。

## Data sources
- 姜睿 & 王洪涛. (2010). 中国水泥工业的生命周期评价. 化学工程与装备, 4, 183–187.
