# 稀土提取;稀土;熔盐电解;钕铁硼磁铁废料

Dataset: ILCD process, Unit process, single operation
Geography: CN
Reference year: 2013
Valid until: 2016
Classification: Unit processes / Materials production / Metals and semimetals
Functional unit: The functional unit of this analysis was chosen as the production of one kg Nd–Pr alloy through extraction from NdFeB magnet scrap
LCI method principle: Attributional
LCI method approaches: Allocation - market value
Generated by: 汪涛, twang@iue.ac.cn
Owner: 天工LCI数据工作小组
Review: Dependent internal review by 天工LCI数据工作小组
Amounts: no units in this file; such an amount is in the reference unit of its flow, which a separate flow dataset defines
copyright: false
licenseType: Free of charge for all users and uses

## General comment
该工艺旨在从钕铁硼磁铁废料中回收稀土金属，特别是钕 (Nd) 和镨 (Pr)。该过程适用于回收领域，针对提取和生产Nd-Pr合金，这在制造各种高科技应用中的高强度永磁体中至关重要，例如电动机、风力涡轮发电机和硬盘驱动器。

## Technology and included processes
代尔夫特理工大学正在实验室规模上开发一种从废磁铁中提取稀土金属的一步回收工艺。实验中使用未磁化、未涂层的磁体样品。将磁体在惰性气氛下球磨以增加表面积以促进电化学反应，并将粉末插入盐浴中。

## Reference product
- End-of-Life Magnet Weight in Compound: 1.055; input; min 1.1; max 1.01; uniform; calculated
  Pre-treatment steps: EOL magnet weight in compound

## Inputs
- Electricity: 0.00324; min 0.00324; max 0.00324; uniform; calculated
  Pre-treatment steps: Extraction of magnet from compound

## Deviations from the LCI method approaches
The allocation of environmental flows to Nd and Pr was updated. Value allocation was used to share the process impacts from both multi-output stages, reflecting prices from recent years (2013–2016). There are two stages in the primary production of rare earths for which assumptions regarding coproductions are necessary: the beneficiation stage, where concentrated iron ore and rare earth concentrate are separated, and the solvent extraction stage undertaken to separate individual rare earths.

## Use advice
用户在使用此数据时，应考虑该过程的实验性质，目前在实验室规模上开发。考虑将其放大到工业级别可能需要考虑技术适应性和效率变化。根据价值分配更新对Nd和Pr环境流的分摊反映了在选矿和溶剂提取阶段给予副产品的经济考量。说明还强调了准确地根据最新数据（2013-2016年）单独对多产出阶段建模分配的必要性。用户应确保功能单元——从钕铁硼磁铁废料中提取生产1公斤Nd-Pr合金——与其评估的目标和范围一致。

## Review details
清单： 内部审查通过几个迭代步骤完成，涉及原始数据验证、原始数据记录、代表性、完整性、与 ISO 14040 和 14044 有关的建模的一致性。

## Data sources
- Schulze, R., Abbasalizadeh, A., Bulach, W., Schebek, L. & Buchert, M. An Ex-ante LCA Study of Rare Earth Extraction from NdFeB Magnet Scrap Using Molten Salt Electrolysis. J. Sustain. Metall. 4, 493–505 (2018).
