# Substrate Remediation;In-situ Mulching;Mulching;Activated Carbon Mulching

Dataset: ILCD process, Unit process, black box
Geography: NO
Reference year: 2011
Classification: Unit processes / Other Services / Repair and maintenance
Generated by: Sang Chunhui, sangch@mail.bnu.edu.cn
Owner: Tiangong LCI Data Working Group
Review: Dependent internal review by Tiangong LCI Data Working Group
Amounts: no units in this file; such an amount is in the reference unit of its flow, which a separate flow dataset defines
copyright: false
licenseType: Free of charge for all users and uses

## General comment
Use of capping vessel to cap the AC on the sediment.

## Geography
After investigation, no relevant domestic research literature has been found yet.

## Time period
There is no clear start time for data collection in the literature, and the start time of the validity period is based on the publication time of the literature

## Technology and included processes
capping material was used of 2 kg /m2. Density is 0.5 tonnes / m3.

## Technical purpose
The described process refers to an environmental remediation technology specifically used for sediment restoration. The 'in-situ mulching' involves the capping of contaminated sediments with activated carbon (AC) to isolate contaminants and reduce their bioavailability. This process is typically used in aquatic environments such as lakes, rivers, and coastal areas to address pollution. The technical application of activated carbon mulching is aimed at improving water quality by mitigating the effects of contaminated sediments.

## Reference product
- AC covered area: 2.38e7; calculated
  这里指的是采用活性炭覆盖的底泥沉积物影响区域，用面积表示

## Inputs
- Diesel oil,diesel oil: 46700; calculated
- Activated Carbon: 4.76e7; calculated

## Data selection and combination
Process inventory data were obtained in accordance with ISO 14040 on LCA.35 Primary data were obtained from site-specific pot experiments, pilot studies, and vendors, which were representative of situations in Southern China.

## Use advice
Attention should be paid to the methodological aspects when using this LCA data. It is pertinent to note that this dataset is lacking domestic research literature, and therefore assumptions and values must be carefully scrutinized. The primary data should be recognized as representative of only specific cases in Southern China, and may not be widely applicable. Users must consider the density and usage of capping material which is stated as 2 kg/m2 with a density of 0.5 tonnes/m3. The absence of a defined start time for data collection necessitates reliance on the publication time of the source literature. The dataset must be used in accordance with ISO 14040 LCA standards, and all major raw materials and energy consumption should be included in the inventory data for a comprehensive assessment.

## Review details
Inventory: The internal review was done by several iteration steps concerning raw data validation, raw data documentation, representativity, completeness and consistency of modelling with regard to ISO 14040 and 14044.

## Data sources
- Sparrevik, M. et al. Use of Life Cycle Assessments To Evaluate the Environmental Footprint of Contaminated Sediment Remediation. Environ. Sci. Technol. 45, 4235–4241 (2011).
