# Electricity production ; Electricity ; Thermal power (83.9%) + hydropower (1.1%) + wind power (12.1%) + solar power (3.0%)

Dataset: ILCD process, Partly terminated system
Geography: NMG-CN
Reference year: 2019
Classification: Energy carriers and technologies / Electricity
LCI method principle: Other
Generated by: Ruoxi Xiong, xiongrx0126@163.com
Owner: Tiangong LCI Data Working Group
Review: Dependent internal review by Tiangong LCI Data Working Group
Amounts: no units in this file; such an amount is in the reference unit of its flow, which a separate flow dataset defines
copyright: false
licenseType: Free of charge for all users and uses

## General comment
Forms of electricity generation include thermal power, hydropower, wind power and solar power

## Time period
Calculated based on data from the 2019 Energy Statistics Yearbook

## Technical purpose
This data set pertains to the generation of electricity through different energy sources including thermal power (primarily fossil fuels), hydropower, wind power, and solar power. It reflects the energy mix for China and is relevant for life cycle assessments of products and services where such electricity consumption is required. This can include industrial operations, residential energy use, products with electricity consumption during use phase, and electricity consumed in infrastructure.

## Reference product
- Electricity: 3.6; calculated

## Outputs
- carbon dioxide: 0.911; calculated
- sulfur dioxide: 0.000158; calculated
- Nitrogen oxides: 0.000248951; calculated
- Dust (unspecified, from stack): 3.0208e-5; calculated

## Data treatment and extrapolations
For the accounting method, please refer to the "Enterprise Greenhouse Gas Emissions Accounting Methods and Reporting Guidelines for Power Generation Facilities". Different forms of power generation and fuel consumption come from Chapter 3 (Energy Production) and Chapter 6 (Regional Energy Balance Sheet) in the "China Energy Statistical Yearbook 2020". The fuel parameters such as low calorific value and carbon content per unit calorific value used to calculate the carbon dioxide emission factor come from the "2019 China Regional Power Grid Carbon Dioxide Baseline Emission Factor Calculation Instructions OM" and the "Enterprise Greenhouse Gas Emission Accounting Method and Reporting Guide for Power Generation Facilities" 》

## Use advice
Users should apply this data set within the context of Chinese energy production for the year referenced (2019), keeping in mind that the energy mix and carbon emission factors are specific to that time and may differ in other years or regions. It's important to verify the appropriateness of the data for the intended application, especially concerning temporal and geographical representativeness. For assessments involving energy use over multiple years, users might need to adjust the data to account for changes in the energy mix or advancements in technology.

## Review details
Inventory: The internal review was done by several iteration steps concerning raw data validation, raw data documentation, representativity, completeness and consistency of modelling with regard to ISO 14040 and 14044.

## Data sources
- 熊若熙. 中国电力生产和消费二氧化碳与污染物排放因子核算. (清华大学, 2023).
