# 铝土矿开采 ; 铝土矿 ; 摇篮 ; 2007年

Dataset: ILCD process, Unit process, single operation
Geography: CN
Reference year: 2021
Classification: Unit processes / Materials production / Non-energetic raw materials
Generated by: 蔡梓萌, caizm6178@163.com
Owner: 天工LCI数据工作小组
Review: Dependent internal review by 天工LCI数据工作小组
Amounts: no units in this file; such an amount is in the reference unit of its flow, which a separate flow dataset defines
copyright: false
licenseType: Free of charge for all users and uses

## General comment
氧化铝生产2017

## Time period
文献发表日期

## Technical purpose
所描述的铝土矿开采工艺用于提取铝土矿，铝土矿是氧化铝生产的主要原材料，并随后用于制造铝金属。该数据集特别涉及2007年的铝土矿开采操作，作为材料生命周期评估的起点（摇篮）。

## Reference product
- bauxite: 2.39622e10; software or database

## Inputs
All rows: software or database
- electricity, high voltage, aluminium industry: 4.00378e7
  electricity
- other fuels: 1.16257e9
  electricity
- Coal, brown, in ground: 2.46643e7
  coal
- natural gas, high pressure: 272700
  coal
- Gasoline: 1.1285e6
  gasoline
- Diesel oil: 6.1101e6
  diesel

## Data selection and combination
本研究的数据参考了PA、SA、电力等背景数据的LCA数据。PA数据来自统计数据源，SA数据主要来自文献。背景数据主要来自中国科学院生态环境研究中心CASRCEES 2018建立的中国本地化LCA数据库，涵盖能源、材料、交通、废物管理等LCA数据。

## Use advice
关于PA（生产分配）、SA（系统分配）、电力和其他背景数据的LCA数据应在其出版年份和其代表的地理位置的背景下仔细解读。用户应注意技术和环境标准的演变，因此，数据可能不准确地反映当前的实践。此外，在使用SA数据（主要来源于文献）时，尤其应注意与中国本地化LCA数据库CAS RCEES 2018集成数据集，以便获得更全面的结果，并交叉参考出版日期和来源。

## Review details
清单： 内部审查通过几个迭代步骤完成，涉及原始数据验证、原始数据记录、代表性、完整性、与 ISO 14040 和 14044 有关的建模的一致性。

## Data sources
- Ding, N., Liu, N., Lu, B. & Yang, J. Life cycle greenhouse gas emissions of aluminum based on regional industrial transfer in China. J. Ind. Ecol. 25, 1657–1672 (2021).
