# 修复后土壤;生物炭;椰子壳为原料;农田土壤;原位稳定化

Dataset: ILCD process, Unit process, single operation
Geography: HZ-GD-CN
Reference year: 2021
Classification: Unit processes / Other Services / Repair and maintenance
Functional unit: The functional unit of this study was set to equally remediate 0.07 ha (1 mu, Chinese area unit) of Cd contaminated paddy fields, and the remediation goal is to reduce the Cd concentration in rice to the national safe use threshold of rice (0.2 mg/kg), with a time horizon of 30 years to obtain long-term impacts.
Generated by: 杨欣桐, yangxt@caep.org.cn
Owner: 天工LCI数据工作小组
Review: Dependent internal review by 天工LCI数据工作小组
Amounts: no units in this file; such an amount is in the reference unit of its flow, which a separate flow dataset defines
copyright: false
licenseType: Free of charge for all users and uses

## General comment
重金属稳定化修复是指通过向土壤中添加稳定化药剂,使可交换态的重金属转变为残渣态,降低重金属的溶解迁移性能,以降低其对生态环境的毒性

## Geography
研究地点位于中国南方珠江三角洲惠州市龚庄镇，是一片受镉污染的稻田。

## Technology and included processes
添加生物炭不会降低土壤中总镉含量，但会降低土壤镉的生物利用度，导致水稻植株中镉含量下降。修复试剂通过机械搅拌与表面污染土壤（深度：0-20厘米）充分混合。补救措施后，补救试剂不会被移除

## Technical purpose
生物炭来源于椰子壳，用于农田土壤修复，并具体用于稻田中镉污染的原位稳定化处理。该过程针对重金属稳定化，通过将可交换态重金属转变为残渣态，降低它们的溶解性和迁移性，以减少对生态环境的毒性。

## Reference product
- Remediated soil: 3822.77; measured

## Inputs
- Equipment and Materials Arriving on Site: 1; measured
  由于我国南方有早稻和晚稻两个生长季节，修复剂的施用量为3000公斤/公顷，施用频率为每年2次。从2017年到2018年，每个场景的整个修复时间为2年。总施加剂量=3000kg/ha*0.07ha*2次/年*2年≈800kg
- Diesel,Diesel: 17.4; measured
- contaminated soil: 666.67; measured
  由原文可知，污染区域为0.07公顷（1亩）

## Use advice
数据集用户关注镉污染稻田修复过程的生命周期评估时，应仔细纳入生物炭施用的长期影响。因为加入生物炭并不减少土壤中镉的总浓度，但会降低其生物可利用性，用户在考虑数据时应重视由此导致的水稻植株镉摄取量的减少。该数据覆盖了30年的时间跨度，并在每个阶段包括了材料、能源、资源、排放和碳的流动。数据使用者应将修复试剂纳入系统边界，因为修复后它们仍然存在于原位，并且应将机械搅拌作为能源和材料输入的一部分进行考虑。

## Review details
清单： 内部审查通过几个迭代步骤完成，涉及原始数据验证、原始数据记录、代表性、完整性、与 ISO 14040 和 14044 有关的建模的一致性。

## Data sources
- Kai L ,Liping F ,Fangbai L , et al. Sustainability assessment and carbon budget of chemical stabilization based multi-objective remediation of Cd contaminated paddy field. The Science of the total environment, 2021, 819 152022-152022.
