# 市政污泥处理与处置;湿污泥 含水率80%;650℃热解

Dataset: ILCD process, Unit process, single operation
Geography: CN
Classification: Unit processes / End-of-life treatment / Wastewater treatment
Functional unit: 1 t of sludge is selected as the functional unit, the moisture content of wet sludge is 80%.
Generated by: 金思甜, 2331276@tongji.edu.cn
Owner: 天工LCI数据工作小组
Review: Dependent internal review by 天工LCI数据工作小组
Amounts: no units in this file; such an amount is in the reference unit of its flow, which a separate flow dataset defines
copyright: ['opt4ROkqig']
licenseType: Free of charge for all users and uses

## General comment
通过实验对不同工况下的污泥热解处理工艺进行相关数据的收集和分配工作，对每一个过程的物质、能量的输入和输出，对环境污染物排放等进行量化。

## Technology and included processes
热解环节管式炉额定功率 4 kW，空载功率 1.4 kW，反应前通入 2~3 分钟氮气以保证无氧环境，氮气流量为 30 ml/min，管式炉升温速率 80 ℃/min，热解终温保持10min。

## Technical purpose
所描述的工艺用于通过在650℃高温下对湿污泥进行热解来处理和处置市政污泥，湿污泥含水率为80%。该工艺适用于将1吨高含水率污泥转化为可用的副产品或用于减少废物，潜在适合城市废物管理设施。

## Reference product
- Sludge: 1000; input; estimated
  1t湿污泥含水率 80%

## Inputs
- Electricity: 1680.01; calculated
- nitrogen: 5.63; calculated

## Outputs
All rows: calculated
- hydrogen: 0.47
- carbon monoxide (biogenic): 3.99
  原文未区分biogenic和fossil，根据专家判断此处为biogenic。
- methane (biogenic),methane (biogenic): 3.29
  原文未区分biogenic和fossil，根据专家判断此处为biogenic。
- non-methane volatile organic compounds: 2.8
- carbon dioxide (biogenic): 26.4
  原文未区分biogenic和fossil，根据专家判断此处为biogenic。
- Heat treatment oil: 81.66
- Semi-coke: 81.82

## Use advice
在使用此数据集进行生命周期评估时，用户应考虑与热解过程相关的任何排放或能源消耗。还应考虑任何可能的副产品及其相应的处理或利用。确保所有计算都基于含水率80%的1吨污泥的功能单位。建议还要考虑给定工艺的技术适用性，包括规模、地理位置和遵守监管标准。

## Review details
清单： 内部审查通过几个迭代步骤完成，涉及原始数据验证、原始数据记录、代表性、完整性、与 ISO 14040 和 14044 有关的建模的一致性。

## Data sources
- 王久兵. 污泥热解反应机制及其能源化工艺的全生命周期评价研究[D].浙江工业大学,2017.
