# 高铝飞灰利用 ; 莫来石陶瓷（主要产品）和硅灰（副产品） ; 高铝飞灰 (HAFA)

Dataset: ILCD process, Unit process, single operation
Geography: NMG-CN
Reference year: 2017
Classification: Unit processes / Materials production / Glass and ceramics
Generated by: 徐常青, xcq@bit.edu.cn
Owner: 天工LCI数据工作小组
Review: Dependent internal review by 天工LCI数据工作小组
Amounts: no units in this file; such an amount is in the reference unit of its flow, which a separate flow dataset defines
copyright: false
licenseType: Free of charge for all users and uses

## General comment
高铝粉煤灰应用-情景2，主要产物Mullite ceramics，副产物fume silicate

## Time period
文献发表年

## Technical purpose
高铝飞灰（HAFA）被用于生产莫来石陶瓷，莫来石陶瓷主要应用于结构、耐火材料和热绝缘，因其高机械强度和热震稳定性。莫来石陶瓷服务于航空航天、电子和冶金等多个行业。硅灰副产品通常用作混凝土和水泥产品中的辅助胶凝材料，提高其机械性能和耐久性。

## Reference product
- ash: 1000; input; measured
  功能单位是应用1000kg高铝粉煤灰

## Inputs
- electricity, high voltage, aluminium industry: 295.884; software or database
- hydrogen chloride: 506.85; measured
- carbon dioxide, in chemical industry: 165.07; measured
- quicklime, in pieces, loose: 210.96; measured
  CaO,生石灰
- freshwater: 2786.99; measured
  fresh water
- Sodium hydroxide: 190.41; measured
- hard coal: 360.27; software or database

## Outputs
All rows: measured
- sanitary ceramics: 684.93
  主要产品Mullite ceramics
- Calcium silicate: 0
  副产品硅酸钙CaSiO3，无条目
- silica fume, densified: 205.48
  副产品fume silica
- aluminium hydroxide: 0
  副产品high-white aluminum hydroxide (HWAH)
- chemical oxygen demand: 0.0219
- carbon dioxide (fossil),carbon dioxide (fossil): 821.92
- sulfur dioxide: 0.08
- Nitrogen oxides: 0.08
- municipal solid waste: 821.92

## Use advice
在生命周期评估中使用此数据集时，应注意主产品（莫来石陶瓷）和副产品（硅灰）之间环境影响的分配。考虑数据集应用的特定场景很重要，特别是是否包括了副产品在特定应用中的利用。该数据集的技术适用性限于定义的使用情景（情景2），在考虑数据的相关性和技术进步时，应考虑发表年份。

## Review details
清单： 内部审查通过几个迭代步骤完成，涉及原始数据验证、原始数据记录、代表性、完整性、与 ISO 14040 和 14044 有关的建模的一致性。

## Data sources
- Yang, S. et al. Assessment and comparison of three high-aluminum fly ash utilization scenarios in Inner Mongolia, China using an eco-efficiency indicator. Waste Manag. Res. 35, 515–524 (2017).
