# 废旧轮胎处理 ; 废旧轮胎; 热裂解废旧轮胎 100000t/a ; 钢丝产品

Dataset: ILCD process
Geography: XJ-CN
Reference year: 2023
Classification: Unit processes / End-of-life treatment / Energy recycling
Functional unit: 1 ton waste tire recycling
Generated by: 刘晓华, lxh01311@163.com
Owner: 天工LCI数据工作小组
Review: Dependent internal review by 天工LCI数据工作小组
Amounts: no units in this file; such an amount is in the reference unit of its flow, which a separate flow dataset defines
copyright: false
licenseType: Free of charge for all users and uses

## General comment
废旧轮胎的热裂解处理是为了每年处理和回收100000吨的废旧轮胎。这个过程能够回收如钢丝等有价值的物料，并可供重用或用于新产品的生产。通过这一过程回收的钢丝适用于需要高质量钢材输入的不同行业，像是汽车、建筑和制造业。

## Reference product
- Waste Tire: 1000; input
  废旧轮胎

## Inputs
- Denitration Agent: 0.878333
  脱硝剂
- Electricity: 276.71
  电
- water: 735.9
  水
- natural gas,natural gas: 0.136183
  天然气

## Outputs
- Steel Wire: 118.8
  钢丝产品
- Fuel Oil: 408.85
  燃料油
- Carbon Black: 342.596
  炭黑产品
- Rubber powder: 880
  橡胶粉末

## Use advice
使用这组数据的用户应考虑在将其整合入生命周期评估模型时处理过程的具体技术适用性。需要注意数据的准确性，包括处理的废旧轮胎数量及钢丝产品的产量。同样关键的是要计算热裂解过程中的能耗和排放。方法论建议包括确保废旧轮胎的生命周期终期阶段被适当地建模，考虑钢丝生产过程可能的环境影响，并且要考虑钢丝的二次应用可能性。

## Review details
清单： 内部审查通过几个迭代步骤完成，涉及原始数据验证、原始数据记录、代表性、完整性、与 ISO 14040 和 14044 有关的建模的一致性。

## Data sources
- 废旧轮胎回收综合利用项目环评报告
