# Soil remediation ; In-situ remediation ; Enhanced bioremediation ; End-of disposal ; Backfilling of injection wells and monitoring wells

Dataset: ILCD process, Unit process, single operation
Geography: SH-CN
Classification: Other Services / Repair and maintenance
Generated by: Xiao Meng, xiaomeng@mail
Owner: Tiangong LCI Data Working Group
Review: Dependent internal review by Tiangong LCI Data Working Group
Amounts: no units in this file; such an amount is in the reference unit of its flow, which a separate flow dataset defines
licenseType: Free of charge for all users and uses

## General comment
CHC+ISB is used for site remediation, and during the back-end treatment phase, the previously excavated injection wells and monitoring wells are backfilled.

## Geography
The aquifer in a certain area in Shanghai, China, is uniformly contaminated with chlorinated volatile organic compounds (CVOCs), with a surface area of 20,000 m2 and a depth of 50 m, with the water table located at a depth of 30 m.

## Technical purpose
The data set represents the process of soil remediation specifically focusing on in-situ enhanced bioremediation for the treatment of sites contaminated with chlorinated volatile organic compounds (CVOCs). This form of bioremediation is suited for application in areas where the soil and groundwater aquifer are uniformly contaminated. The described process includes the backfilling of injection wells and monitoring wells following the remediation phase, which is a crucial step to ensure the site's return to its natural state or preparation for future use.

## Reference product
- Well backfilling: 128
  回填完成的注射井和监测井

## Inputs
- Concrete: 8139.75; software or database
- Gravel Sand: 76310.2; software or database
  Gravel sand
- clay: 36094.7; software or database
- Water: 13730.6; software or database

## Use advice
Users of this dataset should consider the uniform contamination levels of the aquifer and its specific depth dimensions when applying this data to similar context remediation efforts. It is important to ensure that the parameters of the contaminated site, such as surface area, depth, and water table location, are compatible with those described in the dataset before adaptation. Furthermore, when utilizing this data, attention should be paid to geological and hydrogeological conditions that may affect the distribution and effectiveness of the bioremediation process.

## Review details
Inventory: The internal review was done by several iteration steps concerning raw data validation, raw data documentation, representativity, completeness and consistency of modelling with regard to ISO 14040 and 14044.

## Data sources
- Ni, Z. et al. Comparative Life-Cycle Assessment of Aquifer Thermal Energy Storage Integrated with in Situ Bioremediation of Chlorinated Volatile Organic Compounds. Environ. Sci. Technol. 54, 3039–3049 (2020).
