# Soil remediation ; ex-situ remediation ; thermal desorption remediation ; engineering implementation ; final soil treatment

Dataset: ILCD process, Unit process, single operation
Geography: SH-CN
Classification: Other Services / Repair and maintenance
Generated by: Wang Feng, wangfeng@caep.org.cn
Owner: Tiangong LCI Data Working Group
Review: Dependent internal review by Tiangong LCI Data Working Group
Amounts: no units in this file; such an amount is in the reference unit of its flow, which a separate flow dataset defines
copyright: false
licenseType: Free of charge for all users and uses

## General comment
Ectopic thermal desorption repairs 1 cubic meter of contaminated soil. After thermal desorption, the soil will temporarily exist in the repair site waiting for the acceptance of the effect evaluation unit.

## Geography
我国华东区域5 个污染土壤异位热脱附修复工程案例

## Technology and included processes
The soil after thermal desorption will temporarily exist in the repair site waiting for the acceptance of the effect evaluation unit, and after the acceptance is qualified. Backfilled into the site or transported to the outside of the site for disposal

## Technical purpose
The drainage outfall described in this dataset is used primarily for the ejection of treated wastewater into natural water bodies from industrial or municipal waste water treatment facilities. Its applicability is largely found in industrial zones where large-scale treatment and disposal of waste water is a regulated necessity.

## Reference product
- The final treated soil: 1; measured

## Inputs
- Diesel: 0.00021; measured

## Use advice
When utilizing this dataset for life cycle assessment, careful consideration should be given to the specific characteristics of the outflow water quality after treatment. It is vital to account for the geographic and technological context of the wastewater treatment processes, as these factors significantly influence the environmental impact assessment. Furthermore, periodic updates are advised to reflect the latest treatment technologies and regulatory compliance changes.

## Review details
Inventory: The internal review was done by several iteration steps concerning raw data validation, raw data documentation, representativity, completeness and consistency of modelling with regard to ISO 14040 and 14044.

## Data sources
- 刘爽,陈盼,宋慧敏等.我国华东地区污染土壤异位热脱附修复碳排放及减排策略[J].环境工程学报,2022,16(08):2663-2671.
