# 阴极蚀刻箔生产 ; 0.05 mm蚀刻铝箔的铝线圈 ; 铝锭

Dataset: ILCD process, Unit process, single operation
Geography: JS-CN
Reference year: 2020
Classification: Unit processes / Materials production / Metals and semimetals
Generated by: 常慧敏, huiminchang@tsinghua.edu.cn
Owner: 天工LCI数据工作小组
Review: Dependent internal review by 天工LCI数据工作小组
Amounts: no units in this file; such an amount is in the reference unit of its flow, which a separate flow dataset defines
copyright: false
licenseType: Free of charge for all users and uses

## General comment
阴极蚀刻箔生产 ; 铝电解电容器 (AEC) 生产 ; 420V 680uf

## Time period
被调查的制造商在 2020 年生产了约 11.83 亿个各类 AEC。

## Technical purpose
阴极蚀刻箔生产过程生产的 0.05 毫米蚀刻铝箔主要用于制造铝电解电容器（AEC），特别是额定420V 680uf的产品。这些 AEC 是广泛电子设备不可缺少的组成部分, 用于调节电流和提供临时能量存储。该数据涵盖了AEC的多种应用范围生产量，依据2020年调查制造商生产的约11.83亿个AEC。

## Reference product
- Al coil of 0.05mm etched foil: 369.431; measured
  Al coil of 0.05mm etched foil [kg] ; Production of cathode etched foil

## Inputs
All rows: measured
- electricity, high voltage, aluminium industry: 1037.21
  Electricity [kWh] ; Production of cathode etched foil
- 0.05mm Al blank coil: 518
  0.05mm Al blank coil[kg] ; Preparation of sulfuric acid (cathode)
- water, deionised: 14337.5
  Deionized water [kg] ; Preparation of sulfuric acid (cathode)
- tap water: 1099.38
  Tap water [kg] ; Waste gas treatment
- sulfuric acid: 1129.71
  Sulfur acid（98%）[kg] ; Corrosion reaction (cathode)
- nitric acid, without water, in 50% solution state: 56.865
  Nitric acid（98%）[kg] ; Corrosion reaction (cathode)
- hydrochloric acid, without water, in 30% solution state: 189.549
  Hydrochloric acid（31%）[kg] ; Corrosion reaction (cathode)
- sodium hydroxide, without water, in 50% solution state: 189.549
  NaOH solution (30%) [kg] ; Corrosion reaction (cathode)

## Outputs
All rows: measured
- wastewater, average: 18687.3
  Wastewater [kg] ; Production of cathode etched foil
- hydrogen chloride: 0.931
  HCl gas [kg] ; Production of cathode etched foil
- Sulfuric acid: 0.101
  H2SO4 gas [kg] ; Production of cathode etched foil
- Nitrogen oxides: 0.115
  NOx [kg] ; Production of cathode etched foil
- ammonia: 0.105
  NH3 gas [kg] ; Sewage treatment
- Chemical Oxygen Demand (COD): 2.273
  COD [kg] ; Production of cathode etched foil
- Suspended solids, unspecified: 1.488
  SS [kg] ; Production of cathode etched foil
- ammonia: 0.048
  NH3-N [kg] ; Production of cathode etched foil
- Nitrogen: 0.19
  TN [kg] ; Production of cathode etched foil

## Data selection and combination
电容器生产的库存数据来自 AEC 位于中国江苏省的生产工厂。每道工序的 LCI 数据收集的截止标准是至少覆盖输入流和输出流 95% 的质量和能量。阳极箔生产和阴极箔生产的库存数据是根据生产工艺和相应工艺参数分析获得的。上游数据（即铝锭、分选纸、运输、电力和水）来自 Gabi 软件（版本：10.6.1.35）。具体而言，《中国电力年鉴》中的中国电网概况以 2016 年为基准年。铝锭生产的基准年为 2015 年。无法获取的柠檬酸铵、五硼酸铵、NH4H2PO4 和 HBO3 数据是根据 Gabi 软件中现有材料（反应物）的化学方程式估算的。使用和报废阶段的库存数据是通过分析和计算获得的。

## Use advice
生命周期库存（LCI）数据使用者在使用AEC生产数据集时，应确保其评估至少包括了95%的物质和能源流。在进行全面的环境影响分析时，至关重要的是要纳入提供的上游数据（铝锭、隔离纸、运输、电力和水）。源自Gabi软件的库存数据应该反映相应的区域电力概况和铝锭生产的参考年份（电力为2016年，铝为2015年）。对于氨基柠檬酸，硼酸铵，磷酸氢二铵和硼酸等材料的数据缺口，应基于软件中可用的反应物使用化学方程进行估算来解决。用户必须在评估中包含使用和产品生命周期终端阶段的计算，以确保一个完整的生命周期评价。

## Review details
清单： 内部审查通过几个迭代步骤完成，涉及原始数据验证、原始数据记录、代表性、完整性、与 ISO 14040 和 14044 有关的建模的一致性。

## Data sources
- Zhang, C., Jing, J., Yun, L., Zheng, Y. & Huang, H. A cradle-to-grave life cycle assessment of high-voltage aluminum electrolytic capacitors in China. J. Clean. Prod. 370, (2022).
