# 土壤修复;异位修复;热脱附;案例1;运行;修复后的土壤

Dataset: ILCD process, Unit process, single operation
Geography: JS-CN
Reference year: 2017
Classification: Unit processes / Other Services / Repair and maintenance
Generated by: 王宁, wang_ning@caep.org.cn
Owner: 天工LCI数据工作小组
Review: Dependent internal review by 天工LCI数据工作小组
Amounts: no units in this file; such an amount is in the reference unit of its flow, which a separate flow dataset defines
copyright: false
licenseType: Free of charge for all users and uses

## General comment
将挖掘出的污染土投入热脱附设备，同时使用化学药剂进行水处理

## Technology and included processes
挖掘出污染无土壤方量为61135m3，热脱附设备功耗为657 kw/ h，每天运行21h，共运行172d，同时消耗了大量药剂

## Technical purpose
此热脱附过程用于挖出的污染土壤的修复。这是一种异位处理方法，其中使用高能耗热脱附设备使土壤中的污染物挥发并去除，之后作为修复后的土壤收集，适合重新使用或安全处理。该过程适用于环境工程，特别是在需要消除污染物而不将其转移到不同位置的土壤恢复项目中。

## Reference product
- Remediated soil: 61135; measured

## Inputs
All rows: measured
- Excavated soil,Excavated soil: 61135
- Electricity: 8.5431e6
- Polyaluminium Chloride,Polyaluminium Chloride: 19914.2
- Polyacrylamide,Polyacrylamide: 27967.2
- Tap Water: 43127.3
- sodium hydroxide: 2867.24
- LPG - liquefied petroleum gas: 3.05675e6

## Use advice
使用此数据集的用户应考虑热脱附设备的具体操作条件，包括处理的土壤体积、设备的功耗和用于水处理的化学药剂使用情况。在LCA模型中应用此数据时，至关重要的是要考虑过程中产生的直接排放，被修复材料的可能回收和再循环，以及与所用化学品的生产相关的背景过程。建议监测处理土壤的成分，以确保污染物的去除，并根据挖出土壤的污染负荷调整设备操作。

## Review details
清单： 内部审查通过几个迭代步骤完成，涉及原始数据验证、原始数据记录、代表性、完整性、与 ISO 14040 和 14044 有关的建模的一致性。

## Data sources
- Song, Y. et al. Environmental and socio-economic sustainability appraisal of contaminated land remediation strategies: A case study at a mega-site in China. Science of The Total Environment 610–611, 391–401 (2018).
