# 市政污泥处理与处置;干污泥;压滤

Dataset: ILCD process, Unit process, single operation
Geography: CN
Classification: Unit processes / End-of-life treatment / Waste water treatment
Functional unit: The functional unit used for GHGs in this LCA is one dry ton (DT) of sludge.
Generated by: 金思甜, 2331276@tongji.edu.cn
Owner: 天工LCI数据工作小组
Review: Dependent internal review by 天工LCI数据工作小组
Amounts: no units in this file; such an amount is in the reference unit of its flow, which a separate flow dataset defines
copyright: ['opt4ROkqig']
licenseType: Free of charge for all users and uses

## General comment
本文研究的主要数据来源如下:1)能源消耗和物质投入来源于对太湖流域的调查;2)能源利用排放因子来源于我们自己的计算、IPCC和文献。3)填埋过程中的CH4排放由文献获得，填埋、焚烧和堆肥过程中的无组织排放主要由文献研究中给出的模型和IPCC因子(2006)决定。4)理论计算数据(焚烧部分)。

## Geography
太湖流域

## Technology and included processes
采用“先进板框压滤机”对污泥进行压滤，降低污泥含水量，在原污泥中添加5kg /DT的聚合絮凝剂。

## Technical purpose
本数据集所反映的市政污泥处理与处置压滤过程，涉及来自市政废水处理设施的废污泥管理。此过程产生的干污泥适用于多种环境管理应用，例如土地施用、焚烧或填埋，主要聚焦于太湖流域区域。

## Reference product
- Sludge: 1000; input; estimated
  一干吨 （DT） 污泥

## Inputs
- Polymer: 5; measured
- Electricity: 360; measured

## Use advice
本生命周期评估（LCA）数据在使用时应仔细考虑污泥处理过程的地域特殊性。此处的功能单元是一干吨（DT）污泥，应在评估市政污泥各处理阶段相关的温室气体（GHG）排放时一致应用。用户应确保方法学途径与太湖流域相关的地区实践和法规兼容。如循环使用或能量回收等过程的包含或排除，应与研究的目标和范围保持一致。

## Review details
清单： 内部审查通过几个迭代步骤完成，涉及原始数据验证、原始数据记录、代表性、完整性、与 ISO 14040 和 14044 有关的建模的一致性。

## Data sources
- Liu, B., Wei, Q., Zhang, B. & Bi, J. Life cycle GHG emissions of sewage sludge treatment and disposal options in Tai Lake Watershed, China. Science of The Total Environment 447, 361–369 (2013).
