# cement production|cement, ordinary portland cement, 32.5MPa|mixed solid wastes

Dataset: ILCD process, Unit process, black box
Geography: GD-CN
Classification: Materials production / Other mineralic materials
Generated by: Siqi Yang
Amounts: no units in this file; such an amount is in the reference unit of its flow, which a separate flow dataset defines
copyright: false

## General comment
Solid waste blending: slag, fly ash, phosphogypsum, ceramic polishing waste.

## Geography
Guangzhou Shijing Cement Plant

## Model description
The functional unit for evaluation is 1kg of ordinary portland cement (P.O 32.5). The study scope includes cement production process from raw material extraction, energy production, raw meal preparation, clinker calcination, cement grinding to cement storage.

## Reference product
- cement, ordinary portland cement, 32.5MPa: 1000
  P.O32.5 Ordinary silicate cement

## Inputs
- calcium carbonate: 1110; measured
  limestone. The primary resources consume the data of my country's resources and energy production cycle emission data calculated by Di Xianghua.
- clay: 110; measured
  clay. The primary resources consume the data of my country's resources and energy production cycle emission data calculated by Di Xianghua.
- iron, powder: 37; measured
  Iron powder. The primary resources consume the data of my country's resources and energy production cycle emission data calculated by Di Xianghua.
- gypsum (desulphurized): 25; measured
  gupsum. The primary resources consume the data of my country's resources and energy production cycle emission data calculated by Di Xianghua.
- fluorspar, 97% purity: 6; measured
  Fluorspar. The primary resources consume the data of my country's resources and energy production cycle emission data calculated by Di Xianghua.
- blast furnace slag: 89; measured
  blast furnace slag. The primary resources consume the data of my country's resources and energy production cycle emission data calculated by Di Xianghua.
- phosphogypsum: 29
  phosphogypsum. Experimental data.
- ash: 50
  Fly ash. Experimental data.
- waste building wood, chrome preserved: 40
  Ceramic polishing waste. Experimental data.
- hard coal: 199.115; measured
  Standard coal. The original data is 0.185kg standard coal, here converted to hard coal, the conversion formula is 1kg hard coal = 0.929kg standard coal.
- electricity, medium voltage: 352.8; measured
  Electricity

## Outputs
- carbon dioxide: 988; measured
  CO2. The primary resources consume the data of my country's resources and energy production cycle emission data calculated by Di Xianghua. CO2 emissions calculation: The generation of CO2 is mainly produced in the combustion of fossil energy such as coal and the decomposition of limestone in the production of cement clinkers.
- sulfur dioxide: 4.205; measured
  SO2. SO2 emission: 0.25 % of the quality of mature materials according to the literature and test conditions.
- Nitrogen oxides: 2.77; measured
  NOx. NO emissions estimated formulas are: e = 0.001Fa (1-RF). In the formula: E is the emissions of NOX, kg; F is the consumption of fuel, kg; A is the NOX emissions factor when the fuel is burned; R is the coverage of the nitrogen dehydration equipment; At present, there are fewer domestic nitrogen dehydration equipment. The emission factors of raw coal and crude oil are 9.95kg/T and 0.24kg/T, respectively, and natural gas is 4.10g/m³.
- particles (> PM10): 7.89; article inperiodical
  particulates, with an unspecified particle size, is treated as PM > 10 micrometers in diameter. Granularity emissions: According to the statistics of the 2004 Chinese Environment Yearbook and the annual yearbook of China's architectural materials industry, the total amount of emissions for each ton of cement dust and smoke is produced by about 5.84kg.
- hydrogen fluoride: 0.01474
  HF. HF emission: 0.03 % of the quality of mature materials according to the literature and test conditions.

## Cut-off and completeness
Industrial waste residues, including slag, fly ash, phosphogypsum, and ceramic polishing waste, are not considered as resource consumption for industrial solid waste, and thus no pollutant emissions are accounted for.

## Data selection and combination
The resource and energy consumption data for the Guangzhou Shijing Cement Plant's rotary kiln production process are based on the data calculated by Di Xianghua for the life cycle emissions of resource and energy production in China.

## Data sources
- 吴清仁, 孙创奇, & 陈光. (2010). 磷石膏和陶瓷抛光废料配料制备普通水泥对环境负荷的影响. 水泥技术, 2, 28–32.
