# 焦炭生产;焦炭;焦化

Dataset: ILCD process, Unit process, single operation
Geography: CN
Reference year: 2018
Classification: Energy carriers and technologies / Hard coal based fuels
Generated by: 王环宇, wanghuanyu00@126.com
Owner: 天工LCI数据工作小组
Review: Dependent internal review by 天工LCI数据工作小组
Amounts: no units in this file; such an amount is in the reference unit of its flow, which a separate flow dataset defines
licenseType: Free of charge for all users and uses

## General comment
来自表3-3案例二系统

## Technical purpose
在此工业流程中生产的焦炭主要用作高炉生产铁和钢时的燃料和还原剂。它也可作为各种化学合成过程的碳源。

## Reference product
- hard coal: 0; measured
  焦炉煤气-单位Nm3

## Inputs
All rows: measured
- hard coal: 1330
  洗精煤
- Electricity: 234.864
  电
- hard coal: 176.3
  加热煤气-单位Nm3
- freshwater: 670
  新鲜水
- process steam: 436.9
  蒸汽
- Kerosene: 60.4
  洗油
- sulphuric acid: 8.73
  硫酸aq99%
- Sodium hydroxide: 1000
  氢氧化钠
- compressed air: 43
  压缩空气-单位Nm3

## Outputs
- coke: 11; measured
  焦炭
- Kerosene: 12; measured
  焦油
- benzene: 427.4; measured
  粗笨
- sulfide: 1.5; measured
  硫铵
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
## Use advice
使用此数据集的用户在对使用焦炭作为原料的产品进行生命周期评估时，应计算与焦化过程相关的能源和排放。重要的是要考虑此数据集所代表的焦化操作的特定化学性质和效率。还应特别关注由副产品如煤焦油、氨和硫化合物造成的潜在环境影响。用户还应确保地理相关性和技术适用性与其评估范围一致。

## Review details
清单： 内部审查通过几个迭代步骤完成，涉及原始数据验证、原始数据记录、代表性、完整性、与 ISO 14040 和 14044 有关的建模的一致性。

## Data sources
- 李晶莹. 焦化多联产系统的生命周期评价与系统分析. (西北大学, 2018).
