# 氧化铝生产｜冶金用氧化铝 ; 铝土矿

Dataset: ILCD process, Unit process, single operation
Geography: HEN-CN
Reference year: 2018
Classification: Unit processes / Materials production / Non-energetic raw materials
Generated by: 徐常青, xcq@bit.edu.cn
Owner: 天工LCI数据工作小组
Review: Dependent internal review by 天工LCI数据工作小组
Amounts: no units in this file; such an amount is in the reference unit of its flow, which a separate flow dataset defines
copyright: false
licenseType: Free of charge for all users and uses

## General comment
无流程图

## Time period
论文发表年

## Technical purpose
该工艺生产的氧化铝用于冶金应用。它通常用作通过霍尔-埃鲁法电解工艺生产铝金属的主要原料。高纯度氧化铝确保了有效的铝冶炼作业。

## Reference product
- aluminium oxide, metallurgical: 1000; missing unimportant

## Inputs
All rows: missing unimportant
- electricity, high voltage, aluminium industry: 1287
- light fuel oil: 33.2
- hard coal: 276
- Petroleum Coke: 31.4
- calcium carbonate: 145
- Sodium bicarbonate: 155
  纯碱碳酸钠-Sodium Carbonate-无条目
- bauxite: 2243
- freshwater: 2520
  river water
- natural gas, high pressure: 55200
- coal gas: 150800

## Outputs
All rows: missing unimportant
- carbon dioxide (fossil),carbon dioxide (fossil): 1280
- carbon monoxide (fossil),carbon monoxide (fossil): 1.52
- sulfur dioxide: 1.43
- Nitrogen oxides: 2.6
- methane (fossil): 0.89
- particles (> PM10): 0.43
- particles (PM2.5): 0.26

## Use advice
在使用此数据集进行生命周期评估时，请考虑以下事项：1. 该数据代表从铝土矿生产冶金用氧化铝的摇篮到大门评估，未详细说明各个过程单元。2. 如果氧化铝在生产后进行进一步处理或回收，应单独考虑随后的生命周期阶段。3. 用户应确保与所评估时期的技术和实践保持一致，该时期由论文发表年份指示。

## Review details
清单： 内部审查通过几个迭代步骤完成，涉及原始数据验证、原始数据记录、代表性、完整性、与 ISO 14040 和 14044 有关的建模的一致性。

## Data sources
- 王姗姗, 刘赛男, 王灿, & 张瑞芹. 基于生命周期评价的河南省原铝生产环境影响分析. 轻金属 1-7+16 (2018)
