# Groundwater remediation;In-situ;Permeable Reactive Barriers; Transportation

Dataset: ILCD process, Unit process, single operation
Geography: US
Reference year: 2011
Classification: Other Services / Repair and maintenance
Generated by: Zhang Jianbin, zhangjb@caep.org.cn
Owner: Tiangong LCI Data Working Group
Review: Dependent internal review by Tiangong LCI Data Working Group
Amounts: no units in this file; such an amount is in the reference unit of its flow, which a separate flow dataset defines
copyright: false
licenseType: Free of charge for all users and uses

## General comment
Travelling for 160km to the site by tractor-trailer trucks

## Geography
in Dover Air Force Base.

## Technical purpose
The described process focuses on in-situ groundwater remediation, specifically using Permeable Reactive Barriers (PRBs) which are designed to treat contaminated groundwater without the need for extraction from the ground. The material required for the construction of these barriers is transported to the Dover Air Force Base via tractor-trailer trucks over a distance of 160 km. This process can be applied in environmental engineering projects, specifically for managing and restoring the quality of groundwater at sites with identified contaminants.

## Reference product
- Equipment and Materials Arriving on Site: 4.66899e8; measured

## Inputs
- iron: 22200; measured
- sand: 22200, 9470 (2 entries); measured
- Steel sections: 3420, 8930 (2 entries); measured
- cement: 7650; measured

## Use advice
When utilizing this dataset for Life Cycle Assessment, careful consideration should be given to the specificity of the transport distance and method. The transportation data should not be generalized for other distances or transportation means without appropriate adjustments. The dataset is relevant for LCA practitioners with scenarios that involve a similar transport distance and vehicle type. Moreover, the environmental impact of the PRB material production and installation processes should also be included in the overall assessment. Ensure that the context of the Dover Air Force Base site is also appropriate for the intended application of the data.

## Review details
Inventory: The internal review was done by several iteration steps concerning raw data validation, raw data documentation, representativity, completeness and consistency of modelling with regard to ISO 14040 and 14044.

## Data sources
- Mark S. H. Mak and Irene M. C. Lo.Environmental Life Cycle Assessment of Permeable Reactive Barriers: Effects of Construction Methods, Reactive Materials and Groundwater Constituents[J].Environmental Science & Technology 2011, 45, 23, 10148-10154
