# a local branded pure milk productions | Raw milk production

Dataset: ILCD process, Unit process, single operation
Geography: MS-SC-CN
Reference year: 2017
Classification: Materials production / Other mineralic materials
Functional unit: The Tetra Pak 1litre pure liquid milk is selected to assess its lifecycle based carbon footprint.
Generated by: Rui Yang, 1632707028@qq.com
Review: Dependent internal review by Tiangong LCI Data Working Group
Amounts: no units in this file; such an amount is in the reference unit of its flow, which a separate flow dataset defines
copyright: false

## General comment
The location of the raw milk production is dairy farms, where the main consumptions are fodder, electricity, and diesel.

## Geography
The milk source base is located at Hongya Country, Southwestern Sichuan Province, China, about 147 kilometres far from Chengdu City, the provincial capital. The diary processing plant is located at Pixian, suburb of Chengdu City, which is about 175 kilometres far from the milk source base. The branded milk is mainly distributed to the central Chengdu City, about 40 kilometres distances from the diary processing plant. The milk packaging waste is transported to the municipal landfill for final disposal, about 30 kilometres away from the central city.

## Reference product
- milk: 0.001; measured
  pure liquid milk

## Inputs
All rows: measured
- Electricity: 0.1692
- Diesel: 3.68e-6
- feed: 1.29
  Fodder
- disinfectant: 1.59e-6
  Disinfectant
- water: 0.00266

## Outputs
- carbon dioxide: 0.5691; article inperiodical

## Deviations from the LCI method approaches
Compared with the conventional LCA, the process of life cycle impact assessment is simplified in this study, as it mainly uses different categories of indicators to elaborate results of life cycle inventory (Nigri et al., 2014).

## Data selection and combination
Table 1 shows the inventory data during the raw milk production stage, which are obtained by analogy to Hospido et al. (2003) on milk LCA. The location of the raw milk production is dairy farms, where the main consumptions are fodder, electricity, and diesel. From a conversion of the results obtained by Hospido et al. (2003) on GHG emissions factors from farm fodder and equipment disinfectant, a corresponding CO2 emission coefficient is obtained for the calculation. The electricity emission factor is based on the 2014 Baseline Emission Factors for Regional Power Grids in China, released by National Development and Reform Commission, of which the Central China power-grid emission factor is used in this study. The operating margin emissions factor is 0.972 t CO2/MWh, and the build margin emissions factor is 0.47 t CO2/MWh (NDRC, 2014). Through the conversion, the power grid emission factor is 0.723 kg/kW·h.

## Review details
Inventory: The internal review was done by several iteration steps concerning raw data validation, raw data documentation, representativity, completeness and consistency of modelling with regard to ISO 14040 and 14044.; Documentation: The review of the documentation was performed by Ecobilan and is in compliance with ISO 14040 and 14044. The data set documentation is correct in view of the appropriateness of the information provided. It includes all relevant information in view of data quality and scope of application of the respective LCI result.

## Data sources
- Zhao, R., Xu, Y., Wen, X., Zhang, N. & Cai, J. Carbon footprint assessment for a local branded pure milk product: a lifecycle based approach. Food Sci. Technol 38, 98–105 (2017).
