# 铁塔基础建设 ; 5 MW 风轮机铁塔基础

Dataset: ILCD process, Unit process, single operation
Geography: SH-CN
Reference year: 2009
Classification: Unit processes / Systems / Construction
Functional unit: The functional unit is 1 kWh on-grid electricity provision.
LCI method principle: Attributional
LCI method approaches: Allocation
Generated by: 赵云志, ll10088@163.com
Owner: 天工LCI数据工作小组
Review: Dependent internal review by 天工LCI数据工作小组
Amounts: no units in this file; such an amount is in the reference unit of its flow, which a separate flow dataset defines
copyright: false
licenseType: Free of charge for all users and uses

## General comment
该数据集代表东海大桥海上风电场（DBOWF）5兆瓦风力涡轮机铁塔基础的建设过程，该过程对于海上风能发电的建立和运行至关重要。该过程适用于风电场生命周期的上下文中，包括风电场基础设施的设计、材料采购、施工与维护各个阶段。该基础作为确保风力涡轮机稳定性及长寿命的关键组件，旨在为电网发电。

## Geography
所研究的风电场- -东海大桥海上风电场( DBOWF )是中国在上海管辖范围内的第一个海上风电场，也是欧洲以外的第一个海上风电场。工程分两期施工，分别位于东海大桥两侧(图1 )。

## Reference product
- Wind tower foundation: 1000; measured

## Inputs
- Concrete: 3122.3
  Marine/Core concrete
- steel rebar: 375400
- Steel,Steel: 226000
  Steel
- Pile foundation steel pipe column: 1.4961e6
  Steel pipe column
- aluminium: 4900
  Al alloy

## Deviations from the LCI method approaches
本研究采用PLCA建模方法计算了中国某典型海上风电场的能源和环境排放。从摇篮到坟墓的过程包括材料和设备制造、运输和安装、操作和维护、拆解和回收4个阶段(图2 )。

## Data selection and combination
风机、基础和电缆的技术参数从DBOWF的设计文件中获得(表2)。能源和排放因子(即单位材料和构件生产的能源消耗和环境排放)来源于Ecoinvent 2.2数据集(生态发明中心, 2009)，优先参考中国实践的系数。对于关键材料和设备，其海上运输能量由运输负荷和海运能量强度计算得到。根据施工方案，对设施安装能耗和排放进行了估算。风电场的运行和维护数据，如维护的频率和工作时间，是通过与工程技术人员的现场调查获得的。与模型参数和输入数据相关的不确定性在本文的敏感性分析部分进行了说明。

## Use advice
使用此数据集时，必须注意其与预期应用的方法学适配性。使用者应确保数据的技术环境（上海管辖范围内的海上风电场环境）与应用场景相对应。环境影响的分配应反映铁塔基础建设在风力涡轮机整体生命周期排放中的比例份额。在评估类似过程的环境足迹时，必须准确地应用海上运输能量等方法学考量。应审查不确定性和敏感性分析，以理解数据的局限性并进行有效比较。

## Review details
清单： 内部审查通过几个迭代步骤完成，涉及原始数据验证、原始数据记录、代表性、完整性、与 ISO 14040 和 14044 有关的建模的一致性。

## Data sources
- Yang, J. et al. The life-cycle energy and environmental emissions of a typical offshore wind farm in China. Journal of Cleaner Production 180, 316–324 (2018).
