# 广东邦普回收科技有限公司湿法冶金回收工艺B

Dataset: ILCD process, Unit process, single operation
Geography: CN
Reference year: 2022
Classification: End-of-life treatment / Material recycling
Functional unit: Functional unit is a 12.717g used lithium battery
Generated by: 彭菲, pengfei24@email.ncu.edu.cn
Owner: 天工LCI数据工作小组
Review: Dependent internal review by 天工LCI数据工作小组
Amounts: no units in this file; such an amount is in the reference unit of its flow, which a separate flow dataset defines
copyright: false
licenseType: Free of charge for all users and uses

## General comment
废电池经过拆卸、干法热解、破碎和机械分选、酸浸、除铜、除铁和除铝、粗萃取、精萃取和碱老化，最终得到三元前驱体。

## Technology and included processes
在工艺B中，废旧电池经过拆解、干法热解、粉碎和机械分选、酸浸、除铜、除铁、除铝、粗提、精提、碱老化得到三元前驱体。

## Technical purpose
本数据集详述的湿法冶金回收工艺用于回收利用废弃锂电池。在此过程中，电池先拆解，随后进行干法热解、破碎和机械分选，接着是酸浸和去除铜、铁、铝。经过粗提取、精提取和碱老化阶段，最终生成三元前驱体。该前驱体通常用于新锂电池的生产，是电池供应链中的重要资源。

## Reference product
- spent LIBs: 0.012717; input; measured
  废旧锂电池

## Inputs
All rows: measured
- sodium chloride: 0.00326
- process water: 14.6
- Sulfuric acid(98%): 2.22
  硫酸
- Hydrogen peroxide (30%): 0.0859
  过氧化氢
- Pulverized Iron: 0.0257
  铁粉
- sodium hydroxide: 1.96
- Disooctyl Phosphate (P204): 69
  四氧化二磷
- Sulfonated kerosene: 163
  磺化煤油
- Sodium sulfide: 0.0265
  硫化钠
- Tributyl phosphate: 14.2
  磷酸三丁酯
- Manganese Sulfate Monohydrate: 0.198
  硫酸锰
- Ammonia (25%): 0.0011
  氨
- process steam: 3.03
- Electricity: 0.33912

## Outputs
All rows: measured
- Dust (unspecified, from stack),Dust (unspecified, from stack): 6.77e-5
- sulphuric acid: 6.47e-5
- ammonium: 0.000667
- chemical oxygen demand: 0.00228
- nickel: 8.37e-7
- manganese: 1.15e-6
- zinc: 1.15e-6
- copper: 1.15e-6
- Ammonia Nitrogen: 0.00034
  氨氮
- Ternary precursor: 1.18
  三元前驱体

## Use advice
使用这个数据集的用户应当注意，回收工艺特定于废旧锂电池，功能单元反映了以12.717克废旧锂电池作为输入的输出。生命周期评估应考虑区域技术适用性和潜在的回收技术进步。在多功能工艺中分配环境负荷非常关键。用户必须确保在使用数据进行环境影响研究或开发生态设计策略时，他们的系统边界和假设与这些方法论考虑相一致。

## Review details
清单： 内部审查通过几个迭代步骤完成，涉及原始数据验证、原始数据记录、代表性、完整性、与 ISO 14040 和 14044 有关的建模的一致性。

## Data sources
- Lai, X. et al. Critical review of life cycle assessment of lithium-ion batteries for electric vehicles: A lifespan perspective. eTransportation 12, 100169 (2022).
