# 铝土矿开采 ; 铝土矿 ; 摇篮 ; 2011年

Dataset: ILCD process, Unit process, single operation
Geography: CN
Reference year: 2021
Classification: Unit processes / Materials production / Non-energetic raw materials
Generated by: 蔡梓萌, caizm6178@163.com
Owner: 天工LCI数据工作小组
Review: Dependent internal review by 天工LCI数据工作小组
Amounts: no units in this file; such an amount is in the reference unit of its flow, which a separate flow dataset defines
copyright: false
licenseType: Free of charge for all users and uses

## General comment
氧化铝生产2017

## Time period
文献发表日期

## Technical purpose
该铝土矿开采和氧化铝生产过程的LCA数据旨在用于铝生产链的环境影响评估。此数据集的主要应用是模拟开采铝土矿和将其转换成氧化铝的环境影响，氧化铝是生产铝金属的关键中间产品。该数据集可被聚焦于铝业的工业界和研究人员使用，以理解和提高他们生产过程的可持续性。

## Reference product
- bauxite: 4.30266e10; software or database

## Inputs
All rows: software or database
- electricity, high voltage, aluminium industry: 8.44992e7
  electricity
- other fuels: 2.08008e9
  electricity
- Coal, brown, in ground: 3.236e7
  coal
- natural gas, high pressure: 603000
  coal
- Gasoline: 1.3e6
  gasoline
- Diesel oil: 9.673e6
  diesel

## Data selection and combination
本研究的数据参考了PA、SA、电力等背景数据的LCA数据。PA数据来自统计数据源，SA数据主要来自文献。背景数据主要来自中国科学院生态环境研究中心CASRCEES 2018建立的中国本地化LCA数据库，涵盖能源、材料、交通、废物管理等LCA数据。

## Use advice
使用此LCA数据集时，用户应确保数据的时间和地域相关性与特定项目或评估相符。鉴于PA数据来自统计资料来源，而SA数据主要来自文献，用户应考虑其适用性，并在必要时根据当前情况更新这些数据。从中国科学院生态环境研究中心建立的CAS RCEES 2018 LCA数据库中获取的背景数据，在与建模系统的一致性方面需要仔细考虑，特别是在能源、材料、运输和废物管理方面。用户还应参考出版日期，以评估数据的当前相关性，并考虑为准确的影响建模是否需要更新的数据来源。

## Review details
清单： 内部审查通过几个迭代步骤完成，涉及原始数据验证、原始数据记录、代表性、完整性、与 ISO 14040 和 14044 有关的建模的一致性。

## Data sources
- Ding, N., Liu, N., Lu, B. & Yang, J. Life cycle greenhouse gas emissions of aluminum based on regional industrial transfer in China. J. Ind. Ecol. 25, 1657–1672 (2021).
