# 铝空白箔（阴极）生产 ; 0.05 mm铝坯卷材 ; 铝锭

Dataset: ILCD process, Unit process, single operation
Geography: JS-CN
Reference year: 2020
Classification: Unit processes / Materials production / Metals and semimetals
Generated by: 常慧敏, huiminchang@tsinghua.edu.cn
Owner: 天工LCI数据工作小组
Review: Dependent internal review by 天工LCI数据工作小组
Amounts: no units in this file; such an amount is in the reference unit of its flow, which a separate flow dataset defines
copyright: false
licenseType: Free of charge for all users and uses

## General comment
铝空白箔（阴极）生产 ; 铝电解电容器（AEC）生产 ; 420V 680uf

## Time period
The investigated manufacturer produced about 1.183 billion AECs of all kinds in 2020.

## Technical purpose
该工艺生产的铝空白箔（阴极）用于制造铝电解电容器（AEC），这些组件通常用于电子电路中的平滑、过滤和储能。所生产的电容器规格为420V、680uf，可用于需要高电压和容量的各种电子设备中的单元过程。

## Reference product
- 0.05mm Al blank coil: 1000; measured
  0.05mm Al blank coil [kg] ; Production of Al blank foil (cathode)

## Inputs
All rows: measured
- electricity, high voltage, aluminium industry: 2204.08
  Electricity [kWh] ; Al smelting preparation (cathode)
- electricity, high voltage, aluminium industry: 111.046
  Electricity [kWh] ; Casting rolling (cathode)
- electricity, high voltage, aluminium industry: 186.804
  Electricity [kWh] ; Cold rolling 1 (cathode)
- electricity, high voltage, aluminium industry: 504.72
  Electricity [kWh] ; Intermediate annealing 1 (cathode)
- electricity, high voltage, aluminium industry: 1698.2
  Electricity [kWh] ; Cold rolling 2 (cathode)
- electricity, high voltage, aluminium industry: 180.36
  Electricity [kWh] ; Intermediate annealing 2 (cathode)
- electricity, high voltage, aluminium industry: 4310.82
  Electricity [kWh] ; Foil rolling (cathode)
- electricity, high voltage, aluminium industry: 467.64
  Electricity [kWh] ; Final annealing (cathode)
- aluminium, primary, ingot: 1020.41
  Al ingots (99.9%) [kg] ; Al smelting preparation (cathode)
- argon, liquid: 0.184
  Ar gas [kg] ; Al smelting preparation (cathode) 戳啦
- Graphitic lubricant: 0.032
  Graphitic lubricant [kg] ; Casting rolling (cathode)
- water, deionised: 2.56
  Deionized water [kg] ; Casting rolling (cathode)
- tap water: 1326.53
  Tap water [kg] ; Casting rolling (cathode)
- water, deionised: 12.092
  Deionized water [kg] ; Cold rolling 1 (cathode)
- heavy fuel oil: 0.387
  Rolling oil [kg} ; Cold rolling 1 (cathode)
- water, deionised: 362.747
  Deionized water [kg] ; Cold rolling 2 (cathode)
- heavy fuel oil: 11.608
  Rolling oil [kg} ; Cold rolling 2 (cathode)
- water, deionised: 725.494
  Deionized water [kg] ; Foil rolling (cathode)
- heavy fuel oil: 23.216
  Rolling oil [kg} ; Foil rolling (cathode)
- sodium hydroxide, without water, in 50% solution state: 31.8
  NaOH solution (30%) [kg] ; Final annealing (cathode)
- nitrogen, liquid: 1.29
  N2 gas[kg] ; Final annealing (cathode) flow错啦

## Outputs
All rows: measured
- aluminium scrap, new: 20.03
  Al scraps [kg] ; Al smelting preparation (cathode)
- Dust: 0.378
  Dust[kg] ; Al smelting preparation (cathode)
- wastewater, average: 2620.92
  Wastewater [kg] ; Production of Al blank foil (cathode)
- Chemical Oxygen Demand (COD): 0.183
  COD [kg] ; Production of Al blank foil (cathode)
- Suspended solids, unspecified: 0.183
  SS [kg] ; Production of Al blank foil (cathode)
- BOD5, Biological Oxygen Demand: 1.153
  BOD [kg] ; Production of Al blank foil (cathode)
- ammonia: 0.052
  NH3-N [kg] ; Production of Al blank foil (cathode)

## Data selection and combination
电容器生产的库存数据来自 AEC 位于中国江苏省的生产工厂。每道工序的 LCI 数据收集的截止标准是至少覆盖输入流和输出流 95% 的质量和能量。阳极箔生产和阴极箔生产的库存数据是根据生产工艺和相应工艺参数分析获得的。上游数据（即铝锭、分选纸、运输、电力和水）来自 Gabi 软件（版本：10.6.1.35）。具体而言，《中国电力年鉴》中的中国电网概况以 2016 年为基准年。铝锭生产的基准年为 2015 年。无法获取的柠檬酸铵、五硼酸铵、NH4H2PO4 和 HBO3 数据是根据 Gabi 软件中现有材料（反应物）的化学方程式估算的。使用和报废阶段的库存数据是通过分析和计算获得的。

## Use advice
使用该生命周期评估（LCA）数据集时，重要的是确保过程条件与详细说明一致：在铝电解电容器的生产中使用0.05 mm铝坯卷材和铝锭。输入数据如电力对应的参考数据应符合2016年中国电网的概况，铝锭生产应基于2015年的数据。排除LCI数据中不覆盖至少95%的质量和能量输入/输出的数据。对于无法访问的某些化学品数据，必须通过Gabi软件从相关化学方程式导出估算。对于使用阶段和生命周期终期阶段的评估，需要进行分析和相应的计算，以准确反映产品生命周期中这些阶段。

## Review details
清单： 内部审查通过几个迭代步骤完成，涉及原始数据验证、原始数据记录、代表性、完整性、与 ISO 14040 和 14044 有关的建模的一致性。

## Data sources
- Zhang, C., Jing, J., Yun, L., Zheng, Y. & Huang, H. A cradle-to-grave life cycle assessment of high-voltage aluminum electrolytic capacitors in China. J. Clean. Prod. 370, (2022).
