# 生物质航空燃油水相催化重整

Dataset: ILCD process, Unit process, black box
Geography: LN-CN
Classification: Energy carriers and technologies / Renewable fuels
Functional unit: 1 MJ aviation fuel
LCI method principle: Attributional
LCI method approaches: Allocation - gross calorific value
Generated by: 张净晶, 22110740027@m.fudan.edu.cn
Owner: 天工LCI数据工作小组
Review: Dependent internal review by 天工LCI数据工作小组
Amounts: no units in this file; such an amount is in the reference unit of its flow, which a separate flow dataset defines
licenseType: Free of charge for all users and uses

## General comment
催化水相重整制备航油的技术主要包括以下几个阶段：1. 生物质原料通过水解、汽提、加氢水解等工艺获得糖平台化合物，主要是糠醛、乙酰丙酸、5-羟甲基糠醛等糖类脱水产物。2. 这些平台化合物通过酸催化烷基化、碱催化缩合以及脱水聚合等技术得到 C8-C16 的长链含氧化合物。其中酸催化缩合反应是利用酸催化剂，比如固体酸和沸石，将醇、酮、醛、酸转化为烷烃、异构烷烃；碱缩合则是通过直接催化缩合的方式，将醇、酮、醛转化为烷烃；脱水聚合则能够用于将醇类转化为长碳链的烷烃。3. 得到的含氧化合物含有大量的氧，需要通过加氢脱羧、加氢脱氧、加氢裂化等工艺进行处理，进一步实现油品提质

## Geography
生物质催化水相重整生产生物航油的研究案例主要来源于广州能源研究所的相关研究。广州能源研究所完成了玉米秸秆、高粱、木薯等原料催化水相转化的试验，在辽宁建设了年产量为百吨级的生物质催化水相重整试验平台，并进行了生产系统的单元调试以及整体运行测试

## Technical purpose
所描述的技术应用于生物质基航空燃油的生产。该工艺将生物质原料（例如玉米秸秆、高粱和木薯）转化为糖平台化合物，然后通过催化水相重整进一步加工成适合航空燃油的长链含氧烃。这种生物航油可作为传统化石燃料基航空燃油的可持续替代品，当精炼满足所需质量标准时使用。

## Reference product
- Electricity: 0.02664; input; calculated
  预处理消耗

## Inputs
All rows: calculated
- sodium sulfate: 0.012
- water: 0.16
- Electricity: 0.02052
  生产过程消耗
- sodium hydroxide: 0.00058
- sodium sulfate: 0.00081
  缩合过程消耗
- Electricity: 0.00576
  缩合过程消耗
- Electricity: 0.01548
  加氢裂解

## Outputs
- waste water - untreated: 0.012; calculated
  生产过程输出
- waste water - untreated: 0.0022; calculated
  缩合阶段输出
- carbon monoxide: 6.6e-5; calculated
  航油燃烧输出
- hydrocarbons (unspecified): 6.8e-6; calculated

## Deviations from the LCI method approaches
按照能量分配的方式分配环境影响值，即在排放分配的过程中，根据航油以及其他燃料的能量分配给每 MJ 的航油生产

## Use advice
在使用此生物航空燃油工艺的生命周期评估数据时，应根据生物航油和其他燃料之间的能量含量分配来分配环境影响。同时考虑技术的可扩展性和从实验平台到更大规模生产过渡时环境影响的潜在差异。在利用这些数据进行任何评估或决策时，要将这一因素考虑在内，确保生命周期评估尽可能准确地反映直接和间接的环境方面。

## Review details
清单： 内部审查通过几个迭代步骤完成，涉及原始数据验证、原始数据记录、代表性、完整性、与 ISO 14040 和 14044 有关的建模的一致性。

## Data sources
- 朱啸南. 基于生命周期评价的生物航油制备及利用对环境的影响研究. (浙江大学, 2022).
