# 开心果生产

Dataset: ILCD process, Unit process, black box
Geography: GR
Reference year: 2017
Valid until: 2018
Classification: Unit processes / Materials production / Food and renewable raw materials
Functional unit: 1 ha
Generated by: 朱娴, zzhu0918@163.com
Owner: 天工LCI数据工作小组
Review: Dependent internal review by 天工LCI数据工作小组
Amounts: no units in this file; such an amount is in the reference unit of its flow, which a separate flow dataset defines
copyright: false
licenseType: Free of charge for all users and uses

## General comment
培育开心果幼苗，通过人工或机械手段，移栽、施入肥料或农药，收获开心果

## Geography
埃伊纳岛位于雅典以南约16.5英里处，是萨罗尼亚湾(仅次于萨拉米斯)的第二大岛，总面积为87平方公里。

## Technical purpose
该数据描述的技术用途是开心果的生产，包括在埃伊纳岛上的开心果幼苗培育。它涉及人工或机械的移栽、施肥和农药施用过程。该岛是开心果农业的重要区域，由于其地理特征和适合开心果生长的气候条件。

## Reference product
- Pistachio: 2500; measured

## Inputs
All rows: measured
- Nitrogenous fertilizer: 230
- Phosphate fertilizer: 70
- Potassium fertilizer: 200
- water: 4450
- Electricity: 2600
- Diesel: 0.435

## Use advice
在使用这个开心果生产数据集时，用户应考虑数据集中反映的当地农业实践和条件，如特定种植方法、移栽技术、施肥和农药使用等，这些都是埃伊纳岛环境独有的。该数据集代表了一个“黑箱”单元过程，可能不会计入从运输或其他非特定于埃伊纳岛的农业实践中产生的环境影响变化。如果用户想将数据外推到其他地理环境中使用，建议他们考虑这些因素。

## Review details
清单： 内部审查通过几个迭代步骤完成，涉及原始数据验证、原始数据记录、代表性、完整性、与 ISO 14040 和 14044 有关的建模的一致性。
