# ScrapPVC|Recycledplasticparticles|Granulation|All sizes / 废PVC|再生塑料粒子|造粒|所有规模

Dataset: ILCD process, Unit process, single operation
Geography: CN
Reference year: 2019
Classification: End-of-life treatment / Material recycling
Generated by: The data was created by the Office of the Second National Pollution Source Census of the Ministry of Ecology and Environment, and the data was organized by the TianGong Plan team for ILCD format / 生态环境部第二次全国污染源普查工作办公室创建数据，天工计划团队常慧敏整理数据为ILCD格式
Owner: Tiangong LCI Data Working Group / 天工LCI数据工作小组
Amounts: no units in this file; such an amount is in the reference unit of its flow, which a separate flow dataset defines
copyright: false
licenseType: Free of charge for all users and uses

## Technology and included processes
the Technical of end-of-pipe management technology for pollution volatile organic compoundisPhotolysis，Its Technical efficiency of end-of-pipe management40，The formula for calculating the actual operation rate (k-value) of the end-of-pipe treatment facility is /

## Reference product
- Recycled Plastic Particles: 1000; input; calculated
  源文件中描述为为再生塑料粒子，此处对其进行了匹配工作，将其匹配到LCAflow库里面相最符合的流

## Outputs
All rows: calculated
- volatile organic compound: 0.3825
  污染物指标挥发性有机物的末端治理技术是活性炭吸附，其效率为55，末端治理设施实际运行率（k值）计算公式为k=废气治理设备运行时间（小时/年）/正常生产时间（小时/年）。原文件中描述污染物类别为废气，污染物指标为挥发性有机物，此处对其进行了匹配工作，将其匹配到LCAflow库里面相最符合的流
- volatile organic compound: 0.51
  污染物指标挥发性有机物的末端治理技术是光催化，其效率为40，末端治理设施实际运行率（k值）计算公式为k=废气治理设备运行时间（小时/年）/正常生产时间（小时/年）。原文件中描述污染物类别为废气，污染物指标为挥发性有机物，此处对其进行了匹配工作，将其匹配到LCAflow库里面相最符合的流
- Exhaust gas: 4000
  污染物指标工业废气量的末端治理技术是/，末端治理设施实际运行率（k值）计算公式为/。原文件中描述污染物类别为废气，污染物指标为工业废气量，此处对其进行了匹配工作，将其匹配到LCAflow库里面相最符合的流
- volatile organic compound: 0.17
  污染物指标挥发性有机物的末端治理技术是多级催化+油水分离，其效率为80，末端治理设施实际运行率（k值）计算公式为k=废气治理设备运行时间（小时/年）/正常生产时间（小时/年）。原文件中描述污染物类别为废气，污染物指标为挥发性有机物，此处对其进行了匹配工作，将其匹配到LCAflow库里面相最符合的流
- volatile organic compound: 0.17
  污染物指标挥发性有机物的末端治理技术是生物膜吸收+除雾+活性炭吸附，其效率为80，末端治理设施实际运行率（k值）计算公式为k=废气治理设备运行时间（小时/年）/正常生产时间（小时/年）。原文件中描述污染物类别为废气，污染物指标为挥发性有机物，此处对其进行了匹配工作，将其匹配到LCAflow库里面相最符合的流
- volatile organic compound: 0.425
  污染物指标挥发性有机物的末端治理技术是低温等离子体，其效率为50，末端治理设施实际运行率（k值）计算公式为k=废气治理设备运行时间（小时/年）/正常生产时间（小时/年）。原文件中描述污染物类别为废气，污染物指标为挥发性有机物，此处对其进行了匹配工作，将其匹配到LCAflow库里面相最符合的流
- volatile organic compound: 0.51
  污染物指标挥发性有机物的末端治理技术是光解，其效率为40，末端治理设施实际运行率（k值）计算公式为k=废气治理设备运行时间（小时/年）/正常生产时间（小时/年）。原文件中描述污染物类别为废气，污染物指标为挥发性有机物，此处对其进行了匹配工作，将其匹配到LCAflow库里面相最符合的流

## Data sources
- 第二次全国污染源普查产排污核算系数手册（试用版）,二级代码42,四级代码4220文件，在完整版文件中第2470页
