# 本地品牌纯牛奶生产 ; 乳业加工

Dataset: ILCD process, Unit process, single operation
Geography: CD-SC-CN
Reference year: 2017
Classification: Unit processes / Materials production / Food and renewable raw materials
Functional unit: The Tetra Pak 1litre pure liquid milk is selected to assess its lifecycle based carbon footprint.
Generated by: 杨瑞, 1632707028@qq.com
Owner: 天工LCI数据工作小组
Review: Dependent internal review by 天工LCI数据工作小组
Amounts: no units in this file; such an amount is in the reference unit of its flow, which a separate flow dataset defines
copyright: false
licenseType: Free of charge for all users and uses

## General comment
具体来说，原料奶的冷却和预热以及液态奶的预热和灭菌都需要大量的水。

## Geography
奶源基地位于中国四川省西南部洪崖县，距离省会成都市约147公里。乳品加工厂位于成都郊区郫县，距离奶源基地约175公里。品牌牛奶主要分布在距离乳制品加工厂约40公里的成都市中心。牛奶包装废弃物被运送到距离市中心约30公里的市政垃圾填埋场进行最终处理。

## Technology and included processes
本研究仅关注对纯牛奶生产有直接贡献的过程，即仅关注能源和材料投入以及碳排放的影响，如图1所示。从而简化了牛奶生命周期的系统边界，将其划分为原料奶生产、乳制品加工、产品运输和包装废弃物处理四个阶段。

## Technical purpose
该数据集描述了中国四川省生产的本地品牌纯牛奶的生产过程。它在食品行业中使用，特别是在乳制品部门，为消费者提供巴氏杀菌和包装的牛奶。牛奶的技术质量适合直接消费，并可能用于制作其他乳制品，如奶酪、酸奶和奶油。数据集包括的阶段包括原奶生产、乳品加工、产品运输和包装废弃物处理。

## Reference product
- milk: 0.001; measured
  pure liquid milk

## Inputs
All rows: measured
- Diesel: 0.00707
- Electricity: 0.1692
- Plastic (unspecified): 0.0168
  Cardboard paper
- Membrane: 0.000183
- water: 0.00441

## Outputs
- carbon dioxide (fossil),carbon dioxide (fossil): 0.074637; measured

## Deviations from the LCI method approaches
与传统的LCA相比，本研究简化了生命周期影响评估的过程，主要使用不同类别的指标来阐述生命周期清单的结果(Nigri et al.， 2014)。

## Data selection and combination
表2显示了乳制品加工阶段的库存数据。具体来说，原料奶的冷却和预热以及液态奶的预热和灭菌都需要大量的水。电力主要用于设备的运行，燃料用于产生灭菌器预热和加热所需的蒸汽(Riera et al.， 2013)。硬纸板被用来制作牛奶的外包装。

## Use advice
在使用本LCA数据集时，应关注对纯牛奶生产有直接贡献的过程，特别注意能源和材料投入以及碳排放。在解读简化的系统边界时需要小心，因为它可能不包括所有辅助过程。为了准确的生命周期影响评估，用户应考虑完整的供应链和生命周期终端阶段，这可能需要额外的数据，超出本数据集提供的范围。表2中的库存数据应与指定的方法论结合使用，并且在将这些数据应用到不同的技术环境或地理位置时应进行调整。

## Review details
清单： 内部审查通过几个迭代步骤完成，涉及原始数据验证、原始数据记录、代表性、完整性、与 ISO 14040 和 14044 有关的建模的一致性。

## Data sources
- Zhao, R., Xu, Y., Wen, X., Zhang, N. & Cai, J. Carbon footprint assessment for a local branded pure milk product: a lifecycle based approach. Food Sci. Technol 38, 98–105 (2017).
