# Electricity production ; Electricity ; Thermal power (49.7%) + hydropower (45.9%) + wind power (2.5%) + solar power (1.9%)

Dataset: ILCD process, Partly terminated system
Geography: HUB-CN
Reference year: 2019
Classification: Energy carriers and technologies / Electricity
LCI method principle: Other
Generated by: Ruoxi Xiong, xiongrx0126@163.com
Owner: Tiangong LCI Data Working Group
Review: Dependent internal review by Tiangong LCI Data Working Group
Amounts: no units in this file; such an amount is in the reference unit of its flow, which a separate flow dataset defines
copyright: false
licenseType: Free of charge for all users and uses

## General comment
Forms of electricity generation include thermal power, hydropower, wind power and solar power

## Time period
Calculated based on data from the 2019 Energy Statistics Yearbook

## Technical purpose
This dataset represents the different forms of electricity generation, including thermal power (49.7%), hydropower (45.9%), wind power (2.5%), and solar power (1.9%). The data can be used for assessing the environmental impacts of power generation in a given electricity mix, which is pertinent for energy policy development, environmental impact studies, and the design of power systems that aim to minimize carbon emissions.

## Reference product
- Electricity: 3.6; calculated

## Outputs
- carbon dioxide: 0.369; calculated
- sulfur dioxide: 6.1e-5; calculated
- Nitrogen oxides: 9.8327e-5; calculated
- Dust (unspecified, from stack): 1.2459e-5; calculated

## Data treatment and extrapolations
For the accounting method, please refer to the "Enterprise Greenhouse Gas Emissions Accounting Methods and Reporting Guidelines for Power Generation Facilities". Different forms of power generation and fuel consumption come from Chapter 3 (Energy Production) and Chapter 6 (Regional Energy Balance Sheet) in the "China Energy Statistical Yearbook 2020". The fuel parameters such as low calorific value and carbon content per unit calorific value used to calculate the carbon dioxide emission factor come from the "2019 China Regional Power Grid Carbon Dioxide Baseline Emission Factor Calculation Instructions OM" and the "Enterprise Greenhouse Gas Emission Accounting Method and Reporting Guide for Power Generation Facilities" 》

## Use advice
Users should apply the data for carbon emission profiling based on the provided electricity generation mix. Attention must be paid to the methodological guidelines provided in the 'Enterprise Greenhouse Gas Emissions Accounting Methods and Reporting Guidelines for Power Generation Facilities'. It is important to use the correct regional data from the 'China Energy Statistical Yearbook 2020' for specific energy production values and fuel consumption. The calculation of carbon dioxide emission factors should be compliant with the information provided in the '2019 China Regional Power Grid Carbon Dioxide Baseline Emission Factor Calculation Instructions OM' to ensure that emissions are accurately accounted for in life cycle assessments or other environmental impacts evaluations.

## Review details
Inventory: The internal review was done by several iteration steps concerning raw data validation, raw data documentation, representativity, completeness and consistency of modelling with regard to ISO 14040 and 14044.

## Data sources
- 熊若熙. 中国电力生产和消费二氧化碳与污染物排放因子核算. (清华大学, 2023).
