# Soil remediation ; In-situ remediation ; Enhanced bioremediation; Construction preparation ; Disposal of construction waste

Dataset: ILCD process, Unit process, single operation
Geography: SH-CN
Classification: Other Services / Repair and maintenance
Generated by: Xiao Meng, xiaomeng@mail
Owner: Tiangong LCI Data Working Group
Review: Dependent internal review by Tiangong LCI Data Working Group
Amounts: no units in this file; such an amount is in the reference unit of its flow, which a separate flow dataset defines
licenseType: Free of charge for all users and uses

## General comment
CHC+ISB is used for site remediation, and during the construction preparation phase, the drilling waste soil is disposed of.

## Geography
The aquifer in a certain area in Shanghai, China, is uniformly contaminated with chlorinated volatile organic compounds (CVOCs), with a surface area of 20,000 m2 and a depth of 50 m, with the water table located at a depth of 30 m.

## Technical purpose
This data represents the process of in-situ soil remediation, specifically enhanced bioremediation for dealing with chlorinated volatile organic compounds (CVOCs) contamination in an aquifer. It is applied during construction preparation to treat drilling waste soil prior to disposal. The process is suitable for large-scale environmental clean-up projects, particularly in areas with CVOCs contamination.

## Reference product
- Treated borehole waste soil: 490280
  处理完成的钻井废弃土

## Inputs
All rows: software or database
- Concrete: 2206.25
- Steel sections: 147.08
- Polyethylene: 11.28
- polyvinylchloride resin (B-PVC): 1.47
- gravel: 10786.1
- Electricity: 2117.99
- Diesel: 524.6

## Use advice
Users of this dataset should note that it specifically applies to the scenario of contaminated aquifers with a defined area and depth as described. The dataset reflects the use of Combined Chemical and In Situ Bioremediation (CHC+ISB) technique, which must be employed uniformly across the entire contaminated zone. The implications of this technique on aquifer characteristics, environmental compliance, and potential by-product formation must be included in the assessment of the soil remediation process.

## Review details
Inventory: The internal review was done by several iteration steps concerning raw data validation, raw data documentation, representativity, completeness and consistency of modelling with regard to ISO 14040 and 14044.

## Data sources
- Ni, Z. et al. Comparative Life-Cycle Assessment of Aquifer Thermal Energy Storage Integrated with in Situ Bioremediation of Chlorinated Volatile Organic Compounds. Environ. Sci. Technol. 54, 3039–3049 (2020).
