# 铁矿采选;铁矿石;选矿/矿石

Dataset: ILCD process, Unit process, single operation
Geography: CN
Reference year: 2006
Classification: Materials production / Non-energetic raw materials
Generated by: 王环宇, wanghuanyu00@126.com
Owner: 天工LCI数据工作小组
Review: Dependent internal review by 天工LCI数据工作小组
Amounts: no units in this file; such an amount is in the reference unit of its flow, which a separate flow dataset defines
licenseType: Free of charge for all users and uses

## General comment
该数据集关于铁矿采选过程，以及在Z3设施进行的铁矿石选矿工艺。该过程涉及铁矿石的采集和加工，用于钢铁制造业的各个阶段。选矿后的铁矿石主要用于大规模钢铁生产流程，这些流程是建筑、汽车、电力和各种重工业的基本组成部分。

## Geography
Z3工厂同一名称的工艺过程

## Reference product
- iron: 0.26; measured
  z08

## Inputs
- iron: 2811; measured
  t/t z08
- Water (fresh water): 4170; measured
  t/t z08
- Electricity: 87.804; measured
  kwh/t z08

## Outputs
- Radioactive tailings: 3087, 1541 (2 entries); measured
  t/t z08
- Flue dust: 1.588; measured
  kg/t z08
- Tailings (deposited, hibernating in ground, non elementary flow): 1541; measured
  t/t z08

## Use advice
使用此数据集的用户在将数据应用于特定情况时，应考虑铁矿采选实践和技术的地区差异。重要的是要考虑与选矿过程相关的能源消耗和排放，并将这些纳入评估之中。该数据集不自动考虑产品寿命终止时的回收利用，因此在适当的情况下应伴随适当的钢铁可回收性建模。假设数据代表了当前Z3设施实践的技术适用性，用户应验证其对未来导向评估的相关性。

## Review details
清单： 内部审查通过几个迭代步骤完成，涉及原始数据验证、原始数据记录、代表性、完整性、与 ISO 14040 和 14044 有关的建模的一致性。

## Data sources
- 刘微. LCI数据质量体系中的分析方法研究. (北京工业大学, 2006).
