# MDF的生产 ; 中密度纤维板（MDF） ; 木质素磺酸混合改性铵（HMAL）作为粘合剂

Dataset: ILCD process, Unit process, single operation
Geography: HRB-HLJ-CN
Reference year: 2017
Classification: Materials production / Other materials
LCI method principle: Attributional
LCI method approaches: Allocation
Generated by: 谭惋月, wytan9@student.ubc.ca
Owner: 天工LCI数据工作小组
Review: Dependent internal review by 天工LCI数据工作小组
Amounts: no units in this file; such an amount is in the reference unit of its flow, which a separate flow dataset defines
copyright: false
licenseType: Free of charge for all users and uses

## General comment
在本文中，功能单位是 1 立方米的中密度纤维板成品，其平均密度为 0.86 克/立方厘米，标称宽度为 1220 毫米。板材厚度为 5 毫米，含水率约为 8%。不过，本研究评估了使用新型木质素基粘合剂制造的另一种中密度纤维板，即由混合改性工业木质素和木纤维（HMAL/WF）制成的中密度纤维板。

## Geography
原材料供应阶段包括木质纤维和木质素磺酸铵（AL）的生产，以及纤维加工过程中能源、水和其他材料的使用。生物质的主要来源是由不同树种的软木和硬木纤维混合而成的木纤维。木纤维由一辆卡车从大兴安岭恒友家具有限公司运来。使用的所有辅助材料均为商业材料，从不同的供应商处购买。在 HMAL/WF 的生产中，HMAL 生产的主要材料是 AL，购自沈阳兴正和化工有限公司。在传统中密度纤维板工艺中，只有化石基 UF 树脂的使用与 HMAL/WF 生产不同。树脂生产阶段的库存数据来自中国一家化工企业的原始平均数据。东北地区木材资源丰富。根据中国林业局的一份报告（2014 年），东北林业的产量达到中国总产量（约 750 亿美元）的 18%。在初步研究中，以东北城市哈尔滨为代表。在板材生产阶段，选择了一家年产量约为 15 万立方米的代表性工厂，对生产过程进行详细研究。

## Technology and included processes
生产 HMAL/WF 的一般步骤与传统的中密度纤维板工艺相似。将木纤维与不同比例的 HMAL 粘结剂混合，并在含水率约为 20% 的条件下预压形成纤维毡，这样可促进天然纤维与纤维之间的良好熔融以及与木质素粘结剂的粘合。然后，使用机械控制的油热压机在 170 °C 的温度下对纤维毡进行 420 秒的热压，最终形成板材。

## Technical purpose
本数据集适用于中密度纤维板（MDF）的生产，涉及使用木质素磺酸改性铵（HMAL）作为粘合剂。该数据集对注重环保的建筑和家具制造行业具有参考价值。该材料可用于需要可持续木材复合材料的产品中，如家庭家具、办公家具和地板产品，它提供了一个替代传统以化石基UF树脂为粘合剂的MDF的方案。

## Reference product
- medium density fiberboard: 817; measured
  This is the output flow called "HMAL/WF finished (8% moisture)" in the paper.

## Inputs
- Wood, primary forest, standing: 1316; measured
  The "wood, primary forest, standing" is selected here, which substitutes for the "green chips (50% water content)" in the paper.
- lignosulfonic acid, ammonium salt: 154.2; article inperiodical
- hydrogen peroxide: 98.7; software or database
  In the paper, the hydrogen peroxide belongs to the input flow, but here, it only could be selected as "Emissions".
- Paraffins: 5.24; article inperiodical
  The "Paraffins" is selected here, which substitutes for the "Paraffin emulsion" in the paper.
- electricity: 912.5; software or database
- Energy, gross calorific value, in biomass, primary forest: 3450; software or database
  The "Energy, gross calorific value, in biomass, primary forest" is selected here, which substitutes for the "Energy from biomass" in the paper.
- transport in t*km: 58; article inperiodical
  This is the input flow called the 4–5-t truck in the paper.
- transport in t*km: 146; software or database
  This is the input flow called the 12–14-t truck in the paper.

## Outputs
- carbon dioxide: 105.2
- carbon monoxide: 0.43
- Nitrogen oxides: 3.2
- sulfur dioxide: 0.16
- non-methane volatile organic compounds: 0.03
- Dust (unspecified, from stack): 104.9
  The "Dust (unspecified, from stack)" is selected here, which substitutes for "Sand down dust" in the paper. This output flow in the paper belongs to the emission to the soil, but the database only has the "Emissions to air" flow.
- soft wood (dry matter): 0.47
  The "soft wood (dry matter)" is selected here, which substitutes for the "Filterable matter" in the paper.

## Data selection and combination
前景（HMAL/WF 和传统中密度纤维板的生产）的清单数据，包括制板过程中的材料消耗，主要从代表中国当前纤维板技术领域的企业收集。环境排放源包括干燥机、压榨机、板坯成型机、生物质锅炉和涂饰作业。所有排放数据都是与纤维板制造子系统相对应的现场数据，并根据中国环境保护部（MEP）报告的排放因子进行估算（中国环境保护部，2006 年）。在材料运输方面，原材料原产国与特殊产品生产国之间的平均距离取自参考文献（Chen 等，2015 年）。AL 的生产工艺和中国化工企业代表性工艺的平均数据来自参考文献（Ma 等，2004 年）。辅助工艺包括电力、热能、过氧化氢（H2O2）生产（50 wt%水溶液）、石蜡生产和柴油，这些数据来自 Ecoinvent 数据库，并使用了中国的具体数据。

## Use advice
在使用此数据集进行生命周期评估（LCA）计算时，用户应注意，提供的库存数据仅涵盖工业制造阶段，并由于缺乏数据而排除了使用和终身阶段。因此，为了全面的LCA研究，需要另外获取关于应用和处置阶段的数据。此外，从Ecoinvent数据库获取的材料运输具体信息和辅助过程能量需求应在地区范围内准确应用。本数据集不包括资本货物的生产和维护，与运营排放相比，这部分应被视为微不足道。

## Review details
清单： 内部审查通过几个迭代步骤完成，涉及原始数据验证、原始数据记录、代表性、完整性、与 ISO 14040 和 14044 有关的建模的一致性。

## Data sources
- Yuan, Y. & Guo, M. Do green wooden composites using lignin-based binder have environmentally benign alternatives? A preliminary LCA case study in China. Int J Life Cycle Assess 22, 1318–1326 (2017).
