# 铝、银、硅的化学处理;铝、银、硅;化学处理

Dataset: ILCD process, Unit process, single operation
Geography: CN
Classification: Unit processes / Materials production / Inorganic chemicals
Generated by: 王楠, 1209824595@qq.com
Owner: 天工LCI数据工作小组
Review: Dependent internal review by 天工LCI数据工作小组
Amounts: no units in this file; such an amount is in the reference unit of its flow, which a separate flow dataset defines
copyright: false
licenseType: Free of charge for all users and uses

## General comment
将剩余的金属硅和其他溶解在酸溶液中的金属依次处理。铝需要重熔和化学处理，然后才能在模块组装过程中替代原始材料。同时，多晶硅中的硅和银在回收前需要进行化学处理。

## Technical purpose
所描述的工艺涉及铝（Al）、银（Ag）和硅（Si）的化学处理，用于回收目的。铝需要进行重熔和化学处理以在光伏（PV）生产的组件组装过程中替代原始材料。同样，硅在多晶硅生产中的回收和银在多硅光伏电池制造中都需要进行化学处理。这一过程专门针对光伏行业应用，为太阳能组件制造提供回收的高纯度材料。

## Reference product
- aluminium: 10.3; software or database

## Inputs
All rows: software or database
- Al 12.7kg；Si 2.5kg；Ag 0.027kg: 15.227
  Al, Si, Ag（Al 12.7kg；Si 2.5kg；Ag 0.027kg）
- sodium nitrate: 0.0223; uniform
- sodium hydroxide: 5.5; uniform
- Standard coal: 5.1
- Hydrofluoric acid: 1.2; uniform

## Outputs
All rows: software or database
- Silicon: 2
- silver: 0.024
- Nitric oxide: 0.0121
  NO
- Sodium silicate: 5.83
  NaSiO2 硅酸钠 Sodium silicate
- sulfur dioxide: 2.02
- Nitrogen oxides: 2.54
- carbon dioxide: 2.59
- hydrogen: 0.97
- ammonium: 0.97

## Data selection and combination
多硅光伏组件的库存数据来源于多个来源:(1)Fu(2013)等文献，其中包含江苏省多家光伏企业的材料库存;Diao和Shi(2011)，其中包含北京两家光伏企业的材料库存;He(2013)，其中包含甘肃和四川四家光伏企业的材料库存。(2)四川(环评-四川，2008)、河南(环评-河南，2009)和重庆(环评-重庆，2008)多硅光伏生产企业环境影响评价报告(eia)。(3)《中国光伏发展市场前瞻与投资展望行业报告(2014)》和《中国多晶硅发展市场前瞻与投资展望行业报告(2014)》。当特定材料有不同的数据源时，应用平均值。

## Use advice
在使用所描述化学处理过程的生命周期评价（LCA）数据时，确保它应用于涉及光伏模块制造中的铝、银和硅回收的场景。数据使用应符合中国多晶硅和光伏行业环境影响评价和行业报告。如果对于同一种材料有多个数据源提供库存信息，应使用平均值来与所描述过程中概述的方法论框架保持一致。库存数据集应定期更新，以反映最新的行业实践和多家光伏企业的输入。

## Review details
清单： 内部审查通过几个迭代步骤完成，涉及原始数据验证、原始数据记录、代表性、完整性、与 ISO 14040 和 14044 有关的建模的一致性。

## Data sources
- Huang, B. et al. Environmental influence assessment of China’s multi-crystalline silicon (multi-Si) photovoltaic modules considering recycling process. Solar Energy 143, 132–141 (2017).
