# 废旧NCM111电池湿法回收

Dataset: ILCD process, Unit process, single operation
Geography: CN
Reference year: 2021
Classification: Unit processes / End-of-life treatment / Material recycling
Functional unit: In this research, we presume the average weight of EVs’ LiBs is 300 kg.
Generated by: 马清源, m1120498928@163.com
Owner: 天工LCI数据工作小组
Review: Dependent internal review by 天工LCI数据工作小组
Amounts: no units in this file; such an amount is in the reference unit of its flow, which a separate flow dataset defines
copyright: false
licenseType: Free of charge for all users and uses

## General comment
废旧锂电池回收运营商首先为锂电池（2.75V以下）放电，并将电池组拆成电池。将拆下的LiB电池浸泡在NaOH溶液中，将铜箔与阴极和阳极分离。之后，将LiB电池放入HAc溶液中，以分离阴极和阳极。阴极将浸泡在丙酮溶液中，然后阴极和丙酮溶液的混合物将被过滤和干燥，电池材料将在这个过程中回收。

## Technical purpose
该湿法回收工艺旨在从废旧NCM111锂离子电池（应用于电动汽车）中回收材料。回收的材料，例如锂、镍、钴和锰，通常用于制造新电池单元或其他需要高纯度化学品的应用。

## Reference product
- Cathode Material: 218; input; missing unimportant

## Inputs
- Sodium Hydroxide solution（1mol/L）: 20; missing unimportant
- Acetic acid solution(3mol/L): 294; missing unimportant
- Acetone solution(5mol/L): 125; missing unimportant

## Outputs
All rows: missing unimportant
- nickel: 20
- cobalt: 20
- lithium: 12
- manganese: 20
- aluminium: 17
- copper: 33
- Anodes (used): 47
- industrial waste (unspecified): 471
- Waste (solid): 10.5
- packaging waste (plastic): 6.5

## Use advice
在使用废旧NCM111电池湿法回收过程数据时，需确保重点关注电动汽车电池回收的预期应用。数据使用者在评估和推断时应考虑电动汽车锂电池的平均重量（300公斤）。在整个回收阶段，应注意化学纯度和分离的完整性。在分析中应仔细考虑是否排除或包含上游影响，例如与过程中使用的化学试剂生产相关的排放。

## Review details
清单： 内部审查通过几个迭代步骤完成，涉及原始数据验证、原始数据记录、代表性、完整性、与 ISO 14040 和 14044 有关的建模的一致性。

## Data sources
- Wang, S. & Yu, J. A comparative life cycle assessment on lithium-ion battery: Case study on electric vehicle battery in China considering battery evolution. WASTE MANAGEMENT & RESEARCH 39, 156–164 (2021).
