# Electricity production ; Electricity ; Thermal power (86.5%) + hydropower (0.6%) + nuclear power (6.4%) + wind power (3.6%) + solar power (3.0%)

Dataset: ILCD process, Partly terminated system
Geography: JS-CN
Reference year: 2019
Classification: Energy carriers and technologies / Electricity
LCI method principle: Other
Generated by: Ruoxi Xiong, xiongrx0126@163.com
Owner: Tiangong LCI Data Working Group
Review: Dependent internal review by Tiangong LCI Data Working Group
Amounts: no units in this file; such an amount is in the reference unit of its flow, which a separate flow dataset defines
copyright: false
licenseType: Free of charge for all users and uses

## General comment
Forms of electricity generation include thermal power generation, hydropower generation, nuclear power generation, wind power generation and solar power generation.

## Time period
Calculated based on data from the 2019 Energy Statistics Yearbook

## Technical purpose
This data set caracterizes the mixture of electricity generation technologies in use to produce electricity. It includes the proportionate contributions of thermal power, hydropower, nuclear power, wind power, and solar power to the overall electricity mix. Such a data set is typically utilized by industries and organizations to understand the carbon footprint of their electricity consumption, to inform decision-making regarding energy sourcing strategies, and to comply with regulations requiring disclosure of environmental impact. This could be further applied to optimize energy procurement for sustainability objectives, support in designing low-carbon products or services, or in environmental impact studies and climate change-related research.

## Reference product
- Electricity: 3.6; calculated

## Outputs
- carbon dioxide: 0.678; calculated
- sulfur dioxide: 0.000106; calculated
- Nitrogen oxides: 0.000172389; calculated
- Dust (unspecified, from stack): 2.2651e-5; calculated

## Data treatment and extrapolations
For the accounting method, please refer to the "Enterprise Greenhouse Gas Emissions Accounting Methods and Reporting Guidelines for Power Generation Facilities". Different forms of power generation and fuel consumption come from Chapter 3 (Energy Production) and Chapter 6 (Regional Energy Balance Sheet) in the "China Energy Statistical Yearbook 2020". The fuel parameters such as low calorific value and carbon content per unit calorific value used to calculate the carbon dioxide emission factor come from the "2019 China Regional Power Grid Carbon Dioxide Baseline Emission Factor Calculation Instructions OM" and the "Enterprise Greenhouse Gas Emission Accounting Method and Reporting Guide for Power Generation Facilities" 》

## Use advice
Users of this data set must account for the methodological specifics of electricity generation in their life cycle assessments. It is critical to adhere to the greenhouse gas accounting methods and reporting guidelines specified for power generation facilities. Due care must be taken to ensure that the emission factors are used in the correct context of the regional energy mix as outlined in the provided sources. Assumptions regarding the inclusion or exclusion of electricity from specific sources (e.g., renewable vs. non-renewable) should be transparently documented. Additionally, when calculating the carbon footprint, users should update the emission factors based on the most recent and applicable statistic yearbooks and dedicated guidelines for emission factor calculations.

## Review details
Inventory: The internal review was done by several iteration steps concerning raw data validation, raw data documentation, representativity, completeness and consistency of modelling with regard to ISO 14040 and 14044.

## Data sources
- 熊若熙. 中国电力生产和消费二氧化碳与污染物排放因子核算. (清华大学, 2023).
