# 旋翼制造 ; 一个1.5 MW风轮机转子的3个旋翼

Dataset: ILCD process, Unit process, single operation
Geography: NMG-CN
Reference year: 2017
Classification: Unit processes / Materials production / Other materials
Functional unit: The functional unit is 1.5 MW wind turbine
LCI method principle: Attributional
LCI method approaches: Allocation
Generated by: 赵云志, ll10088@163.com
Owner: 天工LCI数据工作小组
Review: Dependent internal review by 天工LCI数据工作小组
Amounts: no units in this file; such an amount is in the reference unit of its flow, which a separate flow dataset defines
copyright: false
licenseType: Free of charge for all users and uses

## General comment
1.5兆瓦风轮机的旋翼制造主要用于大规模风力发电设施。这些旋翼使风轮机能够有效地将风能动力转换为电能。此过程主要适用于类似于东北内蒙古所在地的风电场，它在可再生能源基础设施中发挥着重要作用。

## Geography
风电功率参数的数据来自Wang ( 2012 )。以装有33台国产1.5兆瓦( MW )风电机组的风电场为案例，分析其环境影响及其替代效应。该风电场位于我国风电装机最多的省份- -内蒙古东北部。

## Reference product
- Rotors blade hub of wind turbine: 3; estimated
  Rotors blade

## Inputs
- Fiber glass: 19200; calculated
  fiber glass

## Deviations from the LCI method approaches
风电的生命周期清单如下所示。生产制造阶段包括风电机组、变电站、电缆的生产，这些设备消耗大量能源，排放污染物( Xue et al . , 2015)。

## Use advice
在使用这组数据时，用户应注意，环境影响评估涉及1.5兆瓦风轮机安装的具体案例。任何向其他情景的外推都应谨慎进行，考虑到场地特有的特征和本地的生态敏感性。用户在将此数据推广到其他风电场项目时应考虑方法论的局限。在评估风力发电的全生命周期影响时，应包括对风电机组、变电站和电缆的生产制造阶段的考虑，因为这一阶段的能源消耗和污染物排放在整体评估中起着至关重要的作用。

## Review details
清单： 内部审查通过几个迭代步骤完成，涉及原始数据验证、原始数据记录、代表性、完整性、与 ISO 14040 和 14044 有关的建模的一致性。

## Data sources
- Li, H., Jiang, H.-D., Dong, K.-Y., Wei, Y.-M. & Liao, H. A comparative analysis of the life cycle environmental emissions from wind and coal power: Evidence from China. Journal of Cleaner Production 248, 119192 (2020).
