# Municipal sludge treatment and disposal;wet sludge moisture content 65%;mixed with straw to generate electricity

Dataset: ILCD process, Unit process, single operation
Geography: SZ-JS-CN
Classification: Energy carriers and technologies / Other non-renewable fuels
Functional unit: 1 t wet sludge with a moisture content of 65% was used as the functional unit.
Generated by: Jin Sitian, 2331276@tongji.edu.cn
Owner: Tiangong LCI Data Working Group
Review: Dependent internal review by Tiangong LCI Data Working Group
Amounts: no units in this file; such an amount is in the reference unit of its flow, which a separate flow dataset defines
licenseType: Free of charge for all users and uses

## General comment
The industrial process described involves the utilization of municipal sludge with a moisture content of 65% mixed with straw as a fuel source for co-combustion in a power generation facility. The material is intended for use in energy recovery processes in Kunshan co-combustion cogeneration power plants. It primarily serves in the conversion of wet municipal sludge into electricity, contributing to waste management and energy production.

## Geography
A sludge co-combustion co-power generation company in Kunshan

## Reference product
- Sludge: 1000; input; estimated

## Inputs
- Electricity: 226.656; measured
  The upstream production process includes sludge transportation and drying, rice planting, rice straw pretreatment and rice straw transportation.
- Diesel: 10.2; measured
  (same comment as for Electricity)
- water: 6223; measured
  The environmental impact of the production process mainly considers the direct or indirect emissions of gas pollutants, water pollutants and solid waste.
- Diesel: 0.11; calculated
  The downstream production mainly involves solid waste that can be used after incineration.

## Outputs
- carbon dioxide: -1703; calculated
  (same comment as for Electricity)
- methane: 8.27; calculated
  (same comment as for Electricity)
- nitrous oxide: 0.076; calculated
  (same comment as for Electricity)
- Nitrogen oxides: 0.44; calculated
  (same comment as for Electricity)
- sulfur dioxide: 0.3; calculated
  (same comment as for Electricity)
- carbon monoxide: 0.6; calculated
  (same comment as for Electricity)
- hydrocarbons (unspecified): 0.023; calculated
  (same comment as for Electricity)
- particles (PM10): 0.05; calculated
  (same comment as for Electricity)
- carbon dioxide: 2632; calculated
  (same comment as for water)
- Nitrogen oxides: 1.89; calculated
  (same comment as for water)
- sulfur dioxide: 0.25; calculated
  (same comment as for water)
- carbon monoxide: 0.13; calculated
  (same comment as for water)
- particles (PM10): 0.048; calculated
  (same comment as for water)
- chemical oxygen demand: 0.024; measured
  (same comment as for water)
- ammonia: 0.001; measured
  (same comment as for water)
- Suspended solids, unspecified: 0.011; measured
  (same comment as for water)
- nitrogen, total (excluding N2): 0.002; measured
  (same comment as for water)
- phosphorus, total: 0.0002; measured
  (same comment as for water)
- Waste (solid): 169.5; measured
  (same comment as for water)
- carbon dioxide: 0.34; calculated
  The downstream production mainly involves solid waste that can be used after incineration.
- methane: 3e-5; calculated
  The downstream production mainly involves solid waste that can be used after incineration.
- nitrous oxide: 2e-5; calculated
  The downstream production mainly involves solid waste that can be used after incineration.
- Nitrogen oxides: 0.001; calculated
  The downstream production mainly involves solid waste that can be used after incineration.
- sulfur dioxide: 0.0004; calculated
  The downstream production mainly involves solid waste that can be used after incineration.
- carbon monoxide: 0.001; calculated
  The downstream production mainly involves solid waste that can be used after incineration.
- hydrocarbons (unspecified): 0.0001; calculated
  The downstream production mainly involves solid waste that can be used after incineration.
- particles (PM10): 0.0002; calculated
  The downstream production mainly involves solid waste that can be used after incineration.

## Use advice
When utilizing this dataset for Life Cycle Assessment (LCA), users should consider the specific moisture content specified, as this affects the energy content and combustion efficiency. The defined functional unit is 1 tonne of wet sludge with a 65% moisture content; any variations in the sludge characteristics or moisture content will require adjustments in the assessment. Additionally, it is essential to account for the origin of the straw used for co-combustion and any additional environmental load associated with its production and transportation. Users should ensure that system boundaries are consistently applied when considering the inclusion of upstream and downstream processes.

## Review details
Inventory: The internal review was done by several iteration steps concerning raw data validation, raw data documentation, representativity, completeness and consistency of modelling with regard to ISO 14040 and 14044.

## Data sources
- 周钢,宋涛,马士伟等.不同污泥混燃发电工艺生命周期评价[J].洁净煤技术,2022,28(11):19-29.DOI:10.13226/j.issn.1006-6772.RE22042401.
