# Soil and groundwater remediation;Ex-situ;groundwater pump and treat;construction;Construction of Extraction well

Dataset: ILCD process, Unit process, single operation
Geography: CA
Reference year: 2007
Classification: Other Services / Repair and maintenance
Generated by: Wang Ning, wang_ning@caep.org.cn
Owner: Tiangong LCI Data Working Group
Review: Dependent internal review by Tiangong LCI Data Working Group
Amounts: no units in this file; such an amount is in the reference unit of its flow, which a separate flow dataset defines
licenseType: Free of charge for all users and uses

## General comment
Construction of 3 extraction wells using materials such as polyvinyl chloride, mica sand and steel

## Geography
The contaminated area was located 600 m from a river shore in the northern part of the prov-ince of Quebec， Canada.

## Technical purpose
This dataset pertains to the construction of extraction wells used for soil and groundwater remediation, specifically for an operation involving pump and treat methodology to extract and purify contaminated groundwater. The construction process employs materials such as polyvinyl chloride (PVC), mica sand, and steel. This type of remediation process is applicable for environmental clean-up and pollution control, where the contamination site is near sensitive water bodies, such as the case mentioned, 600 m from a river shore in the province of Quebec, Canada.

## Reference product
- Extraction wel: 3; article inperiodical
  在现场建造三个抽提井

## Inputs
All rows: article inperiodical
- Polyvinyl chloride: 459.1
  成井过程消耗的PVC管
- Diesel: 2.5
  钻孔过程钻机所消耗的柴油
- quartz sand: 1036
  成井过程消耗的石英砂
- bentonite: 843.4
  成井过程消耗的石膨润土
- cement: 210.1
  成井过程消耗的水泥

## Use advice
When utilizing this dataset for Life Cycle Assessment of soil and groundwater remediation projects, careful attention should be paid to methodological consistency with the region of interest. Users must consider the technological applicability based on local environmental regulations and conditions. It is recommended to account for the potential variances in material supply and construction practices that may differ from the context of Northern Quebec, such as the availability of materials or the presence of different soil and groundwater contaminants. Additionally, considerations regarding the environmental impact of material extraction, transportation, and well construction must be made relative to the specific context of use.

## Review details
Inventory: The internal review was done by several iteration steps concerning raw data validation, raw data documentation, representativity, completeness and consistency of modelling with regard to ISO 14040 and 14044.
