# clinker production|clinker, portland cement clinker|new dry process, >4000 t/d|secondary solid waste, dust recovery

Dataset: ILCD process, Unit process, single operation
Geography: CN
Reference year: 2020
Classification: Materials production / Other mineralic materials
Generated by: Siqi Yang
Amounts: no units in this file; such an amount is in the reference unit of its flow, which a separate flow dataset defines
copyright: false

## General comment
The new dry process has a relatively large market share in the cement industry process. Secondary solid waste composite cement raw material.

## Model description
The research focuses on P·O 42.5 type cement clinker as the study object, with the functional unit and reference flow set as the production of 1.00 ton of cement clinker. The system boundary includes the unit process of clinker calcination (including coal powder preparation), with the reference year set as 2020.

## Reference product
- clinker, portland cement clinker: 1000
  clinker, PO42.5

## Inputs
- raw meal: 1440.64; article inperiodical
  Raw materials, including secondary solid waste, i.e. dust recovery.
- electricity, medium voltage: 108; article inperiodical
  Electricity. Electricity is supplied from power plants.
- tap water: 220; article inperiodical
  Tap water
- coal, powder: 137.03; article inperiodical
  Coal powder

## Outputs
- wastewater, unpolluted: 5.88; article inperiodical
  Wastewater. The wastewater is discharged from the circulating cooling water system, and the water quality is basically free from other pollutants except for an increase in water temperature and turbidity.
- particles (> PM10): 0.04935; article inperiodical
  Particulate matter, with an unspecified particle size, is treated as PM > 10 micrometers in diameter. The particulate matter collected by the bag filter is returned to the raw material homogenization stage through the recycling system, and the solid waste generated during the process can be effectively recycled and reused.
- sulfur dioxide: 0.07854; article inperiodical
  Sulfur dioxide
- Nitrogen oxides: 0.21; article inperiodical
- mercury: 2.026e-5; article inperiodical
  Mercury
- fluorene: 0.0063; article inperiodical
  Fluoride
- ammonia: 0.00251; article inperiodical
  Ammonia
- carbon dioxide: 791.59; calculated
  Carbon dioxide. The cement industry usually does not monitor the CO2 emissions, which mainly come from two processes: the decomposition of limestone and the combustion of coal. The amount of CO2 produced can be calculated using chemical equilibrium formulas.

## Cut-off and completeness
This study utilizes the basic life cycle database developed by Yike Environmental Technology Co., Ltd., and adheres to the CLCD trade-off principle. The following details apply: (1) Raw material upstream production data can be ignored when the weight of raw materials is less than 1% of product weight, and the weight of materials containing rare/high purity is less than 0.1% of the product weight. Additionally, the total weight of the raw material is less than or equal to 5% of the total weight. (2) Waste or low-value waste used as raw material does not require tracing of its upstream production process. (3) In most cases, production equipment, plant buildings, living facilities, etc. can be ignored. (4) Known emission data within the scope of the selected environmental impact type should not be ignored.
The CLCD method is used as the data quality assessment method in this study. This method evaluates the resource consumption and pollutant emission data in the cement clinker LCA model from four aspects, such as inventory data sources and algorithms, years, locations and technical representativeness, to obtain the uncertainty brought by matching with the database, and then completes the inventory uncertainty assessment after correlating the background database base uncertainty. The uncertainty is calculated by the method of analytical formula to transfer and accumulate the uncertainty, and finally the uncertainty of LCA results of cement clinker production process is obtained.

## Data selection and combination
The data for all parameters, except CO2, were obtained from reports of companies such as Gao'an Hongshi and Jiangxi Dean Wannianqing, the clean production evaluation index system of the cement industry, and research papers on cement clinker.

## Data sources
- 陆柳鲜. (2022). 江西省多源有色冶炼固废资源化过程生命周期评价研究 [硕士, 江西理工大学].
