# Animalfat,meatandbonemeal|Sickanddeadanimals|Drychemicalprocessing|All sizes / 动物油脂、肉骨粉|病死动物|干化化制|所有规模

Dataset: ILCD process, Unit process, single operation
Geography: CN
Reference year: 2019
Classification: Energy carriers and technologies / Renewable fuels
Generated by: The data was created by the Office of the Second National Pollution Source Census of the Ministry of Ecology and Environment, and the data was organized by the TianGong Plan team for ILCD format / 生态环境部第二次全国污染源普查工作办公室创建数据，天工计划团队常慧敏整理数据为ILCD格式
Owner: Tiangong LCI Data Working Group / 天工LCI数据工作小组
Review: Dependent internal review by Tiangong LCI Data Working Group / 天工LCI数据工作小组
Amounts: no units in this file; such an amount is in the reference unit of its flow, which a separate flow dataset defines
copyright: false
licenseType: Free of charge for all users and uses

## General comment
the Technical of end-of-pipe management technology for pollution ammoniaisCondensation + incineration，Its Technical efficiency of end-of-pipe management90

## Reference product
- fallen stock: 1000; input; calculated
  源文件中描述为为病死动物，此处对其进行了匹配工作，将其匹配到LCAflow库里面相最符合的流，污染物指标备注为工业废水量

## Outputs
All rows: calculated
- Waste water: 850
  污染物指标工业废水量的末端治理技术是/，末端治理设施实际运行率（k值）计算公式为/。原文件中描述污染物类别为废水，污染物指标为工业废水量，此处对其进行了匹配工作，将其匹配到LCAflow库里面相最符合的流，污染物指标备注为工业废水量
- chemical oxygen demand: 0.3
  污染物指标化学需氧量的末端治理技术是厌氧生物处理法+好氧生物处理法，其效率为95，末端治理设施实际运行率（k值）计算公式为k=污水处理设施正常运行时间（小时/年）/生产时间（小时/年）。原文件中描述污染物类别为废水，污染物指标为化学需氧量，此处对其进行了匹配工作，将其匹配到LCAflow库里面相最符合的流，污染物指标备注为化学需氧量
- chemical oxygen demand: 0.06
  污染物指标化学需氧量的末端治理技术是厌氧生物处理法+好氧生物处理法+膜分离，其效率为99，末端治理设施实际运行率（k值）计算公式为k=污水处理设施正常运行时间（小时/年）/生产时间（小时/年）。原文件中描述污染物类别为废水，污染物指标为化学需氧量，此处对其进行了匹配工作，将其匹配到LCAflow库里面相最符合的流，污染物指标备注为化学需氧量
- Ammonia Nitrogen: 0.0408
  污染物指标氨氮的末端治理技术是厌氧生物处理法+好氧生物处理法，其效率为92，末端治理设施实际运行率（k值）计算公式为k=污水处理设施正常运行时间（小时/年）/生产时间（小时/年）。原文件中描述污染物类别为废水，污染物指标为氨氮，此处对其进行了匹配工作，将其匹配到LCAflow库里面相最符合的流，污染物指标备注为氨氮
- Ammonia Nitrogen: 0.0051
  污染物指标氨氮的末端治理技术是厌氧生物处理法+好氧生物处理法+膜分离，其效率为99，末端治理设施实际运行率（k值）计算公式为k=污水处理设施正常运行时间（小时/年）/生产时间（小时/年）。原文件中描述污染物类别为废水，污染物指标为氨氮，此处对其进行了匹配工作，将其匹配到LCAflow库里面相最符合的流，污染物指标备注为氨氮
- Exhaust gas: 6623
  污染物指标工业废气量的末端治理技术是/，末端治理设施实际运行率（k值）计算公式为/。原文件中描述污染物类别为废气，污染物指标为工业废气量，此处对其进行了匹配工作，将其匹配到LCAflow库里面相最符合的流，污染物指标备注为工业废气量
- ammonia: 0.1276
  污染物指标氨的末端治理技术是冷凝+喷淋洗涤，其效率为80，末端治理设施实际运行率（k值）计算公式为k=废气处理设施正常运行时间（小时/年）/生产时间（小时/年）。原文件中描述污染物类别为废气，污染物指标为氨，此处对其进行了匹配工作，将其匹配到LCAflow库里面相最符合的流，污染物指标备注为氨
- ammonia: 0.0957
  污染物指标氨的末端治理技术是冷凝+喷淋洗涤+生物过滤，其效率为85，末端治理设施实际运行率（k值）计算公式为k=废气处理设施正常运行时间（小时/年）/生产时间（小时/年）。原文件中描述污染物类别为废气，污染物指标为氨，此处对其进行了匹配工作，将其匹配到LCAflow库里面相最符合的流，污染物指标备注为氨
- ammonia: 0.0638
  污染物指标氨的末端治理技术是冷凝+喷淋洗涤+活性炭吸附，其效率为90，末端治理设施实际运行率（k值）计算公式为k=废气处理设施正常运行时间（小时/年）/生产时间（小时/年）。原文件中描述污染物类别为废气，污染物指标为氨，此处对其进行了匹配工作，将其匹配到LCAflow库里面相最符合的流，污染物指标备注为氨
- ammonia: 0.0638
  污染物指标氨的末端治理技术是冷凝+喷淋洗涤+光催化+活性炭吸附，其效率为90，末端治理设施实际运行率（k值）计算公式为k=废气处理设施正常运行时间（小时/年）/生产时间（小时/年）。原文件中描述污染物类别为废气，污染物指标为氨，此处对其进行了匹配工作，将其匹配到LCAflow库里面相最符合的流，污染物指标备注为氨
- ammonia: 0.0638
  污染物指标氨的末端治理技术是冷凝+喷淋洗涤+低温等离子体+活性炭吸附，其效率为90，末端治理设施实际运行率（k值）计算公式为k=废气处理设施正常运行时间（小时/年）/生产时间（小时/年）。原文件中描述污染物类别为废气，污染物指标为氨，此处对其进行了匹配工作，将其匹配到LCAflow库里面相最符合的流，污染物指标备注为氨
- ammonia: 0.0638
  污染物指标氨的末端治理技术是冷凝+焚烧，其效率为90，末端治理设施实际运行率（k值）计算公式为k=废气处理设施正常运行时间（小时/年）/生产时间（小时/年）。原文件中描述污染物类别为废气，污染物指标为氨，此处对其进行了匹配工作，将其匹配到LCAflow库里面相最符合的流，污染物指标备注为氨

## Use advice
This dataset is derived from the Pollution Source Census Report and contains information on pollution emissions and related products. However, it does not include data on energy or chemical consumption, nor does it provide information on waste or co-product generation. When utilizing this dataset, please supplement the missing data based on actual conditions before use
该数据集来源于污染源普查报告，包含污染物排放及相关产品信息，但不包含能源或化学品消耗数据，也不提供废弃物或共生产物产生信息。在使用该数据集时，请根据实际情况补充缺失数据后再使用。

## Review details
Inventory: The internal review was done by several iteration steps concerning raw data validation, raw data documentation, representativity, completeness and consistency of modelling with regard to ISO 14040 and 14044.
清单： 内部审查通过几个迭代步骤完成，涉及原始数据验证、原始数据记录、代表性、完整性、与 ISO 14040 和 14044 有关的建模的一致性。

## Data sources
- 第二次全国污染源普查产排污核算系数手册（试用版）,二级代码05,四级代码0539文件，在完整版文件中第3413页
