# 氢氧化锂生产 ; 电池级单水氢氧化锂 ; 苛化法 ; 智利阿塔卡马盐湖高浓卤水提取到的碳酸锂

Dataset: ILCD process, Unit process, single operation
Geography: CL
Reference year: 2018
Classification: Unit processes / Materials production / Inorganic chemicals
Generated by: 孙鑫, xs389@cornell.edu
Owner: 天工LCI数据工作小组
Review: Dependent internal review by 天工LCI数据工作小组
Amounts: no units in this file; such an amount is in the reference unit of its flow, which a separate flow dataset defines
licenseType: Free of charge for all users and uses

## General comment
历史上，锂一直产自智利安第斯山区的地下卤水，该地区被称为 "锂三角"，还包括玻利维亚和阿根廷的部分地区。全世界还有其他几个富含锂的卤水产地，每种卤水都有独特的化学成分，因此需要不同的工艺来分离出所需的最终产品（Wietelmann 和 Steinbild，2014 年）。本项生命周期评估考虑的是智利阿塔卡马沙漠中的卤水，即阿塔卡马盐湖。盐水经过浓缩，加工成电池级 Li2CO3 和 LiOH-H2O，然后运往世界各地加工成电池阴极材料，最终制成电池。

## Technology and included processes
Li2CO3 与 CaO 和水的混合物经过一系列反应生成 LiOH-H2O。同样，由于 LiOH-H2O 是该设备的唯一产品，因此不需要进行工艺层面的分析；我们分析了设备层面的数据，并确定了生产 LiOH-H2O 所需的能源和材料投入。请注意，就所提供的数据而言，同一工厂内有两套设施，分别用于生产 Li2CO3 和 LiOH-H2O，但这两套设施是分开的，为每套设施提供的工艺数据都是独一无二的。 利用生产商数据，我们确定了生产 LiOH-H2O 所需的设施级材料、能源和水的总需求。所提供的排放数据用于计算非燃烧过程的排放量。表 3 总结了利用锂盐水生产 LiOH-H2O 的物料流和能量流。在此过程中会消耗水。同样，由于只生产 LiOH-H2O，因此无需分配到产品中。

## Technical purpose
通过苛化法生产的电池级单水氢氧化锂专门用于锂离子电池的制造。它是可充电电池阴极材料生产中的关键组分，这些电池通常用于电动汽车、便携式电子设备和大规模能源储存系统。

## Reference product
- Lithium Hydroxide Monohydrate: 1000; measured

## Inputs
All rows: measured
- Lithium carbonate,Lithium carbonate: 1050
- Calcium Oxide: 1150
- freshwater,freshwater: 0.5
- Electricity: 5000
- Diesel: 3000
- Natural gas, at consumer EU-27: 21000

## Outputs
- particles (PM10): 0.1; measured
- particles (PM2.5): 0.05; measured

## Use advice
在应用该生命周期评估数据集时，用户应考虑排除代表总数不到1%的原材料生产过程和能源流。重要的是确保这些小量排除不会对整体评估结论产生重大影响。此外，从业者应注意数据的技术适用性和区域特性，因为数据来源于智利阿塔卡马盐湖，由于当地条件和所使用的技术，这可能会影响环境概况。

## Review details
清单： 内部审查通过几个迭代步骤完成，涉及原始数据验证、原始数据记录、代表性、完整性、与 ISO 14040 和 14044 有关的建模的一致性。

## Data sources
- Kelly, J. C., Wang, M., Dai, Q. & Winjobi, O. Energy, greenhouse gas, and water life cycle analysis of lithium carbonate and lithium hydroxide monohydrate from brine and ore resources and their use in lithium ion battery cathodes and lithium ion batteries. Resources, Conservation and Recycling 174, 105762 (2021).
