# 土壤修复;异位修复;生物堆;运行;得到修复的土壤

Dataset: ILCD process, Unit process, single operation
Geography: IT
Reference year: 2018
Classification: Unit processes / Other Services / Repair and maintenance
Generated by: 王宁, wang_ning@caep.org.cn
Owner: 天工LCI数据工作小组
Review: Dependent internal review by 天工LCI数据工作小组
Amounts: no units in this file; such an amount is in the reference unit of its flow, which a separate flow dataset defines
copyright: false
licenseType: Free of charge for all users and uses

## General comment
运行生物堆，使污染土壤得到修复

## Technical purpose
该生物堆操作用于异位修复受污染的土壤。该过程专门用于生物处理被有机污染物，如石油烃类污染的土壤。

## Reference product
- Remediated soil: 600000; measured

## Inputs
All rows: measured
- Microorganism: 0.001
- Excavated soil,Excavated soil: 600000
- biopile facility: 1
- Electricity: 37800
- air: 720000
- Tap Water: 1500
- Rice husk: 30
- urea: 180
- Phosphate fertilizer: 36
- slurry: 45000

## Use advice
使用此生命周期评估数据时，确保考虑生物反应器操作的全部环境影响，包括所需的所有主要原材料使用和能源消耗。在评估范围内考虑受污染土壤运输至生物堆场地以及修复后土壤的处置或再利用。注意土壤中有机污染物的具体类型和浓度，因为这可能会影响修复过程的效率和环境影响。

## Review details
清单： 内部审查通过几个迭代步骤完成，涉及原始数据验证、原始数据记录、代表性、完整性、与 ISO 14040 和 14044 有关的建模的一致性。

## Data sources
- D’Imporzano, G. et al. OPTIMIZING BIOREMEDIATION OF HYDROCARBON POLLUTED SOIL BY LIFE CYCLE ASSESSMENT (LCA) APPROACH. Environmental Engineering and Management Journal (2019).
