# 污泥处理与处置|厌氧消化

Dataset: ILCD process, Unit process, single operation
Geography: DL-LN-CN
Classification: Materials production / Other mineralic materials
Generated by: Jin Sitian, 2331276@tongji.edu.cn
Review: Dependent internal review by Tiangong LCI Data Working Group
Amounts: no units in this file; such an amount is in the reference unit of its flow, which a separate flow dataset defines

## Geography
大连市某污泥处理厂

## Reference product
- Sludge: 20500; input; measured

## Inputs
- Electricity: 12793.7; calculated
  计算的是一套设备即处理量为150t/d所消耗的电量。
- Polymer: 40; measured

## Outputs
- Electricity: 14400; article inperiodical
- nitrous oxide: 60; measured
- methane: 90; measured
- Biogas: 5; measured

## Review details
Inventory: The internal review was done by several iteration steps concerning raw data validation, raw data documentation, representativity, completeness and consistency of modelling with regard to ISO 14040 and 14044.

## Data sources
- 基于LCA的污水处理系统的环境影响评价研究
