# Soil and groundwater remediation;Ex-situ;groundwater pump and treat;construction; transport

Dataset: ILCD process, Unit process, single operation
Geography: CA
Reference year: 2007
Classification: Other Services / Repair and maintenance
Generated by: Wang Ning, wang_ning@caep.org.cn
Owner: Tiangong LCI Data Working Group
Review: Dependent internal review by Tiangong LCI Data Working Group
Amounts: no units in this file; such an amount is in the reference unit of its flow, which a separate flow dataset defines
licenseType: Free of charge for all users and uses

## General comment
Transportation of required materials and equipment to the site

## Geography
The contaminated area was located 600 m from a river shore in the northern part of the prov-ince of Quebec， Canada.

## Technical purpose
The described process is primarily employed for soil and groundwater remediation purposes. It is specifically used for the ex-situ treatment of contaminated groundwater through pump and treat methods. In addition to remediation activities, it involves the transportation and construction activities required to set up the necessary infrastructure for the treatment at a contaminated site. This process is applicable in environmental engineering, particularly for managing and restoring polluted sites to inhibit the spread of contaminants and protect nearby ecosystems such as a river shore.

## Reference product
- Equipment and Materials Arriving on Site: 1; article inperiodical
  到达现场的设备和材料

## Inputs
- Diesel: 79.8; article inperiodical
  将所需材料和设备运至现场所需要的柴油

## Use advice
When using this dataset, care must be taken to ensure that it is applicable to the specific conditions of the site being remediated. Consider the proximity to water bodies, such as the river mentioned, and other ecological sensitivities. Users of the data should also be aware of the limitations of ex-situ remediation methods and assess whether this approach is suitable given the local geological and hydrogeological conditions. If the dataset is used for comparative purposes, it should be ensured that other compared scenarios are equivalent in scope and that all relevant parameters, such as transport distances and construction impacts, are appropriately included and calibrated.

## Review details
Inventory: The internal review was done by several iteration steps concerning raw data validation, raw data documentation, representativity, completeness and consistency of modelling with regard to ISO 14040 and 14044.
