# 铝锭铸造 ; 原生铝锭 ; 液态原铝 ; 2015年

Dataset: ILCD process, Unit process, single operation
Geography: CN
Reference year: 2021
Classification: Unit processes / Materials production / Metals and semimetals
Generated by: 蔡梓萌, caizm6178@163.com
Owner: 天工LCI数据工作小组
Review: Dependent internal review by 天工LCI数据工作小组
Amounts: no units in this file; such an amount is in the reference unit of its flow, which a separate flow dataset defines
copyright: false
licenseType: Free of charge for all users and uses

## General comment
原生铝锭铸造是生产纯铝锭的工业过程。这些铝锭是汽车、航空航天、建筑和电子等多种行业应用中关键的原材料。通常将液态铝铸造成标准化形状，用于进一步加工或直接用于产品制造。

## Time period
文献发表日期

## Reference product
- aluminium, primary, ingot: 1000; software or database

## Inputs
- aluminium, primary, liquid: 1025.99; software or database

## Data selection and combination
本研究的数据参考了PA、SA、电力等背景数据的LCA数据。PA数据来自统计数据源，SA数据主要来自文献。背景数据主要来自中国科学院生态环境研究中心CASRCEES 2018建立的中国本地化LCA数据库，涵盖能源、材料、交通、废物管理等LCA数据。

## Use advice
该数据集涉及至2015年的原生铝锭铸造的LCA数据，使用时应考虑其时间相关性和地理特异性。用户应注意，原生铝（PA）数据来自统计资料，而次生铝（SA）数据主要来自文献。在应用这些数据时，需要关注背景数据来源——中国科学院生态环境研究中心建立的中国本土化LCA数据库CAS RCEES 2018。如果进行不同地区或不同时间段的LCA研究可能需要进行调整。方法论方面的考量，比如是否纳入回收过程，应与评估的目标和范围保持一致。

## Review details
清单： 内部审查通过几个迭代步骤完成，涉及原始数据验证、原始数据记录、代表性、完整性、与 ISO 14040 和 14044 有关的建模的一致性。

## Data sources
- Ding, N., Liu, N., Lu, B. & Yang, J. Life cycle greenhouse gas emissions of aluminum based on regional industrial transfer in China. J. Ind. Ecol. 25, 1657–1672 (2021).
