# 华东水稻; 上海水稻生产;施肥

Dataset: ILCD process, Unit process, single operation
Geography: SH-CN
Reference year: 2012
Valid until: 2014
Classification: Unit processes / Materials production / Agricultural production means
Functional unit: 1 t
LCI method principle: Attributional
LCI method approaches: Consequential
Generated by: Haoran Zhang, hrzhang@whu.edu.cn
Owner: 天工LCI数据工作小组
Review: Dependent internal review by 天工LCI数据工作小组
Amounts: no units in this file; such an amount is in the reference unit of its flow, which a separate flow dataset defines
copyright: false
licenseType: Free of charge for all users and uses

## General comment
参照PAS2050规范并结合生命周期评价方法对上海市水稻生产进行了碳足迹评估

## Geography
崇明

## Technology and included processes
主要参照 PAS2050 规范并结合 LCA 方 法进行水稻生产的碳足迹计算。PAS2050 全称“公 众可获 取 的 规 范”( Publicly Available Specification， PAS) ，由英国标准协会( British Standard Institution， BSI) 编制，旨在对产品和服务生命周期内温室气体 排放的评价要求做出明确的规定［19］。

## Technical purpose
上海水稻生产（重点是施肥过程）的生命周期评价数据适用于评估上海水稻种植的碳足迹。它可被农业研究人员、环境科学家或政策制定者使用，以确定水稻生产的温室气体（GHG）影响。主要考虑的原材料包括种子、化肥和农药，涵盖的活动包括田间作业、稻谷加工、温室气体排放测试、农机使用和存储，但不包括商品销售、消费者使用及产品寿命周期终期。

## Reference product
- rice: 1000; measured

## Outputs
- nitrogen: 0.1159; calculated
- Phosphorus: 0.0298; calculated
- potassium: 0.0587; calculated

## Deviations from the LCI method approaches
主要参照PAS2050 规范并结合LCA方法进行水稻生产的碳足迹计算。PAS2050 全称“公众可获取的规范” ( Publicly Available Specification, PAS)

## Data selection and combination
水稻碳足迹的初级活动水平数据包括田间各项作业活动, 加工存储各项作业活动、深加工与产品包装以及田间温室气体散逸等活动水平数据。

## Data treatment and extrapolations
包括田间作业、稻谷加工、温室气体排放检测

## Use advice
使用上海水稻生产的生命周期评价数据集时，必须遵循PAS2050标准和指定的LCA方法。用户应该考虑到系统边界从化肥和电力生产开始，到种植过程中的农产品和污染物产出结束。此数据集不包括销售、消费者使用或废物处理和回收等下游过程。因此，为了进行完整的生命周期分析，应获取并相应地整合涵盖这些阶段的附加数据。

## Review details
清单： 内部审查通过几个迭代步骤完成，涉及原始数据验证、原始数据记录、代表性、完整性、与 ISO 14040 和 14044 有关的建模的一致性。

## Data sources
- 曹黎明,李茂柏,王新其,赵志鹏,潘晓华.基于生命周期评价的上海市水稻生产的碳足迹[J].生态学报,2014,34(02):491-499.
