# 土壤修复;异位修复;土壤填埋;填埋的污染土壤

Dataset: ILCD process, Unit process, single operation
Geography: ES
Reference year: 2022
Classification: Unit processes / Other Services / Repair and maintenance
Generated by: 桑春晖, sangch@mail.bnu.edu.cn
Owner: 天工LCI数据工作小组
Review: Dependent internal review by 天工LCI数据工作小组
Amounts: no units in this file; such an amount is in the reference unit of its flow, which a separate flow dataset defines
copyright: false
licenseType: Free of charge for all users and uses

## General comment
3000吨铅污染土壤转运至15 km外的填埋场

## Technical purpose
该数据集描述的是场外土壤修复过程，特别是将铅污染的土壤运输到指定的填埋场的情况。这一过程适用于环境工程和废物管理领域，用于通过将危险物质隔离在原始位置以外的地方，防止污染物的扩散，避免对人类健康和环境造成威胁。

## Reference product
- Landfilled contaminated soil: 3e6; software or database

## Inputs
- transport in t*km: 45000; software or database
- Excavated soil,Excavated soil: 3e6; software or database

## Use advice
使用本数据集的用户应注意，数据集专门指的是运输和填埋所指定数量（3000吨）的铅污染土壤，距离为15公里。在使用此数据进行生命周期评估或类似研究时，重要的是确保案例特定的细节符合数据集的标准，对填埋过程所作的假设与实际做法和当地法规一致，并且选定的处置场所已得到危险废物处理的适当许可。此外，用户应考虑潜在的渗滤和填埋场关闭后的后期监管问题。

## Review details
清单： 内部审查通过几个迭代步骤完成，涉及原始数据验证、原始数据记录、代表性、完整性、与 ISO 14040 和 14044 有关的建模的一致性。

## Data sources
- Espada, J. J., Rodríguez, R., Gari, V., Salcedo-Abraira, P. & Bautista, L. F. Coupling phytoremediation of Pb-contaminated soil and biomass energy production: A comparative Life Cycle Assessment. Science of The Total Environment 840, 156675 (2022)
