# 球团矿生产;球团矿;球团

Dataset: ILCD process, Unit process, single operation
Geography: CN
Reference year: 2016
Classification: Materials production / Non-energetic raw materials
Generated by: 王环宇, wanghuanyu00@126.com
Owner: 天工LCI数据工作小组
Review: Dependent internal review by 天工LCI数据工作小组
Amounts: no units in this file; such an amount is in the reference unit of its flow, which a separate flow dataset defines
licenseType: Free of charge for all users and uses

## General comment
在此工艺中生产的球团矿主要用作制造钢材的原料。球团矿是已加工成球形的铁矿石，适用于高炉和直接还原法。

## Reference product
- Pellet: 1000; article inperiodical

## Inputs
All rows: article inperiodical
- bentonite: 7
- Electricity: 136.8
- Concentrate powder: 950
- Pulverized coal: 28
- dolomite: 20
- Limestone: 55

## Outputs
- Flue dust: 1.8e-5; article inperiodical
- nitrous oxide: 9.5e-5; article inperiodical
- sulfur dioxide: 0.0002; article inperiodical
- freshwater: 35; article inperiodical

## Use advice
在使用此数据集进行生命周期评估（LCA）时，用户应考虑所涉及的具体技术过程，确保其LCA模型反映了生产球团矿所关联的能源和排放。还应考虑原材料或最终球团矿的任何运输。如果此数据集包括上游过程（如采矿或运输），则应将这些包含在LCA的边界中。如果不包括下游过程如钢铁制造，则应在LCA中单独核算。

## Review details
清单： 内部审查通过几个迭代步骤完成，涉及原始数据验证、原始数据记录、代表性、完整性、与 ISO 14040 和 14044 有关的建模的一致性。

## Data sources
- 王倩, 张玲玲, & 苍大强. 基于GaBi软件的钢铁工业球团工艺LCA生命周期评价. 冶金能源 36, 3-6+32 (2017).
