# Nibprocessing|Highmolecularpencil|Dichloromethane,ethylacetate,adhesives|Combining-Dipping-Forming-Grinding-Washing-Drying|All sizes / 笔头加工|高分子笔头|二氯甲烷、乙酸乙酯、胶黏剂|合股-浸胶-成型-磨削-清洗-烘干|所有规模

Dataset: ILCD process, Unit process, single operation
Geography: CN
Reference year: 2019
Classification: Materials production / Organic chemicals
Generated by: The data was created by the Office of the Second National Pollution Source Census of the Ministry of Ecology and Environment, and the data was organized by the TianGong Plan team for ILCD format / 生态环境部第二次全国污染源普查工作办公室创建数据，天工计划团队常慧敏整理数据为ILCD格式
Owner: Tiangong LCI Data Working Group / 天工LCI数据工作小组
Amounts: no units in this file; such an amount is in the reference unit of its flow, which a separate flow dataset defines
copyright: false
licenseType: Free of charge for all users and uses

## Technology and included processes
the Technical of end-of-pipe management technology for pollution volatile organic compoundisPhotocatalysis + activated carbon adsorption，Its Technical efficiency of end-of-pipe management63，The formula for calculating the actual operation rate (k-value) of the end-of-pipe treatment facility is k = annual power consumption of wastewater treatment facilities (kWh) / (total rated power (kW) × annual operating time (hours))

## Reference product
- Dichloromethane: 1000; input; calculated
  源文件中描述为为二氯甲烷、乙酸乙酯、胶黏剂，此处对其进行了匹配工作，将其匹配到LCAflow库里面相最符合的流，污染物指标备注为工业废气量

## Outputs
- Exhaust gas: 5.16e8; calculated
  污染物指标工业废气量的末端治理技术是/。原文件中描述污染物类别为废水，污染物指标为工业废气量，此处对其进行了匹配工作，将其匹配到LCAflow库里面相最符合的流，污染物指标备注为工业废气量
- volatile organic compound: 0.006068; calculated
  污染物指标挥发性有机物的末端治理技术是光催化+活性炭吸附，其效率为63，末端治理设施实际运行率（k值）计算公式为废气治理设施运行时间（小时/年）/废气产污正常生产时间（小时/年）。原文件中描述污染物类别为废水，污染物指标为挥发性有机物，此处对其进行了匹配工作，将其匹配到LCAflow库里面相最符合的流，污染物指标备注为挥发性有机物

## Data sources
- 第二次全国污染源普查产排污核算系数手册（试用版）,二级代码24,四级代码2412文件，在完整版文件中第2814页
