# Production of scandium oxide|scandium oxide|General process|REE containing ore

Dataset: ILCD process, Unit process, single operation
Geography: CN
Reference year: 2010
Valid until: 2019
Classification: Materials production / Other mineralic materials
Functional unit: The cradle-to-gate production of 1 kg of scandium oxide.
LCI method principle: Attributional
LCI method approaches: Allocation - mass
Generated by: Tao Wang, twang@iue.ac.cn
Review: Dependent internal review by Tiangong LCI Data Working Group
Amounts: no units in this file; such an amount is in the reference unit of its flow, which a separate flow dataset defines
copyright: false

## Geography
China

## Technology and included processes
We apply the LCA method to quantify the potential environmental impacts of scandium oxide production according to the ISO 14040 (ISO, 2006a) and ISO 14044 (ISO, 2006b) guidelines, and our assessment is performed and assessed with the support of GaBi 9.0 software and Ecoinvent 3.3 database.

## Reference product
- arsenic trioxide: 1; article inperiodical

## Inputs
All rows: article inperiodical
- tailings (unspecified): 64363.3
- water: 753955
- Electricity: 3138.41
- process steam: 60500
- tributylphosphorotrithioate: 6.5
  tributyl phosphate (TBP)
- P0507: 5.33
  P507, 2－乙基己基膦酸单2－乙基己基酯
- Kerosene: 6.5
- Sodium silicate: 650.01
  Water glass
- Polyglycerol fatty acid esters (PGFEs): 7.67
  Carrier (fatty ester of polyglycolether and modified polyalcohol)
- Spray mold: 5.33
  Activating reagent , Ammonium chloride (Salmiac, Solvay process)
- phenanthrene: 388.02
  Collector, DE: Phthalic anhydride
- oxalic acid: 50.17
- sulphuric acid: 1767.83
- Hydrochloric acid: 77.06
- Sodium hydroxide: 77.06
- hydrogen peroxide: 21.5

## Outputs
All rows: article inperiodical
- Concentrate: 11068.3
  Fe concentrate
- RE concentrate: 2455
- Concentrate: 1020
  S concentrate
- Concentrate: 32478.3
  Fluorite coarse ore
- Concentrate: 796.67
  Nb concentrate
- Non-methane volatile organic compounds: 0.69
  NMVOC
- methane: 3.14
- ammonia: 0.26
- particles (PM2.5 - PM10): 0.44
- Radioactive dust, waste: 0.000651
  RS (Th, U) , Radioactive dust, waste
- sulfur dioxide: 7.38
- Nitrogen oxides: 5.24
  Nitrogen oxide
- carbon monoxide: 3.32
- carbon dioxide: 853.11
- water: 678107
- waste water - untreated: 3226.23
- Oils, unspecified: 0.01
- Sulfidic tailing: 10546.7
  Sc tailings
- Waste (solid): 6502.66

## Deviations from the LCI method approaches
Therefore, the mass-based-allocation, a fair allocation method based on material natural attributes, was performed to partition the environmental impacts among by-products in this study, and all the inputs and outputs considered during the entire process are considered. In the whole production processes, we apply the mass-based allocation principle to our assessment by considering the scandium oxide as the main product, while Fe concentrate, REs concentrate, S concentrate, Fluorite coarse ore and Nb concentrate are considered as by-products, and the detail is shown in Supporting Information (

## Review details
Inventory: The internal review was done by several iteration steps concerning raw data validation, raw data documentation, representativity, completeness and consistency of modelling with regard to ISO 14040 and 14044.; Documentation: The review of the documentation was performed by Ecobilan and is in compliance with ISO 14040 and 14044. The data set documentation is correct in view of the appropriateness of the information provided. It includes all relevant information in view of data quality and scope of application of the respective LCI result.

## Data sources
- Wang, L., Wang, P., Chen, W.-Q., Wang, Q.-Q. & Lu, H.-S. Environmental impacts of scandium oxide production from rare earths tailings of Bayan Obo Mine. Journal of Cleaner Production 270, 122464 (2020).
