# Indoorscentedanddeodorantproducts|Charcoalpowder,binder,spice,etc.|Mixing,blendingandforming|All sizes / 室内散香及除臭制品|炭粉、粘合剂、香料等①|混合调配及成型|所有规模

Dataset: ILCD process, Unit process, single operation
Geography: CN
Reference year: 2019
Classification: Materials production / Organic chemicals
Generated by: The data was created by the Office of the Second National Pollution Source Census of the Ministry of Ecology and Environment, and the data was organized by the TianGong Plan team for ILCD format / 生态环境部第二次全国污染源普查工作办公室创建数据，天工计划团队常慧敏整理数据为ILCD格式
Owner: Tiangong LCI Data Working Group / 天工LCI数据工作小组
Amounts: no units in this file; such an amount is in the reference unit of its flow, which a separate flow dataset defines
copyright: false
licenseType: Free of charge for all users and uses

## Technology and included processes
the Technical of end-of-pipe management technology for pollution volatile organic compoundisPhotocatalytic oxidation，Its Technical efficiency of end-of-pipe management68

## Reference product
- Indoor Fragrance and Deodorant Products: 1000; calculated
  源文件中描述为为室内散香及除臭制品，此处对其进行了匹配工作，将其匹配到LCAflow库里面相最符合的流，污染物指标备注为工业废气量

## Outputs
- Exhaust gas: 2700; calculated
  污染物指标工业废气量的末端治理技术是/，末端治理设施实际运行率（k值）计算公式为/，①由于生产不同产品使用的原料各不相同且原料品种繁多，系数表单中仅列举了几种常用原料，实际生产时并不局限于此。。原文件中描述污染物类别为废气，污染物指标为工业废气量，此处对其进行了匹配工作，将其匹配到LCAflow库里面相最符合的流，污染物指标备注为工业废气量
- volatile organic compound: 0.00196; calculated
  污染物指标挥发性有机物的末端治理技术是低温等离子体+光解，其效率为51，末端治理设施实际运行率（k值）计算公式为k=1.0，①由于生产不同产品使用的原料各不相同且原料品种繁多，系数表单中仅列举了几种常用原料，实际生产时并不局限于此。。原文件中描述污染物类别为废气，污染物指标为挥发性有机物，此处对其进行了匹配工作，将其匹配到LCAflow库里面相最符合的流，污染物指标备注为挥发性有机物
- volatile organic compound: 0.00128; calculated
  污染物指标挥发性有机物的末端治理技术是光催化氧化，其效率为68，末端治理设施实际运行率（k值）计算公式为k=1.0，①由于生产不同产品使用的原料各不相同且原料品种繁多，系数表单中仅列举了几种常用原料，实际生产时并不局限于此。。原文件中描述污染物类别为废气，污染物指标为挥发性有机物，此处对其进行了匹配工作，将其匹配到LCAflow库里面相最符合的流，污染物指标备注为挥发性有机物

## Data sources
- 第二次全国污染源普查产排污核算系数手册（试用版）,二级代码26,四级代码2689文件，在完整版文件中第3009页
