# cement production|cement, common portland cement|new dry process kiln

Dataset: ILCD process, Unit process, black box
Geography: SD-CN
Reference year: 2012
Classification: Materials production / Other mineralic materials
Generated by: Siqi Yang
Amounts: no units in this file; such an amount is in the reference unit of its flow, which a separate flow dataset defines
copyright: false

## General comment
The native cement is produced under the new dry kiln.

## Geography
The typical cement enterprise of the average production level of Shandong Province

## Model description
1T native cement is a functional unit; the geographical scope of the research is in Shandong. The system boundary is all the direct processes involved in cement production. all the resources, energy consumption and environmental emissions regarding raw material extraction, processing, energy production and auxiliary links such as production equipment, transportation, sales and use stages are not considered for the time being.

## Reference product
- cement, common portland cement: 1000
  Universal cement is a research object

## Inputs
All rows: measured
- limestone, crushed, for mill: 1130
  Limestone
- clay: 220
  Clay
- iron, powder: 27
  Iron correction raw material
- gypsum (desulphurized): 60
  Gupsum
- mixed materials, mineral: 200
  Mixed material
- hard coal: 120.398
  Raw coal (standard coal). Coal consumption is converted into standard coal consumption according to the low heating value. Coal consumption in the literature is converted to standard coal consumption (0.086t) according to the low level heating value, the conversion formula is 1kg raw coal = 0.7143kg standard coal. Here the conversion is made into raw coal for entry.
- electricity, medium voltage: 0.296316
  Electricity. The power is mainly from thermal power. The electricity consumption in the literature is converted to standard coal (0.067t). The conversion formula used here is 1 kWh = 0.814 kg of standard coal. This conversion is used for inputting electricity data.

## Outputs
- sulfur dioxide: 0.5; measured
  SO2
- particles (> PM10): 3; measured
  Dust, with an unspecified particle size, is treated as PM > 10 micrometers in diameter.
- particles (> PM10): 0.35; measured
  Smoke, with an unspecified particle size, is treated as PM > 10 micrometers in diameter.
- Nitrogen oxides: 1.45; measured
  NOx
- carbon dioxide: 658; calculated
  CO2

## Data selection and combination
The cement industry in Shandong Province holds an important position in the country and has been ranked first in the country for over a decade, with cement products accounting for 11% to 13% of the country's total output annually. It has become a truly cement-rich province. Therefore, the data mainly comes from the production data of typical cement enterprises in Shandong Province that represent the average production level and monitoring data from local environmental protection departments.

## Data sources
- 邓琪 & 陈吉宁. (2012). 钢铁工业固废应用于水泥生产的降耗与减排. 生态环境学报, 21(2), 298–302.
