# 铝电解电容器生产 ; 铝电解电容器（25V 100uf）

Dataset: ILCD process, Unit process, black box
Geography: NT-JS-CN
Reference year: 2020
Classification: Unit processes / Materials production / Metals and semimetals
Generated by: 谢金良, jinliang.research@gmail.com
Owner: 天工LCI数据工作小组
Review: Dependent internal review by 天工LCI数据工作小组
Amounts: no units in this file; such an amount is in the reference unit of its flow, which a separate flow dataset defines
copyright: false
licenseType: Free of charge for all users and uses

## General comment
该工业过程生产的铝电解电容器（25V 100uf）主要用于电子电路中的能量储存和滤波。由于这些电容器具有耐高压和大电容值的特性，它们是电源、消费电子产品和汽车电子等各种电子设备中不可或缺的组件。

## Time period
数据来自于在2020年进行的调研

## Reference product
- Aluminum Electrolytic Capacitors: 10000; measured
  aluminum electrolytic capacitors (qualified) (10000 pcs)

## Inputs
All rows: measured
- electricity, high voltage, aluminium industry: 1266.48
- aluminium, primary, ingot: 7.22
  Al ingots (anode) ; Al smelting preparation (anode)
- aluminium, primary, ingot: 4.77
  Al ingots (cathode)
- case from assembly (including sleeving): 69.75
- Lead, in ground: 2.8
  Lead from assembly (including sleeving)
- polysulfide, sealing compound: 6.11
  Sealing cover from assembly (including sleeving)
- Sleeve: 4.23
  sleeve from assembly (including sleeving)
- Armature Winding: 2.8
  tab from winding ; 绕组接线片
- sealing tape, aluminium/PE, 50 mm wide: 0.47
  tape from winding
- Separator Paper Coil,Separator Paper Coil: 4.49
  Separator paper coil
- water, deionised: 1880.57
  deionized water
- tap water: 1043.35
  tape water
- electrolyte, KOH, LiOH additive: 13.59
  Electrolyte (soak); The complete composition of electrolyte is 69% main solvent (1,4-butyrolactone), 26% auxiliary solvent (ammonium tetramethylsuccinate), and 5% solute (water). The electrolyte here is assumed to consist of 95% the main solvent and 5% solutes to simplify the analysis of environmental impacts.
- phosphoric acid, industrial grade, without water, in 85% solution state: 1.95
- Perboric acid: 0.35
  perboric acid; HBO3; 过硼酸
- hydrochloric acid, without water, in 30% solution state: 3
  HCl (31%)
- Nitrogen: 0.01
  N2 gas (final annealing)
- sodium hydroxide, without water, in 50% solution state: 3.37
  NaOH (30%)
- ammonium nitrate: 0.03
  硝酸氢铵; 硝酸铵；NH4NO3
- nitric acid, without water, in 50% solution state: 0.9
  HNO3 (98%)
- Cold Rolling Oil: 0.3
  rolling oil (cold rolling)
- Ammonium Citrate: 0.68
  Ammonium citrate (formation process); 柠檬酸铵
- Ammonium Pentaborate: 0.19
  Ammonium pentaborate (formation process); 五硼酸铵
- Argon-40: 0.002
  Ar gas (Al smelting preparation)

## Outputs
All rows: measured
- Aluminium Phosphate: 0.25
  Aluminium phosphate (AlPO4) (production of anode formed foil); The environmental impacts from the production stage are all allocated to the capacitors. The by-product AlPO4 in production of anode formed foil is taken as an economical treatment method to address the production waste because of the limited amount and the simplified analysis.
- aluminium scrap, new: 0.73
  Al scraps; The environmental impacts on the specialized recycling processing of the flows are ignored.
- Scraps of Separator Paper: 0.029
  Scraps of separator paper; The environmental impacts on the specialized recycling processing of the flows are ignored.
- Sludge (Sewage Treatment): 0.236
  sludge (Sewage treatment); The environmental impacts on the specialized landfill of the sludge are ignored.
- wastewater, average: 1617.84
  wastewater
- Total Phosphorus (TP): 0.001
  total phosphorous (TP) (production of anode formed foil); 总磷 (污染物);
- total nitrogen: 0.003
  total nitrogen (TN); 总氮 (污染物)
- Suspended solids, unspecified: 0.025
- chemical oxygen demand: 0.072
- Biochemical Oxygen Demand: 0.01
  Biochemical Oxygen Demand (BOD) (Production of Al blank foil); 生化需氧量 (水体污染物)
- ammonia: 0.007
  Ammonia nitrogen (NH3-N)
- Dust: 0.004
  dust (Al smelting preparation)
- Hydrochloric acid: 0.015
- Sulfuric acid: 0.002
- Nitrogen oxides: 0.002
- ammonia: 0.002
- Aluminum Electrolytic Capacitors (Waste): 6281.67
  aluminum electrolytic capacitors (waste) ; The environmental impacts on the specialized recycling processing of the flows are ignored.

## Data selection and combination
三种 AEC 的材料信息和性能参数均来自被调查的制造商。此外，通过对 AEC 行业的几家工厂进行实地调研，获得了铝坯箔制造（由铝锭制成）、阳极/阴极箔制造（由铝坯箔制成）和电容器制造的原始数据。由于技术保密原因，无法直接从供应商处获得 PHAEC 阴极箔制造的 LCI 数据。因此，考虑到两者的相似性，根据 PAECs 阴极箔的涂层工艺数据调整 PHAECs 阴极铝箔的制造 LCI。在运输阶段，主要原材料从材料产地到电容器制造商的数据以及电容器制成品从制造商到客户的数据均来自制造商的供应链系统。使用阶段的能耗是根据 AEC 的物理方程和电气参数计算得出的。为确保分析的完整性，在分析和计算的基础上获得报废阶段的数据。基本数据的参考年份约为 2016 年。基本数据（即铝锭、分离纸、运输、电力和水）来自 Gabi 数据库（版本：10.6.1.35）。此外，一些背景数据，包括 3，4-乙烯二氧噻吩（EDOT）、己二酸铵、柠檬酸铵等，在 Gabi 数据库中无法获得。它们是根据 Gabi 数据库中现有原材料在材料制备过程中发生的化学反应估算出来的。用于制造 PHAECs 的分散溶液（PEDOT:PSS，1%wt）的制备过程数据是根据实验室数据按比例计算的。三种 AEC 的详细 LCI 数据和物质流的单位影响见辅助信息 B 的第 5-7 张和第 2 张。

## Use advice
在使用这些铝电解电容器的生命周期评估数据时，应注意生产废物的某些专门处理过程已被排除在外。用户需知道由于缺乏完整的生命周期库（LCI）数据和简化分析，1,4-丁内酯等化学品的环境影响被低估了。如果这些物质对环境具有特别关注，则应在评估中考虑这一点。另外，在评估制造过程及其环境含义时，应当确认副反应的潜在影响以及随后的处理过程的需求。

## Review details
清单： 内部审查通过几个迭代步骤完成，涉及原始数据验证、原始数据记录、代表性、完整性、与 ISO 14040 和 14044 有关的建模的一致性。

## Data sources
- Zhang, C., Zheng, Y., Huang, H., Liu, Z. & Jing, J. Environmental impact assessment of aluminum electrolytic capacitors in a product family from the manufacturer’s perspective. Int. J. Life Cycle Assess. (2022)
