# 蔬菜生产 ; 耕作（日光温室）

Dataset: ILCD process, Unit process, single operation
Geography: XA-SAX-CN
Reference year: 2012
Valid until: 2013
Classification: Materials production / Agricultural production means
Functional unit: 1000 kg tomatoes
Generated by: 张浩然, hrzhang@whu.edu.cn
Owner: 天工LCI数据工作小组
Review: Dependent internal review by 天工LCI数据工作小组
Amounts: no units in this file; such an amount is in the reference unit of its flow, which a separate flow dataset defines
copyright: false
licenseType: Free of charge for all users and uses

## General comment
所描述的日光温室和塑料大棚专为蔬菜种植而设计，特别是番茄和西瓜。这些结构通过提供可控环境，优化植物生长，并且促进全年某些农业实践。

## Technology and included processes
数据分别取10个日光温室和5个塑料大棚的平均值.根据建材的一般使用年限, 建设日光温室和塑料大棚消耗的建材和能源按使用寿命15年、PVC输水管按使用寿命5年棚膜按使用寿命1年 (塑料大棚按3年) 、防寒膜 (塑料大棚的裙膜) 按使用寿命3年分别折算为1年的用量.塑料大棚1年的建材消耗量平均分配给番茄和西瓜,

## Reference product
- tomato: 1000
  日光温室

## Inputs
- water: 50.388
  日光温室
- Electricity: 315.33
  日光温室

## Outputs
- carbon dioxide (fossil): 23.638
  日光温室
- carbon monoxide: 0.032
  日光温室
- methane (fossil): 0.067
  日光温室
- non-methane volatile organic compounds: 0.001
  日光温室
- sulfur dioxide: 0.205
  日光温室
- Nitrogen oxides: 0.162
  日光温室
- ammonia: 0.083
  日光温室
- nitrous oxide: 0.247
  日光温室
- nitrate: 0.308
  日光温室
- cadmium: 0.000208
  日光温室
- lead: 0.006835
  日光温室
- calcium: 0.027577
  日光温室
- zinc: 0.228139
  日光温室
- arsenic: 0.00443
  日光温室
- nickel: 0.007847
  日光温室
- Rice Seeds: 1.3e-5
  日光温室 空气
- Rice Seeds: 6e-6
  日光温室 水

## Deviations from the LCI method approaches
本研究定义的系统边界包括设施构筑物建设和日常运行 (下文简称为设施构筑物) 所需材料 (水泥、钢材、砖和棚膜等) 的生产，农资 (化肥、地膜、杀菌剂和杀虫剂) 生产、番茄种植 (育苗、翻地、定植、覆膜、施肥、喷药、灌溉、收获) 及各过程使用能源的生产和消耗,不包括农用机械的生产、番茄运输到市场销售和消费者消费的过程.

## Data selection and combination
能源生产和使用过程的环境影响数据取自文献 (Di et al., 2007;胡志远等, 2006) ;生产钢材、水泥、砖、棚膜、防寒膜、地膜、PVC输水管和化肥的资源、能源和环境排放数据分别取自文献以及《磷肥行业清洁生产指标体系》《氮肥行业清洁生产指标体系》由于缺乏详尽的研究数据, 杀虫剂和杀菌剂生产过程只考虑能耗和CO2排放量, 以有效成分质量表示, 数据采用West等 (2002) 的研究结果.

## Sampling procedure
本研究选择了10个日光温室 (面积均为6 m×90 m) 和5个塑料大棚 (面积均为9 m×110 m) 为研究对象, 调查了日光温室和塑料大棚建设及日常运行的物资消耗

## Use advice
使用与本生命周期评价相关的数据时，请考虑将建筑材料和能源分摊在各自的使用寿命上：一般建筑材料15年、PVC输水管5年、温室膜1年（塑料大棚3年）和防寒膜3年。注意，杀虫剂和杀菌剂的生产过程仅考虑了能源消耗和CO2排放。不包括农业机械的生产、作物运往市场的运输以及最终消费者的消费阶段。

## Review details
清单： 内部审查通过几个迭代步骤完成，涉及原始数据验证、原始数据记录、代表性、完整性、与 ISO 14040 和 14044 有关的建模的一致性。

## Data sources
- 王效琴,吴庆强,周建斌,陈妍,吴发启.设施番茄生产系统的环境影响生命周期评价[J].环境科学学报,2014,34(11):2940-2947.
