# 隔水漏斗;总长36.6m;原位地下水修复PRB;漏斗-导水门式PRB

Dataset: ILCD process, Unit process, single operation
Geography: UM
Reference year: 2009
Classification: Unit processes / Other Services / Repair and maintenance
Generated by: 杨欣桐, yangxt@caep.org.cn
Owner: 天工LCI数据工作小组
Review: Dependent internal review by 天工LCI数据工作小组
Amounts: no units in this file; such an amount is in the reference unit of its flow, which a separate flow dataset defines
copyright: false
licenseType: Free of charge for all users and uses

## General comment
PRB安装在原位，允许地下水在自然梯度下流过反应池，反应介质在反应池中降解或捕获污染物。

## Geography
该案例研究使用了巴特尔为位于美国多佛空军基地

## Technology and included processes
漏斗由预制钢板桩建造，并用水泥浆密封在一起。

## Technical purpose
隔水漏斗结构旨在用作原位地下水修复系统的一部分。具体来说，包含漏斗-导水门式渗透性反应屏障（PRB）的这个过程应用于多佛空军基地内受污染地下水的处理。它允许地下水自然流经反应池，以降解或捕获污染物，使其成为环境修复努力和污染控制的针对性解决方案。

## Reference product
- Impermeable funnel: 36.6; measured

## Inputs
- Steel: 47800; measured
- Concrete: 10300; measured

## Use advice
使用此数据集的用户应注意，隔水漏斗和PRB的参数是专门为多佛空军基地的案例研究设计的。适应其他场所需要仔细考虑当地的水文地质条件、污染物类型和浓度水平。推荐验证PRB设计的适用性以及是否需要对其它地点进行调整，必要的调整可能需要使用模型来估算。在适应该过程时，未包括在数据库中的输入或排放需要基于特定场地的数据进行计算。任何此类调整都应依据现有文献或基本原理。

## Review details
清单： 内部审查通过几个迭代步骤完成，涉及原始数据验证、原始数据记录、代表性、完整性、与 ISO 14040 和 14044 有关的建模的一致性。

## Data sources
- Life-Cycle Case Study Comparison of Permeable Reactive Barrier versus Pump-and-Treat Remediation
