# 铝锭铸造 ; 原铝锭 ; 液态原铝

Dataset: ILCD process, Unit process, single operation
Geography: CN
Reference year: 2015
Classification: Unit processes / Materials production / Metals and semimetals
Generated by: 常慧敏, huiminchang@tsinghua.edu.cn
Owner: 天工LCI数据工作小组
Review: Dependent internal review by 天工LCI数据工作小组
Amounts: no units in this file; such an amount is in the reference unit of its flow, which a separate flow dataset defines
copyright: false
licenseType: Free of charge for all users and uses

## General comment
该初级铝锭铸造工艺用于生产高纯度的初级铝锭。这些铝锭通常作为原材料在包括汽车、航空航天、电子和建筑等多个行业中使用。根据最终产品的规格要求，这些铝锭可能会进一步通过轧制、挤压或其他冶金技术进行加工，以生产框架、结构面板、导电线路和其他基于铝的部件或产品。

## Time period
IAI 2015 (Gabi dataset）

## Reference product
- aluminium, primary, ingot: 1000; software or database
  Aluminium ingot [kg]

## Inputs
- electricity, high voltage, aluminium industry: 190.285; software or database
  Electricity [kWh]
- aluminium, primary, liquid: 1000; software or database
  Aluminium (liquid) [kg]
- chlorine, liquid: 0.00989; estimated
  Chlorine [kg] ; EU-28 used as no specific data for CN and NO available
- heavy fuel oil: 48.9605; software or database
  Heavy oil [MJ]
- Diesel oil: 17.5417; software or database
  Diesel oil [MJ]
- heat, district or industrial, natural gas: 783.614; software or database
  Natural gas [MJ]
- freshwater: 2.19833; software or database
  Fresh water [m3]

## Outputs
- particles (> PM10): 0.03899; software or database
  Particulates [kg] ; PM10
- sulfur dioxide: 0.03343; software or database
  Sulfur dioxide [kg]
- Nitrogen oxides: 0.07545; estimated
  Nitrous oxides (as NO2) [kg] ; GLO used as no specific data for CN available
- hydrogen chloride: 0.02037; software or database
  Hydrogen chloride [kg]
- 2,3,7,8-tetrachlorodibenzo-p-dioxin: 7.005e-10; software or database
  Dioxin/furans [kg]
- water vapour: 1.22359e8; software or database
  Water vapour [kg]
- Suspended solids, unspecified: 0.26637; software or database
  Suspended solids [kg]
- Oils, unspecified: 0.03401; software or database
  Oil and grease/total hydrocarbons [kg]
- freshwater: 1.88745; software or database
  Fresh water [m3]

## Data selection and combination
为了获得可靠的研究结果，我们考虑了最新的和有代表性的数据。如果 GaBi©"专业和推广 "数据库（SP 39）或文献中提供了特定地区或国家的数据，则使用这些数据。如果找不到特定地区的数据，则使用该国的可比数据或全球数据。为保持一致性，如果有相同来源和年份的数据，则使用相同来源和年份的数据。由于数据的可获得性，如果某些输入和背景过程对总输入质量的贡献小于 1%，则本研究不考虑这些输入和背景过程。对于原铝生产，本研究使用了国际铝业协会（IAI）提供的 2015 年最新 LCI 数据（国际铝业协会，2017b）。之所以使用 IAI 的数据，是因为 IAI 是一个考虑全球原铝生产的成熟机构，其数据已在铝业协会和欧洲铝业协会等研究中使用（铝业协会，2013 年；欧洲铝业协会，2018 年）。就标准化原铝生产的生命周期评估数据而言，不确定因素很少。一般来说，这些数据的组成可以完全解释和重建。

## Use advice
使用此生命周期评估数据集时，请确保区域或国家特定数据与拟定研究的地理背景一致。如果没有特定位置的数据，使用提供的全球或可比国家数据。请认识到，如果某些最小输入和背景过程占总输入质量的1％以下，则这些会从本研究中省略。因此，应理解这些数据代表一种简化。在对初级铝的使用阶段进行建模时，考虑一致地应用来自同一来源和年份的数据，例如IAI 2015年的数据集，以确保准确性和可比性。为了透明度和方法论的稳健性，请注意，与这些标准化初级铝生产数据相关的不确定性很少，这可以通过提供的详细信息来解释和重建。

## Review details
清单： 内部审查通过几个迭代步骤完成，涉及原始数据验证、原始数据记录、代表性、完整性、与 ISO 14040 和 14044 有关的建模的一致性。

## Data sources
- Luthin, A., Backes, J. G. & Traverso, M. A framework to identify environmental-economic trade-offs by combining life cycle assessment and life cycle costing – A case study of aluminium production. Journal of Cleaner Production 321, 128902 (2021).
