# 稀土元素酸焙烧;稀土元素;氟碳铈矿路线;含稀土元素矿石

Dataset: ILCD process, Unit process, single operation
Geography: NMG-CN
Reference year: 2014
Classification: Unit processes / Materials production / Inorganic chemicals
Functional unit: The functional unit of this study is the production of 1 kg of the basket REO from each corresponding mineralogical and processing route.
LCI method principle: Attributional
LCI method approaches: Allocation - market value
Generated by: 汪涛, twang@iue.ac.cn
Owner: 天工LCI数据工作小组
Review: Dependent internal review by 天工LCI数据工作小组
Amounts: no units in this file; such an amount is in the reference unit of its flow, which a separate flow dataset defines
copyright: false
licenseType: Free of charge for all users and uses

## General comment
本数据集描述了使用含稀土元素矿石氟碳铈矿路线的稀土元素酸焙烧工艺，通常用于稀土生产系统的提取和精炼阶段。所得产品主要用于高科技行业各种应用，包括电子产品、可再生能源技术，以及作为高级制造工艺的关键组成部分。

## Technology and included processes
在这项研究中，对稀土生产系统进行了分析，从采矿到溶剂萃取，其中包含沉淀和煅烧等产品精加工过程

## Reference product
- Rare Earth Element sulfate: 1; calculated
  REE sulfate

## Inputs
All rows: calculated
- transport in t*km,transport in t*km: 0.171, 3.08 (2 entries)
- sulphuric acid: 1.55
- Rare Earth Oxides: 1.1
  REO
- heavy fuel oil: 6.59
- Sulfidic tailing: 0.505

## Outputs
- carbon dioxide (fossil): 0.154; calculated
  原文未区分bio和fossil，根据专家判断此处为fossil
- sulfur oxides: 0.00911; calculated
- hydrogen fluoride: 0.0245; calculated

## Deviations from the LCI method approaches
In this study, the REE production system was analyzed from mining up to and including solvent extraction which contains product finishing processes such as precipitation and calcination (Fig. 1). The other categories assessed in the literature review were mineral type, radioactivity, waste treatment, and co-mining. For mineral type, it was noted that the mineralogy accounted for in each study was different, which makes comparison difficult. For radioactivity, we marked with an X those studies which exemplified radioactivity flows in the LCI (if provided). For waste, we distinguished those LCIs which quantified waste treatment flows. For co-mining, since all REE are co-products of each other, this column is meant to highlight the co-products in addition to REE.

## Use advice
当使用该数据集进行生命周期评估（LCA）研究时，用户应考虑氟碳铈矿路线的特定矿物学，并确保比较分析考虑了矿物种类的变化。如果生命周期清单（LCI）中提供了，应包括放射性流。还要考虑废物治理措施。共同开采方面也需要认真考虑除稀土元素以外的共产品。本研究的功能单元设置为从指定矿物学和加工路线生产 1 公斤的稀土氧化物（REO）一篮子。

## Review details
清单： 内部审查通过几个迭代步骤完成，涉及原始数据验证、原始数据记录、代表性、完整性、与 ISO 14040 和 14044 有关的建模的一致性。

## Data sources
- Bailey, G. et al. Review and new life cycle assessment for rare earth production from bastnäsite, ion adsorption clays and lateritic monazite. Resources, Conservation and Recycling 155, 104675 (2020).
