# 修复后地下水;地下水原位修复;植物修复;柳树种植;4.6 m × 4.6 m 网格;太阳能灌溉系统

Dataset: ILCD process, Unit process, black box
Geography: UM
Reference year: 2019
Classification: Unit processes / Other Services / Repair and maintenance
Functional unit: The functional unit was the treatment of a 9000 2 area of (= 9000 m3 volumn of) a PCE-contaminated aquifer. The timeframe for the LCA was 100 years.
Generated by: 杨欣桐, yangxt@caep.org.cn
Owner: 天工LCI数据工作小组
Review: Dependent internal review by 天工LCI数据工作小组
Amounts: no units in this file; such an amount is in the reference unit of its flow, which a separate flow dataset defines
copyright: false
licenseType: Free of charge for all users and uses

## General comment
植物修复是利用绿色植物来转移、容纳或转化污染物使其对环境无害。植物修复的对象是重金属、有机物或放射性元素污染的土壤及水体。

## Geography
这项研究是在旧金山湾区的背景下进行的，旧金山湾区是美国加利福尼亚州的一个主要都市区（约18000平方公里）。

## Technology and included processes
选择柳树作为植物修复系统。树木按照4.6 m×4.6 m的网格模式种植。利用太阳能灌溉系统抽取地下水灌溉新种植的树木。

## Technical purpose
所描述的工业过程涉及使用植物修复进行地下水修复。具体来说，这涉及将柳树按网格模式种植，作为一种生物系统处理受重金属、有机污染物或放射性物质污染的水体和土壤。其用途旨在环境修复，特别是处理PCE污染的含水层。使用太阳能灌溉系统进行此目的代表了一种环保技术，它利用可再生能源进行环境修复过程。

## Reference product
- Remediated groundwater: 9000; measured
  含水层厚度1m，体积9000m3

## Inputs
All rows: measured
- polyvinylchloride resin (S-PVC): 1008
  太阳能灌溉系统安装材料
- Polyethylene,Polyethylene: 405, 177 (2 entries)
  太阳能灌溉系统安装材料
- Steel: 365
  太阳能灌溉系统安装材料
- Copper sheet: 47
  太阳能灌溉系统安装材料
- Textile: 84
  太阳能灌溉系统安装材料
- Compound Fertilizer,Compound Fertilizer: 4517
- aluminium sheet: 59
  太阳能灌溉系统安装材料
- Diesel,Diesel: 2206
- transport in t*km: 5600
  Material transport – by truck (tkm)
- Road Transport,Road Transport: 4.2e6
  Passenger transport (km)
- contaminated groundwater: 9000
  含水层厚度1m，体积9000m3

## Use advice
在生命周期评估中使用此数据集时，用户应包括从摇篮到坟墓的整个生命周期，包含原材料和能源的获取、设备的采购和使用、运输、建设和废物处理。用户还应注意柳树种植网格模式和太阳能灌溉系统的技术特性。在建模时，功能单元应定义为在100年时间框架内处理9000平方米（体积9000立方米）PCE污染的含水层。任何偏离这些特定条件的操作都应在LCA中谨慎考虑，因为它可能会影响分析的准确性和相关性。

## Review details
清单： 内部审查通过几个迭代步骤完成，涉及原始数据验证、原始数据记录、代表性、完整性、与 ISO 14040 和 14044 有关的建模的一致性。

## Data sources
- O'Connor D ,Zheng X ,Hou D , et al. Phytoremediation: Climate change resilience and sustainability assessment at a coastal brownfield redevelopment [J]. Environment International, 2019, 130 104945.
