# 退役磷酸铁锂电池湿法回收

Dataset: ILCD process, Unit process, single operation
Geography: CN
Reference year: 2022
Classification: End-of-life treatment / Material recycling
Functional unit: 1 item retired LFP battery of 48V,12Ah
Generated by: 陈利鹏, lpchen07@163.com
Owner: 天工LCI数据工作小组
Review: Dependent internal review by 天工LCI数据工作小组
Amounts: no units in this file; such an amount is in the reference unit of its flow, which a separate flow dataset defines
copyright: false
licenseType: Free of charge for all users and uses

## General comment
LFP电池的主要回收过程是通过湿法冶金工艺（盐酸浸取-过氧化氢氧化-苏打灰调节pH值）来回收碳酸锂和磷酸铁。

## Technical purpose
通过湿法冶金工艺回收的材料，包括碳酸锂和磷酸铁，用于制造新电池和其他需要材料高纯度的相关产品。

## Reference product
- EoL LFP battery: 1; input; article inperiodical

## Inputs
All rows: article inperiodical
- Hydrochloric acid (30%): 2.214
- Sodium hydroxide（30%）: 1.626
- Hydrogen peroxide (30%): 0.366
- sodium carbonate: 0.336
- magnesium chloride: 0.00222
- potassium chloride: 0.0002376
- sodium chloride: 0.0002766
- Coke powder: 0.00138
- carbon: 5.58e-5
- Heavy oil: 0.01116
- silicon: 0.0117
- Light gas oil: 0.00696
- process steam: 0.03996
- Water: 0.612
- Electricity: 0.02682

## Outputs
All rows: article inperiodical
- Lithium carbonate: 0.144
- Ferric pyrophosphate: 1.98
- aluminium: 0.256
- copper: 0.228
- hydrogen chloride: 0.0003696
- Total particulate matter: 0.000114
- Sulphur oxides (as SO2): 6e-6
- nitrous oxide: 2.28e-5
- chemical oxygen demand: 0.00294

## Use advice
使用此LCA数据的用户必须考虑湿法回收过程的具体条件，包括温度、压力和化学试剂浓度。此外，在将此数据应用于环境影响评估时，至关重要的是要考虑回收材料的纯度水平和回收过程的效率。同时还应注意排除退役电池的预处理和运输相关的能耗和排放。

## Review details
清单： 内部审查通过几个迭代步骤完成，涉及原始数据验证、原始数据记录、代表性、完整性、与 ISO 14040 和 14044 有关的建模的一致性。

## Data sources
- Liu, M. et al. Life cycle environmental and economic assessment of electric bicycles with different batteries in China. Journal of Cleaner Production 385, 135715 (2023).
