# 电力生产 ; 混合电力 ; 内蒙古自治区

Dataset: ILCD process, Unit process, single operation
Geography: NMG-CN
Reference year: 2019
Classification: Unit processes / Energy carriers and technologies / Electricity
Generated by: 熊若熙, xiongrx0126@163.com
Owner: 天工LCI数据工作小组
Review: Dependent internal review by 天工LCI数据工作小组
Amounts: no units in this file; such an amount is in the reference unit of its flow, which a separate flow dataset defines
copyright: false
licenseType: Free of charge for all users and uses

## General comment
混合电力产生形式包括火力发电、水力发电、风力发电、核能发电和太阳能发电

## Technical purpose
内蒙古自治区混合电力生产提供的电力被广泛应用于各种消费者和工业部门，范围从家庭日常使用到大型工业设施供电。它支持当地基础设施、商业建筑，也可用于电力交通系统。多样化的发电方法确保了更稳定和潜在的低碳供电。

## Reference product
- Electricity: 3.6; missing unimportant
  [{'text': '3.6', 'type': 'text'}]

## Inputs
All rows: missing unimportant
- electricity for thermal power: 3.01893
  [{'text': '3.6', 'type': 'text'}]
- electricity from hydroelectric power plant: 0.0379944
  [{'text': '3.6', 'type': 'text'}]
- electricity for nuclear power: 0
  [{'text': '3.6', 'type': 'text'}]
- electricity from wind power: 0.436291
  [{'text': '3.6', 'type': 'text'}]
- electricity for solar power: 0.10678
  [{'text': '3.6', 'type': 'text'}]

## Use advice
在使用此数据集进行生命周期评估时，应考虑区域电网组合、技术进步和影响发电的时间因素。包括对电力生成设施制造和维护可能的上游影响的考量。评估混合电力中可再生能源的比例，以正确核算不同发电方法的碳强度变化。

## Review details
清单： 内部审查通过几个迭代步骤完成，涉及原始数据验证、原始数据记录、代表性、完整性、与 ISO 14040 和 14044 有关的建模的一致性。

## Data sources
- 能源统计年鉴2020
