# 废旧聚氯乙烯（PVC）回收加工 ; PVC ; 热熔法 6000t/a ; （塑料颗粒）

Dataset: ILCD process
Geography: JX-CN
Reference year: 2020
Classification: Unit processes / Materials production / Plastics
Functional unit: 1 ton waste polyvinyl chloride recycling
Generated by: 刘晓华, lxh01311@163.com
Owner: 天工LCI数据工作小组
Review: Dependent internal review by 天工LCI数据工作小组
Amounts: no units in this file; such an amount is in the reference unit of its flow, which a separate flow dataset defines
copyright: false
licenseType: Free of charge for all users and uses

## General comment
通过热熔法回收的聚氯乙烯（PVC）旨在生产塑料颗粒。这种回收的PVC材料通常用于制造各种塑料产品，包括管道和配件、建筑材料以及对原料高纯度要求不严格的其他应用。

## Reference product
- Waste Polyvinyl Chloride: 1000; input
  废弃聚氯乙烯

## Inputs
- Electricity: 93.6
  电
- water: 70
  水

## Outputs
- ABS: 100
- polyethylene high density granulate (PE-HD): 200
  高密度聚乙烯HDPE
- Recycled Polyethylene: 270
  再生聚乙烯PE
- Recycled Polypropylene: 170
  再生聚丙烯PP
- Recycled Polystyrene granules: 70
  再生聚苯乙烯PS
- Recycled Polyvinyl Chloride: 200
  再生聚氯乙烯PVC

## Use advice
在使用这个数据集进行回收PVC制成的产品的生命周期评估时，必须考虑输入废弃物料的质量和回收过程的效率。用户应该考虑潜在的污染物和材料属性在回收周期中的降解。此外，基于共同责任原则，正确分配原始PVC产品和回收产品之间的环境负担也很重要。可能还需要包括对回收PVC产品终生阶段的考虑。

## Review details
清单： 内部审查通过几个迭代步骤完成，涉及原始数据验证、原始数据记录、代表性、完整性、与 ISO 14040 和 14044 有关的建模的一致性。

## Data sources
- 废旧塑料回收利用项目环境影响评价报告
