# 牛奶生产 ; 饲料加工阶段

Dataset: ILCD process, Unit process, single operation
Geography: HLJ-CN
Reference year: 2012
Classification: Unit processes / Materials production / Agricultural production means
Functional unit: In this study, the functional unit was set to 1 ton FPCM (fat-protein corrected milk).
Generated by: 杨瑞, 1632707028@qq.com
Owner: 天工LCI数据工作小组
Review: Dependent internal review by 天工LCI数据工作小组
Amounts: no units in this file; such an amount is in the reference unit of its flow, which a separate flow dataset defines
copyright: false
licenseType: Free of charge for all users and uses

## General comment
依据实际调查， 在词料加工生产阶段中， 平均消耗电能为33.85kwh·/t.

## Geography
本文采用LCA方法对黑龙江省奶牛场生产系统进行环境影响评估。

## Technology and included processes
奶牛的词料由全价料和粗词料两部分组成，在奶牛词料全价料中以玉 米 、豆粕和麦麸为主， 因此就不考虑其他组成成分。 饲料原料生产阶段主要包括化肥生产阶 段 、农作物种植阶段和豆和、麦麸加工阶段。

## Technical purpose
此数据集涉及牛奶生产，特别是在饲料加工阶段。它用于计算生产奶牛饲料所需的能耗，从而有助于生产脂肪-蛋白校正奶（FPCM）。这些数据可以应用于奶牛场生产系统的环境影响评估中，以帮助优化能源使用并减少牛奶生产的生态足迹。

## Reference product
- feed: 732.51; measured

## Inputs
- Electricity: 89.2637; calculated

## Outputs
- carbon monoxide (fossil): 0.01294; measured
- nitrogen, total (excluding N2): 0.07455; measured
  1氮氧化物
- carbon dioxide (fossil),carbon dioxide (fossil): 25.3615; measured
- sulfur oxides: 0.04496; measured
  1硫氧化物

## Use advice
在将此数据集用于奶牛场生产系统的生命周期评估（LCA）时，请确保功能单位始终设置为1吨FPCM。仔细将这些数据与其他生命周期阶段整合，以保持评估的准确性。由于这些数据基于黑龙江省的奶牛场系统，可能在其他地区有所不同，因此关注区域特性是很重要的。当应用到不同地理背景时，可能需要进行调整。

## Review details
清单： 内部审查通过几个迭代步骤完成，涉及原始数据验证、原始数据记录、代表性、完整性、与 ISO 14040 和 14044 有关的建模的一致性。

## Data sources
- 曹正纲. 黑龙江省奶牛场生命周期评价. (东北农业大学, 2012).
