# Logging engineering | Natural gas hydrate | Saturation logging method

Dataset: ILCD process, Unit process, single operation
Geography: GD-CN
Reference year: 1989
Classification: Materials production / Other mineralic materials
LCI method principle: Attributional
LCI method approaches: Consequential
Generated by: Shikang Kang, 908798159@qq.com
Review: Dependent internal review by Tiangong LCI Data Working Group
Amounts: no units in this file; such an amount is in the reference unit of its flow, which a separate flow dataset defines
copyright: false

## General comment
Based on the analysis of experimental data of hydrate resistivity and the general relationship between resistivity and oil (gas) saturation, the optimum formula for calculating hydrate saturation is derived, and the physical meanings of three items in the formula are defined, which respectively represent the increase rate of resistivity when hydrate particles are completely distributed in the pores of formation rocks, supported by particles and existed in layers, and the corresponding quantitative evaluation method of hydrate saturation is established

## Geography
South China Sea

## Time period
The author proposed for the first time

## Technology and included processes
The percentage of heterogeneous anisotropic pore volume is put forward. When the hydrate saturation increases from small to small, the experimental law of the measured resistivity changes is generally shown in the figure, that is, the resistivity increases monotonously with the increase of hydrate saturation in double logarithmic coordinates

## Reference product
- process steam from natural gas: 1e7; log-normal; article inperiodical
  饱和度相差10%时对应的水合物储量

## Outputs
- process steam from natural gas: 1e7; log-normal; article inperiodical
  有利勘探面积
- process steam from natural gas: 0.5; log-normal; article inperiodical
  孔隙度
- process steam from natural gas: 20; log-normal; article inperiodical
  有效厚度

## Data selection and combination
Oil and gas saturation, which is the percentage of oil and gas in pore volume, directly determines the scale of oil and gas reserves and is one of the core parameters of logging evaluation.

## Data treatment and extrapolations
After the core is completely saturated with formation water, it is driven by oil and gas under pressure, and the increase rate of resistance increases with the increase of oil and gas saturation. The actual interpretation and evaluation of saturation is its inverse process, that is, the saturation is calculated according to the increase rate of formation resistance obtained from logging

## Review details
Inventory: The internal review was done by several iteration steps concerning raw data validation, raw data documentation, representativity, completeness and consistency of modelling with regard to ISO 14040 and 14044.; Documentation: The review of the documentation was performed by Ecobilan and is in compliance with ISO 14040 and 14044. The data set documentation is correct in view of the appropriateness of the information provided. It includes all relevant information in view of data quality and scope of application of the respective LCI result.

## Data sources
- 李宁;孙文杰;李心童;冯周;武宏亮;王克文; 天然气水合物饱和度测井解释模型及方程. 石油勘探与开发 1073–1079 (2022).
