# 市政污水处理 ; 污水 ; 生物膜方法（MBR）

Dataset: ILCD process, Unit process, black box
Geography: GR
Classification: Unit processes / End-of-life treatment / Waste water treatment
Generated by: 徐钱榕, 2331391@tongji.edu.cn
Owner: 天工LCI数据工作小组
Review: Dependent internal review by 天工LCI数据工作小组
Amounts: no units in this file; such an amount is in the reference unit of its flow, which a separate flow dataset defines
copyright: ['opt4ROkqig']
licenseType: Free of charge for all users and uses

## General comment
没有考虑可以直接从废水处理过程中释放的气体污染物。气体污染物是在生物废水降解过程中产生的，根据进水和出水废水的负荷（由COD、TN和SS浓度定义）以及流入和流出速率计算得出。

## Technology and included processes
废水进入一个有效容积为 1050 立方米的膜池，其中包含 3 个亲水平板超滤膜组件，标称孔径为 0.04 μm。膜池的混合液通过扩散器进行曝气。

## Technical purpose
该数据集代表了使用膜生物反应器（MBR）技术的市政污水处理过程。处理后的水可用于灌溉、工业冷却系统和厕所冲洗等各种非饮用途径。此技术适用于需要先进污水处理解决方案的城市地区。

## Reference product
- Wastewater: 514; measured
  Treated

## Inputs
All rows: measured
- Wastewater: 528
- Electricity: 202.68
  Influent Pump
- Electricity: 103.68
  Denitrification Mixer
- Electricity: 864
  Aeration Blower
- Electricity: 1036.8
  Membrane Blower
- Membranes: 0.25
  Polyethylene instead of Polyethersulfone (PES),5 years lifetime
- Electricity: 345.6
  Sludge Circulation Pump
- Electricity: 5.4
  Sludge Removal Pump
- Electricity: 51.84
  Diffuse Pump
- transportation: 4.55
  Sludge Transportation，Lorry EURO610 tons

## Outputs
- Sludge: 130; measured
  To landfill

## Use advice
在使用此数据集进行生命周期评价时，确保系统边界包括膜和其他消耗品的上游生产以及潜在的末端处理。考虑MBR过程中的能源消耗和化学品使用。为获得准确结果，应根据MBR系统的本地语境和特定运行条件调整数据。比较的功能单位应清晰定义，如每立方米处理过的污水。

## Review details
清单： 内部审查通过几个迭代步骤完成，涉及原始数据验证、原始数据记录、代表性、完整性、与 ISO 14040 和 14044 有关的建模的一致性。

## Data sources
- Banti，D.C.、Tsangas，M.、Samaras，P.和Zorpas，A.膜生物反应器与活性污泥系统在城市污水处理中的LCA比较。膜10（2020）
