# 散户肉鸡饲养 ; 畜禽饲养阶段

Dataset: ILCD process, Unit process, single operation
Geography: SD-CN
Reference year: 2014
Classification: Unit processes / Materials production / Agricultural production means
Functional unit: 1kg chicken
Generated by: 杨瑞, 1632707028@qq.com
Owner: 天工LCI数据工作小组
Review: Dependent internal review by 天工LCI数据工作小组
Amounts: no units in this file; such an amount is in the reference unit of its flow, which a separate flow dataset defines
copyright: false
licenseType: Free of charge for all users and uses

## General comment
畜禽饲养阶段的污染物排放主要来自于畜禽胃肠道发酵的污染物排放，及畜 禽取暖、照明、设备运转的能源消耗所产生的污染物排放。禽类因生理结构不同， 其在肠道发酵方面产生的 CH4 数量极少，故忽略不计

## Geography
本研究于 2014~2015 年，针对畜禽饲养周期、肉料比、饲料配方、饲料消耗 量、煤和电的消耗量等，先后对山东省高密正大种猪场、莱西市知双奶牛场、即 墨市段泊岚镇姜家坡村养猪场、即墨市刘家庄镇畜禽养殖场、日照市莒县长岭镇 上官庄村、莒县寨里河镇东兴农牧公司、莒县峤山镇东辰奶牛场、莒县峤山镇刘 家义水养猪场、诸城市外贸有限责任公司凤凰父母代种鸭场，新疆阜康宏发养殖 专业合作社、九运街镇旭鸿蛋鸡合作社、九运街镇六运村自成养殖场、中澳控股 集团有限公司、德州市庆云县洼于村、山东省庆云县四柳社区肉牛养殖基地、德 州市庆云青年鸡养殖基地、庆云县永利禽业蛋鸡育成公司、庆云县兴晨青年鸡养 殖专业合作社、庆云县东泰肉鸡养殖专业合作社、河北省盐山县博远饲料有限公 司、盐山县大华人饲料有限公司、无棣县六和饲料有限公司、中澳东方希望饲料 公司等地进行了实地调研。

## Time period
本研究于 2014~2015 年

## Technology and included processes
本文将畜禽养殖生命周期 分为饲料作物种植、饲料加工、畜禽饲养、粪便处理、屠宰、运输等 6 个阶段。 畜禽养殖的生命周期具体流程如图 2-1 所示。由于部分数据的缺乏和基础条件的 限制，未对农药、地膜、饲料添加剂等生产、运输、使用进行分析，其他相关的 基础设施建设、运输工具生产、人力成本所引起的环境影响也不再考虑的范畴内。

## Technical purpose
该数据描述了畜禽饲养阶段的散户肉鸡饲养过程。其应用专门针对评估畜禽胃肠道发酵以及畜禽取暖、照明、设备运转等农业环境中产生的污染物排放。该研究为肉鸡生产的环境影响分析提供了相关数据，包括饲料消耗量和取暖照明用能。

## Reference product
- chicken: 1; measured
  鸡肉

## Inputs
- maize grain: 1.49; measured
- soybean: 0.68; measured
- wheat: 0.91; measured
- Electricity: 0.2448; measured

## Outputs
- carbon dioxide (biogenic): 0.07323; measured
  肉鸡散户
- sulfur dioxide: 0.00194; measured
  肉鸡散户
- nitrogen, total (excluding N2): 0.00024; measured
  肉鸡散户

## Data selection and combination
直接数据：畜禽饲养阶段数据皆来自实地调研，通过现场收集及企业可公开 数据获得。背景数据：化肥、电力、燃煤等数据来自相关统计年鉴及国家统计局、农业 部网站的公开数据。

## Use advice
在使用这个数据集进行生命周期评估时，用户应依据现场数据收集和企业可公开数据考虑肉鸡饲养阶段的直接排放。对于化肥、电力、燃煤等输入数据，应从相关统计年鉴和国家统计局或农业部门的公开数据中获取。研究集中在2014至2015年间；用户应该意识到这个时间界限。此外，虽然鸟类肠道发酵产生的CH4量被认为微不足道因而在此数据中被排除，但视乎研究的目标和范围，可能需要在更全面的评估中加以考虑。

## Review details
清单： 内部审查通过几个迭代步骤完成，涉及原始数据验证、原始数据记录、代表性、完整性、与 ISO 14040 和 14044 有关的建模的一致性。

## Data sources
- 周景月. 基于生命周期评价的畜禽养殖环境影响分析. (青岛科技大学, 2017).
