# Drilling engineering | Natural gas hydrate | Logging while drilling

Dataset: ILCD process, Unit process, single operation
Geography: ZH-GD-CN
Reference year: 2020
Classification: Materials production / Other mineralic materials
LCI method principle: Attributional
LCI method approaches: Consequential
Generated by: Shikang Kang, 908798159@qq.com
Review: Dependent internal review by Tiangong LCI Data Working Group
Amounts: no units in this file; such an amount is in the reference unit of its flow, which a separate flow dataset defines
copyright: false

## General comment
It is very necessary to carry out sensitive drilling without damage to gas hydrate reservoir. Logging-while drilling (LWD) has become an important means to identify gas hydrate occurrence and test gas hydrate reservoir properties in-situ during drilling

## Geography
South China Sea Shenhu Sea Area

## Time period
Publication time of literature

## Technology and included processes
Drilling is the most direct means for gas hydrate exploration and discovery, and it is also a necessary link for gas hydrate development.

## Reference product
- process steam from natural gas: 1.4986e6; log-normal; article inperiodical
  累计产气总量

## Outputs
- process steam from natural gas: 42; max 42; uniform; article inperiodical
  试采持续产气
- process steam from natural gas: 35700; log-normal; article inperiodical
  日均产气量
- process steam from natural gas: 35; min 30; max 40; uniform; article inperiodical
  钻进速率

## Data selection and combination
Natural gas hydrate resources are huge, and more than 98% of them occur in marine sediments, among which the median amount of natural gas hydrate resources in sand-rich sediments which are relatively easy to exploit is about 1,226.4 × 10 m.

## Data treatment and extrapolations
The first gas hydrate field to realize commercial development is the Messoyakha gas field in Russia, which was discovered in 1967. The gas hydrate coexists with conventional natural gas in an upper-lower structure. The commercial development began in 1969, and the intermittent production reached the end of 2011. The cumulative gas production of gas hydrate is about 54 × 10m, accounting for 41.8% of the total gas production.

## Review details
Inventory: The internal review was done by several iteration steps concerning raw data validation, raw data documentation, representativity, completeness and consistency of modelling with regard to ISO 14040 and 14044.; Documentation: The review of the documentation was performed by Ecobilan and is in compliance with ISO 14040 and 14044. The data set documentation is correct in view of the appropriateness of the information provided. It includes all relevant information in view of data quality and scope of application of the respective LCI result.

## Data sources
- 张金华, 樊波 & 刘瑞江. 天然气水合物钻探现状与钻井技术. 科学技术与工程 20, 14343–14351 (2020).
