# 再生聚氯乙烯（PVC）生产;再生聚氯乙烯;废塑料

Dataset: ILCD process, Unit process, black box
Geography: AH-CN
Reference year: 2015
Valid until: 2015
Classification: Unit processes / Materials production / Plastics
Functional unit: a ton of recycled PVC plastic production
Generated by: 程晓宇, xiaoyucheng@email.ncu.edu.cn
Owner: 天工LCI数据工作小组
Review: Dependent internal review by 天工LCI数据工作小组
Amounts: no units in this file; such an amount is in the reference unit of its flow, which a separate flow dataset defines
copyright: false
licenseType: Free of charge for all users and uses

## General comment
再生PVC场景包含两个主要过程：再生PVC颗粒生产和再生PVC产品生产。

## Time period
再生PVC数据参考了2015年的工厂数据。

## Technical purpose
再生聚氯乙烯（PVC）的工业流程主要用于生产再生PVC颗粒及其后续的再生PVC产品。这些物料通常应用于多个市场，包括构建管材和配件，在汽车行业内饰中，以及包装材料等各种消费品。再生PVC因其可持续性而受重视，因为它减少了对原始原料的依赖和对环境的影响。

## Reference product
- Recycled Polyvinyl Chloride: 1000

## Inputs
All rows: measured
- Waste Plastic: 1100
- water: 2.91
- Electricity: 984.636
- natural gas; 44.1 MJ/kg: 44.63
- unspecified: 2.11

## Outputs
All rows: measured
- sulfur dioxide: 0.04
- Nitrogen oxides: 0.14
- particles (>PM10): 0.16
- xylene (all isomers): 7e-5
- non-methane volatile organic compounds: 0.25
- Suspended solids, unspecified,Suspended solids, unspecified: 0.01517
- biological oxygen demand: 0.01234
- chemical oxygen demand: 0.10759
- Oils, unspecified: 0.00257
- ammonia: 0.00332
- Industrial Hazardous Waste: 0.24013
- landfill of plastic waste: 2.41
- waste water - untreated: 360

## Use advice
在使用生命周期评估（LCA）数据集时，数据使用者应仔细考虑再生PVC过程数据的技术适用性，包括数据收集的年份（2015年）。由于技术进步和环境法规可能会影响生产过程，因此应根据当前标准评估数据集的相关性。用户还应考虑产品寿命终点场景和可能的回收途径。此外，用户应确保将数据与定义的功能单元保持一致，确保在摇篮到大门评估中准确表示原料投入、能源使用、运输、技术流程、废物处理和直接排放。

## Review details
清单： 内部审查通过几个迭代步骤完成，涉及原始数据验证、原始数据记录、代表性、完整性、与 ISO 14040 和 14044 有关的建模的一致性。

## Data sources
- Ye, L., Qi, C., Hong, J. & Ma, X. Life cycle assessment of polyvinyl chloride production and its recyclability in China. Journal of Cleaner Production 142, 2965–2972 (2016).
