# 硫酸生产联产水泥|硫酸 水泥熟料|磷酸-硫酸-水泥耦合|磷石膏

Dataset: ILCD process
Geography: CD-SC-CN
Reference year: 2022
Classification: Materials production / Other mineralic materials
Generated by: 曾奥, m202374287@hust.edu.cn
Review: Dependent internal review by 天工LCI数据工作小组
Amounts: no units in this file; such an amount is in the reference unit of its flow, which a separate flow dataset defines
copyright: false

## General comment
磷酸-硫酸-水泥耦合的集成专利技术，采用中空转窑直接进行磷石膏还原化学分解；磷石膏采用非热力学耦合脱水，硫酸采用耦合工艺

## Geography
磷石膏制硫酸 联产水泥数据来自成都某公司

## Reference product
- sulphuric acid: 1000; measured
  原数据应为98%硫酸产品，所选流类型为排放

## Inputs
All rows: measured
- electricity mix: 648
- Water: 1120
  原数据为新鲜水
- Diesel: 250
  原数据为含碳量为60%的燃料
- hard coal: 100
  原数据为含碳量为80%的煤
- portland cement (CEM I): 1200
- phosphogypsum: 2300

## Data selection and combination
磷石膏制硫酸联产水泥数据来自成都某公司

## Review details
清单： 内部审查通过几个迭代步骤完成，涉及原始数据验证、原始数据记录、代表性、完整性、与 ISO 14040 和 14044 有关的建模的一致性。
