# Dryfinishing|Wooldyeingandfinishingproducts|Woolenwovenfabrics|DryFinishing-HeatSetting|All sizes / 干整理|毛染整精加工产品|毛机织物|干整理-热定型|所有规模

Dataset: ILCD process, Unit process, single operation
Geography: CN
Reference year: 2019
Classification: Energy carriers and technologies / Heat and steam
Generated by: The data was created by the Office of the Second National Pollution Source Census of the Ministry of Ecology and Environment, and the data was organized by the TianGong Plan team for ILCD format / 生态环境部第二次全国污染源普查工作办公室创建数据，天工计划团队常慧敏整理数据为ILCD格式
Owner: Tiangong LCI Data Working Group / 天工LCI数据工作小组
Amounts: no units in this file; such an amount is in the reference unit of its flow, which a separate flow dataset defines
copyright: false
licenseType: Free of charge for all users and uses

## Technology and included processes
the treatment technology for the pollution of Exhaust gasdidn't offered，The formula for calculating the actual operation rate (k-value) of the end-of-pipe treatment facility is k = operating time of treatment facilities (hours/year) / total production time (hours/year)

## Reference product
- Wool Dyeing and Finishing Precision Processing: 1000; calculated
  源文件中描述为为毛染整精加工产品，此处对其进行了匹配工作，将其匹配到LCAflow库里面相最符合的流

## Outputs
- particles (PM2.5 - PM10): 0.017072; calculated
  污染物指标颗粒物的末端治理技术是喷淋塔/冲击水浴+静电除尘，其效率为78.66，末端治理设施实际运行率（k值）计算公式为k=工艺废气净化装置耗电量/(工艺废气净化装置额定功率×工艺废气净化装置运行时间)。原文件中描述污染物类别为废气，污染物指标为颗粒物，此处对其进行了匹配工作，将其匹配到LCAflow库里面相最符合的流
- Exhaust gas: 4160; calculated
  污染物指标工业废气量的末端治理技术未说明。原文件中描述污染物类别为废气，污染物指标为工业废气量，此处对其进行了匹配工作，将其匹配到LCAflow库里面相最符合的流

## Data sources
- 第二次全国污染源普查产排污核算系数手册（试用版）,二级代码17,三级代码172.0,四级代码1723文件，在完整版文件中第206页
