# 市政污泥处理与处置;干污泥;浓缩

Dataset: ILCD process, Unit process, single operation
Geography: CN
Classification: Unit processes / End-of-life treatment / Waste water treatment
Functional unit: One ton of sludge on a dry basis (1 t-DS) is defined as the functional unit.
Generated by: 金思甜, 2331276@tongji.edu.cn
Owner: 天工LCI数据工作小组
Review: Dependent internal review by 天工LCI数据工作小组
Amounts: no units in this file; such an amount is in the reference unit of its flow, which a separate flow dataset defines
copyright: ['opt4ROkqig']
licenseType: Free of charge for all users and uses

## General comment
选择国内几个典型的污泥处理设施，分别为厌氧消化、堆肥、共燃、热干燥焚烧和水泥生产，进行调查。数据主要来自具体地点的测量，要么通过实地调查，要么通过操作报告。污泥特性基于所调查场地的平均值。

## Technology and included processes
污泥在处理前需浓缩脱水。浓缩后的污泥含水率约为97%。

## Technical purpose
本数据集描述的是市政污泥处理与处置的过程，重点是干污泥的浓缩。该过程适用于市政废物管理系统，在进行进一步处理或最终处置之前需要减少污泥体积。该数据集代表的材料通常用于污水系统的管理和污水处理厂。

## Reference product
- Sludge: 1000; input; estimated
  干基 （1 t-DS）

## Inputs
- Electricity: 47.52; measured

## Use advice
使用此数据集时，请确保将其应用于市政废水处理和污泥管理过程的背景下。生命周期评估中必须考虑一吨干基污泥（1 t-DS）的功能单位，以保持结果的一致性和可比性。应注意方法论上的考虑，如系统边界，特别是关于后续污泥处理或处置选项的包括或排除。用户还应考虑特定于其地理或运营背景的技术适用性。

## Review details
清单： 内部审查通过几个迭代步骤完成，涉及原始数据验证、原始数据记录、代表性、完整性、与 ISO 14040 和 14044 有关的建模的一致性。

## Data sources
- Dong, J., Chi, Y., Tang, Y., Wang, F. & Huang, Q. Combined Life Cycle Environmental and Exergetic Assessment of Four Typical Sewage Sludge Treatment Techniques in China. Energy Fuels 28, 2114–2122 (2014).
