# 发电机的制造 ; 1.5 MW 风轮机发电机

Dataset: ILCD process, Unit process, single operation
Geography: NMG-CN
Reference year: 2017
Classification: Energy carriers and technologies / Mechanical energy
Functional unit: The functional unit is 1.5 MW wind turbine
LCI method principle: Attributional
LCI method approaches: Allocation
Generated by: 赵云志, ll10088@163.com
Owner: 天工LCI数据工作小组
Review: Dependent internal review by 天工LCI数据工作小组
Amounts: no units in this file; such an amount is in the reference unit of its flow, which a separate flow dataset defines
copyright: false
licenseType: Free of charge for all users and uses

## General comment
1.5 MW 风轮机发电机专为风能转换系统集成设计。具体而言，它用于风力发电场生产可再生电力。1.5 MW 容量使其适用于风电场的大规模能源生产，例如位于内蒙古东北部的风电场，该风电场配备了33台国产风力涡轮机。

## Geography
风电功率参数的数据来自Wang ( 2012 )。以装有33台国产1.5兆瓦( MW )风电机组的风电场为案例，分析其环境影响及其替代效应。该风电场位于我国风电装机最多的省份- -内蒙古东北部。

## Reference product
- Generator: 1; article inperiodical

## Inputs
- iron: 3960; article inperiodical
  Steel and iron
- silicon,silicon: 180; article inperiodical

## Deviations from the LCI method approaches
风电的生命周期清单如下所示。生产制造阶段包括风电机组、变电站、电缆的生产，这些设备消耗大量能源，排放污染物( Xue et al . , 2015)。

## Use advice
使用此生命周期评估数据的用户应将其应用于可再生能源生产环境中1.5 MW风力涡轮机发电机的环境影响评估。必须注意数据来源，因为参数来自特定于位于内蒙古的风力涡轮机的案例研究。在对使用阶段建模或考虑替代效应时，还必须将当地条件和技术适用性（如区域风速剖面和维护实践）纳入分析。生命周期清单包括风力涡轮机、变电站和电缆的生产，因此计算应考虑从 Xue 等人引用的上游能源消耗和污染物排放。（2015）。

## Review details
清单： 内部审查通过几个迭代步骤完成，涉及原始数据验证、原始数据记录、代表性、完整性、与 ISO 14040 和 14044 有关的建模的一致性。

## Data sources
- Li, H., Jiang, H.-D., Dong, K.-Y., Wei, Y.-M. & Liao, H. A comparative analysis of the life cycle environmental emissions from wind and coal power: Evidence from China. Journal of Cleaner Production 248, 119192 (2020).
