# 污泥处理与处置|干燥焚烧发电

Dataset: ILCD process, Unit process, single operation
Geography: CN
Classification: Materials production / Other mineralic materials
Generated by: Jin Sitian, 2331276@tongji.edu.cn
Review: Dependent internal review by Tiangong LCI Data Working Group
Amounts: no units in this file; such an amount is in the reference unit of its flow, which a separate flow dataset defines

## Reference product
- Sludge: 100; input; estimated
  100 kg 污泥（含水率为70.5%）

## Outputs
- electricity from waste incineration: 54.468; measured
- carbon dioxide: 41.17
- sulfur dioxide: 0.88
- Nitrogen oxides: 0.67
- Flue dust: 0.87
- mineral waste (ash): 17.16; measured

## Review details
Inventory: The internal review was done by several iteration steps concerning raw data validation, raw data documentation, representativity, completeness and consistency of modelling with regard to ISO 14040 and 14044.

## Data sources
- 污泥干燥焚烧发电的生命周期评价
