# 地下水修复;原位修复;吸附;工程实施;污染水处理

Dataset: ILCD process, Unit process, single operation
Geography: ID
Reference year: 2022
Classification: Unit processes / Other Services / Repair and maintenance
Generated by: 肖萌, xiaomeng@mail.bnu.edu.cn
Owner: 天工LCI数据工作小组
Review: Dependent internal review by 天工LCI数据工作小组
Amounts: no units in this file; such an amount is in the reference unit of its flow, which a separate flow dataset defines
copyright: false
licenseType: Free of charge for all users and uses

## General comment
使用煅烧后的吸附剂对污染水进行处理

## Technical purpose
该数据集描述了使用煅烧吸附剂对污染地下水进行原位处理的应用。它适用于旨在地下水修复的环境工程项目，特别是涉及使用吸附过程去除污染物。

## Reference product
- contaminated groundwater: 0.72; input; measured
  contaminated water

## Inputs
- Aluminium hydroxide/oxide nanoparticles adsorption (Calcined; final product): 3.06; measured
  Calcined Adsorbent

## Outputs
- Remediated groundwater: 0.72; measured
  Treated water

## Use advice
该数据集的用户应确保根据地下水中的特定污染物正确应用煅烧吸附剂。方法论上必须关注吸附容量、水通过吸附介质的流速以及用完的吸附剂的再生或处置。此外，生命周期评估的系统边界应包括吸附剂的生产、原位修复过程以及寿命终结处理。

## Review details
清单： 内部审查通过几个迭代步骤完成，涉及原始数据验证、原始数据记录、代表性、完整性、与 ISO 14040 和 14044 有关的建模的一致性。

## Data sources
- Goyal, H. & Mondal, P. Life cycle assessment (LCA) of the arsenic and fluoride removal from groundwater through adsorption and electrocoagulation: A comparative study. Chemosphere 304, 135243 (2022).
