# 修复后土壤;农田汞污染土壤修复;煤基活性炭固定稳定化

Dataset: ILCD process, Unit process, black box
Geography: GZ-CN
Reference year: 2016
Classification: Unit processes / Other Services / Repair and maintenance
Functional unit: The functional unit in this study is the treatment of 1 tonne of mercury contaminated top soil in agricultural land to meet regulatory standards. The average initial mercury concentration is 134 mg/kg.
Generated by: 杨欣桐, yangxt@caep.org.cn
Owner: 天工LCI数据工作小组
Review: Dependent internal review by 天工LCI数据工作小组
Amounts: no units in this file; such an amount is in the reference unit of its flow, which a separate flow dataset defines
copyright: false
licenseType: Free of charge for all users and uses

## General comment
使用硫浸渍活性炭对汞污染土壤进行S/S处理已被证明在达到浸出阈值方面是有效的。

## Geography
研究地点位于中国南方贵州省，为受汞污染的农田。这一特殊案例代表了农业用地被附近的采矿和冶炼作业污染的典型规模和情景。

## Technology and included processes
在S/S中，由于物理结合/封闭（固化）或化学反应（稳定），稳定试剂与受污染的土壤混合，导致汞在土壤基质中的可浸出性降低。由于S/S不会降低总汞含量，因此稳定材料仍需要在垃圾填埋场进行处理。采用硫改性的粉末活性炭（PAC）进行稳定化处理。粉末活性炭的生产是由地区工厂生产的无烟煤基PAC制成的。根据全尺寸水泥基S/S项目的数据，使用6%的水泥用量比。

## Technical purpose
该修复后的土壤工艺专门用于汞污染的农田。利用煤基硫浸渍粉末活性炭的稳定化/固化（S/S）处理，有效减少了汞的可浸出性，满足了安全处理的法规浸出阈值。

## Reference product
- Remediated soil: 1000; missing unimportant

## Inputs
All rows: missing unimportant
- cement, unspecified: 60
- coal-based powdered activated carbon: 20
- Plastic (unspecified): 0.24
- Steel: 0.01
- Tap Water: 0.04
- transport in t*km: 313
- Waste (solid): 1120
  Waste for landilling (kg)
- contaminated soil: 1000

## Use advice
在进行生命周期评价（LCA）时，应包括以6%的水泥用量比例应用硫浸渍粉末活性炭以有效地进行汞污染土壤的稳定化/固化（S/S）处理。注意总汞含量保持不变，仅降低了可浸出性，处理后仍需要填埋处理。还应计入来自区域性无烟煤基PAC工厂生产粉末活性炭的能源消耗和原材料投入。

## Review details
清单： 内部审查通过几个迭代步骤完成，涉及原始数据验证、原始数据记录、代表性、完整性、与 ISO 14040 和 14044 有关的建模的一致性。

## Data sources
- Hou D ,Gu Q ,Ma F , et al. Life cycle assessment comparison of thermal desorption and stabilization/solidification of mercury contaminated soil on agricultural land [J]. Journal of Cleaner Production, 2016, 139 949-956.
