# Municipal wastewater treatment | Wastewater | Membrance Bioreactor Reactor Technology

Dataset: ILCD process, Unit process, black box
Geography: CN
Classification: Materials production / Other mineralic materials
Generated by: YU Chenyang, yuchenyang0506@foxmail.com
Review: Dependent internal review by Tiangong LCI Data Working Group
Amounts: no units in this file; such an amount is in the reference unit of its flow, which a separate flow dataset defines

## Geography
Hong Kong

## Inputs
- Electricity: 0.05796, 1.33812 (2 entries); measured
  kWh/m3
- Sludge: 0.323; measured
  kg/m3
- chloride: 0.4686; measured
  kg/m3
- Polyaluminium Chloride: 0.0012; measured
  kg/m3

## Review details
Inventory: The internal review was done by several iteration steps concerning raw data validation, raw data documentation, representativity, completeness and consistency of modelling with regard to ISO 14040 and 14044.; Documentation: The review of the documentation was performed by Ecobilan and is in compliance with ISO 14040 and 14044. The data set documentation is correct in view of the appropriateness of the information provided. It includes all relevant information in view of data quality and scope of application of the respective LCI result.
