# copper-based mixed waste recycling|gold, silver, selenium, nickel carbonate, and other byproducts|gold and silver recovery process|copper electrolysis waste (anode mud)

Dataset: ILCD process, Unit process, single operation
Geography: JX-CN
Reference year: 2020
Classification: Materials production / Other mineralic materials
Functional unit: We consider the functional unit of the recycling of copper-based mixed waste to be 1000 kg electrolytic copper.
LCI method principle: Attributional
LCI method approaches: Allocation - market value
Generated by: Peng Wang, 2867919560@qq.com
Review: Dependent internal review by Tiangong LCI Data Working Group
Amounts: no units in this file; such an amount is in the reference unit of its flow, which a separate flow dataset defines
copyright: false

## Geography
The typical case is a metal recycling enterprise located in Jiangxi Province, China,

## Technology and included processes
In the gold and silver recovery process, gold, silver, selenium, nickel carbonate, and other byproducts are extracted from copper electrolysis waste (anode mud) with liquid ammonia, hydrazine, hydrochloric acid, sulfuric acid, iron powder, oxalic acid, ash, and other auxiliary materials. Electricity is the primary energy source, and wastewater, waste gas, and waste residue are emitted.

## Reference product
- silver: 0.9; measured
  Silver

## Inputs
All rows: measured
- ammonia: 3.5
  Ammonia
- Anode sludge: 15
  Anode sludge需要补充
- Electricity: 72
- Hard coal, at consumer EU-27: 11.2
  Hard coal
- Hydrochloric acid: 0.3
  Hydrochloric acid(32%）需要补充
- Quicklime: 7.5
  Quicklime需要补充
- natural gas: 1.8
  Natural gas
- Oxalic acid: 0.2
  Oxalic acid需要补充resourse
- iron: 21
  Cast iron
- Sodium chlorate: 6
  Sodium carbonate需要补充
- Sodium chlorate: 6
  Sodium chlorate需要补充
- sodium chloride: 3
  Sodium chloride
- Sodium hydroxide: 1.5
- Sodium sulfite: 3
  Sodium sulfite需要补充
- Sulfuric acid(98%): 18
  Sulfuric acid(98%)需要补充resourse
- transport in t*km,transport in t*km: 1.8981
  Transport
- water: 4.2
  Water
- Zinc dust: 0.3

## Outputs
All rows: measured
- carbon dioxide: 15
  Carbon dioxide
- carbon monoxide: 70.7
  Flue gas
- mineral treatment residue (unspecified): 8
  Treatment residue
- Waste (deposited, hibernating in ground, non elementary flow): 3.4
  Waste (deposited)
- Nickel carbonate: 1.4
  Nickel carbonate需要补充
- selenium: 0.5
  Selenium

## Deviations from the LCI method approaches
Using the LCA-ReCiPe 2016 (Heijungs et al., 2017) characterization and normalization method (the midpoint and endpoint method), the life cycle inventory is converted into impact scores in multiple fields.

## Data selection and combination
foreground data and background data.

## Data treatment and extrapolations
GaBi 9.0 software is adopted to calculate the inventory, resource consumption, and waste emissions of the various copper-based mixed-waste recovery processes per unit mass.

## Review details
Inventory: The internal review was done by several iteration steps concerning raw data validation, raw data documentation, representativity, completeness and consistency of modelling with regard to ISO 14040 and 14044.; Documentation: The review of the documentation was performed by Ecobilan and is in compliance with ISO 14040 and 14044. The data set documentation is correct in view of the appropriateness of the information provided. It includes all relevant information in view of data quality and scope of application of the respective LCI result.

## Data sources
- Zhang, W. et al. Analyzing the environmental impact of copper-based mixed waste recycling-a LCA case study in China. Journal of Cleaner Production 284, 125256 (2021).
