# 铁矿开采;铁矿石;采矿（Z08）

Dataset: ILCD process, Unit process, single operation
Geography: CN
Reference year: 1998
Classification: Unit processes / Materials production / Non-energetic raw materials
Generated by: 付翔, 1162850692@qq.com
Owner: 天工LCI数据工作小组
Review: Dependent internal review by 天工LCI数据工作小组
Amounts: no units in this file; such an amount is in the reference unit of its flow, which a separate flow dataset defines
copyright: false
licenseType: Free of charge for all users and uses

## General comment
来自表 4-16 Z08 钢厂生产吨材环境负荷编目表

## Time period
论文提到钢铁企业环境总体数据为1998年的吨钢环境基础数据。

## Technical purpose
该数据集代表用于铁和钢铁制造行业的铁矿石产量。它涉及来自铁矿石开采过程（Z08）的钢铁制造设施生产一吨材料的环境负荷。

## Reference product
- Iron ore: 5369; measured
  铁矿石

## Inputs
- Energy, geothermal, converted: 1971.64; measured

## Outputs
- particles (> PM10): 0.102; measured
  烟尘
- sulfur dioxide: 0.169; measured
- Suspended solids, unspecified: 0.423077; measured

## Use advice
在使用此数据集进行生命周期评估时，必须注意环境负荷数据是基于1998年的钢铁生产吨数。确保数据集与您评估的地理和技术范围一致。由于数据的历史性质，如果自1998年以来发生了重大技术进步，用户可能需要调整参数以反映当前实践。

## Review details
清单： 内部审查通过几个迭代步骤完成，涉及原始数据验证、原始数据记录、代表性、完整性、与 ISO 14040 和 14044 有关的建模的一致性。

## Data sources
- 周和敏. 钢铁材料生产过程环境协调性评价研究. (北京工业大学, 2001).
