# Bioethanol ; Steam explosion

Dataset: ILCD process
Classification: Energy carriers and technologies / Renewable fuels
Generated by: Jiayi Yuan, jiayi_y@mail.bnu.edu.cn
Owner: Tiangong LCI Data Working Group
Review: Dependent internal review by Tiangong LCI Data Working Group
Amounts: no units in this file; such an amount is in the reference unit of its flow, which a separate flow dataset defines
licenseType: Free of charge for all users and uses

## Inputs
All rows: uniform; article inperiodical
- Electricity: 0
- heat: 3000; min 843; max 8660
- Electricity: 882; min 17.136; max 6948
- heat: 2180; min 190; max 10400
- Electricity: 4752; min 48.96; max 42480

## Outputs
- heat: 0; uniform; article inperiodical

## Review details
Inventory: The internal review was done by several iteration steps concerning raw data validation, raw data documentation, representativity, completeness and consistency of modelling with regard to ISO 14040 and 14044.
