# Hot rolled coil | steel | steel production

Dataset: ILCD process, Unit process, single operation
Geography: CN
Reference year: 2006
Classification: Materials production / Other mineralic materials
Generated by: Wanghuanyu, wanghuanyu00@126.com
Review: Dependent internal review by Tiangong LCI Data Working Group
Amounts: no units in this file; such an amount is in the reference unit of its flow, which a separate flow dataset defines

## Reference product
- steel hot rolled coil: 1; article inperiodical

## Inputs
- iron: 1.349; article inperiodical
- freshwater: 14.621; article inperiodical
- primary energy from solar energy: 21.64; article inperiodical

## Outputs
- carbon dioxide: 1.889; article inperiodical
- phenol,Sulphur oxides (as SO2): 0.002689; article inperiodical
- nitrous oxide: 0.002429; article inperiodical
- chemical oxygen demand: 0.000121; article inperiodical

## Review details
Inventory: The internal review was done by several iteration steps concerning raw data validation, raw data documentation, representativity, completeness and consistency of modelling with regard to ISO 14040 and 14044.
