# LDPE production;LDPE

Dataset: ILCD process, Unit process, black box
Geography: CN
Reference year: 2020
Classification: Materials production / Plastics
Functional unit: considering 1 kg resin production as the functional unit.
Generated by: Huijuan Guo, GHJ@email.ncu.edu.cn
Owner: Tiangong LCI Data Working Group
Review: Dependent internal review by Tiangong LCI Data Working Group
Amounts: no units in this file; such an amount is in the reference unit of its flow, which a separate flow dataset defines
copyright: false
licenseType: Free of charge for all users and uses

## General comment
Ethylene and propylene were obtained by early-stage crude oil refining and then polymerized to PE and PP, respectively. For PE, HDPE and LDPE were obtained according to different polymerization methods

## Geography
Process-based data from China were used, yet if not available, data from Europe were applied instead.

## Time period
Process-based data from China were used, yet if not available, data from Europe were applied instead. The electricity input was developed based on the national grid structure in China (Table S3), which was obtained from the share of the electric power structure in 2020 (National Bureau Statistics of China, 2020).

## Reference product
- Polyethylene: 1; missing unimportant
  LDPE

## Inputs
- ethylene: 1.05; missing unimportant
- naphtha: 0.05; missing unimportant
- Electricity: 3; missing unimportant

## Outputs
All rows: missing unimportant
- Volatile Organic Compounds (VOCs): 7e-6
- ethane: 0.022
- toluene: 7e-6
- phenol: 9e-5
- mercury: 1.8e-8

## Data treatment and extrapolations
ReCiPe method (Europe H/H) was used as the assessment method for consistency.

## Review details
Inventory: The internal review was done by several iteration steps concerning raw data validation, raw data documentation, representativity, completeness and consistency of modelling with regard to ISO 14040 and 14044.

## Data sources
- An, J., Wu, F., Wang, D. & You, J. Estimated material metabolism and life cycle greenhouse gas emission of major plastics in China: A commercial sector-scale perspective. Resources, Conservation and Recycling 180, (2022).
