# 铝电解碳阳极生产 ; 碳阳极 ; 石油焦 ; 2007年

Dataset: ILCD process, Unit process, single operation
Geography: CN
Reference year: 2021
Classification: Unit processes / Materials production / Non-energetic raw materials
Generated by: 蔡梓萌, caizm6178@163.com
Owner: 天工LCI数据工作小组
Review: Dependent internal review by 天工LCI数据工作小组
Amounts: no units in this file; such an amount is in the reference unit of its flow, which a separate flow dataset defines
copyright: false
licenseType: Free of charge for all users and uses

## General comment
使用石油焦通过铝电解过程生产的碳阳极主要应用于铝生产行业。这些阳极是通过Hall-Héroult过程从氧化铝中提取铝的必要组件。碳阳极作为电流的导体，帮助将氧化铝还原为铝金属。

## Time period
文献发表日期

## Reference product
- anode, for metal electrolysis: 1000; software or database
  anode

## Inputs
All rows: software or database
- electricity, high voltage, aluminium industry: 759.6
  electricty
- heavy fuel oil: 69
  fuel oil
- coal tar: 220
  coal tar pitch
- Petroleum Coke: 1140
  petroleum coak
- coal gas: 1290

## Data selection and combination
本研究的数据参考了PA、SA、电力等背景数据的LCA数据。PA数据来自统计数据源，SA数据主要来自文献。背景数据主要来自中国科学院生态环境研究中心CASRCEES 2018建立的中国本地化LCA数据库，涵盖能源、材料、交通、废物管理等LCA数据。

## Use advice
在使用2007年与石油焦相关的铝电解碳阳极生产的LCA数据时，应当注意PA（产量分配）数据来源于统计数据库，而SA（现场特定分配）数据主要来自现有文献。这些背景数据对于评估至关重要，它们取自本地化的中国CAS RCEES 2018数据库，反映了特定的能源、材料、运输和废物管理实践。为了确保LCA结果的准确性，用户应考虑数据收集年份、自2007年以来的技术变化，以及数据的地区背景。还建议咨询当前文献和数据库，以确认信息的相关性并更新任何过时的信息。

## Review details
清单： 内部审查通过几个迭代步骤完成，涉及原始数据验证、原始数据记录、代表性、完整性、与 ISO 14040 和 14044 有关的建模的一致性。

## Data sources
- Ding, N., Liu, N., Lu, B. & Yang, J. Life cycle greenhouse gas emissions of aluminum based on regional industrial transfer in China. J. Ind. Ecol. 25, 1657–1672 (2021).
