# 电解镍生产 ; 电池级一级镍（镍含量99.9%） ; 浸出电解法 ; 甘肃省镍钴矿

Dataset: ILCD process, Unit process, single operation
Geography: GS-CN
Reference year: 2018
Classification: Unit processes / Materials production / Metals and semimetals
Generated by: 孙鑫, xs389@cornell.edu
Owner: 天工LCI数据工作小组
Review: Dependent internal review by 天工LCI数据工作小组
Amounts: no units in this file; such an amount is in the reference unit of its flow, which a separate flow dataset defines
licenseType: Free of charge for all users and uses

## General comment
火法冶炼和精炼阶段的资源消耗、原材料投入、能源消耗、污染物排放和废物处理数据参考了中国最大的镍金属生产基地甘肃公布的企业运营数据，该基地贡献了中国 80% 以上的电解镍产量。废石、尾矿和废渣贮存造成的金属排放数据参考了浸出实验结果。中国基于工艺的 LCI 数据库为背景清单提供了数据支持。缺失的化学品（如硼酸、碳酸钡和硫化钠）背景清单，包括输入和输出流量，由 Ecoinvent 第 3 版数据库进行补充。

## Technology and included processes
在精炼阶段，采用了中国工业化应用的两种主流技术（即磨浮电解法（GFEM）和浸出电积法（LEM）），将镍锍精炼成高纯度的金属镍。在 LEM 中，镍和钴可在研磨过程后通过几个常压和加压浸出槽溶解在硫酸盐碱液中。本研究中的铜试样保留了浸出尾渣作为副产品。浸出液随后被放入电沉积槽，以提纯镍金属。三个阶段中每个单元过程的原材料生产、能源生成和运输都作为背景过程纳入了系统边界。

## Technical purpose
所描述的电解镍生产过程旨在生产含镍99.9%的电池级一级镍。这种高纯度的镍特别适用于电池制造，其中材料质量对性能和寿命至关重要。浸出电解法确保从甘肃省镍钴矿提取的镍满足用于先进电池技术的严格要求，如用于电动汽车和便携式电子设备的锂离子电池。

## Reference product
- Nickel metal (＞99.9% Ni): 1000; measured

## Inputs
All rows: measured
- water: 2190
- Sodium dodecyl sulfate: 0.37
- unspecified: 0.00398
- Nickel matte: 1410
- sodium carbonate: 730
- Sulfuric acid: 230
- Extraction agent,extractant: 0.29
- Naphtha: 5.11
- Activated coke: 3.54
- sodium hydroxide: 50
- Chemicals (unspecified): 1.26
- transport in t*km: 123.9
- Electricity: 12720.8

## Outputs
All rows: measured
- sulphuric acid: 0.01895
- hydrogen sulfide: 0.00059
- chlorine: 3e-5
- chemical oxygen demand: 0.41
- Suspended solids, unspecified: 0.0463
- ammonia: 0.00752
- sulfide: 5.423e-5
- decane: 0.00077
- fluoride: 0.00231
- phosphorus, total: 0.00085
- nitrogen, total (excluding N2): 0.05024
- copper: 0.00154
- nickel: 0.00162
- lead: 0.00093
- cadmium: 0.00023
- waste water - untreated: 8890
- municipal solid waste deposition: 1.81
- hazardous waste (unspecified): 0.25

## Use advice
在使用此数据进行生命周期评估（LCA）时，应注意过程的地理特殊性，因为这些数据涉及中国新疆省矿石中的镍提取。因此，与此数据集相关的环境影响不应在没有适当区域化考虑的情况下泛化到其他地区的镍生产。用户还应注意在提取和处理阶段所做的任何假设，并确保这些假设与其LCA研究的范围一致。特别要注意产出的处理，特别是关于回收和废物管理实践，以准确反映潜在的环境利益和负担。

## Review details
清单： 内部审查通过几个迭代步骤完成，涉及原始数据验证、原始数据记录、代表性、完整性、与 ISO 14040 和 14044 有关的建模的一致性。

## Data sources
- Bai, Y. et al. Strategies for improving the environmental performance of nickel production in China: Insight into a life cycle assessment. Journal of Environmental Management 312, 114949 (2022).
