# Electricity/electricalenergy+heatenergy|Coal|Circulating fluidized bed boiler|less than or equal to8 MW / 电能/电能+热能|煤炭|循环流化床锅炉|小于等于8兆瓦

Dataset: ILCD process, Unit process, single operation
Geography: CN
Reference year: 2019
Classification: Energy carriers and technologies / Electricity
Generated by: The data was created by the Office of the Second National Pollution Source Census of the Ministry of Ecology and Environment, and the data was organized by the TianGong Plan team for ILCD format / 生态环境部第二次全国污染源普查工作办公室创建数据，天工计划团队常慧敏整理数据为ILCD格式
Owner: Tiangong LCI Data Working Group / 天工LCI数据工作小组
Review: Dependent internal review by Tiangong LCI Data Working Group / 天工LCI数据工作小组
Amounts: no units in this file; such an amount is in the reference unit of its flow, which a separate flow dataset defines
copyright: false
licenseType: Free of charge for all users and uses

## General comment
the Technical of end-of-pipe management technology for pollution volatile organic compoundis/

## Reference product
- Coal: 1000; input; calculated
  源文件中描述为为煤炭，此处对其进行了匹配工作，将其匹配到LCAflow库里面相最符合的流，污染物指标备注为工业废气量（烟煤）

## Outputs
All rows: calculated
- Exhaust gas: 9415
  污染物指标工业废气量（烟煤）的末端治理技术是其他（直排）。原文件中描述污染物类别为废气，污染物指标为工业废气量（烟煤），此处对其进行了匹配工作，将其匹配到LCAflow库里面相最符合的流，污染物指标备注为工业废气量（烟煤）
- Exhaust gas: 11034
  污染物指标工业废气量（无烟煤）的末端治理技术是其他（直排）。原文件中描述污染物类别为废气，污染物指标为工业废气量（无烟煤），此处对其进行了匹配工作，将其匹配到LCAflow库里面相最符合的流，污染物指标备注为工业废气量（无烟煤）
- particles (PM2.5 - PM10): nan
  污染物指标颗粒物（烟煤）的末端治理技术是静电除尘，其效率为0.015Aar+99.25，末端治理设施实际运行率（k值）计算公式为除尘设施年实际运行小时数/机组年实际运行小时数。原文件中描述污染物类别为废气，污染物指标为颗粒物（烟煤），此处对其进行了匹配工作，将其匹配到LCAflow库里面相最符合的流，污染物指标备注为颗粒物（烟煤）
- particles (PM2.5 - PM10): nan
  污染物指标颗粒物（烟煤）的末端治理技术是电袋组合，其效率为0.0145Aar+99.35，末端治理设施实际运行率（k值）计算公式为除尘设施年实际运行小时数/机组年实际运行小时数。原文件中描述污染物类别为废气，污染物指标为颗粒物（烟煤），此处对其进行了匹配工作，将其匹配到LCAflow库里面相最符合的流，污染物指标备注为颗粒物（烟煤）
- particles (PM2.5 - PM10): nan
  污染物指标颗粒物（烟煤）的末端治理技术是袋式除尘，其效率为0.0135Aar+99.40，末端治理设施实际运行率（k值）计算公式为除尘设施年实际运行小时数/机组年实际运行小时数。原文件中描述污染物类别为废气，污染物指标为颗粒物（烟煤），此处对其进行了匹配工作，将其匹配到LCAflow库里面相最符合的流，污染物指标备注为颗粒物（烟煤）
- particles (PM2.5 - PM10): nan
  污染物指标颗粒物（烟煤）的末端治理技术是高效静电除尘①，其效率为0.003Aar+99.85，末端治理设施实际运行率（k值）计算公式为除尘设施年实际运行小时数/机组年实际运行小时数，①高效颗粒物末端治理技术：采取高效电源供电、低低温电除尘、超净电袋、高效袋式除尘、湿法脱硫协同、湿式电除尘等技术，满足《燃煤电厂超低排放烟气
  治理工程技术规范》（HJ2053-2203）相关要求。
  。原文件中描述污染物类别为废气，污染物指标为颗粒物（烟煤），此处对其进行了匹配工作，将其匹配到LCAflow库里面相最符合的流，污染物指标备注为颗粒物（烟煤）
- particles (PM2.5 - PM10): nan
  污染物指标颗粒物（烟煤）的末端治理技术是高效电袋组合①，其效率为0.0029Aar+99.87，末端治理设施实际运行率（k值）计算公式为除尘设施年实际运行小时数/机组年实际运行小时数，①高效颗粒物末端治理技术：采取高效电源供电、低低温电除尘、超净电袋、高效袋式除尘、湿法脱硫协同、湿式电除尘等技术，满足《燃煤电厂超低排放烟气
  治理工程技术规范》（HJ2053-2204）相关要求。
  。原文件中描述污染物类别为废气，污染物指标为颗粒物（烟煤），此处对其进行了匹配工作，将其匹配到LCAflow库里面相最符合的流，污染物指标备注为颗粒物（烟煤）
- particles (PM2.5 - PM10): nan
  污染物指标颗粒物（烟煤）的末端治理技术是高效袋式除尘①，其效率为0.0027Aar+99.88，末端治理设施实际运行率（k值）计算公式为除尘设施年实际运行小时数/机组年实际运行小时数，①高效颗粒物末端治理技术：采取高效电源供电、低低温电除尘、超净电袋、高效袋式除尘、湿法脱硫协同、湿式电除尘等技术，满足《燃煤电厂超低排放烟气
  治理工程技术规范》（HJ2053-2205）相关要求。
  。原文件中描述污染物类别为废气，污染物指标为颗粒物（烟煤），此处对其进行了匹配工作，将其匹配到LCAflow库里面相最符合的流，污染物指标备注为颗粒物（烟煤）
- particles (PM2.5 - PM10): nan
  污染物指标颗粒物（烟煤）的末端治理技术是高效静电除尘+其他（湿法脱硫协同）①，其效率为0.0012Aar+99.954，末端治理设施实际运行率（k值）计算公式为除尘设施年实际运行小时数/机组年实际运行小时数，①高效颗粒物末端治理技术：采取高效电源供电、低低温电除尘、超净电袋、高效袋式除尘、湿法脱硫协同、湿式电除尘等技术，满足《燃煤电厂超低排放烟气
  治理工程技术规范》（HJ2053-2206）相关要求。
  。原文件中描述污染物类别为废气，污染物指标为颗粒物（烟煤），此处对其进行了匹配工作，将其匹配到LCAflow库里面相最符合的流，污染物指标备注为颗粒物（烟煤）
- particles (PM2.5 - PM10): nan
  污染物指标颗粒物（烟煤）的末端治理技术是高效电袋组合+其他（湿法脱硫协同）①，其效率为0.00116Aar+99.948，末端治理设施实际运行率（k值）计算公式为除尘设施年实际运行小时数/机组年实际运行小时数，①高效颗粒物末端治理技术：采取高效电源供电、低低温电除尘、超净电袋、高效袋式除尘、湿法脱硫协同、湿式电除尘等技术，满足《燃煤电厂超低排放烟气
  治理工程技术规范》（HJ2053-2207）相关要求。
  。原文件中描述污染物类别为废气，污染物指标为颗粒物（烟煤），此处对其进行了匹配工作，将其匹配到LCAflow库里面相最符合的流，污染物指标备注为颗粒物（烟煤）
- particles (PM2.5 - PM10): nan
  污染物指标颗粒物（烟煤）的末端治理技术是高效袋式除尘+其他（湿法脱硫协同）①，其效率为0.00108Aar+99.952，末端治理设施实际运行率（k值）计算公式为除尘设施年实际运行小时数/机组年实际运行小时数，①高效颗粒物末端治理技术：采取高效电源供电、低低温电除尘、超净电袋、高效袋式除尘、湿法脱硫协同、湿式电除尘等技术，满足《燃煤电厂超低排放烟气
  治理工程技术规范》（HJ2053-2208）相关要求。
  。原文件中描述污染物类别为废气，污染物指标为颗粒物（烟煤），此处对其进行了匹配工作，将其匹配到LCAflow库里面相最符合的流，污染物指标备注为颗粒物（烟煤）
- particles (PM2.5 - PM10): nan
  污染物指标颗粒物（烟煤）的末端治理技术是高效静电除尘+其他（湿式电除尘）①，其效率为0.0006Aar+99.97，末端治理设施实际运行率（k值）计算公式为除尘设施年实际运行小时数/机组年实际运行小时数，①高效颗粒物末端治理技术：采取高效电源供电、低低温电除尘、超净电袋、高效袋式除尘、湿法脱硫协同、湿式电除尘等技术，满足《燃煤电厂超低排放烟气
  治理工程技术规范》（HJ2053-2209）相关要求。
  。原文件中描述污染物类别为废气，污染物指标为颗粒物（烟煤），此处对其进行了匹配工作，将其匹配到LCAflow库里面相最符合的流，污染物指标备注为颗粒物（烟煤）
- particles (PM2.5 - PM10): nan
  污染物指标颗粒物（烟煤）的末端治理技术是高效电袋组合+其他（湿式电除尘）①，其效率为0.00058Aar+99.974，末端治理设施实际运行率（k值）计算公式为除尘设施年实际运行小时数/机组年实际运行小时数，①高效颗粒物末端治理技术：采取高效电源供电、低低温电除尘、超净电袋、高效袋式除尘、湿法脱硫协同、湿式电除尘等技术，满足《燃煤电厂超低排放烟气
  治理工程技术规范》（HJ2053-2210）相关要求。
  。原文件中描述污染物类别为废气，污染物指标为颗粒物（烟煤），此处对其进行了匹配工作，将其匹配到LCAflow库里面相最符合的流，污染物指标备注为颗粒物（烟煤）
- particles (PM2.5 - PM10): nan
  污染物指标颗粒物（烟煤）的末端治理技术是高效袋式除尘+其他（湿式电除尘）①，其效率为0.00054Aar+99.976，末端治理设施实际运行率（k值）计算公式为除尘设施年实际运行小时数/机组年实际运行小时数，①高效颗粒物末端治理技术：采取高效电源供电、低低温电除尘、超净电袋、高效袋式除尘、湿法脱硫协同、湿式电除尘等技术，满足《燃煤电厂超低排放烟气
  治理工程技术规范》（HJ2053-2211）相关要求。
  。原文件中描述污染物类别为废气，污染物指标为颗粒物（烟煤），此处对其进行了匹配工作，将其匹配到LCAflow库里面相最符合的流，污染物指标备注为颗粒物（烟煤）
- particles (PM2.5 - PM10): nan
  污染物指标颗粒物（烟煤）的末端治理技术是高效静电除尘+其他（湿法脱硫协同）+其他（湿式电除尘）①，其效率为0.00024Aar+99.988，末端治理设施实际运行率（k值）计算公式为除尘设施年实际运行小时数/机组年实际运行小时数，①高效颗粒物末端治理技术：采取高效电源供电、低低温电除尘、超净电袋、高效袋式除尘、湿法脱硫协同、湿式电除尘等技术，满足《燃煤电厂超低排放烟气
  治理工程技术规范》（HJ2053-2212）相关要求。
  。原文件中描述污染物类别为废气，污染物指标为颗粒物（烟煤），此处对其进行了匹配工作，将其匹配到LCAflow库里面相最符合的流，污染物指标备注为颗粒物（烟煤）
- particles (PM2.5 - PM10): nan
  污染物指标颗粒物（烟煤）的末端治理技术是高效电袋组合+其他（湿法脱硫协同）+其他（湿式电除尘）①，其效率为0.000232Aar+99.9896，末端治理设施实际运行率（k值）计算公式为除尘设施年实际运行小时数/机组年实际运行小时数，①高效颗粒物末端治理技术：采取高效电源供电、低低温电除尘、超净电袋、高效袋式除尘、湿法脱硫协同、湿式电除尘等技术，满足《燃煤电厂超低排放烟气
  治理工程技术规范》（HJ2053-2213）相关要求。
  。原文件中描述污染物类别为废气，污染物指标为颗粒物（烟煤），此处对其进行了匹配工作，将其匹配到LCAflow库里面相最符合的流，污染物指标备注为颗粒物（烟煤）
- particles (PM2.5 - PM10): nan
  污染物指标颗粒物（烟煤）的末端治理技术是高效袋式除尘+其他（湿法脱硫协同）+其他（湿式电除尘）①，其效率为0.000216Aar+99.9904，末端治理设施实际运行率（k值）计算公式为除尘设施年实际运行小时数/机组年实际运行小时数，①高效颗粒物末端治理技术：采取高效电源供电、低低温电除尘、超净电袋、高效袋式除尘、湿法脱硫协同、湿式电除尘等技术，满足《燃煤电厂超低排放烟气
  治理工程技术规范》（HJ2053-2214）相关要求。
  。原文件中描述污染物类别为废气，污染物指标为颗粒物（烟煤），此处对其进行了匹配工作，将其匹配到LCAflow库里面相最符合的流，污染物指标备注为颗粒物（烟煤）
- particles (PM2.5 - PM10): nan
  污染物指标颗粒物（烟煤）的末端治理技术是静电除尘+其他（湿法脱硫协同），其效率为0.006Aar+99.77，末端治理设施实际运行率（k值）计算公式为除尘设施年实际运行小时数/机组年实际运行小时数。原文件中描述污染物类别为废气，污染物指标为颗粒物（烟煤），此处对其进行了匹配工作，将其匹配到LCAflow库里面相最符合的流，污染物指标备注为颗粒物（烟煤）
- particles (PM2.5 - PM10): nan
  污染物指标颗粒物（烟煤）的末端治理技术是电袋组合+其他（湿法脱硫协同），其效率为0.0058Aar+99.74，末端治理设施实际运行率（k值）计算公式为除尘设施年实际运行小时数/机组年实际运行小时数。原文件中描述污染物类别为废气，污染物指标为颗粒物（烟煤），此处对其进行了匹配工作，将其匹配到LCAflow库里面相最符合的流，污染物指标备注为颗粒物（烟煤）
- particles (PM2.5 - PM10): nan
  污染物指标颗粒物（烟煤）的末端治理技术是袋式除尘+其他（湿法脱硫协同），其效率为0.0054Aar+99.76，末端治理设施实际运行率（k值）计算公式为除尘设施年实际运行小时数/机组年实际运行小时数。原文件中描述污染物类别为废气，污染物指标为颗粒物（烟煤），此处对其进行了匹配工作，将其匹配到LCAflow库里面相最符合的流，污染物指标备注为颗粒物（烟煤）
- particles (PM2.5 - PM10): nan
  污染物指标颗粒物（烟煤）的末端治理技术是静电除尘+其他（湿式电除尘），其效率为0.003Aar+99.85，末端治理设施实际运行率（k值）计算公式为除尘设施年实际运行小时数/机组年实际运行小时数。原文件中描述污染物类别为废气，污染物指标为颗粒物（烟煤），此处对其进行了匹配工作，将其匹配到LCAflow库里面相最符合的流，污染物指标备注为颗粒物（烟煤）
- particles (PM2.5 - PM10): nan
  污染物指标颗粒物（烟煤）的末端治理技术是电袋组合+其他（湿式电除尘），其效率为0.0029Aar+99.87，末端治理设施实际运行率（k值）计算公式为除尘设施年实际运行小时数/机组年实际运行小时数。原文件中描述污染物类别为废气，污染物指标为颗粒物（烟煤），此处对其进行了匹配工作，将其匹配到LCAflow库里面相最符合的流，污染物指标备注为颗粒物（烟煤）
- particles (PM2.5 - PM10): nan
  污染物指标颗粒物（烟煤）的末端治理技术是袋式除尘+其他（湿式电除尘），其效率为0.0027Aar+99.88，末端治理设施实际运行率（k值）计算公式为除尘设施年实际运行小时数/机组年实际运行小时数。原文件中描述污染物类别为废气，污染物指标为颗粒物（烟煤），此处对其进行了匹配工作，将其匹配到LCAflow库里面相最符合的流，污染物指标备注为颗粒物（烟煤）
- particles (PM2.5 - PM10): nan
  污染物指标颗粒物（烟煤）的末端治理技术是静电除尘+其他（湿法脱硫协同）+其他（湿式电除尘），其效率为0.0012Aar+99.94，末端治理设施实际运行率（k值）计算公式为除尘设施年实际运行小时数/机组年实际运行小时数。原文件中描述污染物类别为废气，污染物指标为颗粒物（烟煤），此处对其进行了匹配工作，将其匹配到LCAflow库里面相最符合的流，污染物指标备注为颗粒物（烟煤）
- particles (PM2.5 - PM10): nan
  污染物指标颗粒物（烟煤）的末端治理技术是电袋组合+其他（湿法脱硫协同）+其他（湿式电除尘），其效率为0.00116Aar+99.948，末端治理设施实际运行率（k值）计算公式为除尘设施年实际运行小时数/机组年实际运行小时数。原文件中描述污染物类别为废气，污染物指标为颗粒物（烟煤），此处对其进行了匹配工作，将其匹配到LCAflow库里面相最符合的流，污染物指标备注为颗粒物（烟煤）
- particles (PM2.5 - PM10): nan
  污染物指标颗粒物（烟煤）的末端治理技术是袋式除尘+其他（湿法脱硫协同）+其他（湿式电除尘），其效率为0.00108Aar+99.952，末端治理设施实际运行率（k值）计算公式为除尘设施年实际运行小时数/机组年实际运行小时数。原文件中描述污染物类别为废气，污染物指标为颗粒物（烟煤），此处对其进行了匹配工作，将其匹配到LCAflow库里面相最符合的流，污染物指标备注为颗粒物（烟煤）
- particles (PM2.5 - PM10): nan
  污染物指标颗粒物（无烟煤）的末端治理技术是静电除尘，其效率为0.015Aar+99.25，末端治理设施实际运行率（k值）计算公式为除尘设施年实际运行小时数/机组年实际运行小时数。原文件中描述污染物类别为废气，污染物指标为颗粒物（无烟煤），此处对其进行了匹配工作，将其匹配到LCAflow库里面相最符合的流，污染物指标备注为颗粒物（无烟煤）
- particles (PM2.5 - PM10): nan
  污染物指标颗粒物（无烟煤）的末端治理技术是电袋组合，其效率为0.0145Aar+99.35，末端治理设施实际运行率（k值）计算公式为除尘设施年实际运行小时数/机组年实际运行小时数。原文件中描述污染物类别为废气，污染物指标为颗粒物（无烟煤），此处对其进行了匹配工作，将其匹配到LCAflow库里面相最符合的流，污染物指标备注为颗粒物（无烟煤）
- particles (PM2.5 - PM10): nan
  污染物指标颗粒物（无烟煤）的末端治理技术是袋式除尘，其效率为0.0135Aar+99.40，末端治理设施实际运行率（k值）计算公式为除尘设施年实际运行小时数/机组年实际运行小时数。原文件中描述污染物类别为废气，污染物指标为颗粒物（无烟煤），此处对其进行了匹配工作，将其匹配到LCAflow库里面相最符合的流，污染物指标备注为颗粒物（无烟煤）
- particles (PM2.5 - PM10): nan
  污染物指标颗粒物（无烟煤）的末端治理技术是高效静电除尘①，其效率为0.003Aar+99.85，末端治理设施实际运行率（k值）计算公式为除尘设施年实际运行小时数/机组年实际运行小时数，①高效颗粒物末端治理技术：采取高效电源供电、低低温电除尘、超净电袋、高效袋式除尘、湿法脱硫协同、湿式电除尘等技术，满足《燃煤电厂超低排放烟气
  治理工程技术规范》（HJ2053-2215）相关要求。
  。原文件中描述污染物类别为废气，污染物指标为颗粒物（无烟煤），此处对其进行了匹配工作，将其匹配到LCAflow库里面相最符合的流，污染物指标备注为颗粒物（无烟煤）
- particles (PM2.5 - PM10): nan
  污染物指标颗粒物（无烟煤）的末端治理技术是高效电袋组合①，其效率为0.0029Aar+99.87，末端治理设施实际运行率（k值）计算公式为除尘设施年实际运行小时数/机组年实际运行小时数，①高效颗粒物末端治理技术：采取高效电源供电、低低温电除尘、超净电袋、高效袋式除尘、湿法脱硫协同、湿式电除尘等技术，满足《燃煤电厂超低排放烟气
  治理工程技术规范》（HJ2053-2216）相关要求。
  。原文件中描述污染物类别为废气，污染物指标为颗粒物（无烟煤），此处对其进行了匹配工作，将其匹配到LCAflow库里面相最符合的流，污染物指标备注为颗粒物（无烟煤）
- particles (PM2.5 - PM10): nan
  污染物指标颗粒物（无烟煤）的末端治理技术是高效袋式除尘①，其效率为0.0027Aar+99.88，末端治理设施实际运行率（k值）计算公式为除尘设施年实际运行小时数/机组年实际运行小时数，①高效颗粒物末端治理技术：采取高效电源供电、低低温电除尘、超净电袋、高效袋式除尘、湿法脱硫协同、湿式电除尘等技术，满足《燃煤电厂超低排放烟气
  治理工程技术规范》（HJ2053-2217）相关要求。
  。原文件中描述污染物类别为废气，污染物指标为颗粒物（无烟煤），此处对其进行了匹配工作，将其匹配到LCAflow库里面相最符合的流，污染物指标备注为颗粒物（无烟煤）
- particles (PM2.5 - PM10): nan
  污染物指标颗粒物（褐煤）的末端治理技术是静电除尘，其效率为0.015Aar+99.25，末端治理设施实际运行率（k值）计算公式为除尘设施年实际运行小时数/机组年实际运行小时数。原文件中描述污染物类别为废气，污染物指标为颗粒物（褐煤），此处对其进行了匹配工作，将其匹配到LCAflow库里面相最符合的流，污染物指标备注为颗粒物（褐煤）
- particles (PM2.5 - PM10): nan
  污染物指标颗粒物（褐煤）的末端治理技术是电袋组合，其效率为0.0145Aar+99.35，末端治理设施实际运行率（k值）计算公式为除尘设施年实际运行小时数/机组年实际运行小时数。原文件中描述污染物类别为废气，污染物指标为颗粒物（褐煤），此处对其进行了匹配工作，将其匹配到LCAflow库里面相最符合的流，污染物指标备注为颗粒物（褐煤）
- particles (PM2.5 - PM10): nan
  污染物指标颗粒物（褐煤）的末端治理技术是袋式除尘，其效率为0.0135Aar+99.40，末端治理设施实际运行率（k值）计算公式为除尘设施年实际运行小时数/机组年实际运行小时数。原文件中描述污染物类别为废气，污染物指标为颗粒物（褐煤），此处对其进行了匹配工作，将其匹配到LCAflow库里面相最符合的流，污染物指标备注为颗粒物（褐煤）
- particles (PM2.5 - PM10): nan
  污染物指标颗粒物（褐煤）的末端治理技术是高效静电除尘①，其效率为0.003Aar+99.85，末端治理设施实际运行率（k值）计算公式为除尘设施年实际运行小时数/机组年实际运行小时数，①高效颗粒物末端治理技术：采取高效电源供电、低低温电除尘、超净电袋、高效袋式除尘、湿法脱硫协同、湿式电除尘等技术，满足《燃煤电厂超低排放烟气
  治理工程技术规范》（HJ2053-2218）相关要求。
  。原文件中描述污染物类别为废气，污染物指标为颗粒物（褐煤），此处对其进行了匹配工作，将其匹配到LCAflow库里面相最符合的流，污染物指标备注为颗粒物（褐煤）
- particles (PM2.5 - PM10): nan
  污染物指标颗粒物（褐煤）的末端治理技术是高效电袋组合①，其效率为0.0029Aar+99.87，末端治理设施实际运行率（k值）计算公式为除尘设施年实际运行小时数/机组年实际运行小时数，①高效颗粒物末端治理技术：采取高效电源供电、低低温电除尘、超净电袋、高效袋式除尘、湿法脱硫协同、湿式电除尘等技术，满足《燃煤电厂超低排放烟气
  治理工程技术规范》（HJ2053-2219）相关要求。
  。原文件中描述污染物类别为废气，污染物指标为颗粒物（褐煤），此处对其进行了匹配工作，将其匹配到LCAflow库里面相最符合的流，污染物指标备注为颗粒物（褐煤）
- particles (PM2.5 - PM10): nan
  污染物指标颗粒物（褐煤）的末端治理技术是高效袋式除尘①，其效率为0.0027Aar+99.88，末端治理设施实际运行率（k值）计算公式为除尘设施年实际运行小时数/机组年实际运行小时数，①高效颗粒物末端治理技术：采取高效电源供电、低低温电除尘、超净电袋、高效袋式除尘、湿法脱硫协同、湿式电除尘等技术，满足《燃煤电厂超低排放烟气
  治理工程技术规范》（HJ2053-2220）相关要求。
  。原文件中描述污染物类别为废气，污染物指标为颗粒物（褐煤），此处对其进行了匹配工作，将其匹配到LCAflow库里面相最符合的流，污染物指标备注为颗粒物（褐煤）
- sulfur dioxide: nan
  污染物指标二氧化硫（烟煤，无脱硫剂）的末端治理技术是石灰石/石膏法，其效率为4.2857Sar+84.57，末端治理设施实际运行率（k值）计算公式为脱硫设施年实际运行小时数/机组年实际运行小时数。原文件中描述污染物类别为废气，污染物指标为二氧化硫（烟煤，无脱硫剂），此处对其进行了匹配工作，将其匹配到LCAflow库里面相最符合的流，污染物指标备注为二氧化硫（烟煤，无脱硫剂）
- sulfur dioxide: nan
  污染物指标二氧化硫（烟煤，无脱硫剂）的末端治理技术是石灰/石膏法，其效率为4.2857Sar+84.57，末端治理设施实际运行率（k值）计算公式为脱硫设施年实际运行小时数/机组年实际运行小时数。原文件中描述污染物类别为废气，污染物指标为二氧化硫（烟煤，无脱硫剂），此处对其进行了匹配工作，将其匹配到LCAflow库里面相最符合的流，污染物指标备注为二氧化硫（烟煤，无脱硫剂）
- sulfur dioxide: nan
  污染物指标二氧化硫（烟煤，无脱硫剂）的末端治理技术是氨法，其效率为4.2857Sar+84.57，末端治理设施实际运行率（k值）计算公式为脱硫设施年实际运行小时数/机组年实际运行小时数。原文件中描述污染物类别为废气，污染物指标为二氧化硫（烟煤，无脱硫剂），此处对其进行了匹配工作，将其匹配到LCAflow库里面相最符合的流，污染物指标备注为二氧化硫（烟煤，无脱硫剂）
- sulfur dioxide: nan
  污染物指标二氧化硫（烟煤，无脱硫剂）的末端治理技术是其他（电石渣法），其效率为5.1429Sar+82.86，末端治理设施实际运行率（k值）计算公式为脱硫设施年实际运行小时数/机组年实际运行小时数。原文件中描述污染物类别为废气，污染物指标为二氧化硫（烟煤，无脱硫剂），此处对其进行了匹配工作，将其匹配到LCAflow库里面相最符合的流，污染物指标备注为二氧化硫（烟煤，无脱硫剂）
- sulfur dioxide: nan
  污染物指标二氧化硫（烟煤，无脱硫剂）的末端治理技术是其他（钠碱法），其效率为5.1429Sar+82.86，末端治理设施实际运行率（k值）计算公式为脱硫设施年实际运行小时数/机组年实际运行小时数。原文件中描述污染物类别为废气，污染物指标为二氧化硫（烟煤，无脱硫剂），此处对其进行了匹配工作，将其匹配到LCAflow库里面相最符合的流，污染物指标备注为二氧化硫（烟煤，无脱硫剂）
- sulfur dioxide: nan
  污染物指标二氧化硫（烟煤，无脱硫剂）的末端治理技术是双碱法，其效率为5.1429Sar+82.86，末端治理设施实际运行率（k值）计算公式为脱硫设施年实际运行小时数/机组年实际运行小时数。原文件中描述污染物类别为废气，污染物指标为二氧化硫（烟煤，无脱硫剂），此处对其进行了匹配工作，将其匹配到LCAflow库里面相最符合的流，污染物指标备注为二氧化硫（烟煤，无脱硫剂）
- sulfur dioxide: nan
  污染物指标二氧化硫（烟煤，无脱硫剂）的末端治理技术是氧化镁法，其效率为4.2857Sar+84.57，末端治理设施实际运行率（k值）计算公式为脱硫设施年实际运行小时数/机组年实际运行小时数。原文件中描述污染物类别为废气，污染物指标为二氧化硫（烟煤，无脱硫剂），此处对其进行了匹配工作，将其匹配到LCAflow库里面相最符合的流，污染物指标备注为二氧化硫（烟煤，无脱硫剂）
- sulfur dioxide: nan
  污染物指标二氧化硫（烟煤，无脱硫剂）的末端治理技术是烟气循环流化床法，其效率为8.1429Sar+78.57，末端治理设施实际运行率（k值）计算公式为脱硫设施年实际运行小时数/机组年实际运行小时数。原文件中描述污染物类别为废气，污染物指标为二氧化硫（烟煤，无脱硫剂），此处对其进行了匹配工作，将其匹配到LCAflow库里面相最符合的流，污染物指标备注为二氧化硫（烟煤，无脱硫剂）
- sulfur dioxide: nan
  污染物指标二氧化硫（烟煤，无脱硫剂）的末端治理技术是其他（湿法脱硫除尘一体化），其效率为4.2857Sar+84.57，末端治理设施实际运行率（k值）计算公式为脱硫设施年实际运行小时数/机组年实际运行小时数。原文件中描述污染物类别为废气，污染物指标为二氧化硫（烟煤，无脱硫剂），此处对其进行了匹配工作，将其匹配到LCAflow库里面相最符合的流，污染物指标备注为二氧化硫（烟煤，无脱硫剂）
- sulfur dioxide: nan
  污染物指标二氧化硫（烟煤，无脱硫剂）的末端治理技术是高效石灰石/石膏法②，其效率为0.5Sar+98.2，末端治理设施实际运行率（k值）计算公式为脱硫设施年实际运行小时数/机组年实际运行小时数，②高效二氧化硫末端治理技术：采取空塔提效、强化气液传质、改善pH值分区等措施，满足《燃煤电厂超低排放烟气治理工程技术规范》（HJ2053-2142）相
  关要求。
  。原文件中描述污染物类别为废气，污染物指标为二氧化硫（烟煤，无脱硫剂），此处对其进行了匹配工作，将其匹配到LCAflow库里面相最符合的流，污染物指标备注为二氧化硫（烟煤，无脱硫剂）
- sulfur dioxide: nan
  污染物指标二氧化硫（烟煤，无脱硫剂）的末端治理技术是高效石灰/石膏法②，其效率为0.5Sar+98.2，末端治理设施实际运行率（k值）计算公式为脱硫设施年实际运行小时数/机组年实际运行小时数，②高效二氧化硫末端治理技术：采取空塔提效、强化气液传质、改善pH值分区等措施，满足《燃煤电厂超低排放烟气治理工程技术规范》（HJ2053-2143）相
  关要求。
  。原文件中描述污染物类别为废气，污染物指标为二氧化硫（烟煤，无脱硫剂），此处对其进行了匹配工作，将其匹配到LCAflow库里面相最符合的流，污染物指标备注为二氧化硫（烟煤，无脱硫剂）
- sulfur dioxide: nan
  污染物指标二氧化硫（烟煤，无脱硫剂）的末端治理技术是高效氨法②，其效率为0.5Sar+98.2，末端治理设施实际运行率（k值）计算公式为脱硫设施年实际运行小时数/机组年实际运行小时数，②高效二氧化硫末端治理技术：采取空塔提效、强化气液传质、改善pH值分区等措施，满足《燃煤电厂超低排放烟气治理工程技术规范》（HJ2053-2144）相
  关要求。
  。原文件中描述污染物类别为废气，污染物指标为二氧化硫（烟煤，无脱硫剂），此处对其进行了匹配工作，将其匹配到LCAflow库里面相最符合的流，污染物指标备注为二氧化硫（烟煤，无脱硫剂）
- sulfur dioxide: nan
  污染物指标二氧化硫（烟煤，无脱硫剂）的末端治理技术是其他（高效电石渣法）②，其效率为0.6Sar+98，末端治理设施实际运行率（k值）计算公式为脱硫设施年实际运行小时数/机组年实际运行小时数，②高效二氧化硫末端治理技术：采取空塔提效、强化气液传质、改善pH值分区等措施，满足《燃煤电厂超低排放烟气治理工程技术规范》（HJ2053-2145）相
  关要求。
  。原文件中描述污染物类别为废气，污染物指标为二氧化硫（烟煤，无脱硫剂），此处对其进行了匹配工作，将其匹配到LCAflow库里面相最符合的流，污染物指标备注为二氧化硫（烟煤，无脱硫剂）
- sulfur dioxide: nan
  污染物指标二氧化硫（烟煤，无脱硫剂）的末端治理技术是其他（高效钠碱法）②，其效率为0.6Sar+98，末端治理设施实际运行率（k值）计算公式为脱硫设施年实际运行小时数/机组年实际运行小时数，②高效二氧化硫末端治理技术：采取空塔提效、强化气液传质、改善pH值分区等措施，满足《燃煤电厂超低排放烟气治理工程技术规范》（HJ2053-2146）相
  关要求。
  。原文件中描述污染物类别为废气，污染物指标为二氧化硫（烟煤，无脱硫剂），此处对其进行了匹配工作，将其匹配到LCAflow库里面相最符合的流，污染物指标备注为二氧化硫（烟煤，无脱硫剂）
- sulfur dioxide: nan
  污染物指标二氧化硫（烟煤，无脱硫剂）的末端治理技术是高效双碱法②，其效率为0.6Sar+98，末端治理设施实际运行率（k值）计算公式为脱硫设施年实际运行小时数/机组年实际运行小时数，②高效二氧化硫末端治理技术：采取空塔提效、强化气液传质、改善pH值分区等措施，满足《燃煤电厂超低排放烟气治理工程技术规范》（HJ2053-2147）相
  关要求。
  。原文件中描述污染物类别为废气，污染物指标为二氧化硫（烟煤，无脱硫剂），此处对其进行了匹配工作，将其匹配到LCAflow库里面相最符合的流，污染物指标备注为二氧化硫（烟煤，无脱硫剂）
- sulfur dioxide: nan
  污染物指标二氧化硫（烟煤，无脱硫剂）的末端治理技术是高效氧化镁法②，其效率为0.5Sar+98.2，末端治理设施实际运行率（k值）计算公式为脱硫设施年实际运行小时数/机组年实际运行小时数，②高效二氧化硫末端治理技术：采取空塔提效、强化气液传质、改善pH值分区等措施，满足《燃煤电厂超低排放烟气治理工程技术规范》（HJ2053-2148）相
  关要求。
  。原文件中描述污染物类别为废气，污染物指标为二氧化硫（烟煤，无脱硫剂），此处对其进行了匹配工作，将其匹配到LCAflow库里面相最符合的流，污染物指标备注为二氧化硫（烟煤，无脱硫剂）
- sulfur dioxide: nan
  污染物指标二氧化硫（烟煤，无脱硫剂）的末端治理技术是高效烟气循环流化床法②，其效率为0.95Sar+97.5，末端治理设施实际运行率（k值）计算公式为脱硫设施年实际运行小时数/机组年实际运行小时数，②高效二氧化硫末端治理技术：采取空塔提效、强化气液传质、改善pH值分区等措施，满足《燃煤电厂超低排放烟气治理工程技术规范》（HJ2053-2149）相
  关要求。
  。原文件中描述污染物类别为废气，污染物指标为二氧化硫（烟煤，无脱硫剂），此处对其进行了匹配工作，将其匹配到LCAflow库里面相最符合的流，污染物指标备注为二氧化硫（烟煤，无脱硫剂）
- sulfur dioxide: nan
  污染物指标二氧化硫（烟煤，无脱硫剂）的末端治理技术是其他（高效湿法脱硫除尘一体化）②，其效率为0.5Sar+98.2，末端治理设施实际运行率（k值）计算公式为脱硫设施年实际运行小时数/机组年实际运行小时数，②高效二氧化硫末端治理技术：采取空塔提效、强化气液传质、改善pH值分区等措施，满足《燃煤电厂超低排放烟气治理工程技术规范》（HJ2053-2150）相
  关要求。
  。原文件中描述污染物类别为废气，污染物指标为二氧化硫（烟煤，无脱硫剂），此处对其进行了匹配工作，将其匹配到LCAflow库里面相最符合的流，污染物指标备注为二氧化硫（烟煤，无脱硫剂）
- sulfur dioxide: nan
  污染物指标二氧化硫（烟煤，有脱硫剂）的末端治理技术是高效石灰石/石膏法②，其效率为0.5Sar+96.5，末端治理设施实际运行率（k值）计算公式为脱硫设施年实际运行小时数/机组年实际运行小时数，②高效二氧化硫末端治理技术：采取空塔提效、强化气液传质、改善pH值分区等措施，满足《燃煤电厂超低排放烟气治理工程技术规范》（HJ2053-2151）相
  关要求。
  。原文件中描述污染物类别为废气，污染物指标为二氧化硫（烟煤，有脱硫剂），此处对其进行了匹配工作，将其匹配到LCAflow库里面相最符合的流，污染物指标备注为二氧化硫（烟煤，有脱硫剂）
- sulfur dioxide: nan
  污染物指标二氧化硫（烟煤，有脱硫剂）的末端治理技术是高效石灰/石膏法②，其效率为0.5Sar+96.5，末端治理设施实际运行率（k值）计算公式为脱硫设施年实际运行小时数/机组年实际运行小时数，②高效二氧化硫末端治理技术：采取空塔提效、强化气液传质、改善pH值分区等措施，满足《燃煤电厂超低排放烟气治理工程技术规范》（HJ2053-2152）相
  关要求。
  。原文件中描述污染物类别为废气，污染物指标为二氧化硫（烟煤，有脱硫剂），此处对其进行了匹配工作，将其匹配到LCAflow库里面相最符合的流，污染物指标备注为二氧化硫（烟煤，有脱硫剂）
- sulfur dioxide: nan
  污染物指标二氧化硫（烟煤，有脱硫剂）的末端治理技术是高效氨法②，其效率为0.5Sar+96.5，末端治理设施实际运行率（k值）计算公式为脱硫设施年实际运行小时数/机组年实际运行小时数，②高效二氧化硫末端治理技术：采取空塔提效、强化气液传质、改善pH值分区等措施，满足《燃煤电厂超低排放烟气治理工程技术规范》（HJ2053-2153）相
  关要求。
  。原文件中描述污染物类别为废气，污染物指标为二氧化硫（烟煤，有脱硫剂），此处对其进行了匹配工作，将其匹配到LCAflow库里面相最符合的流，污染物指标备注为二氧化硫（烟煤，有脱硫剂）
- sulfur dioxide: nan
  污染物指标二氧化硫（烟煤，有脱硫剂）的末端治理技术是其他（高效电石渣法）②，其效率为0.6Sar+96，末端治理设施实际运行率（k值）计算公式为脱硫设施年实际运行小时数/机组年实际运行小时数，②高效二氧化硫末端治理技术：采取空塔提效、强化气液传质、改善pH值分区等措施，满足《燃煤电厂超低排放烟气治理工程技术规范》（HJ2053-2154）相
  关要求。
  。原文件中描述污染物类别为废气，污染物指标为二氧化硫（烟煤，有脱硫剂），此处对其进行了匹配工作，将其匹配到LCAflow库里面相最符合的流，污染物指标备注为二氧化硫（烟煤，有脱硫剂）
- sulfur dioxide: nan
  污染物指标二氧化硫（烟煤，有脱硫剂）的末端治理技术是其他（高效钠碱法）②，其效率为0.65Sar+96.5，末端治理设施实际运行率（k值）计算公式为脱硫设施年实际运行小时数/机组年实际运行小时数，②高效二氧化硫末端治理技术：采取空塔提效、强化气液传质、改善pH值分区等措施，满足《燃煤电厂超低排放烟气治理工程技术规范》（HJ2053-2155）相
  关要求。
  。原文件中描述污染物类别为废气，污染物指标为二氧化硫（烟煤，有脱硫剂），此处对其进行了匹配工作，将其匹配到LCAflow库里面相最符合的流，污染物指标备注为二氧化硫（烟煤，有脱硫剂）
- sulfur dioxide: nan
  污染物指标二氧化硫（烟煤，有脱硫剂）的末端治理技术是高效双碱法②，其效率为0.65Sar+96.5，末端治理设施实际运行率（k值）计算公式为脱硫设施年实际运行小时数/机组年实际运行小时数，②高效二氧化硫末端治理技术：采取空塔提效、强化气液传质、改善pH值分区等措施，满足《燃煤电厂超低排放烟气治理工程技术规范》（HJ2053-2156）相
  关要求。
  。原文件中描述污染物类别为废气，污染物指标为二氧化硫（烟煤，有脱硫剂），此处对其进行了匹配工作，将其匹配到LCAflow库里面相最符合的流，污染物指标备注为二氧化硫（烟煤，有脱硫剂）
- sulfur dioxide: nan
  污染物指标二氧化硫（烟煤，有脱硫剂）的末端治理技术是高效氧化镁法②，其效率为0.5Sar+96.5，末端治理设施实际运行率（k值）计算公式为脱硫设施年实际运行小时数/机组年实际运行小时数，②高效二氧化硫末端治理技术：采取空塔提效、强化气液传质、改善pH值分区等措施，满足《燃煤电厂超低排放烟气治理工程技术规范》（HJ2053-2157）相
  关要求。
  。原文件中描述污染物类别为废气，污染物指标为二氧化硫（烟煤，有脱硫剂），此处对其进行了匹配工作，将其匹配到LCAflow库里面相最符合的流，污染物指标备注为二氧化硫（烟煤，有脱硫剂）
- sulfur dioxide: nan
  污染物指标二氧化硫（烟煤，有脱硫剂）的末端治理技术是高效烟气循环流化床法②，其效率为0.75Sar+96，末端治理设施实际运行率（k值）计算公式为脱硫设施年实际运行小时数/机组年实际运行小时数，②高效二氧化硫末端治理技术：采取空塔提效、强化气液传质、改善pH值分区等措施，满足《燃煤电厂超低排放烟气治理工程技术规范》（HJ2053-2158）相
  关要求。
  。原文件中描述污染物类别为废气，污染物指标为二氧化硫（烟煤，有脱硫剂），此处对其进行了匹配工作，将其匹配到LCAflow库里面相最符合的流，污染物指标备注为二氧化硫（烟煤，有脱硫剂）
- sulfur dioxide: nan
  污染物指标二氧化硫（烟煤，有脱硫剂）的末端治理技术是其他（高效湿法脱硫除尘一体化）②，其效率为0.5Sar+96.5，末端治理设施实际运行率（k值）计算公式为脱硫设施年实际运行小时数/机组年实际运行小时数，②高效二氧化硫末端治理技术：采取空塔提效、强化气液传质、改善pH值分区等措施，满足《燃煤电厂超低排放烟气治理工程技术规范》（HJ2053-2159）相
  关要求。
  。原文件中描述污染物类别为废气，污染物指标为二氧化硫（烟煤，有脱硫剂），此处对其进行了匹配工作，将其匹配到LCAflow库里面相最符合的流，污染物指标备注为二氧化硫（烟煤，有脱硫剂）
- sulfur dioxide: nan
  污染物指标二氧化硫（烟煤，有脱硫剂）的末端治理技术是石灰石/石膏法，其效率为4.2857Sar+70.0，末端治理设施实际运行率（k值）计算公式为脱硫设施年实际运行小时数/机组年实际运行小时数。原文件中描述污染物类别为废气，污染物指标为二氧化硫（烟煤，有脱硫剂），此处对其进行了匹配工作，将其匹配到LCAflow库里面相最符合的流，污染物指标备注为二氧化硫（烟煤，有脱硫剂）
- sulfur dioxide: nan
  污染物指标二氧化硫（烟煤，有脱硫剂）的末端治理技术是石灰/石膏法，其效率为4.2857Sar+70.0，末端治理设施实际运行率（k值）计算公式为脱硫设施年实际运行小时数/机组年实际运行小时数。原文件中描述污染物类别为废气，污染物指标为二氧化硫（烟煤，有脱硫剂），此处对其进行了匹配工作，将其匹配到LCAflow库里面相最符合的流，污染物指标备注为二氧化硫（烟煤，有脱硫剂）
- sulfur dioxide: nan
  污染物指标二氧化硫（烟煤，有脱硫剂）的末端治理技术是氨法，其效率为4.2857Sar+70.0，末端治理设施实际运行率（k值）计算公式为脱硫设施年实际运行小时数/机组年实际运行小时数。原文件中描述污染物类别为废气，污染物指标为二氧化硫（烟煤，有脱硫剂），此处对其进行了匹配工作，将其匹配到LCAflow库里面相最符合的流，污染物指标备注为二氧化硫（烟煤，有脱硫剂）
- sulfur dioxide: nan
  污染物指标二氧化硫（烟煤，有脱硫剂）的末端治理技术是其他（电石渣法），其效率为5.1429Sar+65.71，末端治理设施实际运行率（k值）计算公式为脱硫设施年实际运行小时数/机组年实际运行小时数。原文件中描述污染物类别为废气，污染物指标为二氧化硫（烟煤，有脱硫剂），此处对其进行了匹配工作，将其匹配到LCAflow库里面相最符合的流，污染物指标备注为二氧化硫（烟煤，有脱硫剂）
- sulfur dioxide: nan
  污染物指标二氧化硫（烟煤，有脱硫剂）的末端治理技术是其他（钠碱法），其效率为5.5714Sar+70.00，末端治理设施实际运行率（k值）计算公式为脱硫设施年实际运行小时数/机组年实际运行小时数。原文件中描述污染物类别为废气，污染物指标为二氧化硫（烟煤，有脱硫剂），此处对其进行了匹配工作，将其匹配到LCAflow库里面相最符合的流，污染物指标备注为二氧化硫（烟煤，有脱硫剂）
- sulfur dioxide: nan
  污染物指标二氧化硫（烟煤，有脱硫剂）的末端治理技术是双碱法，其效率为5.5714Sar+70.00，末端治理设施实际运行率（k值）计算公式为脱硫设施年实际运行小时数/机组年实际运行小时数。原文件中描述污染物类别为废气，污染物指标为二氧化硫（烟煤，有脱硫剂），此处对其进行了匹配工作，将其匹配到LCAflow库里面相最符合的流，污染物指标备注为二氧化硫（烟煤，有脱硫剂）
- sulfur dioxide: nan
  污染物指标二氧化硫（烟煤，有脱硫剂）的末端治理技术是氧化镁法，其效率为4.2857Sar+70.00，末端治理设施实际运行率（k值）计算公式为脱硫设施年实际运行小时数/机组年实际运行小时数。原文件中描述污染物类别为废气，污染物指标为二氧化硫（烟煤，有脱硫剂），此处对其进行了匹配工作，将其匹配到LCAflow库里面相最符合的流，污染物指标备注为二氧化硫（烟煤，有脱硫剂）
- sulfur dioxide: nan
  污染物指标二氧化硫（烟煤，有脱硫剂）的末端治理技术是烟气循环流化床法，其效率为6.0000Sar+65.71，末端治理设施实际运行率（k值）计算公式为脱硫设施年实际运行小时数/机组年实际运行小时数。原文件中描述污染物类别为废气，污染物指标为二氧化硫（烟煤，有脱硫剂），此处对其进行了匹配工作，将其匹配到LCAflow库里面相最符合的流，污染物指标备注为二氧化硫（烟煤，有脱硫剂）
- sulfur dioxide: nan
  污染物指标二氧化硫（烟煤，有脱硫剂）的末端治理技术是其他（湿法脱硫除尘一体化），其效率为4.2857Sar+70.00，末端治理设施实际运行率（k值）计算公式为脱硫设施年实际运行小时数/机组年实际运行小时数。原文件中描述污染物类别为废气，污染物指标为二氧化硫（烟煤，有脱硫剂），此处对其进行了匹配工作，将其匹配到LCAflow库里面相最符合的流，污染物指标备注为二氧化硫（烟煤，有脱硫剂）
- sulfur dioxide: nan
  污染物指标二氧化硫（无烟煤，无脱硫剂）的末端治理技术是石灰石/石膏法，其效率为4.2857Sar+84.57，末端治理设施实际运行率（k值）计算公式为脱硫设施年实际运行小时数/机组年实际运行小时数。原文件中描述污染物类别为废气，污染物指标为二氧化硫（无烟煤，无脱硫剂），此处对其进行了匹配工作，将其匹配到LCAflow库里面相最符合的流，污染物指标备注为二氧化硫（无烟煤，无脱硫剂）
- sulfur dioxide: nan
  污染物指标二氧化硫（无烟煤，无脱硫剂）的末端治理技术是石灰/石膏法，其效率为4.2857Sar+84.57，末端治理设施实际运行率（k值）计算公式为脱硫设施年实际运行小时数/机组年实际运行小时数。原文件中描述污染物类别为废气，污染物指标为二氧化硫（无烟煤，无脱硫剂），此处对其进行了匹配工作，将其匹配到LCAflow库里面相最符合的流，污染物指标备注为二氧化硫（无烟煤，无脱硫剂）
- sulfur dioxide: nan
  污染物指标二氧化硫（无烟煤，无脱硫剂）的末端治理技术是氨法，其效率为4.2857Sar+84.57，末端治理设施实际运行率（k值）计算公式为脱硫设施年实际运行小时数/机组年实际运行小时数。原文件中描述污染物类别为废气，污染物指标为二氧化硫（无烟煤，无脱硫剂），此处对其进行了匹配工作，将其匹配到LCAflow库里面相最符合的流，污染物指标备注为二氧化硫（无烟煤，无脱硫剂）
- sulfur dioxide: nan
  污染物指标二氧化硫（无烟煤，无脱硫剂）的末端治理技术是其他（电石渣法），其效率为5.1429Sar+82.86，末端治理设施实际运行率（k值）计算公式为脱硫设施年实际运行小时数/机组年实际运行小时数。原文件中描述污染物类别为废气，污染物指标为二氧化硫（无烟煤，无脱硫剂），此处对其进行了匹配工作，将其匹配到LCAflow库里面相最符合的流，污染物指标备注为二氧化硫（无烟煤，无脱硫剂）
- sulfur dioxide: nan
  污染物指标二氧化硫（无烟煤，无脱硫剂）的末端治理技术是其他（钠碱法），其效率为5.1429Sar+82.86，末端治理设施实际运行率（k值）计算公式为脱硫设施年实际运行小时数/机组年实际运行小时数。原文件中描述污染物类别为废气，污染物指标为二氧化硫（无烟煤，无脱硫剂），此处对其进行了匹配工作，将其匹配到LCAflow库里面相最符合的流，污染物指标备注为二氧化硫（无烟煤，无脱硫剂）
- sulfur dioxide: nan
  污染物指标二氧化硫（无烟煤，无脱硫剂）的末端治理技术是双碱法，其效率为5.1429Sar+82.86，末端治理设施实际运行率（k值）计算公式为脱硫设施年实际运行小时数/机组年实际运行小时数。原文件中描述污染物类别为废气，污染物指标为二氧化硫（无烟煤，无脱硫剂），此处对其进行了匹配工作，将其匹配到LCAflow库里面相最符合的流，污染物指标备注为二氧化硫（无烟煤，无脱硫剂）
- sulfur dioxide: nan
  污染物指标二氧化硫（无烟煤，无脱硫剂）的末端治理技术是氧化镁法，其效率为4.2857Sar+84.57，末端治理设施实际运行率（k值）计算公式为脱硫设施年实际运行小时数/机组年实际运行小时数。原文件中描述污染物类别为废气，污染物指标为二氧化硫（无烟煤，无脱硫剂），此处对其进行了匹配工作，将其匹配到LCAflow库里面相最符合的流，污染物指标备注为二氧化硫（无烟煤，无脱硫剂）
- sulfur dioxide: nan
  污染物指标二氧化硫（无烟煤，无脱硫剂）的末端治理技术是烟气循环流化床法，其效率为8.1429Sar+78.57，末端治理设施实际运行率（k值）计算公式为脱硫设施年实际运行小时数/机组年实际运行小时数。原文件中描述污染物类别为废气，污染物指标为二氧化硫（无烟煤，无脱硫剂），此处对其进行了匹配工作，将其匹配到LCAflow库里面相最符合的流，污染物指标备注为二氧化硫（无烟煤，无脱硫剂）
- sulfur dioxide: nan
  污染物指标二氧化硫（无烟煤，无脱硫剂）的末端治理技术是其他（湿法脱硫除尘一体化），其效率为4.2857Sar+84.57，末端治理设施实际运行率（k值）计算公式为脱硫设施年实际运行小时数/机组年实际运行小时数。原文件中描述污染物类别为废气，污染物指标为二氧化硫（无烟煤，无脱硫剂），此处对其进行了匹配工作，将其匹配到LCAflow库里面相最符合的流，污染物指标备注为二氧化硫（无烟煤，无脱硫剂）
- sulfur dioxide: nan
  污染物指标二氧化硫（无烟煤，无脱硫剂）的末端治理技术是高效石灰石/石膏法②，其效率为0.5Sar+98.2，末端治理设施实际运行率（k值）计算公式为脱硫设施年实际运行小时数/机组年实际运行小时数，②高效二氧化硫末端治理技术：采取空塔提效、强化气液传质、改善pH值分区等措施，满足《燃煤电厂超低排放烟气治理工程技术规范》（HJ2053-2160）相
  关要求。
  。原文件中描述污染物类别为废气，污染物指标为二氧化硫（无烟煤，无脱硫剂），此处对其进行了匹配工作，将其匹配到LCAflow库里面相最符合的流，污染物指标备注为二氧化硫（无烟煤，无脱硫剂）
- sulfur dioxide: nan
  污染物指标二氧化硫（无烟煤，无脱硫剂）的末端治理技术是高效石灰/石膏法②，其效率为0.5Sar+98.2，末端治理设施实际运行率（k值）计算公式为脱硫设施年实际运行小时数/机组年实际运行小时数，②高效二氧化硫末端治理技术：采取空塔提效、强化气液传质、改善pH值分区等措施，满足《燃煤电厂超低排放烟气治理工程技术规范》（HJ2053-2161）相
  关要求。
  。原文件中描述污染物类别为废气，污染物指标为二氧化硫（无烟煤，无脱硫剂），此处对其进行了匹配工作，将其匹配到LCAflow库里面相最符合的流，污染物指标备注为二氧化硫（无烟煤，无脱硫剂）
- sulfur dioxide: nan
  污染物指标二氧化硫（无烟煤，无脱硫剂）的末端治理技术是高效氨法②，其效率为0.5Sar+98.2，末端治理设施实际运行率（k值）计算公式为脱硫设施年实际运行小时数/机组年实际运行小时数，②高效二氧化硫末端治理技术：采取空塔提效、强化气液传质、改善pH值分区等措施，满足《燃煤电厂超低排放烟气治理工程技术规范》（HJ2053-2162）相
  关要求。
  。原文件中描述污染物类别为废气，污染物指标为二氧化硫（无烟煤，无脱硫剂），此处对其进行了匹配工作，将其匹配到LCAflow库里面相最符合的流，污染物指标备注为二氧化硫（无烟煤，无脱硫剂）
- sulfur dioxide: nan
  污染物指标二氧化硫（无烟煤，无脱硫剂）的末端治理技术是其他（高效电石渣法）②，其效率为0.6Sar+98，末端治理设施实际运行率（k值）计算公式为脱硫设施年实际运行小时数/机组年实际运行小时数，②高效二氧化硫末端治理技术：采取空塔提效、强化气液传质、改善pH值分区等措施，满足《燃煤电厂超低排放烟气治理工程技术规范》（HJ2053-2163）相
  关要求。
  。原文件中描述污染物类别为废气，污染物指标为二氧化硫（无烟煤，无脱硫剂），此处对其进行了匹配工作，将其匹配到LCAflow库里面相最符合的流，污染物指标备注为二氧化硫（无烟煤，无脱硫剂）
- sulfur dioxide: nan
  污染物指标二氧化硫（无烟煤，无脱硫剂）的末端治理技术是其他（高效钠碱法）②，其效率为0.6Sar+98，末端治理设施实际运行率（k值）计算公式为脱硫设施年实际运行小时数/机组年实际运行小时数，②高效二氧化硫末端治理技术：采取空塔提效、强化气液传质、改善pH值分区等措施，满足《燃煤电厂超低排放烟气治理工程技术规范》（HJ2053-2164）相
  关要求。
  。原文件中描述污染物类别为废气，污染物指标为二氧化硫（无烟煤，无脱硫剂），此处对其进行了匹配工作，将其匹配到LCAflow库里面相最符合的流，污染物指标备注为二氧化硫（无烟煤，无脱硫剂）
- sulfur dioxide: nan
  污染物指标二氧化硫（无烟煤，无脱硫剂）的末端治理技术是高效双碱法②，其效率为0.6Sar+98，末端治理设施实际运行率（k值）计算公式为脱硫设施年实际运行小时数/机组年实际运行小时数，②高效二氧化硫末端治理技术：采取空塔提效、强化气液传质、改善pH值分区等措施，满足《燃煤电厂超低排放烟气治理工程技术规范》（HJ2053-2165）相
  关要求。
  。原文件中描述污染物类别为废气，污染物指标为二氧化硫（无烟煤，无脱硫剂），此处对其进行了匹配工作，将其匹配到LCAflow库里面相最符合的流，污染物指标备注为二氧化硫（无烟煤，无脱硫剂）
- sulfur dioxide: nan
  污染物指标二氧化硫（无烟煤，无脱硫剂）的末端治理技术是高效氧化镁法②，其效率为0.5Sar+98.2，末端治理设施实际运行率（k值）计算公式为脱硫设施年实际运行小时数/机组年实际运行小时数，②高效二氧化硫末端治理技术：采取空塔提效、强化气液传质、改善pH值分区等措施，满足《燃煤电厂超低排放烟气治理工程技术规范》（HJ2053-2166）相
  关要求。
  。原文件中描述污染物类别为废气，污染物指标为二氧化硫（无烟煤，无脱硫剂），此处对其进行了匹配工作，将其匹配到LCAflow库里面相最符合的流，污染物指标备注为二氧化硫（无烟煤，无脱硫剂）
- sulfur dioxide: nan
  污染物指标二氧化硫（无烟煤，无脱硫剂）的末端治理技术是高效烟气循环流化床法②，其效率为0.95Sar+97.5，末端治理设施实际运行率（k值）计算公式为脱硫设施年实际运行小时数/机组年实际运行小时数，②高效二氧化硫末端治理技术：采取空塔提效、强化气液传质、改善pH值分区等措施，满足《燃煤电厂超低排放烟气治理工程技术规范》（HJ2053-2167）相
  关要求。
  。原文件中描述污染物类别为废气，污染物指标为二氧化硫（无烟煤，无脱硫剂），此处对其进行了匹配工作，将其匹配到LCAflow库里面相最符合的流，污染物指标备注为二氧化硫（无烟煤，无脱硫剂）
- sulfur dioxide: nan
  污染物指标二氧化硫（无烟煤，无脱硫剂）的末端治理技术是其他（高效湿法脱硫除尘一体化）②，其效率为0.5Sar+98.2，末端治理设施实际运行率（k值）计算公式为脱硫设施年实际运行小时数/机组年实际运行小时数，②高效二氧化硫末端治理技术：采取空塔提效、强化气液传质、改善pH值分区等措施，满足《燃煤电厂超低排放烟气治理工程技术规范》（HJ2053-2168）相
  关要求。
  。原文件中描述污染物类别为废气，污染物指标为二氧化硫（无烟煤，无脱硫剂），此处对其进行了匹配工作，将其匹配到LCAflow库里面相最符合的流，污染物指标备注为二氧化硫（无烟煤，无脱硫剂）
- sulfur dioxide: nan
  污染物指标二氧化硫（无烟煤，有脱硫剂）的末端治理技术是高效石灰石/石膏法②，其效率为0.5Sar+96.5，末端治理设施实际运行率（k值）计算公式为脱硫设施年实际运行小时数/机组年实际运行小时数，②高效二氧化硫末端治理技术：采取空塔提效、强化气液传质、改善pH值分区等措施，满足《燃煤电厂超低排放烟气治理工程技术规范》（HJ2053-2169）相
  关要求。
  。原文件中描述污染物类别为废气，污染物指标为二氧化硫（无烟煤，有脱硫剂），此处对其进行了匹配工作，将其匹配到LCAflow库里面相最符合的流，污染物指标备注为二氧化硫（无烟煤，有脱硫剂）
- sulfur dioxide: nan
  污染物指标二氧化硫（无烟煤，有脱硫剂）的末端治理技术是高效石灰/石膏法②，其效率为0.5Sar+96.5，末端治理设施实际运行率（k值）计算公式为脱硫设施年实际运行小时数/机组年实际运行小时数，②高效二氧化硫末端治理技术：采取空塔提效、强化气液传质、改善pH值分区等措施，满足《燃煤电厂超低排放烟气治理工程技术规范》（HJ2053-2170）相
  关要求。
  。原文件中描述污染物类别为废气，污染物指标为二氧化硫（无烟煤，有脱硫剂），此处对其进行了匹配工作，将其匹配到LCAflow库里面相最符合的流，污染物指标备注为二氧化硫（无烟煤，有脱硫剂）
- sulfur dioxide: nan
  污染物指标二氧化硫（无烟煤，有脱硫剂）的末端治理技术是高效氨法②，其效率为0.5Sar+96.5，末端治理设施实际运行率（k值）计算公式为脱硫设施年实际运行小时数/机组年实际运行小时数，②高效二氧化硫末端治理技术：采取空塔提效、强化气液传质、改善pH值分区等措施，满足《燃煤电厂超低排放烟气治理工程技术规范》（HJ2053-2171）相
  关要求。
  。原文件中描述污染物类别为废气，污染物指标为二氧化硫（无烟煤，有脱硫剂），此处对其进行了匹配工作，将其匹配到LCAflow库里面相最符合的流，污染物指标备注为二氧化硫（无烟煤，有脱硫剂）
- sulfur dioxide: nan
  污染物指标二氧化硫（无烟煤，有脱硫剂）的末端治理技术是其他（高效电石渣法）②，其效率为0.6Sar+96，末端治理设施实际运行率（k值）计算公式为脱硫设施年实际运行小时数/机组年实际运行小时数，②高效二氧化硫末端治理技术：采取空塔提效、强化气液传质、改善pH值分区等措施，满足《燃煤电厂超低排放烟气治理工程技术规范》（HJ2053-2172）相
  关要求。
  。原文件中描述污染物类别为废气，污染物指标为二氧化硫（无烟煤，有脱硫剂），此处对其进行了匹配工作，将其匹配到LCAflow库里面相最符合的流，污染物指标备注为二氧化硫（无烟煤，有脱硫剂）
- sulfur dioxide: nan
  污染物指标二氧化硫（无烟煤，有脱硫剂）的末端治理技术是其他（高效钠碱法）②，其效率为0.65Sar+96.5，末端治理设施实际运行率（k值）计算公式为脱硫设施年实际运行小时数/机组年实际运行小时数，②高效二氧化硫末端治理技术：采取空塔提效、强化气液传质、改善pH值分区等措施，满足《燃煤电厂超低排放烟气治理工程技术规范》（HJ2053-2173）相
  关要求。
  。原文件中描述污染物类别为废气，污染物指标为二氧化硫（无烟煤，有脱硫剂），此处对其进行了匹配工作，将其匹配到LCAflow库里面相最符合的流，污染物指标备注为二氧化硫（无烟煤，有脱硫剂）
- sulfur dioxide: nan
  污染物指标二氧化硫（无烟煤，有脱硫剂）的末端治理技术是高效双碱法②，其效率为0.65Sar+96.5，末端治理设施实际运行率（k值）计算公式为脱硫设施年实际运行小时数/机组年实际运行小时数，②高效二氧化硫末端治理技术：采取空塔提效、强化气液传质、改善pH值分区等措施，满足《燃煤电厂超低排放烟气治理工程技术规范》（HJ2053-2174）相
  关要求。
  。原文件中描述污染物类别为废气，污染物指标为二氧化硫（无烟煤，有脱硫剂），此处对其进行了匹配工作，将其匹配到LCAflow库里面相最符合的流，污染物指标备注为二氧化硫（无烟煤，有脱硫剂）
- sulfur dioxide: nan
  污染物指标二氧化硫（无烟煤，有脱硫剂）的末端治理技术是高效氧化镁法②，其效率为0.5Sar+96.5，末端治理设施实际运行率（k值）计算公式为脱硫设施年实际运行小时数/机组年实际运行小时数，②高效二氧化硫末端治理技术：采取空塔提效、强化气液传质、改善pH值分区等措施，满足《燃煤电厂超低排放烟气治理工程技术规范》（HJ2053-2175）相
  关要求。
  。原文件中描述污染物类别为废气，污染物指标为二氧化硫（无烟煤，有脱硫剂），此处对其进行了匹配工作，将其匹配到LCAflow库里面相最符合的流，污染物指标备注为二氧化硫（无烟煤，有脱硫剂）
- sulfur dioxide: nan
  污染物指标二氧化硫（无烟煤，有脱硫剂）的末端治理技术是高效烟气循环流化床法②，其效率为0.75Sar+96，末端治理设施实际运行率（k值）计算公式为脱硫设施年实际运行小时数/机组年实际运行小时数，②高效二氧化硫末端治理技术：采取空塔提效、强化气液传质、改善pH值分区等措施，满足《燃煤电厂超低排放烟气治理工程技术规范》（HJ2053-2176）相
  关要求。
  。原文件中描述污染物类别为废气，污染物指标为二氧化硫（无烟煤，有脱硫剂），此处对其进行了匹配工作，将其匹配到LCAflow库里面相最符合的流，污染物指标备注为二氧化硫（无烟煤，有脱硫剂）
- sulfur dioxide: nan
  污染物指标二氧化硫（无烟煤，有脱硫剂）的末端治理技术是其他（高效湿法脱硫除尘一体化）②，其效率为0.5Sar+96.5，末端治理设施实际运行率（k值）计算公式为脱硫设施年实际运行小时数/机组年实际运行小时数，②高效二氧化硫末端治理技术：采取空塔提效、强化气液传质、改善pH值分区等措施，满足《燃煤电厂超低排放烟气治理工程技术规范》（HJ2053-2177）相
  关要求。
  。原文件中描述污染物类别为废气，污染物指标为二氧化硫（无烟煤，有脱硫剂），此处对其进行了匹配工作，将其匹配到LCAflow库里面相最符合的流，污染物指标备注为二氧化硫（无烟煤，有脱硫剂）
- sulfur dioxide: nan
  污染物指标二氧化硫（无烟煤，有脱硫剂）的末端治理技术是石灰石/石膏法，其效率为4.2857Sar+70.0，末端治理设施实际运行率（k值）计算公式为脱硫设施年实际运行小时数/机组年实际运行小时数。原文件中描述污染物类别为废气，污染物指标为二氧化硫（无烟煤，有脱硫剂），此处对其进行了匹配工作，将其匹配到LCAflow库里面相最符合的流，污染物指标备注为二氧化硫（无烟煤，有脱硫剂）
- sulfur dioxide: nan
  污染物指标二氧化硫（无烟煤，有脱硫剂）的末端治理技术是石灰/石膏法，其效率为4.2857Sar+70.0，末端治理设施实际运行率（k值）计算公式为脱硫设施年实际运行小时数/机组年实际运行小时数。原文件中描述污染物类别为废气，污染物指标为二氧化硫（无烟煤，有脱硫剂），此处对其进行了匹配工作，将其匹配到LCAflow库里面相最符合的流，污染物指标备注为二氧化硫（无烟煤，有脱硫剂）
- sulfur dioxide: nan
  污染物指标二氧化硫（无烟煤，有脱硫剂）的末端治理技术是氨法，其效率为4.2857Sar+70.0，末端治理设施实际运行率（k值）计算公式为脱硫设施年实际运行小时数/机组年实际运行小时数。原文件中描述污染物类别为废气，污染物指标为二氧化硫（无烟煤，有脱硫剂），此处对其进行了匹配工作，将其匹配到LCAflow库里面相最符合的流，污染物指标备注为二氧化硫（无烟煤，有脱硫剂）
- sulfur dioxide: nan
  污染物指标二氧化硫（无烟煤，有脱硫剂）的末端治理技术是其他（电石渣法），其效率为5.1429Sar+65.71，末端治理设施实际运行率（k值）计算公式为脱硫设施年实际运行小时数/机组年实际运行小时数。原文件中描述污染物类别为废气，污染物指标为二氧化硫（无烟煤，有脱硫剂），此处对其进行了匹配工作，将其匹配到LCAflow库里面相最符合的流，污染物指标备注为二氧化硫（无烟煤，有脱硫剂）
- sulfur dioxide: nan
  污染物指标二氧化硫（无烟煤，有脱硫剂）的末端治理技术是其他（钠碱法），其效率为5.5714Sar+70.00，末端治理设施实际运行率（k值）计算公式为脱硫设施年实际运行小时数/机组年实际运行小时数。原文件中描述污染物类别为废气，污染物指标为二氧化硫（无烟煤，有脱硫剂），此处对其进行了匹配工作，将其匹配到LCAflow库里面相最符合的流，污染物指标备注为二氧化硫（无烟煤，有脱硫剂）
- sulfur dioxide: nan
  污染物指标二氧化硫（无烟煤，有脱硫剂）的末端治理技术是双碱法，其效率为5.5714Sar+70.00，末端治理设施实际运行率（k值）计算公式为脱硫设施年实际运行小时数/机组年实际运行小时数。原文件中描述污染物类别为废气，污染物指标为二氧化硫（无烟煤，有脱硫剂），此处对其进行了匹配工作，将其匹配到LCAflow库里面相最符合的流，污染物指标备注为二氧化硫（无烟煤，有脱硫剂）
- sulfur dioxide: nan
  污染物指标二氧化硫（无烟煤，有脱硫剂）的末端治理技术是氧化镁法，其效率为4.2857Sar+70.00，末端治理设施实际运行率（k值）计算公式为脱硫设施年实际运行小时数/机组年实际运行小时数。原文件中描述污染物类别为废气，污染物指标为二氧化硫（无烟煤，有脱硫剂），此处对其进行了匹配工作，将其匹配到LCAflow库里面相最符合的流，污染物指标备注为二氧化硫（无烟煤，有脱硫剂）
- sulfur dioxide: nan
  污染物指标二氧化硫（无烟煤，有脱硫剂）的末端治理技术是烟气循环流化床法，其效率为6.0000Sar+65.71，末端治理设施实际运行率（k值）计算公式为脱硫设施年实际运行小时数/机组年实际运行小时数。原文件中描述污染物类别为废气，污染物指标为二氧化硫（无烟煤，有脱硫剂），此处对其进行了匹配工作，将其匹配到LCAflow库里面相最符合的流，污染物指标备注为二氧化硫（无烟煤，有脱硫剂）
- sulfur dioxide: nan
  污染物指标二氧化硫（无烟煤，有脱硫剂）的末端治理技术是其他（湿法脱硫除尘一体化），其效率为4.2857Sar+70.00，末端治理设施实际运行率（k值）计算公式为脱硫设施年实际运行小时数/机组年实际运行小时数。原文件中描述污染物类别为废气，污染物指标为二氧化硫（无烟煤，有脱硫剂），此处对其进行了匹配工作，将其匹配到LCAflow库里面相最符合的流，污染物指标备注为二氧化硫（无烟煤，有脱硫剂）
- Nitrogen oxides: 3.31
  污染物指标氮氧化物，煤炭干燥无灰基挥发分小于等于10%的末端治理技术是其他（直排），末端治理设施实际运行率（k值）计算公式为脱硝设施年实际运行小时数/机组年实际运行小时数。原文件中描述污染物类别为废气，污染物指标为氮氧化物，煤炭干燥无灰基挥发分小于等于10%，此处对其进行了匹配工作，将其匹配到LCAflow库里面相最符合的流，污染物指标备注为氮氧化物，煤炭干燥无灰基挥发分小于等于10%
- Nitrogen oxides: 0.662
  污染物指标氮氧化物，煤炭干燥无灰基挥发分小于等于10%的末端治理技术是高效选择性催化还原法（SCR）③，其效率为80，末端治理设施实际运行率（k值）计算公式为脱硝设施年实际运行小时数/机组年实际运行小时数，③高效氮氧化物末端治理技术：采取高效低氮燃烧技术、增设脱硝催化剂层数等措施，满足《燃煤电厂超低排放烟气治理工程技术规范》（HJ2053-2104）相关
  要求。。原文件中描述污染物类别为废气，污染物指标为氮氧化物，煤炭干燥无灰基挥发分小于等于10%，此处对其进行了匹配工作，将其匹配到LCAflow库里面相最符合的流，污染物指标备注为氮氧化物，煤炭干燥无灰基挥发分小于等于10%
- Nitrogen oxides: 0.993
  污染物指标氮氧化物，煤炭干燥无灰基挥发分小于等于10%的末端治理技术是选择性催化还原法（SCR），其效率为70，末端治理设施实际运行率（k值）计算公式为脱硝设施年实际运行小时数/机组年实际运行小时数。原文件中描述污染物类别为废气，污染物指标为氮氧化物，煤炭干燥无灰基挥发分小于等于10%，此处对其进行了匹配工作，将其匹配到LCAflow库里面相最符合的流，污染物指标备注为氮氧化物，煤炭干燥无灰基挥发分小于等于10%
- Nitrogen oxides: 2.82
  污染物指标氮氧化物，10%小于煤炭干燥无灰基挥发分小于等于20%的末端治理技术是其他（直排），末端治理设施实际运行率（k值）计算公式为脱硝设施年实际运行小时数/机组年实际运行小时数。原文件中描述污染物类别为废气，污染物指标为氮氧化物，10%小于煤炭干燥无灰基挥发分小于等于20%，此处对其进行了匹配工作，将其匹配到LCAflow库里面相最符合的流，污染物指标备注为氮氧化物，10%小于煤炭干燥无灰基挥发分小于等于20%
- Nitrogen oxides: 0.564
  污染物指标氮氧化物，10%小于煤炭干燥无灰基挥发分小于等于20%的末端治理技术是高效选择性催化还原法（SCR）③，其效率为80，末端治理设施实际运行率（k值）计算公式为脱硝设施年实际运行小时数/机组年实际运行小时数，③高效氮氧化物末端治理技术：采取高效低氮燃烧技术、增设脱硝催化剂层数等措施，满足《燃煤电厂超低排放烟气治理工程技术规范》（HJ2053-2105）相关
  要求。。原文件中描述污染物类别为废气，污染物指标为氮氧化物，10%小于煤炭干燥无灰基挥发分小于等于20%，此处对其进行了匹配工作，将其匹配到LCAflow库里面相最符合的流，污染物指标备注为氮氧化物，10%小于煤炭干燥无灰基挥发分小于等于20%
- Nitrogen oxides: 0.846
  污染物指标氮氧化物，10%小于煤炭干燥无灰基挥发分小于等于20%的末端治理技术是选择性催化还原法（SCR），其效率为70，末端治理设施实际运行率（k值）计算公式为脱硝设施年实际运行小时数/机组年实际运行小时数。原文件中描述污染物类别为废气，污染物指标为氮氧化物，10%小于煤炭干燥无灰基挥发分小于等于20%，此处对其进行了匹配工作，将其匹配到LCAflow库里面相最符合的流，污染物指标备注为氮氧化物，10%小于煤炭干燥无灰基挥发分小于等于20%
- Nitrogen oxides: 3.29
  污染物指标氮氧化物，20%小于煤炭干燥无灰基挥发分小于等于37%的末端治理技术是其他（直排），末端治理设施实际运行率（k值）计算公式为脱硝设施年实际运行小时数/机组年实际运行小时数。原文件中描述污染物类别为废气，污染物指标为氮氧化物，20%小于煤炭干燥无灰基挥发分小于等于37%，此处对其进行了匹配工作，将其匹配到LCAflow库里面相最符合的流，污染物指标备注为氮氧化物，20%小于煤炭干燥无灰基挥发分小于等于37%
- Nitrogen oxides: 0.8225
  污染物指标氮氧化物，20%小于煤炭干燥无灰基挥发分小于等于37%的末端治理技术是高效选择性催化还原法（SCR）③，其效率为75，末端治理设施实际运行率（k值）计算公式为脱硝设施年实际运行小时数/机组年实际运行小时数，③高效氮氧化物末端治理技术：采取高效低氮燃烧技术、增设脱硝催化剂层数等措施，满足《燃煤电厂超低排放烟气治理工程技术规范》（HJ2053-2106）相关
  要求。。原文件中描述污染物类别为废气，污染物指标为氮氧化物，20%小于煤炭干燥无灰基挥发分小于等于37%，此处对其进行了匹配工作，将其匹配到LCAflow库里面相最符合的流，污染物指标备注为氮氧化物，20%小于煤炭干燥无灰基挥发分小于等于37%
- Nitrogen oxides: 0.9212
  污染物指标氮氧化物，20%小于煤炭干燥无灰基挥发分小于等于37%的末端治理技术是选择性催化还原法（SCR），其效率为72，末端治理设施实际运行率（k值）计算公式为脱硝设施年实际运行小时数/机组年实际运行小时数。原文件中描述污染物类别为废气，污染物指标为氮氧化物，20%小于煤炭干燥无灰基挥发分小于等于37%，此处对其进行了匹配工作，将其匹配到LCAflow库里面相最符合的流，污染物指标备注为氮氧化物，20%小于煤炭干燥无灰基挥发分小于等于37%
- Nitrogen oxides: 1.11
  污染物指标氮氧化物（SNCR，煤炭干燥无灰基挥发分小于等于10%）的末端治理技术是其他（直排），末端治理设施实际运行率（k值）计算公式为脱硝设施年实际运行小时数/机组年实际运行小时数。原文件中描述污染物类别为废气，污染物指标为氮氧化物（SNCR，煤炭干燥无灰基挥发分小于等于10%），此处对其进行了匹配工作，将其匹配到LCAflow库里面相最符合的流，污染物指标备注为氮氧化物（SNCR，煤炭干燥无灰基挥发分小于等于10%）
- Nitrogen oxides: 0.3885
  污染物指标氮氧化物（SNCR，煤炭干燥无灰基挥发分小于等于10%）的末端治理技术是高效选择性催化还原法（SCR）③，其效率为65，末端治理设施实际运行率（k值）计算公式为脱硝设施年实际运行小时数/机组年实际运行小时数，③高效氮氧化物末端治理技术：采取高效低氮燃烧技术、增设脱硝催化剂层数等措施，满足《燃煤电厂超低排放烟气治理工程技术规范》（HJ2053-2107）相关
  要求。。原文件中描述污染物类别为废气，污染物指标为氮氧化物（SNCR，煤炭干燥无灰基挥发分小于等于10%），此处对其进行了匹配工作，将其匹配到LCAflow库里面相最符合的流，污染物指标备注为氮氧化物（SNCR，煤炭干燥无灰基挥发分小于等于10%）
- Nitrogen oxides: 0.555
  污染物指标氮氧化物（SNCR，煤炭干燥无灰基挥发分小于等于10%）的末端治理技术是选择性催化还原法（SCR），其效率为50，末端治理设施实际运行率（k值）计算公式为脱硝设施年实际运行小时数/机组年实际运行小时数。原文件中描述污染物类别为废气，污染物指标为氮氧化物（SNCR，煤炭干燥无灰基挥发分小于等于10%），此处对其进行了匹配工作，将其匹配到LCAflow库里面相最符合的流，污染物指标备注为氮氧化物（SNCR，煤炭干燥无灰基挥发分小于等于10%）
- Nitrogen oxides: 0.95
  污染物指标氮氧化物（SNCR，10%小于煤炭干燥无灰基挥发分小于等于20%）的末端治理技术是其他（直排），末端治理设施实际运行率（k值）计算公式为脱硝设施年实际运行小时数/机组年实际运行小时数。原文件中描述污染物类别为废气，污染物指标为氮氧化物（SNCR，10%小于煤炭干燥无灰基挥发分小于等于20%），此处对其进行了匹配工作，将其匹配到LCAflow库里面相最符合的流，污染物指标备注为氮氧化物（SNCR，10%小于煤炭干燥无灰基挥发分小于等于20%）
- Nitrogen oxides: 0.3325
  污染物指标氮氧化物（SNCR，10%小于煤炭干燥无灰基挥发分小于等于20%）的末端治理技术是高效选择性催化还原法（SCR）③，其效率为65，末端治理设施实际运行率（k值）计算公式为脱硝设施年实际运行小时数/机组年实际运行小时数，③高效氮氧化物末端治理技术：采取高效低氮燃烧技术、增设脱硝催化剂层数等措施，满足《燃煤电厂超低排放烟气治理工程技术规范》（HJ2053-2108）相关
  要求。。原文件中描述污染物类别为废气，污染物指标为氮氧化物（SNCR，10%小于煤炭干燥无灰基挥发分小于等于20%），此处对其进行了匹配工作，将其匹配到LCAflow库里面相最符合的流，污染物指标备注为氮氧化物（SNCR，10%小于煤炭干燥无灰基挥发分小于等于20%）
- Nitrogen oxides: 0.475
  污染物指标氮氧化物（SNCR，10%小于煤炭干燥无灰基挥发分小于等于20%）的末端治理技术是选择性催化还原法（SCR），其效率为50，末端治理设施实际运行率（k值）计算公式为脱硝设施年实际运行小时数/机组年实际运行小时数。原文件中描述污染物类别为废气，污染物指标为氮氧化物（SNCR，10%小于煤炭干燥无灰基挥发分小于等于20%），此处对其进行了匹配工作，将其匹配到LCAflow库里面相最符合的流，污染物指标备注为氮氧化物（SNCR，10%小于煤炭干燥无灰基挥发分小于等于20%）
- Nitrogen oxides: 0.95
  污染物指标氮氧化物（SNCR，20%小于煤炭干燥无灰基挥发分小于等于37%）的末端治理技术是其他（直排），末端治理设施实际运行率（k值）计算公式为脱硝设施年实际运行小时数/机组年实际运行小时数。原文件中描述污染物类别为废气，污染物指标为氮氧化物（SNCR，20%小于煤炭干燥无灰基挥发分小于等于37%），此处对其进行了匹配工作，将其匹配到LCAflow库里面相最符合的流，污染物指标备注为氮氧化物（SNCR，20%小于煤炭干燥无灰基挥发分小于等于37%）
- Nitrogen oxides: 0.3325
  污染物指标氮氧化物（SNCR，20%小于煤炭干燥无灰基挥发分小于等于37%）的末端治理技术是高效选择性催化还原法（SCR）③，其效率为65，末端治理设施实际运行率（k值）计算公式为脱硝设施年实际运行小时数/机组年实际运行小时数，③高效氮氧化物末端治理技术：采取高效低氮燃烧技术、增设脱硝催化剂层数等措施，满足《燃煤电厂超低排放烟气治理工程技术规范》（HJ2053-2109）相关
  要求。。原文件中描述污染物类别为废气，污染物指标为氮氧化物（SNCR，20%小于煤炭干燥无灰基挥发分小于等于37%），此处对其进行了匹配工作，将其匹配到LCAflow库里面相最符合的流，污染物指标备注为氮氧化物（SNCR，20%小于煤炭干燥无灰基挥发分小于等于37%）
- Nitrogen oxides: 0.475
  污染物指标氮氧化物（SNCR，20%小于煤炭干燥无灰基挥发分小于等于37%）的末端治理技术是选择性催化还原法（SCR），其效率为50，末端治理设施实际运行率（k值）计算公式为脱硝设施年实际运行小时数/机组年实际运行小时数。原文件中描述污染物类别为废气，污染物指标为氮氧化物（SNCR，20%小于煤炭干燥无灰基挥发分小于等于37%），此处对其进行了匹配工作，将其匹配到LCAflow库里面相最符合的流，污染物指标备注为氮氧化物（SNCR，20%小于煤炭干燥无灰基挥发分小于等于37%）
- mercury: nan
  污染物指标汞及其化合物的末端治理技术是协同脱汞，其效率为25.73MHgar+84.12，末端治理设施实际运行率（k值）计算公式为取该机组除尘、脱硝脱硫K的最小值。原文件中描述污染物类别为废气，污染物指标为汞及其化合物，此处对其进行了匹配工作，将其匹配到LCAflow库里面相最符合的流，污染物指标备注为汞及其化合物
- volatile organic compound: nan
  污染物指标挥发性有机物的末端治理技术是/。原文件中描述污染物类别为废气，污染物指标为挥发性有机物，此处对其进行了匹配工作，将其匹配到LCAflow库里面相最符合的流，污染物指标备注为挥发性有机物

## Use advice
This dataset is derived from the Pollution Source Census Report and contains information on pollution emissions and related products. However, it does not include data on energy or chemical consumption, nor does it provide information on waste or co-product generation. When utilizing this dataset, please supplement the missing data based on actual conditions before use
该数据集来源于污染源普查报告，包含污染物排放及相关产品信息，但不包含能源或化学品消耗数据，也不提供废弃物或共生产物产生信息。在使用该数据集时，请根据实际情况补充缺失数据后再使用。

## Review details
Inventory: The internal review was done by several iteration steps concerning raw data validation, raw data documentation, representativity, completeness and consistency of modelling with regard to ISO 14040 and 14044.
清单： 内部审查通过几个迭代步骤完成，涉及原始数据验证、原始数据记录、代表性、完整性、与 ISO 14040 和 14044 有关的建模的一致性。

## Data sources
- 第二次全国污染源普查产排污核算系数手册（试用版）,四级代码4411、4412文件，在完整版文件中第5333页
