# 砖生产 ; 透水砖 ; 切割工艺

Dataset: ILCD process, Unit process, single operation
Geography: JNA-SD-CN
Reference year: 2018
Classification: Unit processes / Materials production / Other mineralic materials
Functional unit: The functional unit is the area of 1 m2 brick products.
Generated by: 王湘锦, r99rt4@163.com
Owner: 天工LCI数据工作小组
Review: Dependent internal review by 天工LCI数据工作小组
Amounts: no units in this file; such an amount is in the reference unit of its flow, which a separate flow dataset defines
copyright: false
licenseType: Free of charge for all users and uses

## General comment
非烧结砖块中的透水砖生产工艺

## Technical purpose
该数据集中使用切割工艺的透水砖旨在应用于考虑水渗透和排水的铺路施工中。这些砖块适用于在城市景观中创建环保、耐用的表面，如人行道、庭院和公共广场。

## Reference product
- green brick: 94; measured
  细坯

## Inputs
- Clay Body: 106; measured
- Electricity: 0.49248; measured

## Outputs
- particles (PM10): 0.000294; measured

## Deviations from the LCI method approaches
本研究采用了 ReCiPe midpoint（H）模型。

## Data selection and combination
本研究从济南顺德水泥制品有限公司收集了混凝土路面砖和透水砖的生产能耗以及各种原材料、能源投入和废气排放的相关数据。济南顺德水泥制品有限公司 山东省。

## Sampling procedure
原材料、能源投入和废物排放的大部分数据都是从生产厂家的现场调查中收集的。减水剂，其化学成分是磺酸钠盐的甲醛缩合物

## Use advice
使用该数据集的用户在将这些数据应用于其他环境时，应考虑济南顺德水泥制品有限公司生产环境的具体条件。在不同生产规模、地理位置和技术变化的情况下，必须调整数据。用作标定标准的功能单位是1平方米砖制品。数据包括能耗、原料使用和废气排放，应在环境性能的背景下谨慎使用。在评估中应考虑基于关键工艺输入和输出变化5%的敏感性分析。

## Review details
清单： 内部审查通过几个迭代步骤完成，涉及原始数据验证、原始数据记录、代表性、完整性、与 ISO 14040 和 14044 有关的建模的一致性。

## Data sources
- Yuan, X. et al. Environmental and economic impacts assessment of concrete pavement brick and permeable brick production process - A case study in China. Journal of Cleaner Production 171, 198–208 (2018).
