# Meshversionink|Epoxyresins,phenolicresins,polyamideresins,organicpigments,organicsolvents|Liquid ink process|All sizes / 网孔版油墨|环氧树脂、酚醛树脂、聚酰胺树脂、有机颜料、有机溶剂|液体墨工艺|所有规模

Dataset: ILCD process, Unit process, single operation
Geography: CN
Reference year: 2019
Classification: Materials production / Organic chemicals
Generated by: The data was created by the Office of the Second National Pollution Source Census of the Ministry of Ecology and Environment, and the data was organized by the TianGong Plan team for ILCD format / 生态环境部第二次全国污染源普查工作办公室创建数据，天工计划团队常慧敏整理数据为ILCD格式
Owner: Tiangong LCI Data Working Group / 天工LCI数据工作小组
Review: Dependent internal review by Tiangong LCI Data Working Group / 天工LCI数据工作小组
Amounts: no units in this file; such an amount is in the reference unit of its flow, which a separate flow dataset defines
copyright: false
licenseType: Free of charge for all users and uses

## General comment
the Technical of end-of-pipe management technology for pollution volatile organic compoundisOther，Its Technical efficiency of end-of-pipe management33

## Reference product
- Screen Printing Stencil Carrier: 1000; calculated
  源文件中描述为为网孔版油墨，此处对其进行了匹配工作，将其匹配到LCAflow库里面相最符合的流，污染物指标备注为工业废气量

## Outputs
All rows: calculated
- Exhaust gas: 4550
  污染物指标工业废气量的末端治理技术是/，其效率为0。原文件中描述污染物类别为废气，污染物指标为工业废气量，此处对其进行了匹配工作，将其匹配到LCAflow库里面相最符合的流，污染物指标备注为工业废气量
- particles (PM2.5 - PM10): 0.01
  污染物指标颗粒物的末端治理技术是袋式除尘，其效率为90，末端治理设施实际运行率（k值）计算公式为k=处理设施年耗电量（千瓦时）/(设备额定功率（千瓦）×设备运行时间（小时））。原文件中描述污染物类别为废气，污染物指标为颗粒物，此处对其进行了匹配工作，将其匹配到LCAflow库里面相最符合的流，污染物指标备注为颗粒物
- particles (PM2.5 - PM10): 0.01
  污染物指标颗粒物的末端治理技术是旋风+布袋，其效率为90，末端治理设施实际运行率（k值）计算公式为k=处理设施年耗电量（千瓦时）/(设备额定功率（千瓦）×设备运行时间（小时））。原文件中描述污染物类别为废气，污染物指标为颗粒物，此处对其进行了匹配工作，将其匹配到LCAflow库里面相最符合的流，污染物指标备注为颗粒物
- volatile organic compound: 13.42
  污染物指标挥发性有机物的末端治理技术是吸附/热力燃烧法，其效率为39，末端治理设施实际运行率（k值）计算公式为k=处理设施年耗电量（千瓦时）/(设备额定功率（千瓦）×设备运行时间（小时））。原文件中描述污染物类别为废气，污染物指标为挥发性有机物，此处对其进行了匹配工作，将其匹配到LCAflow库里面相最符合的流，污染物指标备注为挥发性有机物
- volatile organic compound: 16.28
  污染物指标挥发性有机物的末端治理技术是光解，其效率为26，末端治理设施实际运行率（k值）计算公式为k=处理设施年耗电量（千瓦时）/(设备额定功率（千瓦）×设备运行时间（小时））。原文件中描述污染物类别为废气，污染物指标为挥发性有机物，此处对其进行了匹配工作，将其匹配到LCAflow库里面相最符合的流，污染物指标备注为挥发性有机物
- volatile organic compound: 13.42
  污染物指标挥发性有机物的末端治理技术是吸附/催化燃烧法，其效率为39，末端治理设施实际运行率（k值）计算公式为k=处理设施年耗电量（千瓦时）/(设备额定功率（千瓦）×设备运行时间（小时））。原文件中描述污染物类别为废气，污染物指标为挥发性有机物，此处对其进行了匹配工作，将其匹配到LCAflow库里面相最符合的流，污染物指标备注为挥发性有机物
- volatile organic compound: 17.6
  污染物指标挥发性有机物的末端治理技术是低温等离子体，其效率为20，末端治理设施实际运行率（k值）计算公式为k=处理设施年耗电量（千瓦时）/(设备额定功率（千瓦）×设备运行时间（小时））。原文件中描述污染物类别为废气，污染物指标为挥发性有机物，此处对其进行了匹配工作，将其匹配到LCAflow库里面相最符合的流，污染物指标备注为挥发性有机物
- volatile organic compound: 9.02
  污染物指标挥发性有机物的末端治理技术是直接燃烧法，其效率为59，末端治理设施实际运行率（k值）计算公式为k=处理设施年耗电量（千瓦时）/(设备额定功率（千瓦）×设备运行时间（小时））。原文件中描述污染物类别为废气，污染物指标为挥发性有机物，此处对其进行了匹配工作，将其匹配到LCAflow库里面相最符合的流，污染物指标备注为挥发性有机物
- volatile organic compound: 9.02
  污染物指标挥发性有机物的末端治理技术是催化燃烧法，其效率为59，末端治理设施实际运行率（k值）计算公式为k=处理设施年耗电量（千瓦时）/(设备额定功率（千瓦）×设备运行时间（小时））。原文件中描述污染物类别为废气，污染物指标为挥发性有机物，此处对其进行了匹配工作，将其匹配到LCAflow库里面相最符合的流，污染物指标备注为挥发性有机物
- volatile organic compound: 13.42
  污染物指标挥发性有机物的末端治理技术是吸附+蒸汽解析，其效率为39，末端治理设施实际运行率（k值）计算公式为k=处理设施年耗电量（千瓦时）/(设备额定功率（千瓦）×设备运行时间（小时））。原文件中描述污染物类别为废气，污染物指标为挥发性有机物，此处对其进行了匹配工作，将其匹配到LCAflow库里面相最符合的流，污染物指标备注为挥发性有机物
- volatile organic compound: 14.74
  污染物指标挥发性有机物的末端治理技术是其他，其效率为33，末端治理设施实际运行率（k值）计算公式为k=处理设施年耗电量（千瓦时）/(设备额定功率（千瓦）×设备运行时间（小时））。原文件中描述污染物类别为废气，污染物指标为挥发性有机物，此处对其进行了匹配工作，将其匹配到LCAflow库里面相最符合的流，污染物指标备注为挥发性有机物

## Use advice
This dataset is derived from the Pollution Source Census Report and contains information on pollution emissions and related products. However, it does not include data on energy or chemical consumption, nor does it provide information on waste or co-product generation. When utilizing this dataset, please supplement the missing data based on actual conditions before use
该数据集来源于污染源普查报告，包含污染物排放及相关产品信息，但不包含能源或化学品消耗数据，也不提供废弃物或共生产物产生信息。在使用该数据集时，请根据实际情况补充缺失数据后再使用。

## Review details
Inventory: The internal review was done by several iteration steps concerning raw data validation, raw data documentation, representativity, completeness and consistency of modelling with regard to ISO 14040 and 14044.
清单： 内部审查通过几个迭代步骤完成，涉及原始数据验证、原始数据记录、代表性、完整性、与 ISO 14040 和 14044 有关的建模的一致性。

## Data sources
- 第二次全国污染源普查产排污核算系数手册（试用版）,二级代码26,四级代码2642文件，在完整版文件中第4111页
