# Solvent extraction of REEs|REE|bastnaesite route|REE containing ore

Dataset: ILCD process, Unit process, single operation
Geography: NMG-CN
Reference year: 2014
Classification: Materials production / Other mineralic materials
Functional unit: The functional unit of this study is the production of 1 kg of the basket REO from each corresponding mineralogical and processing route.
LCI method principle: Attributional
LCI method approaches: Allocation - market value
Generated by: Tao Wang, twang@iue.ac.cn
Review: Dependent internal review by Tiangong LCI Data Working Group
Amounts: no units in this file; such an amount is in the reference unit of its flow, which a separate flow dataset defines
copyright: false

## Technology and included processes
In this study, the REE production system was analyzed from mining up to and including solvent extraction which contains product finishing processes such as precipitation and calcination

## Reference product
- REO: 1; article inperiodical

## Inputs
All rows: article inperiodical
- RE chloride solution: 1.12
  Concentrated RECl Solution from acid roasting
- Hydrochloric acid: 6
- Disooctyl Phosphate (P204): 0.005
  P204 Extractant
- ammonia: 0.6
- Kerosene: 0.02
- Ammonium bicarbonate: 1.6
- Sodium carbonate: 1.05
- Active carbon: 0.04
  Powdered Activated Carbon
- Electricity: 21.6
- water: 200

## Outputs
All rows: article inperiodical
- Spray mold: 1.08
  Ammonium Chloride
- Suspended solids, unspecified: 0.04
- chemical oxygen demand: 0.02
- ammonia: 0.15
- lead: 0.0001
- Oils, unspecified: 0.001
- copper: 7.13e-7
- zinc: 0.0003
- cadmium: 1.6e-5
- chromium: 0.0002
- chromium VI: 6e-5
- nickel: 3.68e-6
- mercury: 1e-9
- phosphorus, total: 0.0006
  Total Phosphorous (water, unspecified)
- nitrogen, total (excluding N2): 0.01
- Dust (unspecified, from stack): 1.68e-6
- hydrogen chloride: 2.688e-6
- carbon dioxide: 0.00144655
- sulphuric acid: 1.512e-6
- chloride: 1.008e-6
- nitrous oxide: 6.719e-6

## Deviations from the LCI method approaches
In this study, the REE production system was analyzed from mining up to and including solvent extraction which contains product finishing processes such as precipitation and calcination (Fig. 1). The other categories assessed in the literature review were mineral type, radioactivity, waste treatment, and co-mining. For mineral type, it was noted that the mineralogy accounted for in each study was different, which makes comparison difficult. For radioactivity, we marked with an X those studies which exemplified radioactivity flows in the LCI (if provided). For waste, we distinguished those LCIs which quantified waste treatment flows. For co-mining, since all REE are co-products of each other, this column is meant to highlight the co-products in addition to REE.

## Review details
Inventory: The internal review was done by several iteration steps concerning raw data validation, raw data documentation, representativity, completeness and consistency of modelling with regard to ISO 14040 and 14044.; Documentation: The review of the documentation was performed by Ecobilan and is in compliance with ISO 14040 and 14044. The data set documentation is correct in view of the appropriateness of the information provided. It includes all relevant information in view of data quality and scope of application of the respective LCI result.

## Data sources
- Bailey, G. et al. Review and new life cycle assessment for rare earth production from bastnäsite, ion adsorption clays and lateritic monazite. Resources, Conservation and Recycling 155, 104675 (2020).
