# 高冲击聚苯乙烯 （HIPPS）生产

Dataset: ILCD process
Geography: BR
Reference year: 2010
Valid until: 2011
Classification: Unit processes / Materials production / Plastics
Functional unit: 1 ton of HIPS
Generated by: 李智伟,
Owner: 天工LCI数据工作小组
Review: Dependent internal review by 天工LCI数据工作小组
Amounts: no units in this file; such an amount is in the reference unit of its flow, which a separate flow dataset defines
licenseType: Free of charge for all users and uses

## General comment
The synthesis of HIPS starts by dissolving polybutadiene (C4H6) in a mixture of C8H8 and additives (diluents, chain-transfer agents, and initiators).

## Geography
巴西南部/东南地区工厂

## Time period
2010-2011年在巴西南部/东南部地区的工厂中收集了初级和次级数据。

## Technical purpose
通过这个工业过程生产的高冲击聚苯乙烯（HIPS）用于制造需耐用性和抗冲击性的产品。它通常用来制作家用电器、电子外壳、玩具和汽车部件等物品。此外，通用聚苯乙烯（GPPS）可用于包括一次性餐具、CD盒和各种包装材料等广泛的应用。

## Reference product
- high impact polystyrene granulate (HIPS): 1000

## Inputs
- benzene: 268
- ethylene: 777
- polybutadiene granulate (PB): 78.6
- light fuel oil: 88.3
- nitrogen: 6.58
- water: 9750
- Electricity: 982.8
- heat: 9310

## Outputs
- carbon dioxide (fossil): 0.428
  原文未区分bio和fossil，根据专家判断此处为fossil
- methane (fossil): 0.0017
  原文未区分bio和fossil，根据专家判断此处为fossil
- chemical oxygen demand: 0.004
- Suspended solids, unspecified,Suspended solids, unspecified: 7.38

## Use advice
使用这个数据集的用户应注意，该信息特定于巴西南部/东南部地区的HIPS和GPPS合成，反映了区域生产参数和环境影响。这些数据应仅应用于与这些地区和2010-2011年的生产技术相关的场景。在将这些数据概括为其他情境或时间框架时要小心。根据聚苯乙烯材料的适宜性，包括对终生处理和循环实践的考虑。

## Review details
清单： 内部审查通过几个迭代步骤完成，涉及原始数据验证、原始数据记录、代表性、完整性、与 ISO 14040 和 14044 有关的建模的一致性。

## Data sources
- Hansen, A. P.; da Silva, G. A.; Kulay, L. Evaluation of the Environmental Performance of Alternatives for Polystyrene Production in Brazil. Science of The Total Environment 2015, 532, 655–668.
