# East China Wheat | Shandong Wheat Production

Dataset: ILCD process, Unit process, single operation
Geography: ZB-SD-CN
Classification: Materials production / Other mineralic materials
Functional unit: 1 t
LCI method principle: Attributional
LCI method approaches: Consequential
Generated by: Haoran Zhang, hrzhang@whu.edu.cn
Review: Dependent internal review by Tiangong LCI Data Working Group
Amounts: no units in this file; such an amount is in the reference unit of its flow, which a separate flow dataset defines
copyright: false

## Geography
Huantai County

## Reference product
- maize: 1000

## Inputs
All rows: measured
- hard coal: 282.72
- heavy fuel oil: 12.15
- gasoline (regular): 1.8
- Diesel: 5.23
- natural gas; 44.1 MJ/kg: 27.1

## Outputs
- carbon monoxide: 0.33
- Nitrogen oxides: 1.45
- sulfur dioxide: 2.52
- methane: 1.87
- nitrous oxide: 0.04
- carbon dioxide (fossil): 611.75
- ammonium: 5.34
- Nitrogen trioxide: 2.43

## Deviations from the LCI method approaches
The winter wheat lifecycle mainly includes stages such as raw material extraction and transportation, as well as the production and transportation of fertilizers and pesticides, and crop planting.

## Data selection and combination
常
规管理措施(conventional management practices, CMP)
来自对桓台县10 个乡镇92 个农户近3 年投入产出
的调查。化肥主要有尿素、复合肥、过磷酸钙、磷酸二
铵和氯化钾。杀虫剂主要使用氧化乐果和辛硫磷，除
草剂主要是2,4- 滴丁酯和莠去津等。推荐管理措施
(recommended management practices, RMP)来自田方正
等[8]的水肥管理模式优化研究结果，不使用化学农药，
根据土壤肥力状况应用目标产量配方施肥法计算氮、
磷、钾施用量。土肥、磷、钾和2/3 的氮肥作底肥，1/3
的氮肥作拔节追肥。

## Review details
Inventory: The internal review was done by several iteration steps concerning raw data validation, raw data documentation, representativity, completeness and consistency of modelling with regard to ISO 14040 and 14044.; Documentation: The review of the documentation was performed by Ecobilan and is in compliance with ISO 14040 and 14044. The data set documentation is correct in view of the appropriateness of the information provided. It includes all relevant information in view of data quality and scope of application of the respective LCI result.

## Data sources
- 王明新,包永红,吴文良等.华北平原冬小麦生命周期环境影响评价[J].农业环境科学学报,2006(05):1127-1132.
