# Methanol Production | Methanol | Syngas to Methanol Route | Syngas

Dataset: ILCD process, Unit process, black box
Geography: ZJ-GD-CN
Reference year: 2018
Classification: Materials production / Other mineralic materials
Functional unit: A functional unit is defined as 4.48 ton of MTO methanol product
LCI method principle: Attributional
LCI method approaches: Allocation - mass
Generated by: Yanan Ren, renyn15@tsinghua.org.cn
Review: Dependent internal review by Tiangong LCI Data Working Group
Amounts: no units in this file; such an amount is in the reference unit of its flow, which a separate flow dataset defines
copyright: false

## General comment
ID14 Propylene Production | Propylene | Coal to Olefins Route | Coal | Subordinate Process 4

## Geography
The case plant of the catalytic cracking route comes from Sinopec Zhanjiang Dongxing Petrochemical Co., Ltd. The company is located in Zhanjiang City, Guangdong Province. Its catalytic cracking olefins process was built in 2018, with an annual production capacity of 116,000 tons of propylene.

## Time period
Craft built in 2018

## Reference product
- Methanol: 4480; measured
  MTO级甲醇

## Inputs
All rows: measured
- Syngas: 4820
  净化气
- Trisodium Phosphate: 90
  磷酸三钠
- nitrogen: 3.03
  低压氮气
- process steam: 5870
  蒸汽
- Water (fresh water): 4420
  新鲜水
- electricity mix: 121.212
  电

## Outputs
- total dissolved solids: 0.00605; measured
  TDS

## Data selection and combination
The detailed input-output data of the propylene production process comes from the company's public environmental impact assessment report, including the input of raw materials and auxiliary materials, energy and resource consumption, and discharge of waste gas, wastewater and solid waste.

## Review details
Inventory: The internal review was done by several iteration steps concerning raw data validation, raw data documentation, representativity, completeness and consistency of modelling with regard to ISO 14040 and 14044.; Documentation: The review of the documentation was performed by Ecobilan and is in compliance with ISO 14040 and 14044. The data set documentation is correct in view of the appropriateness of the information provided. It includes all relevant information in view of data quality and scope of application of the respective LCI result.

## Data sources
- 吕琳. 丙烯产品环境负荷及温室气体减排的碳税政策. (大连理工大学, 2022).
