# cement production|cement, portland cement, 42.5MPa|new suspension preheater|mixed solid wastes

Dataset: ILCD process, Unit process, black box
Geography: CN
Reference year: 2009
Classification: Materials production / Other mineralic materials
Generated by: Siqi Yang
Amounts: no units in this file; such an amount is in the reference unit of its flow, which a separate flow dataset defines
copyright: false

## General comment
The Chinese LCI data are calculated with a sample of 18 cement plants with 30 production lines all over China (China Centre of National Material Life Cycle Assessment, 2012).
There are three primary production processes .The pulverized coal and raw meal preparation process include the transferring, grinding, homogenizing, and storage of raw materials, and the grinding and storage of coal. In the burning process, the ground and mixed raw materials-raw meal are input to the preheater, and then to the calciner, decomposing with 60 % of coal at 950 °C. The limestone decomposes for about 95 % in the calciner and for 5 % in the kiln. The decomposed materials fall into the kiln and are incinerated to be clinker with 40 % of coal at a temperature of over 1,400 °C. In the finishing process, the cement is produced when clinker, mineral additions, and gypsum are granulated finely by grinding mill. The raw meal is suspended and heated by recycled hot air in preheater.

## Time period
Data collection year: 2009-2012

## Model description
“1 t of portland cement” and “1 t of portland cement with 42.5 MPa of strength grade” are both used as functional units.

## Reference product
- cement, portland cement, 42.5MPa: 1000
  portland cement 42.5 MPa

## Inputs
All rows: measured
- hard coal: 103.325
  Coal (kg ce). The original data is 96 kg of standard coal, which is converted to hard coal. The conversion formula is 1 kg of hard coal = 0.929 kg of standard coal.
  The total coal consumption=coal for incineration(85) + coal for power generation by cement plant with waste heat recovery technology(11). ce, standard coal of consumed energy. The standard coal has the defined heat value of 29,308 kJ/kg ce or 7,000 kcal/kg. Thermal energy is 2814 MJ.
- electricity, medium voltage: 144
  Electricity. The electricity from power station=total electricity consumption electricity generated by cement plant with waste heat recovery technology.
- limestone, crushed, for mill: 1150
  Limestone
- sandstone: 41.1
  Sandstone
- Iron tailings: 17.5
  Ferrous tailings
- gypsum (desulphurized): 40
  Gypsum

## Outputs
All rows: measured
- Waste, from industry: 6
  Industry waste: Slag+fly ash
- carbon dioxide: 510
  CO2. CO2 from limestone decomposition
- carbon dioxide (fossil): 240
  CO2. CO2 from coal combustion
- particles (> PM10): 0.065
  PM. The particle size is not specified. Here we treat it as PM>10.
- electricity, medium voltage: 0.094
  SO2. the range is 0.048∼0.150. The SO2 emissions vary with the amount of sulfur in coal and raw materials. The amount of SO2 emissions is 0.048 kg/t portland cement on condition that less than 0.6 % of sulfur in coal. The amount of SO2 emissions is 0.150 kg/t portland cement on condition that more than 0.6 % mainly 3–10 % of sulfur in coal. The average value of SO2 emissions is 0.094 kg/t portland cement. The relative change rate is calculated by the average value.
- Nitrogen oxides: 1.6
  NOx. the range is 0.54∼2.11. The amount of NOx emissions varies with denitration (deNOx) technology applications. The amount of NOx emissions is 0.54 kg/t portland cement when multistage combustion (MSC) and selective noncatalytic reduction (SNCR) deNOx technologies are applied. The amount of NOx emissions is 2.11 kg/t portland cement when no deNOx technology is applied. The average value of NOx emissions is 1.6 kg/t portland cement. The relative change rate is calculated by the average value.

## Data selection and combination
The direct LCI (cement manufacturing) including input and output was calculated by three approaches of Mass Flow Analysis (MFA): use of on-site measurements taken in 24h all day with continuous operations of calciner and kiln, calculation by coefficients estimated from expertise, and derivation by the mass and heat balance principle.

## Sampling procedure
Data collection.Year:2009~2012; Company groups:18
Plants/production lines:30; Local production scale: Measurement method; Middle and upper: On-site by noninterested professionals.

## Data sources
- Chen Li, Suping Cui, Zuoren Nie, Xianzheng Gong, Zhihong Wang, & Norihiro Itsubo. (2015). The LCA of portland cement production in China. The International Journal of Life Cycle Assessment, 20(1), 117–127.
