# Pelleting|Pellet|Pelleting

Dataset: ILCD process, Unit process, single operation
Geography: CN
Classification: Materials production / Other mineralic materials
Generated by: Fuxiang, 1162850692@qq.com
Review: Dependent internal review by Tiangong LCI Data Working Group
Amounts: no units in this file; such an amount is in the reference unit of its flow, which a separate flow dataset defines
copyright: false

## Geography
The data of the BF-BOF pathway were obtained from the large-scale integrated steel plants in China with an attached coking plant and EAF plant.

## Reference product
- Pellet: 165.8; measured

## Inputs
All rows: measured
- Iron ore: 160.7
  Iron ore (Domestic)
- Iron ore: 1.6
  Iron ore (Import)
- dolomite: 1.8
- quicklime: 0.3
  Quicklime
- Circulating water: 100
- bentonite: 2.8
- Coke oven gas: 7.3
  COG
- Blast furnace gas: 2.9
  BFG
- Linz-Donawitz gas: 0.2
  LDG
- Raw coal: 5.2
- Electricity: 23.4

## Review details
Inventory: The internal review was done by several iteration steps concerning raw data validation, raw data documentation, representativity, completeness and consistency of modelling with regard to ISO 14040 and 14044.; Documentation: The review of the documentation was performed by Ecobilan and is in compliance with ISO 14040 and 14044. The data set documentation is correct in view of the appropriateness of the information provided. It includes all relevant information in view of data quality and scope of application of the respective LCI result.

## Data sources
- The carbon reduction potential of hydrogen in the low carbon transition of the iron and steel industry: The case of China
