# Cement clinker calcination|cement clinker|fluidized bed|phosphogypsum

Dataset: ILCD process, Unit process, single operation
Geography: YN-CN
Reference year: 2013
Classification: Materials production / Other mineralic materials
Generated by: ZengAo, m202374287@hust.edu.cn
Review: Dependent internal review by Tiangong LCI Data Working Group
Amounts: no units in this file; such an amount is in the reference unit of its flow, which a separate flow dataset defines
copyright: false

## General comment
流化床工艺，先分解后煅烧的“二步法”

## Geography
数据来源于中试生产数据与理论计算

## Technology and included processes
循环流化床分解

## Reference product
- portland cement (CEM I): 1; article inperiodical
  The original data is cement clinker, and the selected flow is ordinary Portland cement.

## Inputs
- hard coal: 0.175; article inperiodical
- phosphogypsum: 2.25; article inperiodical
- industrial area: 0.0018; article inperiodical

## Outputs
- carbon dioxide (fossil): 0.329; article inperiodical
- sulfur dioxide: 0.916; article inperiodical
- nitrous oxide: 0.007; article inperiodical
- carbon monoxide: 0.164; article inperiodical

## Data selection and combination
数据结合实测数据与理论计算

## Data treatment and extrapolations
从 物 耗、能 耗两部分入手，通过实 测 数 据 和 ＦａｃｔＳａｇｅ６．１ 软 件 计 算 得 出 的 热 力 学 数 据 ，得 出 清 单

## Review details
Inventory: The internal review was done by several iteration steps concerning raw data validation, raw data documentation, representativity, completeness and consistency of modelling with regard to ISO 14040 and 14044.

## Data sources
- 张杭 et al. 不同分解工艺下磷石膏分解制水泥熟料的LCA研究. 材料导报 27, 302–305 (2013).
