# 处置后废气;土壤异位修复;化学氧化;二次污染防治;废水、废气处置

Dataset: ILCD process, Unit process, black box
Geography: ZB-SD-CN
Reference year: 2024
Classification: Unit processes / Other Services / Repair and maintenance
Functional unit: Prevention and control of secondary pollution such as wastewater and exhaust gas generated during the ectopic chemical oxidation process of 59922m3 polluted soil.
Generated by: 杨欣桐, yangxt@caep.org.cn
Owner: 天工LCI数据工作小组
Review: Dependent internal review by 天工LCI数据工作小组
Amounts: no units in this file; such an amount is in the reference unit of its flow, which a separate flow dataset defines
copyright: false
licenseType: Free of charge for all users and uses

## General comment
二次污染防治包括废气及废水污染防治设施安装及运行、危险废物处置等过程

## Geography
污染场地位于山东省淄博市，占地总面积约8.78万 m2。

## Technology and included processes
土壤异位处置大棚建设，大棚尺寸80m×32m×9m，大棚总占地面积2560m2，地面混凝土浇筑厚度20cm；土壤修复过程共产生废水2481 m3，主要为基坑废水及洗车池废水，抽出后经化学氧化和混凝沉淀处理合格后排至市政污水管网，化学氧化及混凝药剂分别采用2.5%过硫酸钠和1‰PAM+5%PAC；修复工程共产生固废4.19吨，均为危险废物，主要为大棚尾气吸附所用活性炭以及水处理污泥，全部外运至第三方有资质单位处置

## Technical purpose
此工业过程应用于一污染场地的土壤异位化学氧化修复。该过程包括修建封闭大棚处理受污染土壤，处理修复过程中产生的废水和废气，并通过建立和运行污染防治设施确保二次污染防治。此外，运输和使用设备以及处理诸如使用过的活性炭和污泥之类的危险废物，是该过程不可分割的一部分。

## Reference product
- waste water - treated: 2481; measured
  开挖过程产生的基坑废水，以及车辆冲洗过程产生的洗车池废水

## Inputs
All rows: measured
- Exhaust gas: 1
  没有单独计算棚内土壤修复过程中废气产生量，仅计算了用于尾气处置的材料消耗量，因此采用项为计量单位
- waste water - untreated: 2481
  开挖过程产生的基坑废水，以及车辆冲洗过程产生的洗车池废水
- Electricity: 810360
- Diesel,Diesel: 0.52704
  材料和设备运输柴油消耗
- Tap Water: 4
  尾气喷淋用水
- Concrete: 512
- Steel: 16000
- Activated Carbon: 1610
- Polyacrylamide,Polyacrylamide: 148.86
- Polyaluminium Chloride,Polyaluminium Chloride: 7443
- Sodium persulfate: 3721.5

## Outputs
- Exhaust gases treated: 1; measured
- enclosed shelter: 1; measured
  大棚尺寸80m×32m×9m，大棚总占地面积2560m2，地面混凝土浇筑厚度20cm

## Use advice
在使用此数据集进行生命周期评估时，必须确保评估对二次污染的贡献，包括废物处理设施的排放。用户应当考虑修复过程中的能源与物料流、大棚建设以及随后的危险废物处置，对使用阶段的行为进行建模。这些数据的适用性具体针对涉及类似土壤修复实践的污染土壤场地，还必须考虑到地理相关性，因为当地环境法规会影响废物的处置和处理。

## Review details
清单： 内部审查通过几个迭代步骤完成，涉及原始数据验证、原始数据记录、代表性、完整性、与 ISO 14040 和 14044 有关的建模的一致性。

## Data sources
- 桑春晖,杨欣桐,张红振等. 氰化物污染土壤修复工程环境足迹评估方法和案例研究 [J/OL]. 中国环境科学, 1-11[2024-02-11].
