# 桨毂制造 ; 一个1.5 MW 风轮机旋翼

Dataset: ILCD process, Unit process, single operation
Geography: NMG-CN
Reference year: 2017
Classification: Unit processes / Systems / Other machines
Functional unit: The functional unit is 1.5 MW wind turbine
LCI method principle: Attributional
LCI method approaches: Allocation
Generated by: 赵云志, ll10088@163.com
Owner: 天工LCI数据工作小组
Review: Dependent internal review by 天工LCI数据工作小组
Amounts: no units in this file; such an amount is in the reference unit of its flow, which a separate flow dataset defines
copyright: false
licenseType: Free of charge for all users and uses

## General comment
所描述的制造过程涉及到1.5兆瓦风力发电机叶轮毂的生产。这些桨毂是风力发电机不可或缺的组成部分，设计用于将叶片与转子连接。此类毂只用于风力发电机的建设，用于生成可再生能源。内蒙古的风电场采用这些毂进行风力装机，有33台国产风力发电机，有助于可持续能源的生产。

## Geography
风电功率参数的数据来自Wang ( 2012 )。以装有33台国产1.5兆瓦( MW )风电机组的风电场为案例，分析其环境影响及其替代效应。该风电场位于我国风电装机最多的省份- -内蒙古东北部。

## Reference product
- Rotors blade hub of wind turbine: 1; estimated

## Inputs
- iron: 10000; calculated
  Steel and iron

## Deviations from the LCI method approaches
风电的生命周期清单如下所示。生产制造阶段包括风电机组、变电站、电缆的生产，这些设备消耗大量能源，排放污染物( Xue et al . , 2015)。

## Use advice
使用这项生命周期评估数据时，应考虑制造1.5兆瓦风力发电机叶轮毂的技术细节和环境影响。用户在应用这些数据时，应考虑生产过程中的能源消耗和排放情况，如Xue等人（2015年）所详述。同样重要的是，模拟风力发电机的使用阶段行为，以了解包括其对传统能源替代效应在内的整体环境影响。这些数据主要适用于与内蒙古东北部案例研究具有相似风力发电基础设施的地区。

## Review details
清单： 内部审查通过几个迭代步骤完成，涉及原始数据验证、原始数据记录、代表性、完整性、与 ISO 14040 和 14044 有关的建模的一致性。

## Data sources
- Li, H., Jiang, H.-D., Dong, K.-Y., Wei, Y.-M. & Liao, H. A comparative analysis of the life cycle environmental emissions from wind and coal power: Evidence from China. Journal of Cleaner Production 248, 119192 (2020).
