# 天然气液化 ;卡塔尔天然气; CML方法

Dataset: ILCD process, Unit process, single operation
Geography: QA
Reference year: 2017
Classification: Unit processes / Energy carriers and technologies / Natural gas based fuels
LCI method principle: Attributional
LCI method approaches: Consequential
Generated by: Shikang Kang, 908798159@qq.com
Owner: 天工LCI数据工作小组
Review: Dependent internal review by 天工LCI数据工作小组
Amounts: no units in this file; such an amount is in the reference unit of its flow, which a separate flow dataset defines
copyright: false
licenseType: Free of charge for all users and uses

## General comment
液化天然气（LNG）预计将成为英国能源供应的重要组成部分，因为大陆架上的国家碳氢化合物储量已经开始减少。然而，使用任何碳基燃料都与温室气体排放（GHG）的减少背道而驰。因此，需要进行广泛的环境评估，以分析向英国进口液化天然气的情况。

## Geography
卡塔尔进口到英国的液化天然气

## Time period
文献发表时间

## Technology and included processes
该分析涵盖了供应链，从天然气开采到分销给最终用户，假设拥有最先进的设施和船舶。还对关键参数进行了敏感性分析，包括液化和汽化过程的能源需求、推进燃料、运输距离、油轮体积和原料气成分

## Technical purpose
来自卡塔尔的液化天然气（LNG）有望在英国的能源供应中发挥关键作用，作为大陆架减少的碳氢化合物储备的替代产品。液化天然气在各个行业中都有使用，包括住宅供暖、电力生成和作为运输燃料。该数据集代表了从卡塔尔到英国的LNG进口的环境足迹，涵盖了从提取到终端用户交付的完整供应链，并适用于能源规划、环境影响评估和制定与英国能源基础设施相关的政策的利益相关者。

## Reference product
- methane (fossil): 4.2e-5; log-normal; software or database
  原文未区分bio和fossil，根据专家判断此处为fossil。该过程来自液化阶段一氧化碳排放

## Inputs
- natural gas: 0.024; log-normal
  文献中没有input多少天然气，假设(1:1)

## Outputs
- carbon dioxide (fossil): 0.024; log-normal; software or database
  原文未区分bio和fossil，根据专家判断此处为fossil。该过程来自液化阶段二氧化碳排放
- hydrogen sulfide: 2.4e-8; log-normal; software or database
  该过程来自液化阶段硫化氢排放
- nitrous oxide: 2.2e-7; log-normal; software or database
  该过程来自液化阶段一氧化二氮排放

## Data selection and combination
本研究中使用的功能单位是在电网压力（即低于 1 bar）下输送给最终用户的 7 MJ 天然气（总热值）。由于本研究的目的是计算天然气在交付给最终用户时生产的环境负担，因此不包括使用阶段。

## Data treatment and extrapolations
前景和背景之间的区别用于识别直接、间接和避免的排放。直接排放来自前台（液化天然气供应链），而间接排放则来自后台。该评估涵盖所有这些类型的排放。

## Use advice
本数据集的用户应特别注意以下方法学建议：LNG进口的环境影响评估应包括整个供应链，从提取到分发到最终用户。评估LNG进口的生命周期时，必须核算直接、间接和避免排放。应该保持功能单位为'在电网压力下交付的7 MJ天然气'。此数据集不包括天然气的使用阶段。应根据能源需求、推进燃料、运输距离、油轮体积和原料气成分等关键参数进行敏感性分析。应承认用于评估的CML方法的限制，并且应在研究确定的技术和时间边界内解释数据。

## Review details
清单： 内部审查通过几个迭代步骤完成，涉及原始数据验证、原始数据记录、代表性、完整性、与 ISO 14040 和 14044 有关的建模的一致性。

## Data sources
- Tagliaferri, C., Clift, R., Lettieri, P. & Chapman, C. Liquefied natural gas for the UK: a life cycle assessment. Int J Life Cycle Assess 22, 1944–1956 (2017).
