# 聚氯乙烯（PVC）生产;原生聚氯乙烯;1500000t/a ;乙烯

Dataset: ILCD process, Unit process, black box
Geography: YN-CN
Reference year: 2013
Valid until: 2013
Classification: Unit processes / Materials production / Organic chemicals
Functional unit: a ton of primary PVC plastic
Generated by: 程晓宇, xiaoyucheng@email.ncu.edu.cn
Owner: 天工LCI数据工作小组
Review: Dependent internal review by 天工LCI数据工作小组
Amounts: no units in this file; such an amount is in the reference unit of its flow, which a separate flow dataset defines
copyright: false
licenseType: Free of charge for all users and uses

## General comment
原生PVC的生产流程包括两个主要技术步骤，第一个是氯乙烯单体（VCM）生产，第二个是原生PVC生产。

## Time period
本研究中提到了该企业2013年的年度原始数据。

## Technical purpose
该工业过程生产的原生聚氯乙烯(PVC)适用于制造各种产品，包括建筑材料如管道和窗框，以及生产衣物和室内装饰布料，还有电线电缆绝缘。年产量达到150000吨，表明它适合于各种行业的大规模应用。

## Reference product
- Polyvinyl Chloride: 1000; measured

## Inputs
All rows: measured
- ethene (ethylene): 470
- Catalyst: 2.18
- chlorine: 600
- oxygen: 140
- Calcium Oxide: 0.02673
- Hydrogen: 0.29
- sodium hydroxide: 10.15
- water: 5840
- Water (desalinated; deionized): 210
- Electricity: 594
- natural gas; 44.1 MJ/kg: 29.61
- unspecified: 0.08
- process steam: 1270

## Outputs
All rows: measured
- sulfur dioxide: 0.43
- Nitrogen oxides: 0.43
- particles (>PM10): 0.21
- chlorine: 9.328e-5
- hydrogen chloride: 2.33e-6
- Vinyl Chloride Monomer: 6.02e-6
- Suspended solids, unspecified,Suspended solids, unspecified: 0.00913
- biological oxygen demand: 0.00935
- chemical oxygen demand: 0.04891
- mercury: 5.6e-7
- chloride: 3.887e-5
- landfill of plastic waste: 0.01943
- waste water - untreated: 1460

## Use advice
使用这个数据集进行生命周期评估时，确保包括原生PVC的所有生命周期阶段，从VCM生产、PVC聚合到废物处理和回收过程（如果适用）。为了准确的LCA建模，还需要考虑每个阶段特定技术的能源使用、运输需求和直接排放。使用2013年的年度原始数据应反映当年的技术实践和效率。

## Review details
清单： 内部审查通过几个迭代步骤完成，涉及原始数据验证、原始数据记录、代表性、完整性、与 ISO 14040 和 14044 有关的建模的一致性。

## Data sources
- Ye, L., Qi, C., Hong, J. & Ma, X. Life cycle assessment of polyvinyl chloride production and its recyclability in China. Journal of Cleaner Production 142, 2965–2972 (2016).
