# 收集废旧光伏组件;废旧光伏组件；运输废旧光伏组件;废旧光伏组件；处理废旧光伏组件;废旧光伏组件;拆卸、玻璃分离、玻璃研磨、热处理和化学处理

Dataset: ILCD process, Unit process, black box
Geography: CN
Classification: Unit processes / End-of-life treatment / Other end-of-life services
Generated by: 王楠, 1209824595@qq.com
Owner: 天工LCI数据工作小组
Review: Dependent internal review by 天工LCI数据工作小组
Amounts: no units in this file; such an amount is in the reference unit of its flow, which a separate flow dataset defines
licenseType: Free of charge for all users and uses

## General comment
与普通垃圾类似，光伏组件的回收系统可分为三个阶段:(1)收集阶段，拆除光伏电站，将组件出售给收集方;(2)运输阶段，即将这些光伏组件运送到处理企业;(3)处理阶段，企业对光伏板进行处理，包括拆卸、玻璃剥离、玻璃研磨、热处理和化学处理等工艺，并输出部分回收材料。

## Technical purpose
此工艺流程用于回收废旧光伏组件，包括收集、运输和处理阶段。从该过程中回收的材料可以用于制造新的光伏面板或需要使用类似材料的其他产品。

## Reference product
- municipal solid waste deposition: 56; software or database
  General solid waste

## Inputs
All rows: software or database
- Electricity: 56.8
- water: 20
- Standard coal: 132.5
- Oxidant: 192.2
- Nitric acid: 0.2
- sodium hydroxide: 20.8
- Hydrofluoric acid: 5
- nitrogen: 54

## Outputs
All rows: software or database
- Glass for recovery (shards): 665
- aluminium: 179
- Ethylene-vinyl acetate copolymer,Ethylene-vinyl acetate copolymer,Ethylene-vinyl acetate copolymer: 41
  EVA
- Solar grade multi-Si: 35.1
  Solar grade silicon
- copper: 4.4
- silver: 0.51
- Hazardous waste (unspec.): 7.2
  Hazardous solid waste
- Medium and low radioactive liquid waste: 18.6
  Liquid waste
- carbon dioxide: 144.5
- sulfur dioxide: 71.4
- Nitrogen oxides: 108

## Use advice
使用此数据集进行生命周期评估（LCA）时，请确保计算回收过程中每个阶段的能源和材料输入。还应考虑运输的环境影响以及评估整体可持续性时处理过程的效率。光伏组件的使用寿命终点还应包括物质回收的潜在益处和避免生产原始材料的影响。

## Review details
清单： 内部审查通过几个迭代步骤完成，涉及原始数据验证、原始数据记录、代表性、完整性、与 ISO 14040 和 14044 有关的建模的一致性。

## Data sources
- Liu, C., Zhang, Q. & Wang, H. Cost-benefit analysis of waste photovoltaic module recycling in China. Waste Management 118, 491–500 (2020).
