# Hydrometallurgy--organic acid leaching(Process E)

Dataset: ILCD process, Unit process, single operation
Geography: CN
Reference year: 2013
Valid until: 2017
Classification: Materials production / Other mineralic materials
Functional unit: FU is a typical type of LIB electrode material of 100 kg
Generated by: maqingyuan, m1120498928@163.com
Review: Dependent internal review by Tiangong LCI Data Working Group
Amounts: no units in this file; such an amount is in the reference unit of its flow, which a separate flow dataset defines
copyright: false

## General comment
Weak acid (e.g. acetic acid, citric acid, etc.) and reducing agent are used as leaching agent, and the weak acid can react with positive electrode active material without reacting with the aluminum foil of collector, so as to realize selective leaching of valuable metal, and the product can realize electrode active material reproduction by adjusting pH, adding metal salt and so on, so as to cause co-precipitation of valuable metal.

## Time period
Data source: 2013-2017

## Reference product
- Electrolyte: 100; input; article inperiodical
  Electrode paste

## Inputs
All rows: article inperiodical
- Acetic acid: 93.3
- Hydrogen peroxide（25%）: 17
- sodium hydroxide: 3
- Sodium carbonate: 10.6
- water,water: 380
- natural gas: 1.4
  Natural gas:8500 kCal
- Electricity: 64.08

## Outputs
All rows: article inperiodical
- Lithium carbonate: 10.5
- Graphite: 17.6
  Graphite powder
- Al/Cu foil: 5.4
- Nickel salt: 14
  Ni salt/metal
- Cobalt salt: 15
  Co salt/ metal
- Manganese salt: 12
  Mn salt/metal
- Ternary precursor: 10
  Precursor
- Slag (deposited, hibernating in ground, non elementary flow): 4.8
- carbon dioxide: 9
- waste water - treated: 360

## Data selection and combination
The input-output of the process comes from the average results of the data reported in the literature review, reflecting the representative process from "tomb" to "cradle". This study does not consider the recycling or treatment of plastic and metal shells, and labor costs, factory construction costs, and their impact on the environment are also not included in this analysis.

## Data treatment and extrapolations
It is worth noting that the EU's data is not specific to a specific industry, and some import and export data and recycling information are not suitable for China's situation. Therefore, the improved CRMs evaluation method also combines official Chinese data, literature reports, and data from other interest groups such as trade/industry associations to conduct the best estimation of data from major LIB manufacturers, recycling companies, official management agencies in China, and other stakeholders. In terms of data timeliness, the reference period used in the evaluation of CRMs is based on the latest 4-year average (i.e. 2013-2016).

## Review details
Inventory: The internal review was done by several iteration steps concerning raw data validation, raw data documentation, representativity, completeness and consistency of modelling with regard to ISO 14040 and 14044.; Documentation: The review of the documentation was performed by Ecobilan and is in compliance with ISO 14040 and 14044. The data set documentation is correct in view of the appropriateness of the information provided. It includes all relevant information in view of data quality and scope of application of the respective LCI result.

## Data sources
- 宋佳丽. 面向能源金属高效回收的资源关键性评价模型与应用. (天津大学, 2019).
