# Existing pyrometallurgy process fo ternary lithium batteries

Dataset: ILCD process, Unit process, single operation
Geography: CN
Reference year: 2018
Classification: Materials production / Metals and semimetals
Functional unit: using 1 kWh as the functionalunit
Generated by: Pengfei, pengfei24@email.ncu.edu.cn
Owner: Tiangong LCI Data Working Group
Review: Dependent internal review by Tiangong LCI Data Working Group
Amounts: no units in this file; such an amount is in the reference unit of its flow, which a separate flow dataset defines
copyright: false
licenseType: Free of charge for all users and uses

## General comment
Fully discharged EoL NCM batteries are first disassembled and crushed. The battery material is then processed through a 1400℃ smelting (or sintering) process. This is followed by acid leaching and solvent extraction. Finally, oxidation and roasting at 900℃ to obtain LiCoO2.

## Technical purpose
The pyrometallurgical process described is used for recycling end-of-life (EoL) nickel-cobalt-manganese (NCM) batteries. These recycled materials, such as LiCoO2, are particularly suitable for the production of new lithium-ion batteries.

## Reference product
- EoL NCM battery: 3.6; input; article inperiodical

## Inputs
All rows: article inperiodical
- Limestone: 1.36
- Sulphuric acid: 3.88
- sodium hydroxide: 2.88
  Sodium hydroxide, production mix/EU-28
- Hydrogen peroxide (30%): 0.085
  Hydrogen peroxide production mix/DE
- Lithium carbonate: 0.19
  Lithium carbonate, production mix/CN
- Electricity: 0.054
- natural gas: 7.4, 7.4 (2 entries)

## Outputs
- carbon dioxide: 10.32; article inperiodical
- nickel: 0.96; article inperiodical
- cobalt: 0.32; measured
- copper: 0.98; measured
- aluminium: 0.14; measured

## Data selection and combination
The data come from multiple papers and are difficult to distinguish.

## Use advice
When using the data, it is essential to consider the efficiency and environmental impact of the pyrometallurgical recycling process. Users should note that the materials input and emitted pollutants during each stage must be accounted for in the LCA. Due to the high energy consumption, especially at the smelting and roasting stages, the impact on climate change and resource depletion should be carefully assessed. The functional unit for impact assessment based on this data is 1 kWh of battery capacity.

## Review details
Inventory: The internal review was done by several iteration steps concerning raw data validation, raw data documentation, representativity, completeness and consistency of modelling with regard to ISO 14040 and 14044.

## Data sources
- Wang, Y. et al. Environmental impact assessment of second life and recycling for LiFePO4 power batteries in China. Journal of Environmental Management 314, 115083 (2022).
