# 砖生产;非烧结砖;固化工艺

Dataset: ILCD process, Unit process, single operation
Geography: MY-SC-CN
Reference year: 2020
Classification: Unit processes / Materials production / Other mineralic materials
Functional unit: 1t WDC were chosen as the functional unit
Generated by: 王湘锦, r99rt4@163.com
Owner: 天工LCI数据工作小组
Review: Dependent internal review by 天工LCI数据工作小组
Amounts: no units in this file; such an amount is in the reference unit of its flow, which a separate flow dataset defines
copyright: false
licenseType: Free of charge for all users and uses

## General comment
以人造沙、水泥以及水基钻屑为原材料

## Technology and included processes
包括在 WDC 粉碎预处理后加入适量骨料（即人造砂），制备免烧砖。整个生产过程包括搅拌（时间为 2 分钟）、压制（压力为 3 兆帕；尺寸为 240 × 115 × 53 毫米）和维护步骤

## Technical purpose
使用固化工艺生产的非烧结砖广泛用于建筑行业，作为传统烧制砖的环保替代品。这些砖块适用于包括住宅、商业和工业建筑物在内的多种建筑结构。

## Reference product
- green brick: 4402; input; measured

## Inputs
- freshwater: 500; measured
- Electricity: 254.808; measured

## Outputs
- Non sintered brick: 3752; measured

## Deviations from the LCI method approaches
作为生命周期评估的一部分，亿科环境技术有限公司开发的 eFootprint 在线分析平台用于对整个生命周期过程进行定量分析。

## Data selection and combination
有关原材料、能源投入和污染物排放数据的信息来自绵阳建材制造有限公司。

## Sampling procedure
此外，选择 1t WDC 作为功能单位，并按照功能单位计算所有原材料、辅助材料、能耗、运输和直接排放的输入参数。

## Use advice
使用非烧结砖生产过程的数据集时，请确保将 1 吨 WDC 作为功能单元，对所有输入和输出进行核算。应用来自上游过程的低价值材料的截断规则，例如粉煤灰，根据 Zhao 等人 2020 年的规定，允许在清单中忽略低于最终产品重量 1% 的物质。始终参考生命周期评估的方法论指南，以保持分析的一致性和准确性。

## Review details
清单： 内部审查通过几个迭代步骤完成，涉及原始数据验证、原始数据记录、代表性、完整性、与 ISO 14040 和 14044 有关的建模的一致性。

## Data sources
- Liu, W. et al. Comparative life cycle assessment of cement, sintered bricks and non-sintered bricks manufacturing using water-based drilling cuttings from shale gas production in the Sichuan Basin, China. J. Environ. Manage. 314, 115135 (2022).
