# 页岩气生产;页岩气生产全生命周期泄漏

Dataset: ILCD process, Unit process, black box
Geography: CN
Classification: Unit processes / Energy carriers and technologies / Natural gas based fuels
Generated by: Pu Hong, 15695258655@163.com
Owner: 天工LCI数据工作小组
Review: Dependent internal review by 天工LCI数据工作小组
Amounts: no units in this file; such an amount is in the reference unit of its flow, which a separate flow dataset defines
copyright: false
licenseType: Free of charge for all users and uses

## General comment
此数据集涉及页岩气生产完整生命周期泄漏问题。页岩气，从页岩层中提取，主要用作天然气来源，可用于含电力生产、供暖以及作为化学品和化肥制造的原料。该数据可能与利用页岩气作为能源或原料的能源供应商、政策制定者和行业相关。

## Time period
Raw data dates between 2014-2016

## Reference product
- methane (fossil): 8.085e7; calculated
  页岩气井全生命周期最终产量（不包含泄漏部分）

## Outputs
- methane (fossil): 72000; calculated
  生产流程泄露的甲烷（四川页岩气生产过程中的泄露率依据文献为0.089%）

## Use advice
使用这个数据集时，请确保将页岩气生产的完整生命周期泄漏数据纳入项目的环境影响评估模型中。应特别注意泄漏显著的生命周期各个阶段，并在使用上下文中采取适当措施以减轻环境影响。分析人员还必须考虑到页岩气提取实践和技术的地区差异，并考虑任何反映行业规章或标准变化的更新。

## Review details
清单： 内部审查通过几个迭代步骤完成，涉及原始数据验证、原始数据记录、代表性、完整性、与 ISO 14040 和 14044 有关的建模的一致性。

## Data sources
- 李琋, 毛红敏 & 王兵. 涪陵页岩气开发生命周期温室气体排放估算. 油气田环境保护 31, 1–7 (2021).
