# Soil and groundwater remediation;In-situ;groundwater In-situ Chemical Oxidation;Pharmaceutical preparation and dispensing equipment

Dataset: ILCD process, Unit process, single operation
Geography: CA
Reference year: 2007
Classification: Other Services / Repair and maintenance
Generated by: Wang Ning, wang_ning@caep.org.cn
Owner: Tiangong LCI Data Working Group
Review: Dependent internal review by Tiangong LCI Data Working Group
Amounts: no units in this file; such an amount is in the reference unit of its flow, which a separate flow dataset defines
copyright: false
licenseType: Free of charge for all users and uses

## General comment
Pharmaceutical installations, including pharmaceutical storage tanks, mixing units

## Geography
The contaminated area was located 600 m from a river shore in the northern part of the prov-ince of Quebec， Canada.

## Technology and included processes
Construction of pharmaceutical dispensers using steel, latex and glass

## Technical purpose
The process described is intended for in-situ chemical oxidation for remediation of contaminated soil and groundwater. Specifically, it is applied within the construction of pharmaceutical production systems, including the installation of pharmaceutical storage tanks and mixing devices. This scenario is particularly relevant to environmental management and restoration at a site situated 600 meters from a river shore in the northern part of Quebec, Canada.

## Reference product
- A device for configuring solid pharmaceuticals into liquid pharmaceuticals: 1; input; estimated
  地表制药系统

## Inputs
- Steel sections: 10534; estimated
  使用铁建造地表制药系统
- Latex: 1.7; estimated
  使用乳胶造地表制药系统
- Glass (formed & finished): 167; estimated
  使用玻璃造地表制药系统

## Use advice
Users of this data set should ensure that it is applied only to scenarios that closely resemble the described industrial process in terms of geographical, hydrological, and contaminant characteristics. The data set should not be applied to remediation scenarios significantly different from the described setting without careful consideration of the technological applicability and potential methodological adjustments. Attention should also be given to the inclusion of the appropriate treatment of recyclables, if present, and the consideration of any site-specific use-phase behavior that may need to be modeled.

## Review details
Inventory: The internal review was done by several iteration steps concerning raw data validation, raw data documentation, representativity, completeness and consistency of modelling with regard to ISO 14040 and 14044.
