# 原铝生产 ; 原生铝锭 ; 铝土矿 ; 2010

Dataset: ILCD process, Unit process, single operation
Geography: CN
Reference year: 2014
Classification: Unit processes / Materials production / Metals and semimetals
Generated by: 蔡梓萌, caizm6178@163.com
Owner: 天工LCI数据工作小组
Review: Dependent internal review by 天工LCI数据工作小组
Amounts: no units in this file; such an amount is in the reference unit of its flow, which a separate flow dataset defines
copyright: false
licenseType: Free of charge for all users and uses

## General comment
本数据集代表的原铝生产涉及处理铝土矿以产生原生铝锭。这些铝锭被广泛使用于包括汽车、建筑、电子和包装工业在内的各个领域，铝的轻质、耐腐蚀及高导电性在这些产业中至关重要。该材料通常用于生产发动机缸体、车架、消费电子外壳和饮料罐等零部件和组件。

## Time period
文献发表日期

## Reference product
- aluminium, primary, ingot: 1000; missing unimportant

## Inputs
All rows: missing unimportant
- electricity, high voltage, aluminium industry: 52268.4
  电力
- hard coal: 342, 1110 (2 entries)
  煤炭
- Petroleum Coke: 38.2, 87.7 (2 entries)
  焦炭
- drying, natural gas: 76, 42 (2 entries)
  天然气
- coal gas: 709, 1260 (2 entries)
  煤气
- light fuel oil: 74, 161 (2 entries)
  燃料油

## Data selection and combination
原铝生产的资源和能耗数据，均 以《有 色 金 图 1 原铝生产的系统边界 Fig． 1 System boundary of primary aluminum production 属工业 年 鉴》 中的统计数据作为主要参考依 据。对于一些非统计性工艺数据，则来源于典型企 业生产工艺及技术指标的调研和公开发表的文献。

## Use advice
在使用本生命周期评估（LCA）数据集进行原铝生产分析时，用户应确保包括所有上游过程，如铝土矿开采、氧化铝精炼和霍尔-埃鲁电解冶炼过程。需注意数据年份（2010年），以确保分析的时间相关性。还应考虑地理位置，因为这会影响能耗和排放概况。为了得到全面结果，应包括废物管理和产品生命周期末端可能回收的考虑。自发布日期以来的方法论更新和技术变化也应纳入新评估。

## Review details
清单： 内部审查通过几个迭代步骤完成，涉及原始数据验证、原始数据记录、代表性、完整性、与 ISO 14040 和 14044 有关的建模的一致性。

## Data sources
- 郭杰, 高峰, 王志宏, 刘宇, & 龚先政. 原铝生产流程温室气体排放主要影响因素的关联度分析. 环境工程学报 8, 4858–4863 (2014).
