# Zincoxide(hypozincoxide)|Zincbakingsand,zincsootandotherzinc-containingmaterials|Smoking furnace and other processes|All sizes / /|氧化锌（次氧化锌）|锌焙砂、锌烟尘等含锌物料|烟化炉窑及其它工艺|所有规模

Dataset: ILCD process, Partly terminated system
Geography: CN
Reference year: 2019
Classification: Materials production / Other mineralic materials
Generated by: The data was created by the Office of the Second National Pollution Source Census of the Ministry of Ecology and Environment, and the data was organized by the TianGong Plan team for ILCD format / 生态环境部第二次全国污染源普查工作办公室创建数据，天工计划团队常慧敏整理数据为ILCD格式
Amounts: no units in this file; such an amount is in the reference unit of its flow, which a separate flow dataset defines
copyright: false

## Technology and included processes
the Technical of end-of-pipe management technology for pollution Zinc oxideis/
污染物指标工业废气量的末端治理技术是/，末端治理设施实际运行率（k值）计算公式为k=治理设施运行时间（小时/年）/正常生产时间（小时/年）

## Reference product
- Zinc oxide: 1000; calculated
  原文件中描述污染物类别为Product，污染物指标为氧化锌（次氧化锌），此处对其进行了匹配工作，将其匹配到LCAflow库里面相最符合的流，污染物指标备注为工业废气量

## Outputs
All rows: calculated
- Exhaust gas: 20022
  原文件中描述污染物类别为废气，污染物指标为工业废气量，此处对其进行了匹配工作，将其匹配到LCAflow库里面相最符合的流，污染物指标备注为工业废气量
- particles (PM2.5 - PM10): 16.361, 8.1805, 4.09025, 0.81805, 0.409025, 0.81805, 0.81805, 28.6318, 40.9025, 20.4513 (10 entries)
  原文件中描述污染物类别为废气，污染物指标为颗粒物，此处对其进行了匹配工作，将其匹配到LCAflow库里面相最符合的流，污染物指标备注为颗粒物
- sulfur dioxide: 5.2198, 5.2198, 5.2198, 5.2198, 5.2198, 7.8297, 5.2198 (7 entries)
  原文件中描述污染物类别为废气，污染物指标为二氧化硫，此处对其进行了匹配工作，将其匹配到LCAflow库里面相最符合的流，污染物指标备注为二氧化硫
- Nitrogen oxides: 3.5405, 2.1243, 3.5405 (3 entries)
  原文件中描述污染物类别为废气，污染物指标为氮氧化物，此处对其进行了匹配工作，将其匹配到LCAflow库里面相最符合的流，污染物指标备注为氮氧化物
- lead: 0.786854
  原文件中描述污染物类别为废气，污染物指标为铅，此处对其进行了匹配工作，将其匹配到LCAflow库里面相最符合的流，污染物指标备注为铅
- cadmium: 0.243229
  原文件中描述污染物类别为废气，污染物指标为镉，此处对其进行了匹配工作，将其匹配到LCAflow库里面相最符合的流，污染物指标备注为镉
- arsenic: 0.112624
  原文件中描述污染物类别为废气，污染物指标为砷，此处对其进行了匹配工作，将其匹配到LCAflow库里面相最符合的流，污染物指标备注为砷
- mercury: 0.013099
  原文件中描述污染物类别为废气，污染物指标为汞，此处对其进行了匹配工作，将其匹配到LCAflow库里面相最符合的流，污染物指标备注为汞

## Data sources
- 第二次全国污染源普查产排污核算系数手册（试用版）,四级代码3212文件，在完整版文件中第4878页
