# cement production|cement, alternative constituents 21-35%|mixed solid wastes

Dataset: ILCD process, Partly terminated system
Geography: CQ-CN
Classification: Materials production / Other mineralic materials
Generated by: Siqi Yang
Amounts: no units in this file; such an amount is in the reference unit of its flow, which a separate flow dataset defines
copyright: false

## General comment
Solid waste includes slag, fly ash, gypsum powder, coal ash, blended stones, and boiler slag.
There are nearly 170 cement enterprises in Chongqing, and the total cement production in 2014 was nearly 70 million tons. At present, the raw materials used for cement production in Chongqing are mainly limestone, natural gypsum, sandstone, and blended stone, accounting for about 90%, 5%, and 3%, respectively.

## Geography
A factory in Chongqing

## Model description
The carbon footprint of production in Chongqing Cement Plant mainly includes the carbon footprint of direct fuel combustion, the carbon footprint of electricity consumption, and the physical and chemical reactions of raw materials and clinker calcination.
The main sources of carbon emissions from cement production are the clinker calcination and direct/indirect carbon emissions from fuel combustion. More than 99% of the emitted greenhouse gases are CO2, so the "carbon footprint of cement" only includes CO2 emissions and does not include other greenhouse gases.

## Reference product
- cement, alternative constituents 21-35%: 1000
  Cement

## Inputs
All rows: measured
- limestone, crushed, for mill: 944.904
  Limestone
- sandstone: 125.083
  Sandstone
- Acid slag: 190.546
  Acid residue
- hard coal: 160.361
  Bituminous coal
- blast furnace slag: 102.833
  Blast furnace slag
- ash: 104.934
  Fly ash
- gypsum (desulphurized): 60.7457
  Gypsum powder
- coal, powder: 66.086
  Coal slag
- stone: 35.5168
  Mixed stone
- Boiler slag: 30.5777
- electricity, medium voltage: 0.0377892
  Fire power generation. Power supply mode: Jiangjin Power Supply Bureau or self-generation.
- diesel: 9.118e-6
  Gasoline, the original description was diesel.
- hard coal, run-of-mine: 140.412
  Coal

## Outputs
- carbon dioxide: 667.466; measured
  Carbon footprint (CO2). Carbon emissions from raw material extraction and transportation are not taken into account. The carbon footprint of Chongqing Cement Plant mainly includes carbon emissions from direct fuel combustion, carbon emissions from electricity consumption, physical and chemical reactions of raw materials, and clinker calcination.

## Cut-off and completeness
Only focus on the carbon footprint of cement production.

## Data sources
- 杨李宁 & 付祥钊. (2016). 以重庆为案例的水泥碳足迹研究. 中国水泥, 8, 87–92.
