# Municipal wastewater treatment | Wastewater | Cyclic activated-sludge technology

Dataset: ILCD process, Unit process, black box
Reference year: 2014
Valid until: 2014
Classification: Materials production / Other mineralic materials
Generated by: YU Chenyang, yuchenyang0506@foxmail.com
Review: Dependent internal review by Tiangong LCI Data Working Group
Amounts: no units in this file; such an amount is in the reference unit of its flow, which a separate flow dataset defines

## Geography
Chongnonsi,Thailand

## Time period
2014年

## Reference product
- Wastewater: 1

## Inputs
- electricity: 1.12464
- transport in t*km
  transport by lorry

## Outputs
- Polyaluminium Chloride: 5e-5
  polymer
- Sludge: 0.0248

## Review details
Inventory: The internal review was done by several iteration steps concerning raw data validation, raw data documentation, representativity, completeness and consistency of modelling with regard to ISO 14040 and 14044.; Documentation: The review of the documentation was performed by Ecobilan and is in compliance with ISO 14040 and 14044. The data set documentation is correct in view of the appropriateness of the information provided. It includes all relevant information in view of data quality and scope of application of the respective LCI result.

## Data sources
- A comparative life cycle assessment of municipal wastewater treatment plants in Thailand under variable power schemes and effluent management programs
