# 铝电解电容器生产 ; 电容器，辅助剂和能源使用 ; 组装（包括套管）

Dataset: ILCD process, Unit process, single operation
Geography: JS-CN
Reference year: 2020
Classification: Unit processes / Materials production / Metals and semimetals
Generated by: 常慧敏, huiminchang@tsinghua.edu.cn
Owner: 天工LCI数据工作小组
Review: Dependent internal review by 天工LCI数据工作小组
Amounts: no units in this file; such an amount is in the reference unit of its flow, which a separate flow dataset defines
copyright: false
licenseType: Free of charge for all users and uses

## General comment
组装（包括套管） ; 铝电解电容器 (AEC) 生产 ; 420V 680uf

## Time period
The investigated manufacturer produced about 1.183 billion AECs of all kinds in 2020.

## Technical purpose
该工艺生产的铝电解电容器因其高电压和高电容特性被广泛用于各种电子设备中。它们通常用于电源供应器、变流器以及其他需要稳定且持久的能量存储解决方案的设备中。这些电容器，特别是420V 680uf单元，被设计用于需要可靠性能的能量调节和电路功能的特定应用。

## Reference product
- capacitor, auxilliaries and energy use: 980.1; measured
  Capacitors (before aging) [pcs]

## Inputs
All rows: measured
- electricity, high voltage, aluminium industry: 5.0004
  Electricity [kWh]
- Sealing cover ; Styrene-butadiene rubber: 2.37
  Sealing cover [kg] ; Styrene-butadiene rubber
- used beverage cans: 9.46
  Can [kg] ; CN: aluminium sheet in Gabi Database
- rivet: 0.06
  Rivet [kg] ; CN: aluminium sheet in Gabi Database
- air distribution terminal panel, steel, 120 m3/h: 0.15
  Terminal [kg]
- polyethylene terephthalate, granulate, bottle grade: 0.961
  Sleeve [kg] ; “EU-28: Polyethylene terephthalate fibres (PET)” in GDs
- elements before assembly (from soak): 1000
  Elements (before assembly) [pcs]

## Outputs
- waste capacitors: 19.9; measured
  Capacitors (waste) [pcs]

## Data selection and combination
电容器生产的库存数据来自 AEC 位于中国江苏省的生产工厂。每道工序的 LCI 数据收集的截止标准是至少覆盖输入流和输出流 95% 的质量和能量。阳极箔生产和阴极箔生产的库存数据是根据生产工艺和相应工艺参数分析获得的。上游数据（即铝锭、分选纸、运输、电力和水）来自 Gabi 软件（版本：10.6.1.35）。具体而言，《中国电力年鉴》中的中国电网概况以 2016 年为基准年。铝锭生产的基准年为 2015 年。无法获取的柠檬酸铵、五硼酸铵、NH4H2PO4 和 HBO3 数据是根据 Gabi 软件中现有材料（反应物）的化学方程式估算的。使用和报废阶段的库存数据是通过分析和计算获得的。

## Use advice
铝电解电容器生产的LCA数据的用户应注意，库存数据反映了中国江苏省特定工厂的操作情况，可能并不代表所有生产地点。它包括原料消耗、能源使用等输入以及潜在排放等输出。上游数据（铝锭和中国电网概况）的参考年分别是2015年和2016年；在模拟不同时间框架下的环境影响时应考虑这一点。使用数据时应确保其与产品生命周期的区域和时间背景相一致。另外，某些化学品的不可接近数据是估算得出的；在准确排放数据至关重要时，应考虑到这一点。

## Review details
清单： 内部审查通过几个迭代步骤完成，涉及原始数据验证、原始数据记录、代表性、完整性、与 ISO 14040 和 14044 有关的建模的一致性。

## Data sources
- Zhang, C., Jing, J., Yun, L., Zheng, Y. & Huang, H. A cradle-to-grave life cycle assessment of high-voltage aluminum electrolytic capacitors in China. J. Clean. Prod. 370, (2022).
