# 天然气开采 ; Bongkot矿场 ; 矿场开采

Dataset: ILCD process, Unit process, single operation
Geography: TH
Reference year: 2009
Classification: Unit processes / Energy carriers and technologies / Natural gas based fuels
LCI method principle: Attributional
LCI method approaches: Consequential
Generated by: Shikang Kang, 908798159@qq.com
Owner: 天工LCI数据工作小组
Review: Dependent internal review by 天工LCI数据工作小组
Amounts: no units in this file; such an amount is in the reference unit of its flow, which a separate flow dataset defines
copyright: false
licenseType: Free of charge for all users and uses

## General comment
天然气开采：作为Bang Pakong电厂原料的天然天然气主要从泰国湾Bongkot矿场开采，由PTT勘探和生产有限公司（PTT Plc）控制。这项研究的重点是Bongkot场地的主要天然气生产

## Geography
泰国湾的Bongkot矿区

## Time period
文献发表时间

## Technology and included processes
本LCA研究的目的是确定自发电从摇篮到大门以来天然气发电的每个过程的环境排放，并比较两种不同发电厂技术（即联合循环和热电）的发电过程中释放的排放物对环境的影响。本研究的主要范围是提供所有生命周期阶段（天然气开采、原油开采、天然气分离厂、发电厂和运输）的物质平衡和环境信息。天然气发电厂的所有过程都标准化为发电厂提供的 1 MWh 电力。

## Technical purpose
本工业流程描述的是作为Bang Pakong电厂原料的天然气提取过程。天然气主要来源于泰国湾的Bongkot矿区，由PTT勘探和生产有限公司管理。Bongkot场地的主要天然气生产是电力生成的关键组成部分，采用联合循环和热电发电技术。

## Reference product
- methane (fossil): 1.7991e6; log-normal; software or database
  原文未区分bio和fossil，根据专家判断此处为fossil。该过程来自矿场开采阶段甲烷总排放

## Inputs
- natural gas: 2.4372e9; log-normal
  文献中没有input多少天然气，假设(1:1)

## Outputs
- carbon dioxide (fossil): 2.4372e9; log-normal; software or database
  原文未区分bio和fossil，根据专家判断此处为fossil。该过程来自天然气电厂及天然气和燃料油上游工艺排放
- carbon monoxide (fossil): 1.03507e6; log-normal; software or database
  原文未区分bio和fossil，根据专家判断此处为fossil。该过程来自矿场开采阶段一氧化碳总排放

## Data selection and combination
LCA获得的数据主要来自主要来源，例如工厂信息;在没有原始数据的情况下，使用二手数据，例如现有文献数据、计算和测量。

## Data treatment and extrapolations
本研究仅关注每个过程的主要产品的环境流部分

## Use advice
本LCA研究旨在评估从天然气提取到交付电力的每个生命周期阶段的环境排放，提供包括提取、分离、发电和运输在内的完整周期的物质平衡和环境数据。用户应确保所使用的数据反映了Bongkot现场实际使用的过程和技术。在缺乏原始数据时，应谨慎使用二手数据源，确保它们的相关性和最新性。标准化的环境流数据是针对1 MWh电力的生产进行映射的，以便进行比较分析，并应在该背景下应用。

## Review details
清单： 内部审查通过几个迭代步骤完成，涉及原始数据验证、原始数据记录、代表性、完整性、与 ISO 14040 和 14044 有关的建模的一致性。

## Data sources
- Phumpradab, K., Gheewala, S. H. & Sagisaka, M. Life cycle assessment of natural gas power plants in Thailand. Int J Life Cycle Assess 14, 354–363 (2009).
