# 电力生产 ; 混合电力 ; 重庆

Dataset: ILCD process, Unit process, single operation
Geography: CQ-CN
Reference year: 2019
Classification: Unit processes / Energy carriers and technologies / Electricity
Generated by: 熊若熙, xiongrx0126@163.com
Owner: 天工LCI数据工作小组
Review: Dependent internal review by 天工LCI数据工作小组
Amounts: no units in this file; such an amount is in the reference unit of its flow, which a separate flow dataset defines
copyright: false
licenseType: Free of charge for all users and uses

## General comment
混合电力产生形式包括火力发电、水力发电、风力发电、核能发电和太阳能发电

## Technical purpose
本工业过程描述了重庆的混合电力生产，包括热电（可能为煤或天然气发电厂）、水电、风电、核电和太阳能发电等多种形式。这种混合电力供应用于该地区的居民、商业和工业用途。多样化的发电方式表明它被应用于电网能源供应，确保可靠性并满足重庆消费者和行业的不同需求模式。

## Reference product
- Electricity: 3.6; missing unimportant
  [{'text': '3.6', 'type': 'text'}]

## Inputs
All rows: missing unimportant
- electricity for thermal power: 2.46038
  [{'text': '3.6', 'type': 'text'}]
- electricity from hydroelectric power plant: 1.07754
  [{'text': '3.6', 'type': 'text'}]
- electricity for nuclear power: 0
  [{'text': '3.6', 'type': 'text'}]
- electricity from wind power: 0.0487764
  [{'text': '3.6', 'type': 'text'}]
- electricity for solar power: 0.013302
  [{'text': '3.6', 'type': 'text'}]

## Use advice
对于生命周期评估（LCA）实践者，在建模依赖重庆电力混合供应的产品或服务的环境影响时，必须考虑每种发电类型（热电、水电、风电、核电和太阳能）对整体混合的比例贡献，因为这影响环境影响，如温室气体排放和资源枯竭。还应考虑能源来源的季节性和使用时间的变化。数据使用者应根据地区电力消费模式和整合在重庆电网中的多样化发电方法的技术适用性，调整其影响评估模型。

## Review details
清单： 内部审查通过几个迭代步骤完成，涉及原始数据验证、原始数据记录、代表性、完整性、与 ISO 14040 和 14044 有关的建模的一致性。

## Data sources
- 能源统计年鉴2020
