# 铝电解 ; 液态原铝 ; 预焙 ; 冶金用氧化铝

Dataset: ILCD process, Unit process, single operation
Geography: CN
Reference year: 2017
Classification: Materials production / Metals and semimetals
Generated by: 常慧敏, huiminchang@tsinghua.edu.cn
Owner: 天工LCI数据工作小组
Review: Dependent internal review by 天工LCI数据工作小组
Amounts: no units in this file; such an amount is in the reference unit of its flow, which a separate flow dataset defines
copyright: false
licenseType: Free of charge for all users and uses

## General comment
通过预焙铝电解生产的液态原铝适用于冶金工艺。它通常用作多种工业中包括建筑、汽车和包装在内的铝基产品的原材料。

## Time period
IAI 2017 （GLO）

## Reference product
- aluminium, primary, liquid: 1000; software or database
  Aluminium (liquid) [kg]

## Inputs
- electricity, high voltage, aluminium industry: 50638.6; software or database
  Electricity [kWh]
- aluminium oxide, metallurgical: 1918.73; software or database
  Alumina [kg]
- steel, low-alloyed: 5.42894; software or database
  Steel [kg]
- anode, prebake, for aluminium electrolysis: 459.945; software or database
  Anodes [kg]
- aluminium fluoride: 16.4659; estimated
  Aluminium fluoride [kg] ; CN/NO: German dataset used as no specific data for CN and NO available
- fresh water: 4.45217; software or database
  Fresh water [m3]
- Water, salt, ocean: 41.591; software or database
  Sea water [m3]

## Outputs
All rows: software or database
- particles (> PM10): 1.31116
  Particulates [kg] ; >PM10
- particles (PM2.5): 0.94614
  Particulates <2.5 [kg]
- particles (PM2.5 - PM10): 0.53103
  Particulates 2.5-10 [kg]
- sulfur dioxide: 13.1823
  Sulfur dioxide [kg]
- Nitrogen oxides: 0.25268
  Nitrous oxides (as NO2)
- hydrogen fluoride: 0.59461
  Fluoride (as F) (to air) [kg]
- polycyclic aromatic hydrocarbons: 0.00417
  Total polycyclic aromatic hydrocarbons (to air) [kg]
- Methane, tetrafluoro-, R-14: 0.07008
  Tetrafluoromethane [kg]
- Ethane, hexafluoro-, HFC-116: 0.00406
  Hexafluoroethane [kg]
- Suspended solids, unspecified: 0.17718
  Suspended solids [kg]
- Fluoride: 0.07677
  Fluoride (as F) [kg]
- fresh water: 7.75991
  Fresh water [m3]
- Water, salt, ocean: 41.5894
  Sea water [m3]
- Oils, unspecified: 0.00246
  Oil and grease/total hydrocarbons [kg]
- Benzo(a)pyrene: 7.564e-5
  Benzo(a)pyrene [g]
- PAH, polycyclic aromatic hydrocarbons: 2.426e-5
  Polycyclic aromatic hydrocarbons [g]

## Data selection and combination
为了获得可靠的研究结果，我们考虑了最新的和有代表性的数据。如果 GaBi©"专业和推广 "数据库（SP 39）或文献中提供了特定地区或国家的数据，则使用这些数据。如果找不到特定地区的数据，则使用该国的可比数据或全球数据。为保持一致性，如果有相同来源和年份的数据，则使用相同来源和年份的数据。由于数据的可获得性，如果某些输入和背景过程对总输入质量的贡献小于 1%，则本研究不考虑这些输入和背景过程。对于原铝生产，本研究使用了国际铝业协会（IAI）提供的 2015 年最新 LCI 数据（国际铝业协会，2017b）。之所以使用 IAI 的数据，是因为 IAI 是一个考虑全球原铝生产的成熟机构，其数据已在铝业协会和欧洲铝业协会等研究中使用（铝业协会，2013 年；欧洲铝业协会，2018 年）。就标准化原铝生产的生命周期评估数据而言，不确定因素很少。一般来说，这些数据的组成可以完全解释和重建。

## Use advice
使用此生命周期评估(LCA)数据的用户应该注意，数据集依赖于国际铝业协会(IAI) 2015年提供的最新和最具代表性的信息。在将这些数据纳入评估或模型时，考虑其与全球铝生产标准的技术适用性。请注意，由于数据可用性，贡献总输入质量少于1%的投入和背景过程未被考虑。用户在必要时应确保通过获取来自类似年份和机构的额外数据来保持一致性。注意遵循所提供的方法论建议和为原铝生产所概述的一致技术参数。

## Review details
清单： 内部审查通过几个迭代步骤完成，涉及原始数据验证、原始数据记录、代表性、完整性、与 ISO 14040 和 14044 有关的建模的一致性。

## Data sources
- Luthin, A., Backes, J. G. & Traverso, M. A framework to identify environmental-economic trade-offs by combining life cycle assessment and life cycle costing – A case study of aluminium production. Journal of Cleaner Production 321, 128902 (2021).
