# 铝合金轮毂制造 ; 铝合金轮毂 ; 铝合金轮毂制造工艺 ; 原生铝锭

Dataset: ILCD process, Unit process, single operation
Geography: CN
Reference year: 2018
Classification: Unit processes / Materials production / Metals and semimetals
Generated by: 傅晨玲, fu-chenling@tsinghua.edu.cn
Owner: 天工LCI数据工作小组
Review: Dependent internal review by 天工LCI数据工作小组
Amounts: no units in this file; such an amount is in the reference unit of its flow, which a separate flow dataset defines
copyright: false
licenseType: Free of charge for all users and uses

## General comment
原生铝锭用于铝合金车轮毂的制造过程。这些车轮毂是汽车行业多种车辆不可或缺的组件，为轮胎提供结构支撑，对车辆的性能和安全至关重要。

## Time period
文献发表日期

## Reference product
- aluminum alloy hub: 1; missing unimportant

## Inputs
- electricity, high voltage, aluminium industry: 172.008; missing unimportant
- heavy fuel oil: 1.58; missing unimportant
- Gas, mine, off-gas, process, coal mining: 22.18; missing unimportant
- natural gas, high pressure: 1.66; missing unimportant
  Natural gas

## Outputs
- carbon dioxide (fossil),carbon dioxide (fossil): 57.16; missing unimportant
- methane (fossil): 0.11; missing unimportant

## Use advice
数据使用者应确保准确地模拟铝合金车轮毂的制造过程，考虑原生铝锭使用的具体输入和输出。应特别关注车轮毂的使用寿命末期，尤其是铝的可回收性以及由于回收造成的环境影响分配。还应考虑技术适用性以及与地理技术背景的相关性。

## Review details
清单： 内部审查通过几个迭代步骤完成，涉及原始数据验证、原始数据记录、代表性、完整性、与 ISO 14040 和 14044 有关的建模的一致性。

## Data sources
- Yi Qiu-ping & Tang Chang-ping. Environmental impact assessment of magnesium alloy automobile hub based on life cycle assessment. JOURNAL OF CENTRAL SOUTH UNIVERSITY 25, 1870–1878 (2018).
