# 熟料煅烧;熟料;普通机立窑

Dataset: ILCD process, Unit process, single operation
Geography: CN
Classification: Unit processes / Materials production / Other mineralic materials
Generated by: #REF!, ysqsophia@gmail.com
Owner: 天工LCI数据工作小组
Review: Dependent internal review by 天工LCI数据工作小组
Amounts: no units in this file; such an amount is in the reference unit of its flow, which a separate flow dataset defines
copyright: false
licenseType: Free of charge for all users and uses

## General comment
以常见的普通机立窑为研究对象。

## Technical purpose
此数据代表使用普通机立窑生产1吨水泥熟料的过程。普通机立窑是水泥工业中使用的一种工业窑炉。通过此过程生产的熟料是随后被磨细以生产水泥的中间产品。这是制造混凝土的最基本成分，混凝土在建筑行业中被广泛应用，用于建造建筑物、桥梁、道路以及其他各种形式的基础设施。

## Model description
功能单元为1吨水泥熟料。研究范围：水泥煅烧。

## Reference product
- clinker: 1000
  熟料

## Inputs
- limestone, crushed, for mill: 1165.2
  石灰石
- clay: 173.4
  粘土
- iron, powder: 65.9
  铁粉
- hard coal; 26.3 MJ/kg: 210
  燃煤。能耗数据来自文献，燃煤热值以5500kcal/kg计，固定碳以50%计。
- Electricity: 82.512
  电。能耗数据来自文献。

## Outputs
- carbon dioxide (fossil): 878.99
  CO2。燃煤CO2由固定碳计算而来，原料CO2按碳酸钙Cao含量为50%计算得到。
- carbon monoxide (fossil): 65.672
  CO。由于缺乏来源，其它污染数据参考电厂燃煤按能耗换算得到。
- sulfur dioxide: 1.0258
  SO2。NOx、SO2量由建材行业平均排放因子计算。
- Nitrogen oxides: 2.2589
  NOx。NOx、SO2量由建材行业平均排放因子计算。
- hydrocarbons (unspecified): 0.0357
  CxHy。由于缺乏来源，其它污染数据参考电厂燃煤按能耗换算得到。

## Use advice
在模拟与普通机立窑生产水泥熟料相关的环境影响时，应用此数据集。用户应注意技术进步和效率提高可能会改变影响，因此如果用于现代生产设施的生命周期评估，应该严格审查这些数据。使用该数据时，应考虑包括与原材料提取和运输相关的排放和能耗，因为这些是熟料生产过程的关键方面。

## Review details
清单： 内部审查通过几个迭代步骤完成，涉及原始数据验证、原始数据记录、代表性、完整性、与 ISO 14040 和 14044 有关的建模的一致性。

## Data sources
- 刘顺妮. (2003). 水泥-混凝土体系环境影响评价及其应用研究 [博士, 武汉理工大学].
