# Electrostaticcoating|Fitnessequipment|Plasticpowder|Electrostaticcoating|All sizes / 静电喷涂|健身器材|塑粉|静电喷涂|所有规模

Dataset: ILCD process, Unit process, single operation
Geography: CN
Reference year: 2019
Classification: Systems / Paints and chemical preparations
Generated by: The data was created by the Office of the Second National Pollution Source Census of the Ministry of Ecology and Environment, and the data was organized by the TianGong Plan team for ILCD format / 生态环境部第二次全国污染源普查工作办公室创建数据，天工计划团队常慧敏整理数据为ILCD格式
Owner: Tiangong LCI Data Working Group / 天工LCI数据工作小组
Amounts: no units in this file; such an amount is in the reference unit of its flow, which a separate flow dataset defines
copyright: false
licenseType: Free of charge for all users and uses

## Technology and included processes
the Technical of end-of-pipe management technology for pollution particles (PM2.5 - PM10)isElectrostatic precipitation，Its Technical efficiency of end-of-pipe management95，The formula for calculating the actual operation rate (k-value) of the end-of-pipe treatment facility is /

## Reference product
- Clay Sculpture Powder: 1000; input; calculated
  源文件中描述为为塑粉，此处对其进行了匹配工作，将其匹配到LCAflow库里面相最符合的流，污染物类别备注为①塑粉固化产生的废气挥发性有机物指标参考2926塑料包装箱及容器制造行业的注（挤）塑核算环节的产污系数。，污染物指标备注为工业废气量

## Outputs
All rows: calculated
- Exhaust gas: 114000
  污染物指标工业废气量的末端治理技术是/，末端治理设施实际运行率（k值）计算公式为/。原文件中描述污染物类别为废气，污染物指标为工业废气量，此处对其进行了匹配工作，将其匹配到LCAflow库里面相最符合的流，污染物类别备注为①塑粉固化产生的废气挥发性有机物指标参考2926塑料包装箱及容器制造行业的注（挤）塑核算环节的产污系数。，污染物指标备注为工业废气量
- particles (PM2.5 - PM10): 0.208
  污染物指标颗粒物的末端治理技术是袋式除尘，其效率为99，末端治理设施实际运行率（k值）计算公式为k=废气治理设施运行时间（小时）/废气产污核算环节正常生产时间（小时）。原文件中描述污染物类别为废气，污染物指标为颗粒物，此处对其进行了匹配工作，将其匹配到LCAflow库里面相最符合的流，污染物类别备注为①塑粉固化产生的废气挥发性有机物指标参考2926塑料包装箱及容器制造行业的注（挤）塑核算环节的产污系数。，污染物指标备注为颗粒物
- particles (PM2.5 - PM10): 2.08
  污染物指标颗粒物的末端治理技术是管式过滤，其效率为90，末端治理设施实际运行率（k值）计算公式为k=废气治理设施运行时间（小时）/废气产污核算环节正常生产时间（小时）。原文件中描述污染物类别为废气，污染物指标为颗粒物，此处对其进行了匹配工作，将其匹配到LCAflow库里面相最符合的流，污染物类别备注为①塑粉固化产生的废气挥发性有机物指标参考2926塑料包装箱及容器制造行业的注（挤）塑核算环节的产污系数。，污染物指标备注为颗粒物
- particles (PM2.5 - PM10): 3.12
  污染物指标颗粒物的末端治理技术是多管旋风除尘，其效率为85，末端治理设施实际运行率（k值）计算公式为k=废气治理设施运行时间（小时）/废气产污核算环节正常生产时间（小时）。原文件中描述污染物类别为废气，污染物指标为颗粒物，此处对其进行了匹配工作，将其匹配到LCAflow库里面相最符合的流，污染物类别备注为①塑粉固化产生的废气挥发性有机物指标参考2926塑料包装箱及容器制造行业的注（挤）塑核算环节的产污系数。，污染物指标备注为颗粒物
- particles (PM2.5 - PM10): 1.04
  污染物指标颗粒物的末端治理技术是静电除尘，其效率为95，末端治理设施实际运行率（k值）计算公式为k=废气治理设施运行时间（小时）/废气产污核算环节正常生产时间（小时）。原文件中描述污染物类别为废气，污染物指标为颗粒物，此处对其进行了匹配工作，将其匹配到LCAflow库里面相最符合的流，污染物类别备注为①塑粉固化产生的废气挥发性有机物指标参考2926塑料包装箱及容器制造行业的注（挤）塑核算环节的产污系数。，污染物指标备注为颗粒物

## Data sources
- 第二次全国污染源普查产排污核算系数手册（试用版）,二级代码24,四级代码2443文件，在完整版文件中第2861页
