# underground coal mining |coal mining

Dataset: ILCD process, Unit process, black box
Geography: SQ-HEN-CN
Reference year: 2015
Classification: Materials production / Other mineralic materials
Generated by: Linlin Yin, yinlinlin0623@163.com
Review: Dependent internal review by Tiangong LCI Data Working Group
Amounts: no units in this file; such an amount is in the reference unit of its flow, which a separate flow dataset defines

## Geography
Compared with other mining areas in the province, Yongcheng mining area has higher advantages in resource reserves and reserve-mining ratio. It is now divided into 5 exploration coal mining areas and 2 coal prospecting prediction areas. The occurrence of coal seams in Yongcheng mining area is relatively stable, and the mining technical conditions are relatively simple. The dip angle of the mineable coal seam is relatively gentle, which is suitable for mechanized mining.

## Technology and included processes
The production process of coal mining includes mine field development, roadway excavation, support, mining and so on. The underground mining mainly mines the coal buried in the ground and transports it to the ground through the excavation of the roadway. The inventory analysis of this link mainly includes the consumption of fuel, raw materials, and the emission of waste gas.

## Reference product
- Hard coal, at consumer EU-27: 1.7196e9; uniform; article inperiodical
  论文通过对永城矿区井进行实地调研得到各项活动水平数据,现以新桥煤矿的 2013年的数据为例进行核算前的分析。2013年新桥煤矿矿井开采中“原煤产量”活动水平数据。

## Inputs
All rows: uniform; article inperiodical
- Hard coal, at consumer EU-27: 3.327e6
  论文通过对永城矿区井进行实地调研得到各项活动水平数据,现以新桥煤矿的 2013年的数据为例进行核算前的分析。2013年新桥煤矿矿井开采中“原煤”消耗活动水平数据。
- Gasoline (regular): 30650
  论文通过对永城矿区井进行实地调研得到各项活动水平数据,现以新桥煤矿的 2013年的数据为例进行核算前的分析。2013年新桥煤矿矿井开采中“汽油”消耗活动水平数据。
- Diesel: 35200
  论文通过对永城矿区井进行实地调研得到各项活动水平数据,现以新桥煤矿的 2013年的数据为例进行核算前的分析。2013年新桥煤矿矿井开采中“柴油”消耗活动水平数据。
- water: 9.34928e8
  论文通过对永城矿区井进行实地调研得到各项活动水平数据,现以新桥煤矿的 2013年的数据为例进行核算前的分析。2013年新桥煤矿矿井开采中“水”消耗活动水平数据。
- Electricity: 1.86595e8
  论文通过对永城矿区井进行实地调研得到各项活动水平数据,现以新桥煤矿的 2013年的数据为例进行核算前的分析。2013年新桥煤矿矿井开采中“电”消耗活动水平数据。
- Hard coal, at consumer EU-27: 2.0197
  修正排放因子,新桥煤矿2013年矿井开采“原煤修正排放因子”
- Diesel: 3.21
  修正排放因子,新桥煤矿2013年矿井开采“柴油修正排放因子”
- Gasoline (regular): 3.24
  修正排放因子,新桥煤矿2013年矿井开采“汽油修正排放因子”
- Electricity: 972.4
  修正排放因子,新桥煤矿2013年矿井开采“电修正排放因子”
- water: 0.000212
  修正排放因子,新桥煤矿2013年矿井开采“水修正排放因子”

## Review details
Inventory: The internal review was done by several iteration steps concerning raw data validation, raw data documentation, representativity, completeness and consistency of modelling with regard to ISO 14040 and 14044.; Documentation: The review of the documentation was performed by Ecobilan and is in compliance with ISO 14040 and 14044. The data set documentation is correct in view of the appropriateness of the information provided. It includes all relevant information in view of data quality and scope of application of the respective LCI result.
