# 镍精矿生产 ; 镍铜混合精矿（镍含量8.6%） ; 粉碎 ; 甘肃省镍钴矿

Dataset: ILCD process, Unit process, single operation
Geography: GS-CN
Reference year: 2018
Classification: Unit processes / Materials production / Non-energetic raw materials
Generated by: 孙鑫, xs389@cornell.edu
Owner: 天工LCI数据工作小组
Review: Dependent internal review by 天工LCI数据工作小组
Amounts: no units in this file; such an amount is in the reference unit of its flow, which a separate flow dataset defines
licenseType: Free of charge for all users and uses

## General comment
采矿和选矿阶段的清单来自中国甘肃的一个典型硫化镍铜矿，其平均镍含量为 0.96%。上述矿山的镍资源储量约占中国镍资源总量的 79%。

## Technology and included processes
鉴于地质和资源特征的复杂性，在采矿过程中采用了胶结回填法提取镍原矿，所选的填充材料和粘合剂分别为尾矿和水泥。采矿过程中使用了地下施工机械（如凿岩机、扒渣机、电力机车和收割机）和地面施工机械（如塔式起重机、电焊机和卡车）。在选矿过程中，镍矿石由颚式破碎机、圆振动筛、球磨机、浮选机和浓缩机处理，以获得镍含量约为 8.6% 的镍铜混合精矿。

## Technical purpose
含有8.6%镍的镍铜混合精矿是通过粉碎过程生产的，旨在用作生产镍、铜和钴相关产品的原料。此产品适用于需要高纯度镍的应用，如不锈钢、合金、电镀和可充电电池的制造。

## Reference product
- Nickel concentrate (8.6% Ni): 11794; measured

## Inputs
All rows: measured
- nickel: 126488
- Tire: 0.01
- Wood: 0.09
- water: 79060
- unspecified: 4.43
- Explosive: 42.05
- steel rebar: 112.44
- sodium carbonate: 22.19
- Calcium Oxide: 55.37
- transport in t*km: 1390
- Electricity: 14976
- Diesel: 1.61
- Gasoline (regular): 1.61
- Hard coal, at consumer EU-27: 500
- Detonator: 58
- Cement: 2470
- Lubricant: 2.9
- Copper sulphate: 10.87
- Xanthate: 18.12
- Nitrogenous Fertilizer: 15.85
- infrastructure: 0.13

## Outputs
All rows: measured
- particles (PM2.5 - PM10): 4.46
- sulfur dioxide: 0.6
- nitrous oxide: 1.51
- nickel: 0.03421, 0.01499 (2 entries)
- copper: 0.01319, 0.02932 (2 entries)
- cobalt: 0.00119
- arsenic: 0.00012
- zinc: 0.00012, 0.00741 (2 entries)
- lead: 0.00036
- chromium: 0.00238, 0.00405 (2 entries)
- cadmium: 0.002
- municipal solid waste deposition: 13.35
- waste water - untreated: 248750
- hazardous waste (unspecified): 1.01

## Use advice
在使用该数据集进行生命周期评估时，需包括所有与镍精矿生产的粉碎过程相关的排放和能源消耗。如果运输原材料到加工现场和从生产现场到下游用户在系统边界内，请确保包括这部分内容。根据镍铜钴合金产品的特定最终应用，对使用阶段的行为进行建模。适用时考虑方法论方面的因素，如潜在的回收利益或截止规则。

## Review details
清单： 内部审查通过几个迭代步骤完成，涉及原始数据验证、原始数据记录、代表性、完整性、与 ISO 14040 和 14044 有关的建模的一致性。

## Data sources
- Bai, Y. et al. Strategies for improving the environmental performance of nickel production in China: Insight into a life cycle assessment. Journal of Environmental Management 312, 114949 (2022).
