# Natural gas development planning | KLS tectonic belt | Stochastic simulation

Dataset: ILCD process, Unit process, single operation
Geography: XJ-CN
Reference year: 2014
Classification: Materials production / Other mineralic materials
LCI method principle: Attributional
LCI method approaches: Consequential
Generated by: Shikang Kang, 908798159@qq.com
Review: Dependent internal review by Tiangong LCI Data Working Group
Amounts: no units in this file; such an amount is in the reference unit of its flow, which a separate flow dataset defines
copyright: false

## General comment
Risk assessment of natural gas development planning scheme needs a lot of stochastic simulation, which must be realized by computer. Therefore, based on the risk assessment theory of natural gas development planning scheme, an evaluation software is developed, and its application research is carried out with the help of the software

## Geography
Crassus structural belt in Tarim basin, Xinjiang

## Time period
Data collection time

## Technology and included processes
The software also integrates common evaluation methods of reserves, production and benefit, mainly dynamic analysis method and numerical simulation method of production prediction, and forms a list of recommended methods for gas fields in different development stages

## Reference product
- natural gas: 0.31; input; min 0.28; max 0.34; uniform; article inperiodical
  内部收益率集中于28%-34%，全生命周期经济效益风险较小

## Data selection and combination
The proven developed gas field in KLS structural belt is only gas field A, with reported proven geological reserves of 2830 × 10 and recoverable reserves of 2130 × 10. The gas reservoir types belong to medium porosity and medium permeability, bottom water, abnormal high pressure and dry gas reservoir. It was put into production on November 19th, 2004, and all wells were drilled by the end of 2006, reaching the capacity scale of 107 × 10 designed by the scheme.

## Data treatment and extrapolations
The traps to be drilled are implemented, so the resource conversion rate method is used to predict the trend of new reserves. Historically, the conversion rate of resources in and around the tectonic zone is between 50% and 55%. Taking history as a reference, the reliability limit of resource quantity evaluation, that is, floating up and down by 30%, is taken as the probability interval, and the probability curve function adopts normal distribution

## Review details
Inventory: The internal review was done by several iteration steps concerning raw data validation, raw data documentation, representativity, completeness and consistency of modelling with regard to ISO 14040 and 14044.; Documentation: The review of the documentation was performed by Ecobilan and is in compliance with ISO 14040 and 14044. The data set documentation is correct in view of the appropriateness of the information provided. It includes all relevant information in view of data quality and scope of application of the respective LCI result.

## Data sources
- 陆家亮. 天然气开发规划风险量化评价模型研究. (2014)
