# 电力生产 ; 混合电力 ; 甘肃

Dataset: ILCD process, Unit process, single operation
Geography: GS-CN
Reference year: 2019
Classification: Unit processes / Energy carriers and technologies / Electricity
Generated by: 熊若熙, xiongrx0126@163.com
Owner: 天工LCI数据工作小组
Review: Dependent internal review by 天工LCI数据工作小组
Amounts: no units in this file; such an amount is in the reference unit of its flow, which a separate flow dataset defines
copyright: false
licenseType: Free of charge for all users and uses

## General comment
混合电力产生形式包括火力发电、水力发电、风力发电、核能发电和太阳能发电

## Technical purpose
此数据集代表甘肃省的电力混合，包括火力发电、水力发电、风力发电、核能发电和太阳能发电等多种来源。该数据集用于量化源自甘肃省或在其生命周期内使用甘肃电力混合的产品和服务的电力消耗环境影响。

## Reference product
- Electricity: 3.6; missing unimportant
  [{'text': '3.6', 'type': 'text'}]

## Inputs
All rows: missing unimportant
- electricity for thermal power: 1.78335
  [{'text': '3.6', 'type': 'text'}]
- electricity from hydroelectric power plant: 1.07014
  [{'text': '3.6', 'type': 'text'}]
- electricity for nuclear power: 0
  [{'text': '3.6', 'type': 'text'}]
- electricity from wind power: 0.491918
  [{'text': '3.6', 'type': 'text'}]
- electricity for solar power: 0.254588
  [{'text': '3.6', 'type': 'text'}]

## Use advice
在生命周期评估中应用此数据集时，用户应确保包含所有详细的电力生成来源，以反映实际的消费组合。如果生命周期评估涉及特定时期，用户必须验证该组合是否准确对应该时期。必须注意方法论的一致性，特别是关于体系边界和可能未在此数据中考虑的电力出口或进口。在研究系统中，技术的适用性，就发电的先进性和效率而言，也应保持一致。

## Review details
清单： 内部审查通过几个迭代步骤完成，涉及原始数据验证、原始数据记录、代表性、完整性、与 ISO 14040 和 14044 有关的建模的一致性。

## Data sources
- 能源统计年鉴2020
