# Solvent extraction|REE|bastnaesite route|IAD

Dataset: ILCD process, Unit process, single operation
Geography: CN
Reference year: 2014
Classification: Materials production / Other mineralic materials
Functional unit: The functional unit of this study is the production of 1 kg of the basket REO from each corresponding mineralogical and processing route.
LCI method principle: Attributional
LCI method approaches: Allocation - market value
Generated by: Tao Wang, twang@iue.ac.cn
Review: Dependent internal review by Tiangong LCI Data Working Group
Amounts: no units in this file; such an amount is in the reference unit of its flow, which a separate flow dataset defines
copyright: false

## Geography
Seven Southern Provinces

## Technology and included processes
In this study, the REE production system was analyzed from mining up to and including solvent extraction which contains product finishing processes such as precipitation and calcination

## Reference product
- REO: 1; article inperiodical

## Inputs
All rows: article inperiodical
- water: 0.0563
- Disooctyl Phosphate (P204): 0.0253
- Sodium hydroxide: 2.67
- REO: 1.17
  REO concentrate production from ion-adsorption deposits, in-situ leaching, 91% purity
- hydrogen chloride: 3.23
- Electricity: 0.954
- antimony: 0.791
  citric acid

## Outputs
All rows: article inperiodical
- municipal solid waste deposition: 0.00531
- Water (groundwater from technosphere, waste water): 0.0538
- Low radioactive wastes: 0.108
- Hazardous waste (deposited, hibernating in ground, non elementary flow): 0.00268
- Sludge: 0.00215
- sodium: 0.00144
- hydrogen chloride: 0.0062
- water: 0.075
- chlorine: 0.0127

## Deviations from the LCI method approaches
In this study, the REE production system was analyzed from mining up to and including solvent extraction which contains product finishing processes such as precipitation and calcination (Fig. 1). The other categories assessed in the literature review were mineral type, radioactivity, waste treatment, and co-mining. For mineral type, it was noted that the mineralogy accounted for in each study was different, which makes comparison difficult. For radioactivity, we marked with an X those studies which exemplified radioactivity flows in the LCI (if provided). For waste, we distinguished those LCIs which quantified waste treatment flows. For co-mining, since all REE are co-products of each other, this column is meant to highlight the co-products in addition to REE.

## Review details
Inventory: The internal review was done by several iteration steps concerning raw data validation, raw data documentation, representativity, completeness and consistency of modelling with regard to ISO 14040 and 14044.; Documentation: The review of the documentation was performed by Ecobilan and is in compliance with ISO 14040 and 14044. The data set documentation is correct in view of the appropriateness of the information provided. It includes all relevant information in view of data quality and scope of application of the respective LCI result.

## Data sources
- Bailey, G. et al. Review and new life cycle assessment for rare earth production from bastnäsite, ion adsorption clays and lateritic monazite. Resources, Conservation and Recycling 155, 104675 (2020).
