# 水泥熟料煅烧;水泥熟料;回转窑;磷石膏

Dataset: ILCD process, Unit process, single operation
Geography: SD-CN
Reference year: 2013
Classification: Unit processes / Materials production / Other mineralic materials
Generated by: 曾奥, m202374287@hust.edu.cn
Owner: 天工LCI数据工作小组
Review: Dependent internal review by 天工LCI数据工作小组
Amounts: no units in this file; such an amount is in the reference unit of its flow, which a separate flow dataset defines
copyright: false
licenseType: Free of charge for all users and uses

## General comment
鲁北化工传统回转窑工艺，分解煅烧衣服进行的“一步法”

## Geography
数据基于山东鲁北化工实际生产数据

## Technology and included processes
回转窑分解煅烧

## Technical purpose
鲁北化工采用传统回转窑工艺生产的水泥熟料，用于生产各种类型的水泥。该高温煅烧过程采用‘一步法’生产流程，特别适用于生产作为建筑行业关键组成部分、用于制造混凝土的水泥熟料。

## Reference product
- portland cement (CEM I): 1; measured
  原数据为水泥熟料，所选流为普通硅酸盐水泥

## Inputs
- hard coal,hard coal: 0.519; measured
- industrial area: 0.0016; measured
- Phosphogypsum: 2.002; measured

## Outputs
- carbon dioxide (fossil),carbon dioxide (fossil): 1.34; measured
- sulfur dioxide: 0.975; measured
- nitrous oxide: 0.0009; measured
- Flue dust: 0.00076; measured

## Data selection and combination
来自调研及数据库

## Data treatment and extrapolations
参照实际生产添加量计算

## Use advice
该数据集代表山东鲁北化工使用回转窑分解工艺生产1公斤水泥熟料的实际生产数据。清单包括所有主要原材料和所有必要的能量输入。排除项为原材料的生产过程和不多的能量流（小于1%）。用户应注意，基础设施、服务或辅助设施已经系统性排除。此数据旨在用于水泥产品的生命周期评价研究，并应按照标准生命周期评价方法使用，同时考虑到生命周期评价研究特定背景下的技术适用性。

## Review details
清单： 内部审查通过几个迭代步骤完成，涉及原始数据验证、原始数据记录、代表性、完整性、与 ISO 14040 和 14044 有关的建模的一致性。

## Data sources
- 张杭 et al. 不同分解工艺下磷石膏分解制水泥熟料的LCA研究. 材料导报 27, 302–305 (2013).
