# Pork production | pork raising

Dataset: ILCD process, Unit process, single operation
Geography: ZY-GS-CN
Reference year: 2012
Classification: Materials production / Other mineralic materials
Functional unit: 1kg pork as functional unit (FU)
Generated by: Rui Yang, 1632707028@qq.com
Review: Dependent internal review by Tiangong LCI Data Working Group
Amounts: no units in this file; such an amount is in the reference unit of its flow, which a separate flow dataset defines
copyright: false

## General comment
During the fattening period of live pigs, the feed of fattening pigs is all concentrate feed

## Geography
The average water consumption per cow was 70kg per day, according to the investigation of Shigangdun pasture of Qianjin Animal Husbandry in Zhangye City

## Time period
Pig feed ingredients (Liu Mingda et al., 2012)

## Reference product
- pig: 1
  pork

## Inputs
- maize: 2.1; measured
  corn
- wheat: 1.4; measured
- soybean: 0.32; measured
  soybeans
- water: 7; measured

## Data selection and combination
出栏时平均体重为 125kg（刘 鸣达等，2012），料肉比为 3：1（张颖等，2010）

## Review details
Inventory: The internal review was done by several iteration steps concerning raw data validation, raw data documentation, representativity, completeness and consistency of modelling with regard to ISO 14040 and 14044.; Documentation: The review of the documentation was performed by Ecobilan and is in compliance with ISO 14040 and 14044. The data set documentation is correct in view of the appropriateness of the information provided. It includes all relevant information in view of data quality and scope of application of the respective LCI result.

## Data sources
- 魏云. 基于生命周期评价的禽畜产品环境影响评价及对策探讨. (兰州大学, 2016).
