# 水泥生产;水泥, 普通硅酸盐水泥, 42.5MPa

Dataset: ILCD process, Unit process, black box
Geography: BJ-CN
Classification: Unit processes / Materials production / Other mineralic materials
Generated by: #REF!, ysqsophia@gmail.com
Owner: 天工LCI数据工作小组
Review: Dependent internal review by 天工LCI数据工作小组
Amounts: no units in this file; such an amount is in the reference unit of its flow, which a separate flow dataset defines
copyright: false
licenseType: Free of charge for all users and uses

## General comment
通常水泥生产下水泥生产的环境负荷情况。

## Technical purpose
此数据集代表42.5MPa强度等级的普通硅酸盐水泥生产的环境负荷。该水泥广泛用于一般建筑工程，包括商业和住宅建筑、桥梁和道路，为各种建设项目提供必要的结构完整性和耐久性。

## Model description
功能单位定义：以1t 42.5普通硅酸盐水泥所具有的使用性能作为一个功能单位。系统边界为：从原料进厂、原料预处理、生料粉磨、生料煅烧、熟料粉磨，直至水泥均化、储存为止即水泥在整个水泥厂的直接生产过程，不包括原料开采、加工、运输过程。研究地理范围为北京地区。

## Reference product
- cement, ordinary portland cement, 42.5MPa: 1000
  42.5普通硅酸盐水泥

## Inputs
- limestone, crushed, for mill: 1318.5
  石灰石
- clay: 94.5
  黏士质原料
- iron, powder: 27
  铁质校正原料
- gypsum stone (CaSO4-dihydrate): 60
  石膏占比为5.5%
- mixed materials, mineral: 200
  混合材
- hard coal; 26.3 MJ/kg: 120
  煤耗kg
- Electricity: 363.6
  电耗

## Outputs
- Nitrogen oxides: 1.88
  NOx
- sulfur dioxide: 0.004
  SO2
- particles (> PM10): 12
  粉尘，未标明粒径，按PM>10处理。
- carbon dioxide (fossil): 772
  CO2。由于CO2排放量一般不做检测，排放量按下列公式计算。 CO2生成主要产生于燃料、燃煤等化石能源的燃烧以及水泥生产原料中的石灰石分解。（1）化石能源燃烧的CO2排放量计算如下：E=3.67FQka。E为CO2的排放量，kg；F为燃料的消耗量，kg；Q为燃料发热量，MJ/kg；k为燃料的碳排放系数；a为燃料的碳氧化率。（2）水泥生产过程中，原料石灰石的化学反应产生大量的CO2其化学反应见式：CaCO3→CaO+CO2↑。1kg石灰石的CaO的百分含量按48%计算。最后得CO2排放量的估算公式为：CO2排放量=石灰石消耗量*0.38+E=271kg+501kg=772kg。

## Use advice
在使用此数据集进行生命周期评估时，应维护定义的系统边界，包括从原料进厂、预处理和磨粉到水泥均化和储存的水泥厂内的直接生产过程。除非这些活动发生在研究定义的地理范围内，即北京地区，否则从分析中排除原料开采、加工和运输的考虑。此外，对于需要地理特定性的研究，请严格考虑数据在北京地区水泥生产实践上下文中的相关性。

## Review details
清单： 内部审查通过几个迭代步骤完成，涉及原始数据验证、原始数据记录、代表性、完整性、与 ISO 14040 和 14044 有关的建模的一致性。

## Data sources
- 崔素萍, 吴红, 聂祚仁, & 王志宏. (2006). 水泥窑处理固体废弃物环境影响评价. 中国水泥, 7, 50–52.
