# Tire production

Dataset: ILCD process, Unit process, black box
Geography: CN
Reference year: 2014
Classification: Materials production / Other mineralic materials
Generated by: Cui, di, 2806553850@qq.com
Review: Dependent internal review by Tiangong LCI Data Working Group
Amounts: no units in this file; such an amount is in the reference unit of its flow, which a separate flow dataset defines
copyright: false

## General comment
the production stage is quite complex andincludes the processes of compound blending, rolling, extrusion, packet ring production, cutting and forming, vulcanizing, and testing. We combined closely related processes toavoid allocation. The following four main production processes were identified: compound blending, rolling and extrusion,cutting and forming, and vulcanizing and testin

## Reference product
- Tire: 9.497; measured

## Inputs
- Natural Rubber: 1.859; measured
- synthetic rubber: 2.471; measured
- Carbon Black,Nylon 6-6,Waste wire cord fabric,Waste fiber fabric,Waste rubber,Waste steel wire,Waste tire: 2.515, 0.083 (2 entries); measured
- Silicon dioxide: 0.077; measured
- Steel wire: 1.048; measured
- polyethylene terephthalate fibres (PET): 0.309; measured
- Electricity: 34.85; software or database
- water vapour: 17.24; software or database

## Outputs
- non-methane volatile organic compounds: 5e-6; measured
- chemical oxygen demand: 0.00173; measured
- Suspended solids, unspecified: 0.00019; measured
- Carbon Black,Nylon 6-6,Waste wire cord fabric,Waste fiber fabric,Waste rubber,Waste steel wire,Waste tire: 0.018, 0.022, 0.002, 0.004 (4 entries); measured

## Review details
Inventory: The internal review was done by several iteration steps concerning raw data validation, raw data documentation, representativity, completeness and consistency of modelling with regard to ISO 14040 and 14044.

## Data sources
- Life cycle assessment of Chinese radial passenger vehicle tire | SpringerLink.
