# 三元锂电池湿法回收

Dataset: ILCD process, Unit process, single operation
Geography: CN
Reference year: 2022
Classification: End-of-life treatment / Material recycling
Functional unit: 1 kWh of the Eol NCM battery
Generated by: 陈利鹏, lpchen07@163.com
Owner: 天工LCI数据工作小组
Review: Dependent internal review by 天工LCI数据工作小组
Amounts: no units in this file; such an amount is in the reference unit of its flow, which a separate flow dataset defines
copyright: false
licenseType: Free of charge for all users and uses

## General comment
湿法冶金回收工艺涉及对经过简化拆解的废旧电池进行酸浸提取和纯化，然后分类以通过回收技术获取三元前驱阴极材料

## Technical purpose
该工艺的技术应用涉及通过湿法冶金回收回收利用废旧镍钴锰（NCM）锂离子电池。通过此回收技术获取的三元前驱阴极材料主要用于制造新的锂离子电池，服务于包括消费电子，电动汽车和能源储存系统在内的多个行业。

## Reference product
- EoL NCM battery: 0.0157; input; article inperiodical

## Inputs
All rows: article inperiodical
- Electricity: 66.96
- process steam: 12
- sodium chloride: 0.0675
- water,water: 83.1
- sulphuric acid: 1.27
- Disooctyl Phosphate (P204): 0.00394
- 2-ethylhexyl hydrogen -2-ethylhexylphosphonate: 0.00145
- Hydrochloric acid (32%): 24
- Sulfonated kerosene: 0.0137
- Sodium sulfide: 0.0133
- ammonia: 0.417
- Sodium hydroxide: 0.884

## Outputs
All rows: article inperiodical
- hydrogen fluoride: 0.000438
- Dust (unspecified, from stack),Dust (unspecified, from stack): 0.000438
- hydrogen sulfide: 2.29e-5
- ammonium: 8.59e-5
- Sulfuric acid mist: 3.75e-5
- chemical oxygen demand: 0.0103
- Suspended solids, unspecified: 0.124
- biological oxygen demand: 0.00364
- nickel: 4.75e-5
- cobalt: 4.38e-5
- manganese: 4.75e-5
- lithium: 0.00398
- Ammonia Nitrogen: 0.000596
- Cathode Material: 1.25

## Use advice
在使用此数据集进行生命周期评估（LCA）时，确保LCA的范围包括特定的电池终生回收阶段至关重要。用户必须考虑湿法冶金工艺中酸浸提取和纯化步骤的效率。分析中还应包括与用于浸出的化学品使用相关的环境影响。应充分考虑根据最终纯度和回收率将一部分回收材料可能纳入的潜力。

## Review details
清单： 内部审查通过几个迭代步骤完成，涉及原始数据验证、原始数据记录、代表性、完整性、与 ISO 14040 和 14044 有关的建模的一致性。

## Data sources
- Feng, T., Guo, W., Li, Q., Meng, Z. & Liang, W. Life cycle assessment of lithium nickel cobalt manganese oxide batteries and lithium iron phosphate batteries for electric vehicles in China. Journal of Energy Storage 52, 104767 (2022).
