# Vinegar|Glutinousrice(millet,wheat,bran,sorghumorotherrawmaterials)plusauxiliarymaterials|Fermentationandmodulation(rawmaterialsteaming,turninganddrying,mixing,alcoholicfermentation,fermentationwithgrainaceticacid,drenchingvinegar,smokedvinegar,aging,filling)|Industrial production / 食醋|糯米（小米、小麦、麸皮、高梁或其他原料）加辅料|发酵及调制（原料蒸煮、翻晾、拌曲、酒精发酵、加粮醋酸发酵、淋醋、熏醋、陈酿、灌装）|工业化生产

Dataset: ILCD process, Unit process, single operation
Geography: CN
Reference year: 2019
Classification: Materials production / Food and renewable raw materials
Generated by: The data was created by the Office of the Second National Pollution Source Census of the Ministry of Ecology and Environment, and the data was organized by the TianGong Plan team for ILCD format / 生态环境部第二次全国污染源普查工作办公室创建数据，天工计划团队常慧敏整理数据为ILCD格式
Owner: Tiangong LCI Data Working Group / 天工LCI数据工作小组
Amounts: no units in this file; such an amount is in the reference unit of its flow, which a separate flow dataset defines
copyright: false
licenseType: Free of charge for all users and uses

## Technology and included processes
the Technical of end-of-pipe management technology for pollution phosphorus, totalisPhysicochemical method + anaerobic/aerobic combined method，Its Technical efficiency of end-of-pipe management60

## Reference product
- Acetic acid solution(3mol/L): 1000; calculated
  源文件中描述为为食醋，此处对其进行了匹配工作，将其匹配到LCAflow库里面相最符合的流，污染物指标备注为工业废水量

## Outputs
All rows: calculated
- Waste water: 4000
  污染物指标工业废水量的末端治理技术是/，其效率为0。原文件中描述污染物类别为废水，污染物指标为工业废水量，此处对其进行了匹配工作，将其匹配到LCAflow库里面相最符合的流，污染物指标备注为工业废水量
- chemical oxygen demand: 1.785
  污染物指标化学需氧量的末端治理技术是物化法+厌氧/好氧组合法，其效率为83，末端治理设施实际运行率（k值）计算公式为k=污水末端治理设施运行时间（小时）/正常生产时间（小时）。原文件中描述污染物类别为废水，污染物指标为化学需氧量，此处对其进行了匹配工作，将其匹配到LCAflow库里面相最符合的流，污染物指标备注为化学需氧量
- Ammonia Nitrogen: 0.18
  污染物指标氨氮的末端治理技术是物化法+厌氧/好氧组合法，其效率为25，末端治理设施实际运行率（k值）计算公式为k=污水末端治理设施运行时间（小时）/正常生产时间（小时）。原文件中描述污染物类别为废水，污染物指标为氨氮，此处对其进行了匹配工作，将其匹配到LCAflow库里面相最符合的流，污染物指标备注为氨氮
- Nitrogen, organic bound: 0.279
  污染物指标总氮的末端治理技术是物化法+厌氧/好氧组合法，其效率为38，末端治理设施实际运行率（k值）计算公式为k=污水末端治理设施运行时间（小时）/正常生产时间（小时）。原文件中描述污染物类别为废水，污染物指标为总氮，此处对其进行了匹配工作，将其匹配到LCAflow库里面相最符合的流，污染物指标备注为总氮
- phosphorus, total: 0.032
  污染物指标总磷的末端治理技术是物化法+厌氧/好氧组合法，其效率为60，末端治理设施实际运行率（k值）计算公式为k=污水末端治理设施运行时间（小时）/正常生产时间（小时）。原文件中描述污染物类别为废水，污染物指标为总磷，此处对其进行了匹配工作，将其匹配到LCAflow库里面相最符合的流，污染物指标备注为总磷

## Data sources
- 第二次全国污染源普查产排污核算系数手册（试用版）,二级代码14,四级代码1462文件，在完整版文件中第3413页
