# Electricity production ; Electricity ; Thermal power (54.5%) + hydropower (32.1%) + nuclear power (9.3%) + wind power (3.3%) + solar power (0.8%)

Dataset: ILCD process, Partly terminated system
Geography: GX-CN
Reference year: 2019
Classification: Energy carriers and technologies / Electricity
LCI method principle: Other
Generated by: Ruoxi Xiong, xiongrx0126@163.com
Owner: Tiangong LCI Data Working Group
Review: Dependent internal review by Tiangong LCI Data Working Group
Amounts: no units in this file; such an amount is in the reference unit of its flow, which a separate flow dataset defines
copyright: false
licenseType: Free of charge for all users and uses

## General comment
Forms of electricity generation include thermal power generation, hydropower generation, nuclear power generation, wind power generation and solar power generation.

## Time period
Calculated based on data from the 2019 Energy Statistics Yearbook

## Technical purpose
This dataset describes the composite electricity production from various sources in percentages: thermal power (54.5%), hydropower (32.1%), nuclear power (9.3%), wind power (3.3%), and solar power (0.8%). It is intended for the assessment of the electricity mix used by industries, residential areas, and commercial establishments. The data is applicable for LCA studies, carbon footprint calculations, and energy policy development.

## Reference product
- Electricity: 3.6; calculated

## Outputs
- carbon dioxide: 0.481; calculated
- sulfur dioxide: 8e-5; calculated
- Nitrogen oxides: 0.00012773; calculated
- Dust (unspecified, from stack): 1.6964e-5; calculated

## Data treatment and extrapolations
For the accounting method, please refer to the "Enterprise Greenhouse Gas Emissions Accounting Methods and Reporting Guidelines for Power Generation Facilities". Different forms of power generation and fuel consumption come from Chapter 3 (Energy Production) and Chapter 6 (Regional Energy Balance Sheet) in the "China Energy Statistical Yearbook 2020". The fuel parameters such as low calorific value and carbon content per unit calorific value used to calculate the carbon dioxide emission factor come from the "2019 China Regional Power Grid Carbon Dioxide Baseline Emission Factor Calculation Instructions OM" and the "Enterprise Greenhouse Gas Emission Accounting Method and Reporting Guide for Power Generation Facilities" 》

## Use advice
Users should apply this data ensuring the alignment with the 2019 Energy Statistics Yearbook for accuracy in emission factors. Special attention should be given to the carbon content per unit calorific value and the low calorific value of fuels when modeling the process-related emissions. Consideration should be given to the technological changes and updates in electricity generation, with the understanding that the percentages provided are based on the 2020 energy production mix. Assumptions made for carbon emission calculations may need to be adjusted when applying this data to future scenarios or geographical contexts with differing energy mixes.

## Review details
Inventory: The internal review was done by several iteration steps concerning raw data validation, raw data documentation, representativity, completeness and consistency of modelling with regard to ISO 14040 and 14044.

## Data sources
- 熊若熙. 中国电力生产和消费二氧化碳与污染物排放因子核算. (清华大学, 2023).
