# Siliconcarbide|Quartzsand|Resistancefurnacemethod|All sizes / 碳化硅|石英砂|电阻炉法|所有规模

Dataset: ILCD process, Unit process, single operation
Geography: CN
Reference year: 2019
Classification: Materials production / Non-energetic raw materials
Generated by: The data was created by the Office of the Second National Pollution Source Census of the Ministry of Ecology and Environment, and the data was organized by the TianGong Plan team for ILCD format / 生态环境部第二次全国污染源普查工作办公室创建数据，天工计划团队常慧敏整理数据为ILCD格式
Owner: Tiangong LCI Data Working Group / 天工LCI数据工作小组
Review: Dependent internal review by Tiangong LCI Data Working Group / 天工LCI数据工作小组
Amounts: no units in this file; such an amount is in the reference unit of its flow, which a separate flow dataset defines
copyright: false
licenseType: Free of charge for all users and uses

## General comment
the Technical of end-of-pipe management technology for pollution sulfur dioxideisActivated carbon (coke) method，Its Technical efficiency of end-of-pipe management95

## Reference product
- silicon carbide: 1000; calculated
  源文件中描述为为碳化硅，此处对其进行了匹配工作，将其匹配到LCAflow库里面相最符合的流，污染物指标备注为废气量

## Outputs
All rows: calculated
- Exhaust gas: 31938
  污染物指标废气量的末端治理技术是/，其效率为0，末端治理设施实际运行率（k值）计算公式为k=废气治理设施运行时间(小时/年）/企业正常生产时间（小时/年）。原文件中描述污染物类别为废气，污染物指标为废气量，此处对其进行了匹配工作，将其匹配到LCAflow库里面相最符合的流，污染物指标备注为废气量
- particles (PM2.5 - PM10): 41.148
  污染物指标颗粒物的末端治理技术是湿法除尘，其效率为60，末端治理设施实际运行率（k值）计算公式为k=废气治理设施运行时间(小时/年）/企业正常生产时间（小时/年）。原文件中描述污染物类别为废气，污染物指标为颗粒物，此处对其进行了匹配工作，将其匹配到LCAflow库里面相最符合的流，污染物指标备注为颗粒物
- particles (PM2.5 - PM10): 1.0287
  污染物指标颗粒物的末端治理技术是袋式除尘，其效率为99，末端治理设施实际运行率（k值）计算公式为k=废气治理设施运行时间(小时/年）/企业正常生产时间（小时/年）。原文件中描述污染物类别为废气，污染物指标为颗粒物，此处对其进行了匹配工作，将其匹配到LCAflow库里面相最符合的流，污染物指标备注为颗粒物
- particles (PM2.5 - PM10): 2.0574
  污染物指标颗粒物的末端治理技术是静电除尘，其效率为98，末端治理设施实际运行率（k值）计算公式为k=废气治理设施运行时间(小时/年）/企业正常生产时间（小时/年）。原文件中描述污染物类别为废气，污染物指标为颗粒物，此处对其进行了匹配工作，将其匹配到LCAflow库里面相最符合的流，污染物指标备注为颗粒物
- Nitrogen oxides: 0.93
  污染物指标氮氧化物的末端治理技术是/，其效率为0，末端治理设施实际运行率（k值）计算公式为k=废气治理设施运行时间(小时/年）/企业正常生产时间（小时/年）。原文件中描述污染物类别为废气，污染物指标为氮氧化物，此处对其进行了匹配工作，将其匹配到LCAflow库里面相最符合的流，污染物指标备注为氮氧化物
- sulfur dioxide: 0.219
  污染物指标二氧化硫的末端治理技术是氨法，其效率为95，末端治理设施实际运行率（k值）计算公式为k=废气治理设施运行时间(小时/年）/企业正常生产时间（小时/年）。原文件中描述污染物类别为废气，污染物指标为二氧化硫，此处对其进行了匹配工作，将其匹配到LCAflow库里面相最符合的流，污染物指标备注为SO2
- sulfur dioxide: 0.4818
  污染物指标二氧化硫的末端治理技术是石灰/石膏法，其效率为89，末端治理设施实际运行率（k值）计算公式为k=废气治理设施运行时间(小时/年）/企业正常生产时间（小时/年）。原文件中描述污染物类别为废气，污染物指标为二氧化硫，此处对其进行了匹配工作，将其匹配到LCAflow库里面相最符合的流，污染物指标备注为SO2
- sulfur dioxide: 0.657
  污染物指标二氧化硫的末端治理技术是石灰石/石膏法，其效率为85，末端治理设施实际运行率（k值）计算公式为k=废气治理设施运行时间(小时/年）/企业正常生产时间（小时/年）。原文件中描述污染物类别为废气，污染物指标为二氧化硫，此处对其进行了匹配工作，将其匹配到LCAflow库里面相最符合的流，污染物指标备注为SO2
- sulfur dioxide: 0.0438
  污染物指标二氧化硫的末端治理技术是有机胺吸附，其效率为99，末端治理设施实际运行率（k值）计算公式为k=废气治理设施运行时间(小时/年）/企业正常生产时间（小时/年）。原文件中描述污染物类别为废气，污染物指标为二氧化硫，此处对其进行了匹配工作，将其匹配到LCAflow库里面相最符合的流，污染物指标备注为SO2
- sulfur dioxide: 0.219
  污染物指标二氧化硫的末端治理技术是活性炭（焦）法，其效率为95，末端治理设施实际运行率（k值）计算公式为k=废气治理设施运行时间(小时/年）/企业正常生产时间（小时/年）。原文件中描述污染物类别为废气，污染物指标为二氧化硫，此处对其进行了匹配工作，将其匹配到LCAflow库里面相最符合的流，污染物指标备注为SO2

## Use advice
This dataset is derived from the Pollution Source Census Report and contains information on pollution emissions and related products. However, it does not include data on energy or chemical consumption, nor does it provide information on waste or co-product generation. When utilizing this dataset, please supplement the missing data based on actual conditions before use
该数据集来源于污染源普查报告，包含污染物排放及相关产品信息，但不包含能源或化学品消耗数据，也不提供废弃物或共生产物产生信息。在使用该数据集时，请根据实际情况补充缺失数据后再使用。

## Review details
Inventory: The internal review was done by several iteration steps concerning raw data validation, raw data documentation, representativity, completeness and consistency of modelling with regard to ISO 14040 and 14044.
清单： 内部审查通过几个迭代步骤完成，涉及原始数据验证、原始数据记录、代表性、完整性、与 ISO 14040 和 14044 有关的建模的一致性。

## Data sources
- 第二次全国污染源普查产排污核算系数手册（试用版）,四级代码3218文件，在完整版文件中第5023页
