# 铝电解与铸锭 ; 原生铝锭 ; 冶金用氧化铝

Dataset: ILCD process, Unit process, single operation
Geography: HEN-CN
Reference year: 2018
Classification: Materials production / Metals and semimetals
Generated by: 徐常青, xcq@bit.edu.cn
Owner: 天工LCI数据工作小组
Review: Dependent internal review by 天工LCI数据工作小组
Amounts: no units in this file; such an amount is in the reference unit of its flow, which a separate flow dataset defines
copyright: false
licenseType: Free of charge for all users and uses

## General comment
无流程图

## Time period
论文发表年

## Technical purpose
通过铝电解与铸锭生产的原生铝锭可用于不同行业的各种应用。这些铝锭可进一步加工成铝板、箔、线材、挤压型材等产品。它们在汽车、航空航天、建筑、包装和电气工程等领域得到应用，因为铝具有高导电性、延展性和轻便性。

## Reference product
- aluminium, primary, ingot: 1000; article inperiodical
  原铝产品

## Inputs
All rows: article inperiodical
- electricity, high voltage, aluminium industry: 52790.4
- bauxite: 4298
- pitch: 103
- aluminium oxide, metallurgical: 1916
- anode, for metal electrolysis: 469
- petroleum coke: 535, 60.3 (2 entries)
- Fluoride: 19
  氟化物在这里是作为输入，但是只有排放的elementary flow
- calcium carbonate: 277.8
  石灰石
- sodium bicarbonate: 297
  纯碱碳酸钠-Sodium Carbonate-无条目
- solvent, organic: 4
  溶剂
- fresh water: 4828
  river water
- hard coal: 606.7
- light fuel oil: 141
- coal gas: 1.205e6
- natural gas, high pressure: 147600

## Outputs
All rows: article inperiodical
- carbon dioxide (fossil): 15121
- Nitrogen oxides: 34.1
- methane: 33.7
- carbon monoxide: 850
- sulfur dioxide: 22
- particles (> PM10): 6.65
- particles (PM2.5): 3.84
- hydrogen fluoride: 17
- Ethane, hexafluoro-, HFC-116: 0.0034
- Methane, tetrafluoro-, R-14: 0.034
  四氟化碳-无条目
- polycyclic aromatic hydrocarbons: 0.013

## Use advice
在使用代表通过电解和铸造生产原生铝锭的数据集时，重要的是确保系统边界清晰定义，包括与过程相关的所有输入和输出。应考虑电解用电源、生产过程中潜在的环境排放，以及任何副产品或废物。数据使用者应注意发表年份，以确保数据的时效性，并要考虑可能影响数据对其具体情况适用性的区域差异。

## Review details
清单： 内部审查通过几个迭代步骤完成，涉及原始数据验证、原始数据记录、代表性、完整性、与 ISO 14040 和 14044 有关的建模的一致性。

## Data sources
- 王姗姗, 刘赛男, 王灿, & 张瑞芹. 基于生命周期评价的河南省原铝生产环境影响分析. 轻金属 1-7+16 (2018)
