# 畜禽养殖 ; 粪便处理阶段 ; 生猪散户

Dataset: ILCD process, Unit process, single operation
Geography: SD-CN
Reference year: 2014
Classification: Unit processes / Materials production / Agricultural production means
Functional unit: 1kg pork
Generated by: 杨瑞, 1632707028@qq.com
Owner: 天工LCI数据工作小组
Review: Dependent internal review by 天工LCI数据工作小组
Amounts: no units in this file; such an amount is in the reference unit of its flow, which a separate flow dataset defines
copyright: false
licenseType: Free of charge for all users and uses

## General comment
畜禽粪便处理方式包括干清粪、水冲粪、垫料处理。水冲粪处理方式受《水 污染防治行动计划》（简称水十条）[88]和新《环保法》等严格约束，呈逐年下降 趋势；垫料方式的污染物排放少、对环境危害小，经过简单堆肥后可直接施用于 田地，但其受经济成本制约度较高，常见于禽舍粪便处理；干清粪对环境的危害 介于两者之间，经济成本较低[89,90]。

## Geography
本研究于 2014~2015 年，针对畜禽饲养周期、肉料比、饲料配方、饲料消耗 量、煤和电的消耗量等，先后对山东省高密正大种猪场、莱西市知双奶牛场、即 墨市段泊岚镇姜家坡村养猪场、即墨市刘家庄镇畜禽养殖场、日照市莒县长岭镇 上官庄村、莒县寨里河镇东兴农牧公司、莒县峤山镇东辰奶牛场、莒县峤山镇刘 家义水养猪场、诸城市外贸有限责任公司凤凰父母代种鸭场，新疆阜康宏发养殖 专业合作社、九运街镇旭鸿蛋鸡合作社、九运街镇六运村自成养殖场、中澳控股 集团有限公司、德州市庆云县洼于村、山东省庆云县四柳社区肉牛养殖基地、德 州市庆云青年鸡养殖基地、庆云县永利禽业蛋鸡育成公司、庆云县兴晨青年鸡养 殖专业合作社、庆云县东泰肉鸡养殖专业合作社、河北省盐山县博远饲料有限公 司、盐山县大华人饲料有限公司、无棣县六和饲料有限公司、中澳东方希望饲料 公司等地进行了实地调研。

## Technology and included processes
本文将畜禽养殖生命周期 分为饲料作物种植、饲料加工、畜禽饲养、粪便处理、屠宰、运输等 6 个阶段。 畜禽养殖的生命周期具体流程如图 2-1 所示。由于部分数据的缺乏和基础条件的 限制，未对农药、地膜、饲料添加剂等生产、运输、使用进行分析，其他相关的 基础设施建设、运输工具生产、人力成本所引起的环境影响也不再考虑的范畴内。

## Technical purpose
本数据集描述畜禽养殖行业中粪便处理过程，具体为生猪散户运营。如干清粪，水冲粪和垫料处理等粪便管理技术，对环境足迹和运营成本产生影响。详细检查粪便管理过程，旨在支持环保型动物养殖实践，专注于减少污染物排放，遵守新环境法律，优化成本。该数据可应用于畜牧场运营的可持续性提升，适用于禽舍，猪场及类似畜牧活动的粪便处理。

## Reference product
- manure: 0.0295714; input; calculated
  根据文献中畜禽排放系数计算

## Outputs
- methane (biogenic): 0.02242; measured
  生猪散户
- nitrous oxide: 0.00339; measured
  生猪散户
- ammonia: 0.01326; measured
  生猪散户

## Use advice
使用本数据的用户应确保所描述的粪便处理过程适用于其具体情境，并考虑到当地法规，如《水污染防治行动计划》和《环境保护法》。应注意到减少使用水冲清粪处理的趋势，以及由于环境影响较小而更倾向于垫料处理或干清粪。用户还必须考虑这些处理方法相关的经济成本。当使用本数据支持动物养殖可持续性决策时，用户应将此信息与当地实践，环境考虑和成本效益分析相结合，确定最合适的粪便管理策略。

## Review details
清单： 内部审查通过几个迭代步骤完成，涉及原始数据验证、原始数据记录、代表性、完整性、与 ISO 14040 和 14044 有关的建模的一致性。

## Data sources
- 周景月. 基于生命周期评价的畜禽养殖环境影响分析. (青岛科技大学, 2017).
