# Bioethanol ; Liquid hot water

Dataset: ILCD process
Classification: Energy carriers and technologies / Renewable fuels
Generated by: Jiayi Yuan, jiayi_y@mail.bnu.edu.cn
Owner: Tiangong LCI Data Working Group
Review: Dependent internal review by Tiangong LCI Data Working Group
Amounts: no units in this file; such an amount is in the reference unit of its flow, which a separate flow dataset defines
licenseType: Free of charge for all users and uses

## Inputs
All rows: uniform; article inperiodical
- Electricity: 0.4608; min 0.11232; max 84.24
- heat: 17400; min 8390; max 41000
- Electricity: 77.4; min 33.768; max 142.92
- heat: 6160; min 652; max 21600
- Electricity: 633.6; min 96.84; max 1947.6

## Outputs
- heat: 9340; min 4420; max 22100; uniform; article inperiodical

## Review details
Inventory: The internal review was done by several iteration steps concerning raw data validation, raw data documentation, representativity, completeness and consistency of modelling with regard to ISO 14040 and 14044.
