# 电力生产 ; 混合电力 ; 辽宁

Dataset: ILCD process, Unit process, single operation
Geography: LN-CN
Reference year: 2019
Classification: Unit processes / Energy carriers and technologies / Electricity
Generated by: 熊若熙, xiongrx0126@163.com
Owner: 天工LCI数据工作小组
Review: Dependent internal review by 天工LCI数据工作小组
Amounts: no units in this file; such an amount is in the reference unit of its flow, which a separate flow dataset defines
copyright: false
licenseType: Free of charge for all users and uses

## General comment
混合电力产生形式包括火力发电、水力发电、风力发电、核能发电和太阳能发电

## Technical purpose
辽宁省的电力混合用于满足住宅、商业和工业的电力需求。在需要热电、水电、风电、核电和太阳能发电相结合以可持续满足能源需求的地区，这种电力混合特别有益。

## Reference product
- Electricity: 3.6; missing unimportant
  [{'text': '3.6', 'type': 'text'}]

## Inputs
All rows: missing unimportant
- electricity for thermal power: 3.01893
  [{'text': '3.6', 'type': 'text'}]
- electricity from hydroelectric power plant: 0.0379944
  [{'text': '3.6', 'type': 'text'}]
- electricity for nuclear power: 0
  [{'text': '3.6', 'type': 'text'}]
- electricity from wind power: 0.436291
  [{'text': '3.6', 'type': 'text'}]
- electricity for solar power: 0.10678
  [{'text': '3.6', 'type': 'text'}]

## Use advice
在使用这个数据集进行生命周期评估时，需要考虑区域电力生成特性，因为该混合电力是辽宁省特有的。这些数据应用于代表辽宁省平均电力供应，并且在没有适当区域数据的情况下不应概括到其他地区。用户在为长期项目建模时，应考虑时间变化和未来能源结构变化。

## Review details
清单： 内部审查通过几个迭代步骤完成，涉及原始数据验证、原始数据记录、代表性、完整性、与 ISO 14040 和 14044 有关的建模的一致性。

## Data sources
- 能源统计年鉴2020
