# Bioethanol ; Acid

Dataset: ILCD process
Classification: Energy carriers and technologies / Renewable fuels
Generated by: Jiayi Yuan, jiayi_y@mail.bnu.edu.cn
Owner: Tiangong LCI Data Working Group
Review: Dependent internal review by Tiangong LCI Data Working Group
Amounts: no units in this file; such an amount is in the reference unit of its flow, which a separate flow dataset defines
licenseType: Free of charge for all users and uses

## Inputs
All rows: uniform; article inperiodical
- Electricity: 17.928; max 152.64
- heat: 5730; min 372; max 1570
- Electricity: 568.8; min 45; max 6840
- heat: 2080; min 244; max 5790
- Electricity: 608.4; min 65.52; max 2368.8

## Outputs
- heat: 2880; min 130; max 8400; uniform; article inperiodical

## Review details
Inventory: The internal review was done by several iteration steps concerning raw data validation, raw data documentation, representativity, completeness and consistency of modelling with regard to ISO 14040 and 14044.
