# 铝合金型材生产 ; 原生铝合金挤压型材 ; 挤压 ; 原生铝锭

Dataset: ILCD process, Partly terminated system
Geography: CN
Reference year: 2008
Classification: Unit processes / Materials production / Metals and semimetals
Generated by: 谢金良, jinliang.research@gmail.com
Owner: 天工LCI数据工作小组
Review: Dependent internal review by 天工LCI数据工作小组
Amounts: no units in this file; such an amount is in the reference unit of its flow, which a separate flow dataset defines
copyright: false
licenseType: Free of charge for all users and uses

## General comment
Aluminum Alloy Extrusion Production (from ingots to aluminum alloy extrusions)

## Time period
论文发表年

## Technical purpose
原生铝合金挤压型材的生产过程用于各种工业和建筑应用。这一过程专门涉及将原生铝锭挤压成型材。这些型材用于制造窗框、门框、建筑结构元件以及汽车和航空工业的零部件。该过程的大部分从原生铝锭的熔化开始，小部分则从铝合金棒开始。

## Reference product
- aluminium extrusion profile: 1000; software or database

## Inputs
- electricity, high voltage, aluminium industry: 4464; software or database
  电
- hard coal; 26.3 MJ/kg: 12.2; software or database
  原煤
- Natural Gas: 51.1; software or database
  天然气，未指明
- coal gas: 666; software or database

## Outputs
- carbon dioxide (fossil),carbon dioxide (fossil): 1630; software or database
- methane (fossil): 2.78; software or database

## Data selection and combination
铝合金挤压材生产工艺路线按比例分为两部分，85%从原生铝锭重熔开始，其余15% 从铝合金棒开始。相关数据，均以有色金属工业年鉴中的统计数据作为主要参考依据。对于一些非统计性工艺数据，则来源 于公开发表的文献及典型企业生产工艺和技术指标的调研。由于我国与铝生产相关的矿石开采数据仍不完善，因此，铝土矿开采的相关数据参考物质流分 析软件 Umberto 4．0 中矿石开采数据库的环境排放数据进行估算。

## Use advice
在使用这个数据集进行生命周期评估（LCA）时，确保考虑铝合金挤压的生产路线，它被分为两部分：85% 来源于原生铝锭的重熔，15% 来自铝合金棒。参考《有色金属工业年鉴》中的统计数据并将其作为主要来源。对于非统计过程数据，应参考公开发布的文献和对典型企业生产过程和技术指标的调研。利用Umberto 4.0 物质流分析软件中的矿石开采数据库环境排放数据估算与铝生产相关的铝土矿开采的相关数据。铝合金挤压生产过程的系统边界应包括熔铸、预热、挤压、热处理和过程废料的重熔。由于数据的可用性限制，铝企业厂房的建设、维护以及熔炼炉等生产设备的生产和维护不包含在系统范围内。

## Review details
清单： 内部审查通过几个迭代步骤完成，涉及原始数据验证、原始数据记录、代表性、完整性、与 ISO 14040 和 14044 有关的建模的一致性。

## Data sources
- 丁宁, 高峰, 王志宏, & 龚先政. 铝挤压材生产的能耗和温室效应分析. 轻金属 320–324 (2011) doi:
