# 铝土矿煅烧 ; 煅烧铝土矿 ; 铝土矿

Dataset: ILCD process, Unit process, single operation
Geography: CN
Reference year: 2020
Classification: Unit processes / Materials production / Non-energetic raw materials
Generated by: 熊若熙, xiongrx0126@163.com
Owner: 天工LCI数据工作小组
Review: Dependent internal review by 天工LCI数据工作小组
Amounts: no units in this file; such an amount is in the reference unit of its flow, which a separate flow dataset defines
copyright: false
licenseType: Free of charge for all users and uses

## General comment
铝土矿煅烧;耐火废料生产

## Time period
文献发表日期

## Technical purpose
煅烧铝土矿过程主要用于耐火材料的生产。该工艺生产的高品质材料通常用于耐火行业，用于制造耐高温和耐腐蚀的砖、可浇注料和形状。该材料还可用于生产水力压裂支撑剂、防滑表面以及作为磨料。

## Reference product
- calcined bauxite: 1000; missing unimportant
  Calcined bauxite

## Inputs
All rows: missing unimportant
- cement factory: 6.27e-9
  Capital equipment
- industrial machine, heavy, unspecified: 0.0376
  Capital equipment
- electricity, high voltage, aluminium industry: 216
- Water, cooling, unspecified natural origin: 0.0096
- Water, unspecified natural origin: 1.6
- bauxite: 1438
- Coal, brown, in ground: 6450
  Coal fuel

## Outputs
- Water, in air: 438; missing unimportant
  emission to air

## Data selection and combination
中国铝土矿煅烧的特定能耗来自An等人（2018），……煅烧过程的质量平衡是基于原材料和产品的预期矿物学组成建立的。

## Use advice
在使用中国铝土矿煅烧特定能耗数据集时，必须确保所有数据输入（如铝土矿和最终产品的矿物组成）能代表正在评估的实际过程，以便建立准确的质量平衡。方法论考量应包括能源数据是否特定于地点和所使用的技术。为了透明性，必须考虑原材料质量、能源来源和操作效率可能的差异。

## Review details
清单： 内部审查通过几个迭代步骤完成，涉及原始数据验证、原始数据记录、代表性、完整性、与 ISO 14040 和 14044 有关的建模的一致性。

## Data sources
- Muñoz, I., Soto, A., Maza, D. & Bayón, F. Life cycle assessment of refractory waste management in a Spanish steel works. Waste Manage. 111, 1–9 (2020).
