# Cell processing

Dataset: ILCD process, Unit process, single operation
Geography: CN
Reference year: 2014
Classification: Materials production / Other mineralic materials
Functional unit: The functional unit of the LCA study was 1 kWh based on a multi-Si PV module
LCI method principle: Attributional
LCI method approaches: Allocation
Generated by: Jinfeng Yang, yjfzfshn@163.com
Review: Dependent internal review by Tiangong LCI Data Working Group
Amounts: no units in this file; such an amount is in the reference unit of its flow, which a separate flow dataset defines
copyright: false

## General comment
Multi-Si

## Geography
This study performs a life-cycle assessment for a photovoltaic (PV) system with multi-crystalline silicon (multi-Si) modules in China

## Time period
Available online

## Reference product
- Multi-Si solar cell: 1090; article inperiodical
  Multi-Si Solar cell

## Inputs
All rows: article inperiodical
- Multi-Si wafer: 3.34
  Multi-Si Wafer
- Ammonia: 0.0881
- Ethanol: 0.23
  Ethanol (99.7%)
- Hydrochloric acid: 2.57
  Hydrochloric acid (37%)
- Hydrofluoric acid: 0.78
- Nitric acid: 1.43
  Nitric acid (70%)
- dinitrogen: 7.62
  Nitrogen
- phosphoric acid: 0.00931
  Phosphoric acid (85%)
- Potassium hydroxide: 2.76
  KOH (21%)
- silver: 0.0679
  Silver
- aluminium: 0.38
  Aluminum
- Water (fresh water): 866.04
  Water
- Natural gas: 0.59
- electricity: 686.69
  Electricity
- process steam: 26.15
  Steam

## Outputs
All rows: article inperiodical
- ammonia: 0.00786
  Ammonia emissions to air
- hydrogen chloride: 0.00492
  Hydrogen chloride emissions to air
- hydrogen fluoride: 0.00393
  Hydrogen fluoride emissions to air
- Nitrogen oxides: 0.061
  Nitrogen oxides emissions to air
- non-methane volatile organic compounds: 0.03464
  NMVOC to air
- process water: 888.13
  Water

## Deviations from the LCI method approaches
The goal of this study was to quantitatively assess the life-cycle
environmental impacts of PV systems in China and provide a scientific basis for policy-making regarding the sustainable development of Chinese PV industry.

## Data selection and combination
The inventory data, including the material consumption and environmental emissions involved in the production of solar-grade silicon, wafers, ingots, cells, and modules, were mainly collected from companies that represent the current domain multi-Si PV technologies in China. The energy consumption data referred to the report “Clean Production ofSolar PV in China” (Li and Chang, 2012). The data of MG-Si production was from literature about MG-Si produced in China

## Review details
Inventory: The internal review was done by several iteration steps concerning raw data validation, raw data documentation, representativity, completeness and consistency of modelling with regard to ISO 14040 and 14044.; Documentation: The review of the documentation was performed by Ecobilan and is in compliance with ISO 14040 and 14044. The data set documentation is correct in view of the appropriateness of the information provided. It includes all relevant information in view of data quality and scope of application of the respective LCI result.

## Data sources
- Fu, Y., Liu, X. & Yuan, Z. Life-cycle assessment of multi-crystalline photovoltaic (PV) systems in China. Journal of Cleaner Production 86, 180–190 (2015).
