# 多晶硅锭铸造 ; 多晶硅锭 ; 定向凝固

Dataset: ILCD process, Unit process, single operation
Geography: CN
Reference year: 2014
Classification: Unit processes / Materials production / Other materials
Functional unit: The functional unit of the LCA study was 1 kWh based on a multi-Si PV module
LCI method principle: Attributional
LCI method approaches: Allocation
Generated by: 杨锦锋, yjfzfshn@163.com
Owner: 天工LCI数据工作小组
Review: Dependent internal review by 天工LCI数据工作小组
Amounts: no units in this file; such an amount is in the reference unit of its flow, which a separate flow dataset defines
copyright: false
licenseType: Free of charge for all users and uses

## General comment
多晶硅

## Geography
本研究对中国采用多晶硅组件的光伏系统进行了生命周期评估

## Time period
文章发表

## Technical purpose
此处描述的多晶硅铸锭过程用于生产太阳能级硅锭，然后将其切割成硅片，制成电池，并组装成用于光伏（PV）系统的组件。这些光伏系统主要使用多晶硅组件将太阳能转换为电能，是太阳能农场、屋顶装置以及各种利用太阳能发电的其他应用的基本组成部分。

## Reference product
- Multi-Si ingot: 5.47; measured

## Inputs
All rows: measured
- Solar grade multi-Si: 5.52
- Silicon carbide,Silicon carbide: 0.00049
  Silicon carbide
- Quartz Crucible,Quartz Crucible: 15.37
  Quartz crucible
- argon: 10.5
  Argon
- Hydrofluoric acid: 0.25403
  Hydrofluoric acid (49%)
- Compressed air: 18.76
- Sodium hydroxide: 0.04688
- freshwater: 492.47
  Water
- Electricity: 157.54
- process steam: 7.6
  Steam

## Outputs
- hydrogen fluoride: 0.0006; measured
  Hydrogen fluoride emissions to air
- Waste Acid: 0.34872; measured
  Waste acid
- Quartz Crucible,Quartz Crucible: 15.37; measured
  Waste quartz crucible for recovery
- Water (evapotranspiration): 375.08; measured
  Water (evapotranspiration) to air

## Deviations from the LCI method approaches
本研究旨在定量评估中国光伏系统的生命周期对环境的影响，为中国光伏产业的可持续发展政策制定提供科学依据。

## Data selection and combination
库存数据，包括太阳能级产品生产过程中的材料消耗和 太阳能级硅、硅片、硅锭、电池和组件生产过程中的材料消耗和环境排放 硅、硅片、硅锭、电池和组件生产过程中涉及的材料消耗和环境排放。主要从代表中国目前多晶硅光伏技术领域的企业收集。技术的企业。能耗数据参考了 能耗数据参考了《中国太阳能光伏清洁生产报告》（Li 和 Chang，2012 年）。多晶硅生产数据来自有关中国多晶硅生产的文献。的文献资料。

## Use advice
在使用中国多晶硅光伏组件生产的生命周期评估（LCA）数据时，用户应当意识到该数据代表了截至发表文献时适用的技术标准和环境法规。它包括与在中国生产太阳能级硅、硅片、硅锭、电池和组件有关的材料消耗和排放数据。如果适用，解释数据时还应考虑材料的可循环性。定期审查和更新这些数据以反映不断的技术进步和生产实践变化至关重要。确保根据本地化能源生产场景对光伏系统的使用阶段行为进行建模。

## Review details
清单： 内部审查通过几个迭代步骤完成，涉及原始数据验证、原始数据记录、代表性、完整性、与 ISO 14040 和 14044 有关的建模的一致性。

## Data sources
- Fu, Y., Liu, X. & Yuan, Z. Life-cycle assessment of multi-crystalline photovoltaic (PV) systems in China. Journal of Cleaner Production 86, 180–190 (2015).
