# 底泥修复;异位修复;植物修复;运营;得到修复的底泥

Dataset: ILCD process, Unit process, single operation
Geography: IT
Reference year: 2013
Classification: Unit processes / Other Services / Repair and maintenance
Generated by: 王宁, wang_ning@caep.org.cn
Owner: 天工LCI数据工作小组
Review: Dependent internal review by 天工LCI数据工作小组
Amounts: no units in this file; such an amount is in the reference unit of its flow, which a separate flow dataset defines
copyright: false
licenseType: Free of charge for all users and uses

## General comment
植物修复开始运行，底泥得到修复

## Technical purpose
该数据集代表了用于修复受污染沉积物（底泥）的工艺流程。数据集中的植物修复通过使用植物来稳固、提取或分解底泥中的污染物。此过程通常适用于原位或在指定的处理区域内，用于恢复受污染的土壤、沉积物或污泥。其典型应用是在生态修复项目中，或作为更广泛环境管理策略的一部分。

## Reference product
- Remediated Sediment: 1; measured

## Inputs
- Phytoremediation plant: 1; measured
- Contaminated Sediment: 1; measured
- soil: 3.1875e7; measured
- Compound Fertilizer,Compound Fertilizer: 11300; measured

## Use advice
使用此数据集对使用植物修复进行底泥修复的环境影响进行建模。确保计算系统边界内的所有输入和输出，包括主要原材料、能源需求和现场操作。生命周期评估结果的准确性取决于系统流程及其相互作用的正确表示。还需考虑修复过程的时间和空间特异性，因为这些可能会显著影响环境结果。在完全评估环境影响后，可能还需要纳入植物生物量在提取污染物后的回收或处置。

## Review details
清单： 内部审查通过几个迭代步骤完成，涉及原始数据验证、原始数据记录、代表性、完整性、与 ISO 14040 和 14044 有关的建模的一致性。

## Data sources
- Puccini M., Seggiani M., Vitolo S., & Iannelli R. Life cycle assessment of remediation alternatives for dredged sediments. Chemical Engineering Transactions 35, 781–786 (2013).
