# Sinter ; sintering ; Sintering of iron ore

Dataset: ILCD process, Unit process, single operation
Geography: CN
Reference year: 2021
Classification: Materials production / Metals and semimetals
Generated by: Wanghuanyu, wanghuanyu00@126.com
Owner: Tiangong LCI Data Working Group
Review: Dependent internal review by Tiangong LCI Data Working Group
Amounts: no units in this file; such an amount is in the reference unit of its flow, which a separate flow dataset defines
licenseType: Free of charge for all users and uses

## Reference product
- Sinter / Pellet Dust: 1000; measured
  Sinter

## Inputs
All rows: measured
- Iron ore (Import): 830.05
  iron ore
- Limestone: 34.47
  limestone
- dolomite: 46.77
- quicklime: 36.08
- Flue dust: 22.96
  sintering dust
- Flue dust: 15.31
  gas ash
- Gypsum paste: 1.62
  Gypsum slurry
- Water (fresh water): 0.349
  water
- Electricity: 143.136
  Electric energy
- Blast furnace gas: 66.39
  blast furnace gas
- process steam: 5.28
  steam
- coke: 30.918
  Coke
- anthracite: 10.306
- compressed air: 11.53

## Outputs
All rows: measured
- Flue dust: 29.865
  dust
- Flue dust: 6.281
  soot
- non-methane volatile organic compounds: 0.115
  VOCs
- 2,3,7,8-tetrachlorodibenzo-p-dioxin: 0.0014933
  Dioxins/(ng-TEQ*t-1)
- lead: 9.008e-5
  Pb
- mercury: 4.222e-5
  Hg
- zinc: 4.765e-5
  Zn
- cadmium: 4.12e-5
  Cd
- arsenic: 1.04e-5
  As
- nickel: 9.3e-6
  In
- heavy metals (unspecified): 0.000136523
  Other metals
- chemical oxygen demand: 0.000644357
  COD
- Phosphate radical: 0.006129
  PO4(3-)
- Water (evapotranspiration): 0.07
  sewage
- carbon dioxide: 209.65
  CO2
- carbon monoxide: 26.09
  CO
- sulfur dioxide: 0.520542
  SO2
- nitrous oxide: 0.493568
  NOx
- methane: 0.13078
  CH4
- hydrogen chloride: 0.014778
  HCl
- oxygen: 0.049966
  O2
- hydrogen fluoride: 0.053642
  HF

## Review details
Inventory: The internal review was done by several iteration steps concerning raw data validation, raw data documentation, representativity, completeness and consistency of modelling with regard to ISO 14040 and 14044.

## Data sources
- 易正明 et al. 基于LCA方法的铁矿烧结过程环境影响评价. 烧结球团 47, 88–95 (2022).
