# Electricity production ; Electricity ; Thermal power (89.8%) + hydropower (0.1%) + nuclear power (3.5%) + wind power (3.8%) + solar power (2.8%)

Dataset: ILCD process, Partly terminated system
Geography: SD-CN
Reference year: 2019
Classification: Energy carriers and technologies / Electricity
LCI method principle: Other
Generated by: Ruoxi Xiong, xiongrx0126@163.com
Owner: Tiangong LCI Data Working Group
Review: Dependent internal review by Tiangong LCI Data Working Group
Amounts: no units in this file; such an amount is in the reference unit of its flow, which a separate flow dataset defines
copyright: false
licenseType: Free of charge for all users and uses

## General comment
Forms of electricity generation include thermal power generation, hydropower generation, nuclear power generation, wind power generation and solar power generation.

## Time period
Calculated based on data from the 2019 Energy Statistics Yearbook

## Technical purpose
This data set represents the multiplex electricity production process in an industrial context, where electricity is generated through a mix of thermal power (89.8%), hydropower (0.1%), nuclear power (3.5%), wind power (3.8%), and solar power (2.8%). It is suitable for applications that require a comprehensive overview of the energy mix for electricity production. For example, it can be used for energy planning and policy-making, providing an understanding of the reliance on different energy sources for electrical power generation.

## Reference product
- Electricity: 3.6; calculated

## Outputs
- carbon dioxide: 0.681; calculated
- sulfur dioxide: 0.000118; calculated
- Nitrogen oxides: 0.000187809; calculated
- Dust (unspecified, from stack): 2.3641e-5; calculated

## Data treatment and extrapolations
For the accounting method, please refer to the "Enterprise Greenhouse Gas Emissions Accounting Methods and Reporting Guidelines for Power Generation Facilities". Different forms of power generation and fuel consumption come from Chapter 3 (Energy Production) and Chapter 6 (Regional Energy Balance Sheet) in the "China Energy Statistical Yearbook 2020". The fuel parameters such as low calorific value and carbon content per unit calorific value used to calculate the carbon dioxide emission factor come from the "2019 China Regional Power Grid Carbon Dioxide Baseline Emission Factor Calculation Instructions OM" and the "Enterprise Greenhouse Gas Emission Accounting Method and Reporting Guide for Power Generation Facilities" 》

## Use advice
When utilizing this data set for Life Cycle Assessment or energy analysis, ensure the context of the electricity production aligns with the regional energy mix specified. It is important to consider the year of the data (2019) given the rapid changes in energy production technology and carbon intensity. Take into account the methodological advice provided by sources such as the 'Enterprise Greenhouse Gas Emissions Accounting Methods and Reporting Guidelines for Power Generation Facilities' for accurate carbon emissions calculations. Be aware of the specific emissions factors and fuel parameters, such as lower heating values and carbon content per unit of energy, especially when comparing or combining with other data sets.

## Review details
Inventory: The internal review was done by several iteration steps concerning raw data validation, raw data documentation, representativity, completeness and consistency of modelling with regard to ISO 14040 and 14044.

## Data sources
- 熊若熙. 中国电力生产和消费二氧化碳与污染物排放因子核算. (清华大学, 2023).
