# Blast furnace ironmaking | pellet sinter | pig iron

Dataset: ILCD process, Unit process, single operation
Geography: CN
Reference year: 2020
Classification: Materials production / Other mineralic materials
Generated by: Jiwei, 1299801467@qq.com
Review: Dependent internal review by Tiangong LCI Data Working Group
Amounts: no units in this file; such an amount is in the reference unit of its flow, which a separate flow dataset defines

## Time period
论文提到钢铁企业环境总体数据为1998年的吨钢环境基础数据。

## Reference product
- iron: 752; article inperiodical

## Inputs
All rows: article inperiodical
- Sinter ore: 1131
- freshwater: 700
- Pellet: 74.1
- Electricity: 378
- carbon: 289.6
- anthracite: 108.3
- Blast furnace gas: 621.3

## Outputs
All rows: article inperiodical
- Blast furnace gas: 708
- BF Slag: 501
- BF Shop Dust: 29.2
- carbon dioxide: 1281.6
- sulfur dioxide: 0.17
- Nitrogen oxides: 0.2
- Sinter / Pellet Dust: 0.12

## Review details
Inventory: The internal review was done by several iteration steps concerning raw data validation, raw data documentation, representativity, completeness and consistency of modelling with regard to ISO 14040 and 14044.; Documentation: The review of the documentation was performed by Ecobilan and is in compliance with ISO 14040 and 14044. The data set documentation is correct in view of the appropriateness of the information provided. It includes all relevant information in view of data quality and scope of application of the respective LCI result.

## Data sources
- 1. 梁田. 基于生命周期评价的典型钢铁企业环境影响评估及绿色发展研究. (郑州大学, 2020).
