# 聚合物混合铝电解电容器 (PHAEC) 报废 ; 铝粉 ; 用过的电容器

Dataset: ILCD process, Unit process, single operation
Geography: CN
Reference year: 2022
Classification: Unit processes / End-of-life treatment / Material recycling
Generated by: 常慧敏, huiminchang@tsinghua.edu.cn
Owner: 天工LCI数据工作小组
Review: Dependent internal review by 天工LCI数据工作小组
Amounts: no units in this file; such an amount is in the reference unit of its flow, which a separate flow dataset defines
copyright: false
licenseType: Free of charge for all users and uses

## General comment
本工业过程涉及聚合物混合铝电解电容器(PHAEC)的生产和生命周期终端管理。这些电容器通常用于电源稳定和噪声过滤的电子设备中，因其高电容量和可靠性。它们特别适合于需要在高温环境等严苛条件下长期性能的应用。

## Time period
文献发表于2022-11-15，文献中 The reference year of the elementary data (alumminum ingots, separator paper, tansport, electricity, and water) is around 2016 and qcruired from the Gabi database (Version: 10.6.1.35)

## Reference product
- used capacitor: 1e6; input; measured
  Capacitors (waste)

## Outputs
All rows: measured
- electricity, high voltage, aluminium industry: 394.2
  Electricity
- Mixture of plastic and paper with electrolyte: 240.44
- iron, powder: 1.96
  Iron powder
- Aluminum powder: 731.08
- Rubber Powder: 121.52
  Rubber powder
- Dust: 0.1095

## Data selection and combination
三种 AEC 的材料信息和性能参数均来自被调查的制造商。此外，通过对 AEC 行业的几家工厂进行实地调研，获得了铝坯箔制造（由铝锭制成）、阳极/阴极箔制造（由铝坯箔制成）和电容器制造的原始数据。由于技术保密原因，无法直接从供应商处获得 PHAEC 阴极箔制造的 LCI 数据。因此，考虑到两者的相似性，根据 PAECs 阴极箔的涂层工艺数据调整 PHAECs 阴极铝箔的制造 LCI。在运输阶段，主要原材料从材料产地到电容器制造商的数据以及电容器制成品从制造商到客户的数据均来自制造商的供应链系统。使用阶段的能耗是根据 AEC 的物理方程和电气参数计算得出的。为确保分析的完整性，在分析和计算的基础上获得报废阶段的数据。

## Use advice
使用所提供的数据集时，应注意基本数据的参考年份，即2016年左右。如果有更新的信息，用户应考虑更新数据。因为技术和环境影响可能已经发展变化，核实数据与当前条件的相关性至关重要。此外，由于保密原因缺少某些制造LCI数据，用户在推断结果时需谨慎。在模拟使用阶段行为时，应使用基于物理方程和电气参数计算的能耗数据，确保其与AECs的具体应用相符合。分析中应包括产品生命终端数据，以保持分析的完整性并反映潜在的回收或处置影响。

## Review details
清单： 内部审查通过几个迭代步骤完成，涉及原始数据验证、原始数据记录、代表性、完整性、与 ISO 14040 和 14044 有关的建模的一致性。

## Data sources
- Zhang, C., Zheng, Y., Jing, J., Liu, Y. & Huang, H. A comparative LCA study on aluminum electrolytic capacitors: From liquid-state electrolyte, solid-state polymer to their hybrid. J. Clean. Prod. 375, (2022).
