# Pyrometallurgy--Carbonthermal reduction(Process B)

Dataset: ILCD process, Unit process, single operation
Geography: CN
Reference year: 2013
Valid until: 2017
Classification: Materials production / Other mineralic materials
Functional unit: FU is a typical type of LIB electrode material of 100 kg
Generated by: maqingyuan, m1120498928@163.com
Review: Dependent internal review by Tiangong LCI Data Working Group
Amounts: no units in this file; such an amount is in the reference unit of its flow, which a separate flow dataset defines
copyright: false

## General comment
Reducing carbon is introduced into the rotary furnace for mixed roasting, and graphite is used as the reducing agent to realize the reduction of valuable compounds at high temperatures (600-1000 oC), and Ni, Co, MnO and other reduction products are separated, and lithium can be recovered in the form of Li2CO3 through water leaching, so that the products can be selectively recovered.

## Time period
Data source: 2013-2017

## Reference product
- Electrolyte: 100; input; article inperiodical
  Electrode paste

## Inputs
- carbon: 6.2; article inperiodical
- water,water: 100; article inperiodical
- hard coal: 28.5; article inperiodical
- Electricity: 22.32; article inperiodical

## Outputs
All rows: article inperiodical
- Lithium carbonate: 13.3
- Graphite: 1
  Graphite powder
- Al/Cu foil: 2.7
- Nickel salt: 4
  Ni salt/metal
- Cobalt salt: 6
  Co salt/ metal
- Manganese salt: 3
  Mn salt/metal
- Alloy (Ni, Fe, Al, etc.): 20
  Annoy (Ni, Fe, Al, etc.)
- Slag (deposited, hibernating in ground, non elementary flow): 7.9
  Slag
- Metal Fumes: 2.42
  Metal fume
- carbon dioxide: 104.1
- sulfur dioxide: 0.3
- waste water - treated: 90

## Data selection and combination
The input-output of the process comes from the average results of the data reported in the literature review, reflecting the representative process from "tomb" to "cradle". This study does not consider the recycling or treatment of plastic and metal shells, and labor costs, factory construction costs, and their impact on the environment are also not included in this analysis.

## Data treatment and extrapolations
It is worth noting that the EU's data is not specific to a specific industry, and some import and export data and recycling information are not suitable for China's situation. Therefore, the improved CRMs evaluation method also combines official Chinese data, literature reports, and data from other interest groups such as trade/industry associations to conduct the best estimation of data from major LIB manufacturers, recycling companies, official management agencies in China, and other stakeholders. In terms of data timeliness, the reference period used in the evaluation of CRMs is based on the latest 4-year average (i.e. 2013-2016).

## Review details
Inventory: The internal review was done by several iteration steps concerning raw data validation, raw data documentation, representativity, completeness and consistency of modelling with regard to ISO 14040 and 14044.; Documentation: The review of the documentation was performed by Ecobilan and is in compliance with ISO 14040 and 14044. The data set documentation is correct in view of the appropriateness of the information provided. It includes all relevant information in view of data quality and scope of application of the respective LCI result.

## Data sources
- 宋佳丽. 面向能源金属高效回收的资源关键性评价模型与应用. (天津大学, 2019).
