# LFP火湿法结合回收

Dataset: ILCD process, Unit process, single operation
Geography: CN
Reference year: 2018
Classification: End-of-life treatment / Material recycling
Functional unit: The functional unit for this study is the vehicle travelling distance of a single power system during its life cycle (250,000 km).
Generated by: 马清源, m1120498928@163.com
Owner: 天工LCI数据工作小组
Review: Dependent internal review by 天工LCI数据工作小组
Amounts: no units in this file; such an amount is in the reference unit of its flow, which a separate flow dataset defines
copyright: false
licenseType: Free of charge for all users and uses

## General comment
对废旧LFP电池进行热解、破碎、筛分、磁选，得到碱性溶解的废旧LFP蓄电池正极材料；获得含有铁和锂的残留物，然后加入铁、锂和磷源，并进行焙烧以获得新的LFP正极材料。

## Technical purpose
本工艺用于回收废旧的磷酸铁锂(LFP)电池，特别是回收正极材料。通过热解、破碎、筛分和磁选处理后，提取含有锂和铁的旧正极材料，并与额外的铁、锂和磷源混合后进行再生，以制造新的LFP正极材料。这些再生的正极材料主要用于电动汽车的动力电池。

## Model description
在当前的研究中，CML2001模型与GaBi66.0版软件一起使用。

## Reference product
- lithium: 1.88; software or database

## Inputs
- natural gas: 62.01; software or database
- electricity: 1975.9; software or database

## Outputs
- copper: 19.5; software or database
- aluminium: 24.08; software or database
- Cast Iron: 21.21; software or database
- polypropylene fibres (PP): 5.44; software or database

## Data selection and combination
至于动力电池，数据和回收技术由Brump（CATL的子公司）提供。

## Data treatment and extrapolations
应用分类、特征化和归一化来分析环境影响。

## Use advice
使用本生命周期评估(LCA)数据集时，必须准确模拟包括磷酸铁锂电池回收阶段的能源消耗和材料投入在内的方法论假设。用户应按照提及的分类、特征化和归一化方法进行操作，采用CML2001模型和GaBi6软件（6.0版本），以确保环境影响分析的一致性。数据特定于电池动力系统在一辆车行驶250000公里生命周期内的应用，这必须被视为相关研究中的功能单元。任何偏差或规模调整都应有方法论上的合理化并且清楚地记录。

## Review details
清单： 内部审查通过几个迭代步骤完成，涉及原始数据验证、原始数据记录、代表性、完整性、与 ISO 14040 和 14044 有关的建模的一致性。

## Data sources
- Yu, A., Wei, Y., Chen, W., Peng, N. & Peng, L. Life cycle environmental impacts and carbon emissions: A case study of electric and gasoline vehicles in China. Transportation Research Part D: Transport and Environment 65, 409–420 (2018).
