# 沥青生产 ; 沥青 ; 摇篮

Dataset: ILCD process, Unit process, single operation
Geography: CN
Reference year: 2019
Classification: Unit processes / Materials production / Other mineralic materials
Generated by: 蔡梓萌, caizm6178@163.com
Owner: 天工LCI数据工作小组
Review: Dependent internal review by 天工LCI数据工作小组
Amounts: no units in this file; such an amount is in the reference unit of its flow, which a separate flow dataset defines
copyright: false
licenseType: Free of charge for all users and uses

## General comment
采矿和选矿;原铝生产

## Time period
文献发表日期

## Technical purpose
该工艺生产的沥青适用于各种建筑应用，包括道路铺设、屋顶防水和防潮。还可能用于生产沥青瓦以及在建筑施工中的密封和隔热。

## Reference product
- pitch: 1000; software or database
  coal tar pitch

## Inputs
All rows: software or database
- hard coal; 26.3 MJ/kg: 2037.15
  Fuel mix: raw coal (73%), electricity (15%), clean coal (8%), diesel (3%) and refined NG (1%)
- electricity, high voltage, aluminium industry: 418.743
  (same comment as for hard coal; 26.3 MJ/kg)
- hard coal: 223.41
  (same comment as for hard coal; 26.3 MJ/kg)
- Diesel oil: 83.8086
  (same comment as for hard coal; 26.3 MJ/kg)
- natural gas, high pressure: 27.9462
  (same comment as for hard coal; 26.3 MJ/kg)

## Data selection and combination
能源输入和物流的清单来自更新的年鉴、发表的论文、官方报告和数据库。清单的详细信息如表1所示。需要注意的是，材料运输假设的数据基于相关研究，可能与实际情况略有不同。每种最终使用能源类型的生命周期强度基于我们之前研究的结果。

## Use advice
生命周期评估数据的用户应注意，尽管能源输入和物料流量清单来自当前年鉴、已发表论文、官方报告和数据库，但关于物料运输假设的信息来自相关研究，这可能与实际情况稍有不同。因此，在应用运输数据时应谨慎行事。每种能源类型的生命周期强度应根据上下文中提到的以往研究中呈现的结果使用。

## Review details
清单： 内部审查通过几个迭代步骤完成，涉及原始数据验证、原始数据记录、代表性、完整性、与 ISO 14040 和 14044 有关的建模的一致性。

## Data sources
- Peng, T., Ou, X., Yan, X. & Wang, G. Life-cycle analysis of energy consumption and GHG emissions of aluminium production in China. in Energy Procedia vol. 158 3937–3943 (2019).
