# 炼钢;粗钢;电弧炉炼钢;铁水/废钢

Dataset: ILCD process, Unit process, single operation
Geography: CN
Reference year: 2006
Classification: Unit processes / Materials production / Metals and semimetals
Generated by: 王环宇, wanghuanyu00@126.com
Owner: 天工LCI数据工作小组
Review: Dependent internal review by 天工LCI数据工作小组
Amounts: no units in this file; such an amount is in the reference unit of its flow, which a separate flow dataset defines
copyright: false
licenseType: Free of charge for all users and uses

## General comment
该工艺用于通过电弧炉（EAF）方法生产粗钢。这包括熔化热金属，也称为生铁，或废钢。这种炼钢过程通常用于重视废钢回收和再利用的设施，或者生产钢铁时需要的能源较传统高炉方法更低，碳排放更少。所生产的粗钢可用于建筑、基础设施、汽车及家电制造等各个行业。

## Geography
Z9工厂同一名称的工艺过程

## Reference product
- iron: 0.087; measured

## Inputs
All rows: measured
- iron: 1071
- Steel scrap (St): 742
- Alloy steel: 31.3
  合金
- electrode: 5.9
  电极
- Electricity: 2221.2

## Outputs
- Flue dust: 4.07; measured
- waste incineration of municipal solid waste (MSW): 64; measured

## Use advice
当使用此数据集进行生命周期评估时，用户应确保分析边界正确包含了电弧炉工艺的能源供应和资源输入的上游影响。考虑废钢的来源——无论是消费后还是消费前——以准确分类循环利用的好处。此外，用户应计算炼钢过程中可能产生的任何潜在排放，包括输入和输出的运输。电弧炉设施的技术时代和地理位置应反映当前实践以确保数据相关性。建议将此数据与其他相关数据集结合使用，以模拟钢铁产品的完整生命周期。

## Review details
清单： 内部审查通过几个迭代步骤完成，涉及原始数据验证、原始数据记录、代表性、完整性、与 ISO 14040 和 14044 有关的建模的一致性。

## Data sources
- 刘微. LCI数据质量体系中的分析方法研究. (北京工业大学, 2006).
