# Granular active carbon unit ; Groundwater ex-situ remediation ; Pump and treatment ; Infrastructure construction

Dataset: ILCD process, Unit process, single operation
Geography: JS-CN
Reference year: 2022
Classification: Unit processes / Other Services / Repair and maintenance
Generated by: Wang Ning, wang_ning@caep.org.cn
Owner: Tiangong LCI Data Working Group
Review: Dependent internal review by Tiangong LCI Data Working Group
Amounts: no units in this file; such an amount is in the reference unit of its flow, which a separate flow dataset defines
copyright: false
licenseType: Free of charge for all users and uses

## General comment
Construction of activated carbon plants using steel and activated carbon pellets

## Geography
a closed pesticide manufacturing plant located in Jiangsu Province, China.

## Technical purpose
The granular activated carbon unit described is purposed for groundwater ex-situ remediation as part of a pump and treat (P&T) system. It is primarily designed for the treatment of contaminated groundwater at a closed pesticide manufacturing plant located in Jiangsu Province, China. The unit is constructed using steel and activated carbon pellets, which suggests its application in the infrastructure construction phase of environmental remediation projects.

## Reference product
- Granular active carbon unit: 1; measured

## Inputs
- Activated Carbon: 900; measured
- Steel sections: 250; measured
- transport in t*km: 115; calculated

## Use advice
Users of this data set should consider the specific context of the activated carbon unit, including its deployment in a P&T system aimed at pesticide-contaminated groundwater. Given the location in Jiangsu Province, users may need to take into account local environmental regulations and remediation standards. The construction materials (steel and activated carbon pellets) should be detailed in inventory analysis, and this system should be integrated into larger LCA models that account for the entire lifecycle of the remediation project, including potential changes in efficacy of the activated carbon over time.

## Review details
Inventory: The internal review was done by several iteration steps concerning raw data validation, raw data documentation, representativity, completeness and consistency of modelling with regard to ISO 14040 and 14044.

## Data sources
- Ding, D. et al. Assessing the environmental impacts and costs of biochar and monitored natural attenuation for groundwater heavily contaminated with volatile organic compounds. Science of The Total Environment 846, 157316 (2022).
