# 铝电解 ; 液态原铝 ; 预焙 ; 冶金用氧化铝 ; 2012年

Dataset: ILCD process, Unit process, single operation
Geography: CN
Reference year: 2021
Classification: Unit processes / Materials production / Metals and semimetals
Generated by: 蔡梓萌, caizm6178@163.com
Owner: 天工LCI数据工作小组
Review: Dependent internal review by 天工LCI数据工作小组
Amounts: no units in this file; such an amount is in the reference unit of its flow, which a separate flow dataset defines
copyright: false
licenseType: Free of charge for all users and uses

## General comment
通过预焙铝电解工业过程生产的液态原铝，专为冶金行业使用。该铝的生产日期为2012年，特别适合需要高纯度铝的大规模制造过程，如飞机、汽车零件、建筑材料和其它铝性质不可或缺的应用。

## Time period
文献发表日期

## Reference product
- aluminium, primary, liquid: 1000; software or database

## Inputs
All rows: software or database
- Integrated AC power consumption: 48449
- aluminium oxide, metallurgical: 1919.89
- fluoride salt: 20.03
- anode, prebake, for aluminium electrolysis: 420.11
- Water, unspecified natural origin: 2.55

## Data selection and combination
本研究的数据参考了PA、SA、电力等背景数据的LCA数据。PA数据来自统计数据源，SA数据主要来自文献。背景数据主要来自中国科学院生态环境研究中心CASRCEES 2018建立的中国本地化LCA数据库，涵盖能源、材料、交通、废物管理等LCA数据。

## Use advice
LCA数据的用户应当注意数据集的范围和技术适用性。数据集特定于2012年，并可能不准确反映当前的生产过程或环境影响。如果分析严格针对原材料生产，应清楚区分并排除回收材料流。在应用来自2018年CAS RCEES的电力和背景数据时，应该考虑地理相关性及方法论或数据库的更新。进行任何比较时，确保时间对齐并与研究过程保持一致的系统边界。

## Review details
清单： 内部审查通过几个迭代步骤完成，涉及原始数据验证、原始数据记录、代表性、完整性、与 ISO 14040 和 14044 有关的建模的一致性。

## Data sources
- Ding, N., Liu, N., Lu, B. & Yang, J. Life cycle greenhouse gas emissions of aluminum based on regional industrial transfer in China. J. Ind. Ecol. 25, 1657–1672 (2021).
