# Soil remediation ; In-situ remediation ; Multi-phase extraction ; Construction preparation ; GAC replacement

Dataset: ILCD process, Unit process, single operation
Geography: KR
Reference year: 2011
Classification: Other Services / Repair and maintenance
Generated by: Zhang Jianbin, zhangjb@caep.org.cn
Owner: Tiangong LCI Data Working Group
Review: Dependent internal review by Tiangong LCI Data Working Group
Amounts: no units in this file; such an amount is in the reference unit of its flow, which a separate flow dataset defines
copyright: false
licenseType: Free of charge for all users and uses

## General comment
18,000 kg

## Technology and included processes
GAC replacement - 18,000 kg

## Technical purpose
This data set pertains to a soil remediation process using multi-phase extraction technology. It is specifically applied within the scope of in-situ environmental cleanup projects. The process includes the deployment and replacement of granular activated carbon (GAC) to adsorb contaminants from extracted vapors during the remediation of contaminated soil, covering 18,000 kg of GAC per unit operation.

## Reference product
- Remedied site: 200; missing unimportant

## Inputs
- Activated Carbon: 18000; missing unimportant

## Outputs
- Activated Carbon: 18000; missing unimportant

## Use advice
Users of this data set should consider the specific context in which the granulated activated carbon is utilized. Attention should be given to ensure the operational data reflects the actual amount of GAC replaced during the remediation process. Users should also account for any emission factors associated with the waste gas treatment and the GAC production and disposal. Exclusion of subsequent GAC recycling processes may be necessary depending on the scope of the assessment.

## Review details
Inventory: The internal review was done by several iteration steps concerning raw data validation, raw data documentation, representativity, completeness and consistency of modelling with regard to ISO 14040 and 14044.

## Data sources
- Seung-Woo Jeong, Sangwon Suh. Assessment of Environmental Impacts and CO2 Emissions from Soil Remediation Technologies using Life Cycle Assessment - Case Studies on SVE and Biopile Systems -. 大韓環境工學會誌
