# 电力生产 ; 混合电力 ; 福建

Dataset: ILCD process, Unit process, single operation
Geography: FJ-CN
Reference year: 2019
Classification: Unit processes / Energy carriers and technologies / Electricity
Generated by: 熊若熙, xiongrx0126@163.com
Owner: 天工LCI数据工作小组
Review: Dependent internal review by 天工LCI数据工作小组
Amounts: no units in this file; such an amount is in the reference unit of its flow, which a separate flow dataset defines
copyright: false
licenseType: Free of charge for all users and uses

## General comment
混合电力产生形式包括火力发电、水力发电、风力发电、核能发电和太阳能发电

## Technical purpose
该数据集描述了中国福建省混合能源电网发电情况。通过此过程产生的电力可用于居民、商业、工业和公共服务。它适用于需要来自包括火力（最有可能是煤炭、天然气或石油发电厂）、水力发电、风力发电、核能发电和太阳能发电在内的多种来源的电力的应用场合。

## Reference product
- Electricity: 3.6; missing unimportant
  [{'text': '3.6', 'type': 'text'}]

## Inputs
All rows: missing unimportant
- electricity for thermal power: 1.96804
  [{'text': '3.6', 'type': 'text'}]
- electricity from hydroelectric power plant: 0.618631
  [{'text': '3.6', 'type': 'text'}]
- electricity for nuclear power: 0.869162
  [{'text': '3.6', 'type': 'text'}]
- electricity from wind power: 0.121766
  [{'text': '3.6', 'type': 'text'}]
- electricity for solar power: 0.0223956
  [{'text': '3.6', 'type': 'text'}]

## Use advice
使用此数据的用户必须考虑福建省电力混合物的地域性和时间性特点。应当考虑每种发电类型（火力、水力、风力、核能、太阳能）的比例，并且这些比例可能会随时间变化。根据生命周期评估（LCA）的目的和范围，应考虑包括燃料提取和基础设施终生使用等上游和下游过程。用户应当知晓评估每种发电类型环境影响的方法学差异，并在LCA研究中应用一致的方法。

## Review details
清单： 内部审查通过几个迭代步骤完成，涉及原始数据验证、原始数据记录、代表性、完整性、与 ISO 14040 和 14044 有关的建模的一致性。

## Data sources
- 能源统计年鉴2020
