# 西北小麦-玉米生产 ;小麦-玉米混合种植

Dataset: ILCD process, Unit process, single operation
Geography: XY-SAX-CN
Reference year: 2013
Valid until: 2013
Classification: Unit processes / Materials production / Food and renewable raw materials
Functional unit: 1t
LCI method principle: Attributional
LCI method approaches: Consequential
Generated by: Haoran Zhang, hrzhang@whu.edu.cn
Owner: 天工LCI数据工作小组
Review: Dependent internal review by 天工LCI数据工作小组
Amounts: no units in this file; such an amount is in the reference unit of its flow, which a separate flow dataset defines
copyright: false
licenseType: Free of charge for all users and uses

## General comment
冬小 麦-夏玉米轮作系统生命周期主要包括原材料开采与 运输、农资的生产与运输以及农作物种植三个阶段， 包括煤、石油、天然气、电力等原材料的开采和生产， 土地资源的利用，化肥、农药等农资生产相关的能耗 和污染物排放，包括 CO2、NH3、SO2、CH4、N2O 和 CO 等[11]。与该系统相关的厂房设备、建筑设施、运输工 具的生产和原材料的运输等环节对环境的影响则不 予考虑。

## Geography
杨凌

## Technology and included processes
研究冬小麦-夏玉米轮作体系从原材料开 采加工、运输到农资生产，再到作物种植过程的资源 利用与环境排放是为冬小麦-夏玉米轮作体系全程的 生产和环境管理提供决策依据。农产品生命周期评价 从矿石和能源开采开始，终止于农作物种植输出，包 括农产品和污染物的输出两部分，土地资源是一切生 产活动的基础，直接进入农作系统。本研究以分别生 产农作物 1 t 为评价的功能单元

## Technical purpose
此数据集描述中国西北地区，尤其是富平和杨陵的冬小麦和夏玉米混合种植过程。它涵盖了土地使用和轮作系统的生命周期影响，包括原材料的开采与运输以及如化肥和农药等农业投入品的生产与运输。这些数据对于农业研究人员、政策制定者和环境科学家评估农作物生产的环境足迹、优化农业实践和制定可持续农业战略至关重要。

## Reference product
- maize grain: 1000; measured

## Inputs
- arable: 1670; measured
- water: 769; measured
- Electricity: 32871.6; measured
- Corn Seeds: 6.55; measured

## Outputs
All rows: measured
- carbon monoxide (fossil): 0.44498
- Nitrogen oxides: 3.13949
- sulfide: 2.4014
- carbon dioxide (fossil),carbon dioxide (fossil): 960.7
- methane (fossil),methane (fossil): 0.02112
- nitrous oxide: 0.52836
- ammonium: 11.89
- phosphorus, total: 0.01641
- phosphoric acid: 0.05012
- sodium nitrate: 1.61662
- Insecticide: 0.0955
- heavy metals (unspecified): 0.0361

## Deviations from the LCI method approaches
规定起始边界为生产化肥农药的矿石和化石能源开采，终止边界为水稻种植阶段的污染物排放

## Data selection and combination
研究的数据主要来自2013 年8—9 月的实地调研，分别随机调查富平、杨凌两地各30 户种植户的冬小麦-夏玉米种植情况，

## Data treatment and extrapolations
影响评价由影响分类、特征化、标准化、加权评估4 个步骤组成。

## Use advice
使用此数据集时，确保您的生命周期评估（LCA）包括规定的起始和终止边界。考虑上游原材料（如煤炭、石油、天然气和电力）的生产以及农业投入品生产的能耗和排放。但是，不用考虑作物种植以外的设施和设备的环境影响，如农用设备的制造或基础设施，以及超出定义生命周期阶段的运输影响。另外，注意数据的区域特定性，数据收集来自2013年的富平和杨陵，这可能会影响推广到其他地区或时间段的适用性。

## Review details
清单： 内部审查通过几个迭代步骤完成，涉及原始数据验证、原始数据记录、代表性、完整性、与 ISO 14040 和 14044 有关的建模的一致性。

## Data sources
- 彭小瑜, 吴喜慧, 吴发启, 等. 陕西关中地区冬小麦-夏玉米轮作系统生命周期评价[J].农业环境科学学报, 2015, 34(4).
