# 漏斗-沟槽式导水门;原位地下水修复;漏斗-导水门式PRB

Dataset: ILCD process, Unit process, single operation
Geography: US
Reference year: 2011
Classification: Unit processes / Other Services / Repair and maintenance
Generated by: 杨欣桐, yangxt@caep.org.cn
Owner: 天工LCI数据工作小组
Review: Dependent internal review by 天工LCI数据工作小组
Amounts: no units in this file; such an amount is in the reference unit of its flow, which a separate flow dataset defines
copyright: false
licenseType: Free of charge for all users and uses

## General comment
漏斗-沟槽式导水门由隔水漏斗、导水门及活性材料组成，用于潜水埋藏浅的大型地下水污染羽状体。导水门采用沟槽方式安装。

## Geography
假设的污染场地

## Technical purpose
漏斗-沟槽式导水门系统旨在原位修复浅埋的大型地下水污染羽状体。它通常用于环境工程项目中，通过渗透性反应屏障（PRB）来控制和处理受污染的地下水。此系统适用于处理多种污染物，并适用于传统抽吸法可能不可行的区域。

## Reference product
- Funnel and trench-based gate: 1; estimated

## Inputs
- Impermeable funnel: 31.4; estimated
  A funnel with a length of 31.4 m and a gate with a width of 10 m and a depth of 11 m are installed
- Trench-based gate: 1; estimated

## Use advice
使用此数据集时，需要考虑污染特性和当地地质条件。用户可能需要根据地下水污染羽状体的范围和性质调整漏斗-导水门系统的规模和设计。在修复项目的整体环境影响评估中，应计算能量和材料输入。还建议考虑PRB系统安装和运行可能带来的潜在二次影响，例如地下水流的变化或隔水漏斗长期完整性。

## Review details
清单： 内部审查通过几个迭代步骤完成，涉及原始数据验证、原始数据记录、代表性、完整性、与 ISO 14040 和 14044 有关的建模的一致性。

## Data sources
- Mark S. H. Mak and Irene M. C. Lo.Environmental Life Cycle Assessment of Permeable Reactive Barriers: Effects of Construction Methods, Reactive Materials and Groundwater Constituents[J].Environmental Science & Technology 2011, 45, 23, 10148-10154
