# 湿蒸法棉布染整加工|印染棉布|最终处置|焚烧

Dataset: ILCD process, Unit process, black box
Geography: CN
Reference year: 2012
Classification: Materials production / Other mineralic materials
Generated by: Yingfan Duan, 1300925579@qq.com
Review: Dependent internal review by Tiangong LCI Data Working Group
Amounts: no units in this file; such an amount is in the reference unit of its flow, which a separate flow dataset defines
copyright: false

## General comment
由于产品消费和最终处置的地点具有不确定性，本研究忽略研究对象到终处置地的运输过程。其中，产品最终处置过程基于中国某一城市的终处置模型（杨建新,徐成,王如松.产品生命周期评价方法及应用[M]北京:气象出版社,2002,6.）。由于缺乏足够可信的数据，本研究忽略产品终处置过程中的能源消耗且假设卫生填埋和焚烧这两
种处置方式所占的比例相同，即各为50%。

## Outputs
All rows: article inperiodical
- carbon monoxide: 0.578
- carbon dioxide: 722
- nitrous oxide: 0.123
- Chlorinated Hydrocarbon: 0.0902
- Nitrogen oxides: 0.513
- sulfur dioxide: 1.03
- hydrogen chloride: 0.225
- hydrogen sulfide: 1.75e-5
- ammonia: 8.4e-5
- chemical oxygen demand: 0.00281
- cadmium: 0.451
- lead: 0.00565
- mercury: 0.458

## Review details
Inventory: The internal review was done by several iteration steps concerning raw data validation, raw data documentation, representativity, completeness and consistency of modelling with regard to ISO 14040 and 14044.; Documentation: The review of the documentation was performed by Ecobilan and is in compliance with ISO 14040 and 14044. The data set documentation is correct in view of the appropriateness of the information provided. It includes all relevant information in view of data quality and scope of application of the respective LCI result.

## Data sources
- 朱亚楠. 棉布连续轧染工艺生命周期环境影响评价. (南京大学, 2012).
