# Soil and groundwater remediation;Ex-situ;groundwater pump and treat;construction;Construction of Catalytic oxidation unit

Dataset: ILCD process, Unit process, single operation
Geography: JS-CN
Reference year: 2022
Classification: Other Services / Repair and maintenance
Generated by: Wang Ning, wang_ning@caep.org.cn
Owner: Tiangong LCI Data Working Group
Review: Dependent internal review by Tiangong LCI Data Working Group
Amounts: no units in this file; such an amount is in the reference unit of its flow, which a separate flow dataset defines
licenseType: Free of charge for all users and uses

## General comment
Catalytic oxidation device made of aluminium and iron

## Geography
a closed pesticide manufacturing plant located in Jiangsu Province, China.

## Technical purpose
This dataset represents the construction phase of a catalytic oxidation unit used for ex-situ soil and groundwater remediation at a closed pesticide manufacturing plant. The unit, made of aluminum and iron, is applied to treat contaminated groundwater through pump and treat processes.

## Reference product
- Air stripping unit: 1; article inperiodical

## Inputs
- aluminium: 250; article inperiodical
- Steel sections: 250; article inperiodical

## Use advice
When using this dataset for Life Cycle Assessment, ensure that the system boundaries include the extraction and processing of aluminum and iron for the construction of the catalytic oxidation unit. Consider the operational lifetime of the unit and potential end-of-life recycling options for the metals. The dataset is specific to the ex-situ remediation of a contaminated site in Jiangsu Province and may not be directly applicable to other locales or in-situ remediation processes without modification.

## Review details
Inventory: The internal review was done by several iteration steps concerning raw data validation, raw data documentation, representativity, completeness and consistency of modelling with regard to ISO 14040 and 14044.

## Data sources
- Ding, D. et al. Assessing the environmental impacts and costs of biochar and monitored natural attenuation for groundwater heavily contaminated with volatile organic compounds. Science of The Total Environment 846, 157316 (2022).
