# 电力生产 ; 混合电力 ; 四川

Dataset: ILCD process, Unit process, single operation
Geography: SC-CN
Reference year: 2019
Classification: Unit processes / Energy carriers and technologies / Electricity
Generated by: 熊若熙, xiongrx0126@163.com
Owner: 天工LCI数据工作小组
Review: Dependent internal review by 天工LCI数据工作小组
Amounts: no units in this file; such an amount is in the reference unit of its flow, which a separate flow dataset defines
copyright: false
licenseType: Free of charge for all users and uses

## General comment
混合电力产生形式包括火力发电、水力发电、风力发电、核能发电和太阳能发电

## Technical purpose
该数据集描述了四川混合电力的生产，适用于需要混合能源的各种应用。电力混合包括火力发电、水力发电、风力发电、核能发电和太阳能发电，主要用于居民、商业和工业用途。

## Reference product
- Electricity: 3.6; missing unimportant
  [{'text': '3.6', 'type': 'text'}]

## Inputs
All rows: missing unimportant
- electricity for thermal power: 0.449744
  [{'text': '3.6', 'type': 'text'}]
- electricity from hydroelectric power plant: 3.05893
  [{'text': '3.6', 'type': 'text'}]
- electricity for nuclear power: 0
  [{'text': '3.6', 'type': 'text'}]
- electricity from wind power: 0.0654948
  [{'text': '3.6', 'type': 'text'}]
- electricity for solar power: 0.02583
  [{'text': '3.6', 'type': 'text'}]

## Use advice
使用该LCA数据集时，用户应考虑四川地区特定能源混合及其时间变化。将数据与评估的系统边界适当对齐，并考虑感兴趣时间段内能源混合的任何潜在变化非常关键。用户还应注意每种能源在混合中的环境影响处理的方法选择，并考虑包括区域电网损耗。

## Review details
清单： 内部审查通过几个迭代步骤完成，涉及原始数据验证、原始数据记录、代表性、完整性、与 ISO 14040 和 14044 有关的建模的一致性。

## Data sources
- 能源统计年鉴2020
