# Refining|Gold|Highgold-bearingmaterials|Gold refining|All sizes / 精炼|金|高含金物料|金精炼|所有规模

Dataset: ILCD process, Unit process, single operation
Geography: CN
Reference year: 2019
Classification: Materials production / Metals and semimetals
Generated by: The data was created by the Office of the Second National Pollution Source Census of the Ministry of Ecology and Environment, and the data was organized by the TianGong Plan team for ILCD format / 生态环境部第二次全国污染源普查工作办公室创建数据，天工计划团队常慧敏整理数据为ILCD格式
Owner: Tiangong LCI Data Working Group / 天工LCI数据工作小组
Amounts: no units in this file; such an amount is in the reference unit of its flow, which a separate flow dataset defines
copyright: false
licenseType: Free of charge for all users and uses

## Technology and included processes
the Technical of end-of-pipe management technology for pollution Nitrogen oxidesisAcid absorption + alkali absorption，Its Technical efficiency of end-of-pipe management90

## Reference product
- Gold: 1; calculated
  源文件中描述为为金，此处对其进行了匹配工作，将其匹配到LCAflow库里面相最符合的流，污染物指标备注为工业废气量

## Outputs
- Exhaust gas: 1968; calculated
  污染物指标工业废气量的末端治理技术是/，末端治理设施实际运行率（k值）计算公式为k=废气治理设施年正常运行时间（小时）/企业年正常生产时间（小时）。原文件中描述污染物类别为废气，污染物指标为工业废气量，此处对其进行了匹配工作，将其匹配到LCAflow库里面相最符合的流，污染物指标备注为工业废气量
- particles (PM2.5 - PM10): 0.0256; calculated
  污染物指标颗粒物的末端治理技术是布袋除尘，其效率为99，末端治理设施实际运行率（k值）计算公式为k=废气治理设施年正常运行时间（小时）/企业年正常生产时间（小时）。原文件中描述污染物类别为废气，污染物指标为颗粒物，此处对其进行了匹配工作，将其匹配到LCAflow库里面相最符合的流，污染物指标备注为颗粒物
- sulfur dioxide: 0.039; calculated
  污染物指标二氧化硫的末端治理技术是碱吸收，其效率为90，末端治理设施实际运行率（k值）计算公式为k=废气治理设施年正常运行时间（小时）/企业年正常生产时间（小时）。原文件中描述污染物类别为废气，污染物指标为二氧化硫，此处对其进行了匹配工作，将其匹配到LCAflow库里面相最符合的流，污染物指标备注为二氧化硫
- Nitrogen oxides: 0.055; calculated
  污染物指标氮氧化物的末端治理技术是酸吸收+碱吸收，其效率为90，末端治理设施实际运行率（k值）计算公式为k=废气治理设施年正常运行时间（小时）/企业年正常生产时间（小时）。原文件中描述污染物类别为废气，污染物指标为氮氧化物，此处对其进行了匹配工作，将其匹配到LCAflow库里面相最符合的流，污染物指标备注为氮氧化物

## Data sources
- 第二次全国污染源普查产排污核算系数手册（试用版）,四级代码3221文件，在完整版文件中第5074页
