# Reconditioningcatalystregenerationfluegas|Heavyrectifiedgasoline,naphtha,aromatics|Naphtha,cokedgasoline|Reforming|All sizes / 重整催化剂再生烟气|重整汽油、石脑油、芳烃|石脑油、焦化汽油|重整|所有规模

Dataset: ILCD process, Unit process, single operation
Geography: CN
Reference year: 2019
Classification: Energy carriers and technologies / Other non-renewable fuels
Generated by: The data was created by the Office of the Second National Pollution Source Census of the Ministry of Ecology and Environment, and the data was organized by the TianGong Plan team for ILCD format / 生态环境部第二次全国污染源普查工作办公室创建数据，天工计划团队常慧敏整理数据为ILCD格式
Owner: Tiangong LCI Data Working Group / 天工LCI数据工作小组
Amounts: no units in this file; such an amount is in the reference unit of its flow, which a separate flow dataset defines
copyright: false
licenseType: Free of charge for all users and uses

## Technology and included processes
the Technical of end-of-pipe management technology for pollution volatile organic compoundis/，Its Technical efficiency of end-of-pipe management0

## Reference product
- Reforming gasoline: 1000; calculated
  源文件中描述为为重整汽油、石脑油、芳烃，此处对其进行了匹配工作，将其匹配到LCAflow库里面相最符合的流，污染物指标备注为工业废气量
- Naphtha: 1000; input; calculated
  源文件中描述为为石脑油、焦化汽油，此处对其进行了匹配工作，将其匹配到LCAflow库里面相最符合的流，污染物指标备注为工业废气量

## Outputs
- Exhaust gas: 3.93; calculated
  污染物指标工业废气量的末端治理技术是/，其效率为0，此处产品应为原料。原文件中描述污染物类别为废气，污染物指标为工业废气量，此处对其进行了匹配工作，将其匹配到LCAflow库里面相最符合的流，污染物指标备注为工业废气量
- volatile organic compound: 0.000353; calculated
  污染物指标挥发性有机物的末端治理技术是/，其效率为0。原文件中描述污染物类别为废气，污染物指标为挥发性有机物，此处对其进行了匹配工作，将其匹配到LCAflow库里面相最符合的流，污染物指标备注为挥发性有机物

## Data sources
- 第二次全国污染源普查产排污核算系数手册（试用版）,二级代码25,四级代码2511文件，在完整版文件中第4090页
