# 修复后土壤;土壤修复;原位热处理;蒸汽强化提取

Dataset: ILCD process, Unit process, black box
Geography: DK
Reference year: 2013
Classification: Unit processes / Other Services / Repair and maintenance
Functional unit: Results are presented per unit volume (1 m3 ) of soil remediated in order to compare results for each site.
Generated by: 杨欣桐, yangxt@caep.org.cn
Owner: 天工LCI数据工作小组
Review: Dependent internal review by 天工LCI数据工作小组
Amounts: no units in this file; such an amount is in the reference unit of its flow, which a separate flow dataset defines
copyright: false
licenseType: Free of charge for all users and uses

## General comment
从数据来源文献 表1（作为数据收集基础的试验场地概述）中可以看出,所修复的小型场地的面积和方量分别为180 m2和1175 m3。污染物的质量为400千克PCE。

## Geography
LCA的数据收集是针对一个较小（180 m2）的场地进行的，该场地代表了使用ISTD进行修复的典型丹麦场地。

## Technology and included processes
SEE适用于高渗透地层，安装多个井来加热土壤，需要注入蒸汽。修复原理为将土壤加热到100°C左右，以增强PCE的挥发，使用真空在地表以下对热蒸汽进行提取，活性炭空气过滤装置安装在地表以上，冷凝水在单独的活性炭水过滤装置中处理。在加热区上方安装一个40 cm混凝土盖，以防止雨水侵入，并形成不透气的密封表面，减少对大气的热损失

## Technical purpose
所述的土壤修复过程旨在用于小到中等规模场地的土壤污染去除，特别适用于高渗透地质。它实施原位热处理（ISTD）和蒸汽强化提取（SEE）来从土壤中移除如PCE（四氯乙烯）等氯化溶剂。该修复技术适用于典型的丹麦场地，在传统方法可能不够有效的高污染程度区域有效。

## Reference product
- Remediated soil: 1175; measured

## Inputs
All rows: measured
- Road Transport,Road Transport: 1.5451e7
  Travel by car （personkm）
- transport in t*km: 53
  Shipping by van/small truck (day to day deliveries)
- transport in t*km: 6030
  Shipping by truck (above grade materials)
- transport in t*km: 610
  Shipping by truck (well field materials)
- Road Transport,Road Transport: 90000
- Electricity: 489600
  Power usage, treatment system
- natural gas,natural gas: 2.89085e6
  Natural gas usage (heat boiler)2740 MM BTU
- Diesel,Diesel: 3.921
  Diesel usage, total (machines)
- sand: 2105
  Sand
- Mortar: 5775
  High temp grout
- Concrete: 41600
  Vapor Cap concrete
- Activated Carbon: 2646
  Vapor granular activated carbon
- Activated Carbon: 405
  Liquid granular activated carbon
- Carbon Steel: 5842
  Carbon steel
- Stainless Steel: 857
  Stainless steel 304
- Copper and copper alloys: 33
  Cobber
- Fiber glass: 45
  Fiberglass
- Polyethylene,Polyethylene: 835
  PE
- contaminated soil: 1175

## Use advice
在使用该数据集进行生命周期评价（LCA）时，用户应考虑到所概述的修复过程的所有特定输入和输出，包括能源和材料消耗，施工和运输活动期间的设备使用，以及处理如冷凝水和空气排放等副产品。包括这些因素至关重要，以确保准确理解使用SEE进行土壤修复相关的环境影响。用户应将这些数据应用于每立方米（1 m3）处理的土壤，以准确比较不同场地和修复情景的影响。

## Review details
清单： 内部审查通过几个迭代步骤完成，涉及原始数据验证、原始数据记录、代表性、完整性、与 ISO 14040 和 14044 有关的建模的一致性。

## Data sources
- Lemming G ,Nielsen G S ,Weber K , et al. Optimizing the Environmental Performance of In Situ Thermal Remediation Technologies Using Life Cycle Assessment [J]. Groundwater Monitoring & Remediation, 2013, 33 (3): 38-51.
