# Beneficiation|Graphite|Graphiteore|Flotation|All sizes / 选矿|石墨|石墨矿|浮选|所有规模

Dataset: ILCD process, Unit process, single operation
Geography: CN
Reference year: 2019
Classification: Materials production / Non-energetic raw materials
Generated by: The data was created by the Office of the Second National Pollution Source Census of the Ministry of Ecology and Environment, and the data was organized by the TianGong Plan team for ILCD format / 生态环境部第二次全国污染源普查工作办公室创建数据，天工计划团队常慧敏整理数据为ILCD格式
Owner: Tiangong LCI Data Working Group / 天工LCI数据工作小组
Amounts: no units in this file; such an amount is in the reference unit of its flow, which a separate flow dataset defines
copyright: false
licenseType: Free of charge for all users and uses

## Technology and included processes
the Technical of end-of-pipe management technology for pollution chemical oxygen demandisPrecipitation separation，Its Technical efficiency of end-of-pipe management45

## Reference product
- Graphite: 1000; calculated
  源文件中描述为为石墨，此处对其进行了匹配工作，将其匹配到LCAflow库里面相最符合的流

## Outputs
- Petroleum-related waste: 0.004; calculated
  污染物指标石油类的末端治理技术是沉淀分离，其效率为60，末端治理设施实际运行率（k值）计算公式为k=处理设施正常运行小时数(小时/年)、企业正常运转天数（天/年）。原文件中描述污染物类别为废水，污染物指标为石油类，此处对其进行了匹配工作，将其匹配到LCAflow库里面相最符合的流
- Ammonia Nitrogen: 0.0114; calculated
  污染物指标氨氮的末端治理技术是沉淀分离，其效率为40，末端治理设施实际运行率（k值）计算公式为k=处理设施正常运行小时数(小时/年)、企业正常运转天数（天/年）。原文件中描述污染物类别为废水，污染物指标为氨氮，此处对其进行了匹配工作，将其匹配到LCAflow库里面相最符合的流
- Waste water: 65900; calculated
  污染物指标废水量的末端治理技术未说明。原文件中描述污染物类别为废水，污染物指标为废水量，此处对其进行了匹配工作，将其匹配到LCAflow库里面相最符合的流
- chemical oxygen demand: 0.869; calculated
  污染物指标化学需氧量的末端治理技术是沉淀分离，其效率为45，末端治理设施实际运行率（k值）计算公式为k=处理设施正常运行小时数(小时/年)、企业正常运转天数（天/年）。原文件中描述污染物类别为废水，污染物指标为化学需氧量，此处对其进行了匹配工作，将其匹配到LCAflow库里面相最符合的流

## Data sources
- 第二次全国污染源普查产排污核算系数手册（试用版）,二级代码10,三级代码109.0,四级代码1092文件，在完整版文件中第123页
