# 聚丙烯（PP）生产;煤制聚丙烯;GLLMTP

Dataset: ILCD process, Unit process, black box
Geography: CN
Reference year: 2005
Classification: Unit processes / Materials production / Plastics
Generated by: 郭慧娟, GHJ@email.ncu.edu.cn
Owner: 天工LCI数据工作小组
Review: Dependent internal review by 天工LCI数据工作小组
Amounts: no units in this file; such an amount is in the reference unit of its flow, which a separate flow dataset defines
copyright: false
licenseType: Free of charge for all users and uses

## General comment
煤制聚丙烯的技术组合较多：根据进料方式可分为湿法进料气化和干法进料气化两大类，湿法进料气化典型代表有GE和多喷嘴水煤浆气化工艺，干法进料气化典型代表有She11、GSP、HT-L（航天粉煤 加压气化）工艺等 ；甲醇合成工艺按照合成压力的不同可分为高压法、中压法和低压法；甲醇制聚丙烯过程依据主产物的不同可分为MTO工艺与MTP工艺。不同的工艺组合会带来不同的环境影响。GLLMTP工艺主要生产聚丙烯，副产汽油和液化石油气等。

## Geography
根据中国煤制烯烃产业现 状

## Time period
煤电化循环经济产业园煤制180万t/a甲醇及转化烯烃项目：可行性研究报告[R]．2005

## Technical purpose
GLLMTP煤制聚丙烯工艺旨在工业生产聚丙烯。该工艺包括湿法进料气化和干法进料气化技术组合，湿法进料气化包括GE和多喷嘴水煤浆气化，干法进料气化包括Shell、GSP和HT-L技术。甲醇合成过程采取高压、中压或低压方法，最终通过MTO（甲醇至烯烃）或MTP（甲醇至聚丙烯）工艺产出聚丙烯。生产的聚丙烯适用于包括汽车部件、包装材料、纺织品及消费品在内的广泛应用。同时产出的副产品还包括汽油和液化石油气。

## Reference product
- polypropylene granulate (PP): 1000; missing unimportant

## Inputs
All rows: missing unimportant
- hard coal; 26.3 MJ/kg: 3800
  Raw coal(0.79kgce/kg)
- sodium hydroxide: 0.808
  Caustic soda
- Limestone: 21.8
- Water: 21400
- chlorine: 1.61
  Liquid chlorine
- hydrogen chloride: 1.46
  hydrochloric acid
- hard coal: 3500
  Thermal coal(0.73kgce/kg)
- Catalyst: 0.707

## Outputs
All rows: missing unimportant
- sulfur: 14.1
- gasoline (regular): 274
- LPG - liquefied petroleum gas: 131
- carbon dioxide (fossil): 10334
  原文未区分bio和fossil，根据专家判断此处为fossil
- methane (fossil): 0.09484
  原文未区分bio和fossil，根据专家判断此处为fossil
- nitrous oxide: 0.10221
- sulfur dioxide: 9.63666
- Nitrogen oxides: 18.8783
- particles (PM2.5): 2.46444
- Volatile Organic Compounds (VOCs): 0.23988
  VOC

## Data selection and combination
聚丙烯产品生命周期清单数据包括前景数据与背景数据。产品生产活动水平数据即为前景数据，通过查阅煤制烯烃企业生产数据。背景数 据为输入原料、材料或 能源的消耗以及污染物 排放数据 。本研究中的煤炭开采阶段生命周 期清单数据从北京工业大学数据库中提取，洗选 质量损失以全国平均值计算，质量损失为15%，原料煤需要经过洗选过程，燃料煤不需要经过洗选过程。

## Data treatment and extrapolations
本研究分配方式采用碳分 配，产品含碳量越高，分 配系数越大。

## Use advice
煤制聚丙烯的生命周期清单（LCI）数据包含前景数据和背景数据。用户应参考煤制烯烃企业的生产数据以获得前景数据，背景数据涉及原材料、材料、能源消耗及污染物排放。煤炭开采阶段的LCI数据来自北京工业大学数据库，洗选过程中按国家平均损失率15%计算；原料煤需要洗选，燃料煤则无需此过程。本研究采用了碳分配法，含碳量越高的产品分配系数越大。功能单位定义为1吨煤制聚丙烯产品。研究采取“摇篮到大门”的范围，包括九个阶段（煤炭开采与洗选、煤炭运输、辅料供应、电力供应、煤炭气化、低温甲醇洗、甲醇生产、聚烯烃生产、公用工程），不包括基础设施建设、产品包装、运输、使用和废弃等过程。

## Review details
清单： 内部审查通过几个迭代步骤完成，涉及原始数据验证、原始数据记录、代表性、完整性、与 ISO 14040 和 14044 有关的建模的一致性。

## Data sources
- 李泉鑫, 李俊杰, 龚先政 & 田亚峻. 两条不同技术路线的煤制聚丙烯生命周期评价. 煤炭转化 1–9 (2022) doi:
