# clinker production|clinker|high-sulfur circulating fluidized bed reduction decomposition of phosphogypsum|phosphogypsum

Dataset: ILCD process, Unit process, black box
Geography: CN
Reference year: 2013
Classification: Materials production / Other mineralic materials
Generated by: Siqi Yang
Amounts: no units in this file; such an amount is in the reference unit of its flow, which a separate flow dataset defines
copyright: false

## General comment
High-sulfur coal is used in circulating fluidized bed technology to reduce phosphogypsum and produce SO2 and cement clinker. The phosphogypsum comes from a certain chemical plant under Yuntianhua Group, with a mass fraction of 70.68% for CaSO4. The high-sulfur coal is selected from a coal mine in Zhenxiong County, Yunnan, with a mass fraction of sulfur of 2.87%.
In the pilot study on fluidized bed equipment, the influence of reaction temperature, primary air volume, secondary air volume and phosphogypsum treatment volume on flue gas SO2 concentration was investigated, and the optimal conditions for phosphogypsum decomposition were determined: decomposition furnace reaction temperature (1000 ±10)°C, primary air volume 220m3/h, no secondary air, m (phosphogypsum): m (high sulfur coal) = 10:1. Under these test conditions, the volume fraction of SO2 in the flue gas reaches 8.18%, which can be used for sulfuric acid production, the conversion rate of phosphogypsum reaches 90.39%, the mass fraction of CaO in clinker reaches 65%, and the decomposition rate is 95%.

## Model description
1 kg of cement clinker as a functional unit; the system boundary is defined as the calcination process of cement clinker, which includes: input of raw materials → different decomposition and calcination processes → discharge of products and exhaust gases.

## Reference product
- clinker: 1000
  Cement clinker

## Inputs
- phosphogypsum: 2250
  Phosphogypsum
- hard coal: 188.352
  High-sulfur coal (selected from a coal mine in Zhenxiong County, Yunnan Province, with a sulfur mass fraction of 2.87%). The original data is given as 0.175 kg of standard coal. To convert it to hard coal, we can use the conversion factor of 1 kg of hard coal equals 0.929 kg of standard coal.

## Outputs
- carbon dioxide: 329
  CO2
- sulfur dioxide: 916
  SO2
- Nitrogen oxides: 7
  NOx
- carbon monoxide: 164
  CO

## Data sources
- 张杭, 马丽萍, 胡建红, 毛宇, 戴取秀, & 谢龙贵. (2013). 不同分解工艺下磷石膏分解制水泥熟料的LCA研究. 材料导报, 27(S1), 302–305.
