# 生物油蒸汽重整制氢

Dataset: ILCD process, Unit process, single operation
Geography: CN
Reference year: 2021
Classification: Unit processes / Energy carriers and technologies / Heat and steam
Functional unit: 29 kg H2 (hydrogen as an intermediate product)
LCI method principle: Attributional
Generated by: 甘金璐, jinlu.gan1998@gmail.com
Owner: 天工LCI数据工作小组
Review: Dependent internal review by 天工LCI数据工作小组
Amounts: no units in this file; such an amount is in the reference unit of its flow, which a separate flow dataset defines
copyright: false
licenseType: Free of charge for all users and uses

## General comment
相当于63.42%生物油的所有水相用于蒸汽重整，产生29.0 kg h−1 氢气。使用生物油加氢处理的5.8 kg h−1 要求后，剩余的23.2 kg h−1 被视为副产品。

## Time period
文章的发表日期

## Technical purpose
生物油蒸汽重整工艺用于生产氢气作为中间能源载体。所产生的氢气主要用于生物油的加氢处理，支持可持续能源行业的过程。剩余产出被视为副产品，可用于各种其他化学合成过程或作为替代能源。

## Reference product
- Hydrogen: 29

## Inputs
- biomass; 14.7 MJ/kg: 1000
  麦秆；或14335MJ
- Electricity: 1758.24
- water: 225.9

## Use advice
将此数据集整合到生命周期评估中时，重要的是要在蒸汽重整过程的主要氢产品和副产品之间按比例分配能源和材料投入。考虑这一过程在氢气生产中的技术适用性，并在技术规模或操作条件发生变化时考虑任何潜在的效率变化。在使用阶段，必须准确模拟氢在下游应用中的行为，以反映其环境影响。

## Review details
清单： 内部审查通过几个迭代步骤完成，涉及原始数据验证、原始数据记录、代表性、完整性、与 ISO 14040 和 14044 有关的建模的一致性。

## Data sources
- Zheng, X., Zhong, Z., Zhang, B., Du, H., Wang, W., & Li, Q. (2022). Environmental impact comparison of wheat straw fast pyrolysis systems with different hydrogen production processes based on life cycle assessment. Waste Management & Research: The Journal for a Sustainable Circular Economy, 40(6), 654–664.
