# 电力生产 ; 混合电力 ; 天津

Dataset: ILCD process, Unit process, single operation
Geography: TJ-CN
Reference year: 2019
Classification: Unit processes / Energy carriers and technologies / Electricity
Generated by: 熊若熙, xiongrx0126@163.com
Owner: 天工LCI数据工作小组
Review: Dependent internal review by 天工LCI数据工作小组
Amounts: no units in this file; such an amount is in the reference unit of its flow, which a separate flow dataset defines
copyright: false
licenseType: Free of charge for all users and uses

## General comment
混合电力产生形式包括火力发电、水力发电、风力发电、核能发电和太阳能发电

## Technical purpose
这种电力混合供应旨在用于天津地区的一般用途，包括但不限于住宅、商业和工业应用。该混合包括热电、水电、风电、核电和太阳能发电等多种电源，为各种类型的消费提供稳定的电力供应。

## Reference product
- Electricity: 3.6; missing unimportant
  [{'text': '3.6', 'type': 'text'}]

## Inputs
All rows: missing unimportant
- electricity for thermal power: 3.47209
  [{'text': '3.6', 'type': 'text'}]
- electricity from hydroelectric power plant: 0.0005868
  [{'text': '3.6', 'type': 'text'}]
- electricity for nuclear power: 0
  [{'text': '3.6', 'type': 'text'}]
- electricity from wind power: 0.0538668
  [{'text': '3.6', 'type': 'text'}]
- electricity for solar power: 0.0734544
  [{'text': '3.6', 'type': 'text'}]

## Use advice
使用该数据集的用户应在其生命周期评估中考虑每种电力发电源的比例贡献，并相应调整他们的模型。需要注意的是，每种发电技术相关的环境影响可能会有很大差异，这些应在进行生命周期评估时考虑在内。此外，任何时候天津地区能源混合的变化或技术更新都应予以监测，因为这些可能会影响评估的相关性和准确性。

## Review details
清单： 内部审查通过几个迭代步骤完成，涉及原始数据验证、原始数据记录、代表性、完整性、与 ISO 14040 和 14044 有关的建模的一致性。

## Data sources
- 能源统计年鉴2020
