# Rawleather/wetblueleather/blankleather-finishedleather|Cattle/sheep/pigfinishedleather|Chrometanning/chromeretanning/chrome-non-chromecombinationtanning|All sizes / 生皮/蓝湿革/坯革-成品革|牛/羊/猪成品革|牛/羊/猪生皮牛/羊/猪蓝湿革牛/羊/猪坯革|铬鞣/铬复鞣/铬-非铬结合鞣制|所有规模

Dataset: ILCD process, Unit process, single operation
Geography: CN
Reference year: 2019
Classification: Materials production / Non-energetic raw materials
Generated by: The data was created by the Office of the Second National Pollution Source Census of the Ministry of Ecology and Environment, and the data was organized by the TianGong Plan team for ILCD format / 生态环境部第二次全国污染源普查工作办公室创建数据，天工计划团队常慧敏整理数据为ILCD格式
Owner: Tiangong LCI Data Working Group / 天工LCI数据工作小组
Amounts: no units in this file; such an amount is in the reference unit of its flow, which a separate flow dataset defines
copyright: false
licenseType: Free of charge for all users and uses

## Technology and included processes
the Technical of end-of-pipe management technology for pollution volatile organic compoundisOthers: without closed collection facility (unorganized discharge)，The formula for calculating the actual operation rate (k-value) of the end-of-pipe treatment facility is k = operating time of wastewater terminal treatment facilities (hours) / normal production time (hours)

## Reference product
- Cattle/Sheep/Pig Finished Leather: 1; calculated
  源文件中描述为为牛/羊/猪成品革，此处对其进行了匹配工作，将其匹配到LCAflow库里面相最符合的流

## Outputs
All rows: calculated
- volatile organic compound: 0.000252
  污染物指标挥发性有机物的末端治理技术是吸收+分流，其效率为88，末端治理设施实际运行率（k值）计算公式为k=设备运行时间（小时）/总生产时间（小时）。原文件中描述污染物类别为废气，污染物指标为挥发性有机物，此处对其进行了匹配工作，将其匹配到LCAflow库里面相最符合的流
- volatile organic compound: 0.000252
  污染物指标挥发性有机物的末端治理技术是光解，其效率为88，末端治理设施实际运行率（k值）计算公式为k=设备运行时间（小时）/总生产时间（小时）。原文件中描述污染物类别为废气，污染物指标为挥发性有机物，此处对其进行了匹配工作，将其匹配到LCAflow库里面相最符合的流
- volatile organic compound: 0.000567
  污染物指标挥发性有机物的末端治理技术是其他：喷淋塔，其效率为73，末端治理设施实际运行率（k值）计算公式为k=设备运行时间（小时）/总生产时间（小时）。原文件中描述污染物类别为废气，污染物指标为挥发性有机物，此处对其进行了匹配工作，将其匹配到LCAflow库里面相最符合的流
- volatile organic compound: 0.00063
  污染物指标挥发性有机物的末端治理技术是其他：吸附，其效率为70，末端治理设施实际运行率（k值）计算公式为k=活性炭用量（吨）/标准活性炭用量（吨）。原文件中描述污染物类别为废气，污染物指标为挥发性有机物，此处对其进行了匹配工作，将其匹配到LCAflow库里面相最符合的流
- volatile organic compound: 0.0021
  污染物指标挥发性有机物的末端治理技术是其他：无密闭收集设施（无组织排放），末端治理设施实际运行率（k值）计算公式为/。原文件中描述污染物类别为废气，污染物指标为挥发性有机物，此处对其进行了匹配工作，将其匹配到LCAflow库里面相最符合的流

## Data sources
- 第二次全国污染源普查产排污核算系数手册（试用版）,三级代码191.0文件，在完整版文件中第2729页
