# 电力生产 ; 混合电力 ; 山西

Dataset: ILCD process, Unit process, single operation
Geography: SX-CN
Reference year: 2019
Classification: Unit processes / Energy carriers and technologies / Electricity
Generated by: 熊若熙, xiongrx0126@163.com
Owner: 天工LCI数据工作小组
Review: Dependent internal review by 天工LCI数据工作小组
Amounts: no units in this file; such an amount is in the reference unit of its flow, which a separate flow dataset defines
copyright: false
licenseType: Free of charge for all users and uses

## General comment
混合电力产生形式包括火力发电、水力发电、风力发电、核能发电和太阳能发电

## Technical purpose
山西电力混合供应用于满足住宅、商业和工业的能源需求，支持照明、供暖、制冷和运行机械等各种电力基础设施，多元化的电力来源确保电力供应稳定。

## Reference product
- Electricity: 3.6; missing unimportant
  [{'text': '3.6', 'type': 'text'}]

## Inputs
All rows: missing unimportant
- electricity for thermal power: 3.16669
  [{'text': '3.6', 'type': 'text'}]
- electricity from hydroelectric power plant: 0.0529488
  [{'text': '3.6', 'type': 'text'}]
- electricity for nuclear power: 0
  [{'text': '3.6', 'type': 'text'}]
- electricity from wind power: 0.242053
  [{'text': '3.6', 'type': 'text'}]
- electricity for solar power: 0.138316
  [{'text': '3.6', 'type': 'text'}]

## Use advice
使用此数据集时，应考虑山西电力混合中每种发电类型的比例。需要特别关注不同电力来源间环境影响的分配。假设关于电网损耗和传输平均效率的考虑应该纳入计算。同时，对于长期评估，还应考虑由于政策或技术进步可能导致的电力组合的未来变化。

## Review details
清单： 内部审查通过几个迭代步骤完成，涉及原始数据验证、原始数据记录、代表性、完整性、与 ISO 14040 和 14044 有关的建模的一致性。

## Data sources
- 能源统计年鉴2020
