# 稀土氧化物 (REO) 原位浸出 ;稀土氧化物;IAC路线;含稀土矿石的原地浸出、稀土碳酸盐沉淀和煅烧

Dataset: ILCD process, Unit process, single operation
Geography: CN
Reference year: 2007
Valid until: 2020
Classification: Unit processes / Materials production / Inorganic chemicals
Functional unit: The study considered 15 different functional units corresponding to different RE metals. The assessment included three main RE production sites in China: REO production in Bayan Obo, Sichuan, and IACs. Primary data were collected for foreground production processes from Chinese and further international scientific literature, industry reports, government and industry surveys. The authors assumed a baseline for aqueous and gaseous emissions using national discharge standards for industry from the Chinese Ministry of
LCI method principle: Attributional
LCI method approaches: Allocation
Generated by: 汪涛, twang@iue.ac.cn
Owner: 天工LCI数据工作小组
Review: Dependent internal review by 天工LCI数据工作小组
Amounts: no units in this file; such an amount is in the reference unit of its flow, which a separate flow dataset defines
copyright: false
licenseType: Free of charge for all users and uses

## General comment
此数据集代表了位于中国南方省份白云鄂博的稀土氧化物（REO）通过IAC（原地浸出、稀土碳酸盐沉淀和煅烧）路线的生产过程。从该过程中获得的REO主要用于制造磁铁、催化剂、玻璃添加剂以及其他高科技和清洁能源应用，这些应用需要特定的稀土元素。

## Geography
白云鄂博, 中国南方省份

## Technology and included processes
由于没有白云鄂博的初级采矿数据，研究中的生命周期清单数据（Sprecher、Arshi、Marx、Bailey（Classen 等人，2007 年））基于不同的数据源，要么来自铁矿开采，要么来自 Althaus 的磷矿开采。主要投入是能源和爆破剂

## Reference product
- Rare Earth Oxides: 1; calculated

## Inputs
- Ammonium sulfate: 20.07; calculated
- Ammonium bicarbonate: 4.29; calculated
- sulphuric acid: 0.86; calculated
- Electricity: 17.856; calculated

## Deviations from the LCI method approaches
Goal of this chapter is to identify the most important differences and uncertainties of crucial parameters in the LCIs and to link those directly to the affected LCIAs. However, comparability of LCIA results shown in Fig. 4 is limited due to different LCIA methods, as already mentioned in the chapter “methods”. All LCIA results are shown in Tables S1 and S3 (Supplementary material). It should also be mentioned that we calculated Althaus' LCIA data, as he provided only the LCI in the ecoinvent database. For this, we rebuilt Althaus' original process “rare earth oxide production from bastnasite” in the GaBi software and evaluated it with two LCIA methods for comparison (Table S1).

## Use advice
由于缺乏白云鄂博的初级采矿数据，该LCA数据集的用户应考虑采用二手数据源。主要输入项，如能源和爆破剂，是根据铁矿或磷矿石开采数据得出的。为了准确评估，用户应该批判性地评估LCI中关键参数的差异和不确定性。此外，在比较LCIA结果时，重要的是要承认不同研究中使用的LCIA方法不同带来的限制，正如补充材料中图4以及表S1和S3中强调的那样。建议使用一致的LCIA方法进行有意义的比较。数据用户在应用此数据集时，还应考虑与中国环保部国家行业排放标准一致的水和气体排放基线假设。

## Review details
清单： 内部审查通过几个迭代步骤完成，涉及原始数据验证、原始数据记录、代表性、完整性、与 ISO 14040 和 14044 有关的建模的一致性。

## Data sources
- Schreiber, A., Marx, J. & Zapp, P. Life Cycle Assessment studies of rare earths production - Findings from a systematic review. Science of The Total Environment 791, 148257 (2021).
