# 底泥修复;异位修复;异位热解析;工程实施;热解

Dataset: ILCD process, Unit process, single operation
Geography: CN
Classification: Other Services / Repair and maintenance
Generated by: 王枫, wangfeng@caep.org.cn
Owner: 天工LCI数据工作小组
Review: Dependent internal review by 天工LCI数据工作小组
Amounts: no units in this file; such an amount is in the reference unit of its flow, which a separate flow dataset defines
copyright: false
licenseType: Free of charge for all users and uses

## General comment
以处理1 t 污泥为功能单位。1）运输环节采用载重5t卡车，运输距离2 km；2）干化环节采用空心桨叶干化机，功率55 kW，整个干化系统规模为50 t/d，24 h工作制；3）热解环节管式炉额定功率4 kW，空载功率1.4 kW，反应前通入2~3 分钟N2以保证无氧环境，热解终温选定350℃；4）热解所产气体首先经过冷却装置，冷凝收集液体成分主要为可以回收利用的生物油，回收分离出的可燃性气体，固体半焦可用作吸附剂。

## Technical purpose
所描述的工业过程涉及底泥的异位热处理，具体是将1吨污泥作为功能单位进行热解修复。该过程在项目设置中进行，运输阶段使用载重5吨的卡车运输距离为2公里。干化阶段采用55千瓦的空心桨叶干燥机，并且整个干燥系统的处理能力为每天50吨，按24小时工作制度运行。热解阶段使用额定功率为4千瓦、空载功率为1.4千瓦的管式炉。反应前通入2-3分钟氮气以确保无氧环境。热解的最终温度设定为350°C。热解产生的气体首先通过冷却装置，冷凝收集的液体成分主要是具有较高热值、可回收利用的生物油。

## Reference product
- Remediated Sediment: 1000; calculated

## Inputs
- Electricity: 1080; calculated
- nitrogen: 5.63; calculated

## Use advice
对于使用该数据集的生命周期评价（LCA）实践者来说，考虑数据中详述的运输阶段、干化系统和热解设备的具体性质至关重要。确保准确地建模运输距离、干化阶段的能源消耗以及热解阶段的操作特性。在环境影响评估中还必须反映在热处理期间的氮气输入和无氧环境。在计算可能的能量回收时，应纳入生产的生物油的热值。如果需要方法论的一致性，请坚持使用数据集范围内概述的假设和参数，并在与其他数据集整合时注意边界条件。

## Review details
清单： 内部审查通过几个迭代步骤完成，涉及原始数据验证、原始数据记录、代表性、完整性、与 ISO 14040 和 14044 有关的建模的一致性。

## Data sources
- 王久兵.污泥热解反应机制及其能源化工艺的全生命周期评价研究[D].浙江工业大学,2016.
