# Water-basedadhesives|Starch,polyacrylate,polyvinylacetate,vinylacetate-ethyleneemulsion,water-basedpolyurethane,curingagent,plasticizer,thinner,filler,auxiliary|Polymerization, physical mixing|All sizes / 水基型胶黏剂|淀粉、聚丙烯酸酯、聚醋酸乙烯、醋酸乙烯-乙烯乳液、水性聚氨酯、固化剂、增塑剂、稀释剂、填料、助剂|聚合反应、物理混合|所有规模

Dataset: ILCD process, Unit process, single operation
Geography: CN
Reference year: 2019
Classification: Materials production / Organic chemicals
Generated by: The data was created by the Office of the Second National Pollution Source Census of the Ministry of Ecology and Environment, and the data was organized by the TianGong Plan team for ILCD format / 生态环境部第二次全国污染源普查工作办公室创建数据，天工计划团队常慧敏整理数据为ILCD格式
Owner: Tiangong LCI Data Working Group / 天工LCI数据工作小组
Amounts: no units in this file; such an amount is in the reference unit of its flow, which a separate flow dataset defines
copyright: false
licenseType: Free of charge for all users and uses

## Technology and included processes
the Technical of end-of-pipe management technology for pollution volatile organic compoundisRegenerative thermal combustion method①，Its Technical efficiency of end-of-pipe management51

## Reference product
- Water-based adhesive: 1000; calculated
  源文件中描述为为水基型胶黏剂，此处对其进行了匹配工作，将其匹配到LCAflow库里面相最符合的流，污染物指标备注为工业废气量

## Outputs
All rows: calculated
- Exhaust gas: 2100
  污染物指标工业废气量的末端治理技术是/，其效率为0。原文件中描述污染物类别为废气，污染物指标为工业废气量，此处对其进行了匹配工作，将其匹配到LCAflow库里面相最符合的流，污染物指标备注为工业废气量
- particles (PM2.5 - PM10): 0.007
  污染物指标颗粒物的末端治理技术是袋式除尘，其效率为95，末端治理设施实际运行率（k值）计算公式为k=设施年耗电量（千瓦时）/设备设计耗电量（千瓦时）。原文件中描述污染物类别为废气，污染物指标为颗粒物，此处对其进行了匹配工作，将其匹配到LCAflow库里面相最符合的流，污染物指标备注为颗粒物
- particles (PM2.5 - PM10): 0.007
  污染物指标颗粒物的末端治理技术是静电除尘，其效率为95，末端治理设施实际运行率（k值）计算公式为k=设施年耗电量（千瓦时）/设备设计耗电量（千瓦时）。原文件中描述污染物类别为废气，污染物指标为颗粒物，此处对其进行了匹配工作，将其匹配到LCAflow库里面相最符合的流，污染物指标备注为颗粒物
- particles (PM2.5 - PM10): 0.007
  污染物指标颗粒物的末端治理技术是旋风+布袋，其效率为95，末端治理设施实际运行率（k值）计算公式为k=设施年耗电量（千瓦时）/设备设计耗电量（千瓦时）。原文件中描述污染物类别为废气，污染物指标为颗粒物，此处对其进行了匹配工作，将其匹配到LCAflow库里面相最符合的流，污染物指标备注为颗粒物
- volatile organic compound: 0.07424
  污染物指标挥发性有机物的末端治理技术是吸附/催化燃烧法①，其效率为36，末端治理设施实际运行率（k值）计算公式为k=设施年耗电量（千瓦时）/设备设计耗电量（千瓦时），①指末端治理效率考虑了65%捕集效率
  。原文件中描述污染物类别为废气，污染物指标为挥发性有机物，此处对其进行了匹配工作，将其匹配到LCAflow库里面相最符合的流，污染物指标备注为挥发性有机物
- volatile organic compound: 0.08816
  污染物指标挥发性有机物的末端治理技术是光解①，其效率为24，末端治理设施实际运行率（k值）计算公式为k=设施年耗电量（千瓦时）/设备设计耗电量（千瓦时），①指末端治理效率考虑了66%捕集效率
  。原文件中描述污染物类别为废气，污染物指标为挥发性有机物，此处对其进行了匹配工作，将其匹配到LCAflow库里面相最符合的流，污染物指标备注为挥发性有机物
- volatile organic compound: 0.05684
  污染物指标挥发性有机物的末端治理技术是蓄热式热力燃烧法①，其效率为51，末端治理设施实际运行率（k值）计算公式为k=设施年耗电量（千瓦时）/设备设计耗电量（千瓦时），①指末端治理效率考虑了67%捕集效率
  。原文件中描述污染物类别为废气，污染物指标为挥发性有机物，此处对其进行了匹配工作，将其匹配到LCAflow库里面相最符合的流，污染物指标备注为挥发性有机物

## Data sources
- 第二次全国污染源普查产排污核算系数手册（试用版）,四级代码2669文件，在完整版文件中第4111页
