# clinker production|clinker|traditional rotary kiln|phosphogypsum

Dataset: ILCD process, Unit process, black box
Geography: SD-CN
Reference year: 2013
Classification: Materials production / Other mineralic materials
Generated by: Siqi Yang
Amounts: no units in this file; such an amount is in the reference unit of its flow, which a separate flow dataset defines
copyright: false

## General comment
Traditional rotary kilns produce cement clinker.
After detection, the gas flow rate of rotary kiln was between 32137~43251Nm3/h.

## Geography
A sulfuric acid plant under Lubei Chemical Group Co., Ltd.

## Model description
1 kg of cement clinker as a functional unit; the system boundary is defined as the calcination process of cement clinker, which includes: input of raw materials → different decomposition and calcination processes → discharge of products and exhaust gases.

## Reference product
- clinker: 1000
  Cement clinker

## Inputs
- phosphogypsum: 2002; measured
  Phosphogypsum
- hard coal: 558.599; measured
  Standard coal. The original data is 0.519kg standard coal, here converted to hard coal, the conversion formula is 1kg hard coal = 0.929kg standard coal.

## Outputs
- carbon dioxide: 1340; measured
  CO2
- sulfur dioxide: 975; measured
  SO2
- Nitrogen oxides: 0.9; measured
  NOx
- particles (> PM10): 0.76; measured
  Dust, with an unspecified particle size, is treated as PM > 10 micrometers in diameter. In the production process of cement clinker, there is almost no dust generated.

## Sampling procedure
The data before and after the kiln of a sulfuric acid plant affiliated to Lubei Chemical Group Co., Ltd. with a fixed measured value of 65kt/a sulfuric acid and 81kt/a cement clinker per year

## Data sources
- 张杭, 马丽萍, 胡建红, 毛宇, 戴取秀, & 谢龙贵. (2013). 不同分解工艺下磷石膏分解制水泥熟料的LCA研究. 材料导报, 27(S1), 302–305.
