# Gaspurification|Biomasspyrolysisgas|Biomass|Pyrolysis and gasification|All sizes / 燃气净化|生物质热解气|生物质|热解气化|所有规模

Dataset: ILCD process, Unit process, single operation
Geography: CN
Reference year: 2019
Classification: Energy carriers and technologies / Renewable fuels
Generated by: The data was created by the Office of the Second National Pollution Source Census of the Ministry of Ecology and Environment, and the data was organized by the TianGong Plan team for ILCD format / 生态环境部第二次全国污染源普查工作办公室创建数据，天工计划团队常慧敏整理数据为ILCD格式
Owner: Tiangong LCI Data Working Group / 天工LCI数据工作小组
Amounts: no units in this file; such an amount is in the reference unit of its flow, which a separate flow dataset defines
copyright: false
licenseType: Free of charge for all users and uses

## Technology and included processes
the Technical of end-of-pipe management technology for pollution cyanideisPhysical treatment + aerobic biological treatment + physicochemical treatment，Its Technical efficiency of end-of-pipe management90，The formula for calculating the actual operation rate (k-value) of the end-of-pipe treatment facility is k = opreating time of treatment facilities (hours/year) / normal production time (hours/year)

## Reference product
- Biomass Pyrolysis Gas: 10000; calculated
  源文件中描述为为生物质热解气，此处对其进行了匹配工作，将其匹配到LCAflow库里面相最符合的流

## Outputs
All rows: calculated
- Waste water: 1.14
  污染物指标工业废水量的末端治理技术未说明。原文件中描述污染物类别为废水，污染物指标为工业废水量，此处对其进行了匹配工作，将其匹配到LCAflow库里面相最符合的流
- chemical oxygen demand: 3.752
  污染物指标化学需氧量的末端治理技术是物理处理法+好氧生物处理法+物理化学处理法，其效率为92，末端治理设施实际运行率（k值）计算公式为k=废水处理设施DCS年运行时间（小时）/正常生产时间（小时）。原文件中描述污染物类别为废水，污染物指标为化学需氧量，此处对其进行了匹配工作，将其匹配到LCAflow库里面相最符合的流
- Petroleum-related waste: 0.005803
  污染物指标石油类的末端治理技术是物理处理法+好氧生物处理法+物理化学处理法，其效率为93，末端治理设施实际运行率（k值）计算公式为k=废水处理设施DCS年运行时间（小时）/正常生产时间（小时）。原文件中描述污染物类别为废水，污染物指标为石油类，此处对其进行了匹配工作，将其匹配到LCAflow库里面相最符合的流
- Ammonia Nitrogen: 0.1749
  污染物指标氨氮的末端治理技术是物理处理法+好氧生物处理法+物理化学处理法，其效率为89，末端治理设施实际运行率（k值）计算公式为k=废水处理设施DCS年运行时间（小时）/正常生产时间（小时）。原文件中描述污染物类别为废水，污染物指标为氨氮，此处对其进行了匹配工作，将其匹配到LCAflow库里面相最符合的流
- phenol: 9.24e-5
  污染物指标挥发酚的末端治理技术是物理处理法+好氧生物处理法+物理化学处理法，其效率为96，末端治理设施实际运行率（k值）计算公式为k=废水处理设施DCS年运行时间（小时）/正常生产时间（小时）。原文件中描述污染物类别为废水，污染物指标为挥发酚，此处对其进行了匹配工作，将其匹配到LCAflow库里面相最符合的流
- cyanide: 0.000313
  污染物指标氰化物的末端治理技术是物理处理法+好氧生物处理法+物理化学处理法，其效率为90，末端治理设施实际运行率（k值）计算公式为k=废水处理设施DCS年运行时间（小时）/正常生产时间（小时）。原文件中描述污染物类别为废水，污染物指标为氰化物，此处对其进行了匹配工作，将其匹配到LCAflow库里面相最符合的流

## Data sources
- 第二次全国污染源普查产排污核算系数手册（试用版）,二级代码45,四级代码4520文件，在完整版文件中第2500页
