# 金属提取;电池板;硝酸浸出

Dataset: ILCD process, Unit process, single operation
Geography: CN
Classification: Unit processes / Materials production / Metals and semimetals
Generated by: 王楠, 1209824595@qq.com
Owner: 天工LCI数据工作小组
Review: Dependent internal review by 天工LCI数据工作小组
Amounts: no units in this file; such an amount is in the reference unit of its flow, which a separate flow dataset defines
copyright: false
licenseType: Free of charge for all users and uses

## General comment
采用强溶剂和污染物排放的湿法冶金回收方法进行金属萃取。

## Technical purpose
该工业过程涉及通过使用硝酸浸出的湿法冶金回收方法从电池板中提取金属。该过程通常用于从废弃电池材料中回收有价值的金属，其中使用强溶剂帮助分离金属以便进一步加工和回收。这种方法被需要高纯度金属输入的行业所利用，例如电子和汽车行业，特别是生产对金属属性有特定要求的组件。

## Reference product
- Multi-Si solar cell,Multi-Si solar cell,Multi-Si solar cell: 24.97; input; software or database

## Inputs
- Nitric acid: 6.72; software or database
- Electricity: 116.028; software or database
- water: 175.76; software or database

## Outputs
All rows: software or database
- silver: 0.46
- copper: 2.91
- Silicon: 21.6
- Medium and low radioactive liquid waste: 173.71
- Nitrogen oxides: 108.54
- sulfur dioxide: 71.4
- carbon dioxide: 144.5
- particles (> PM10),particles (>PM10): 0.0095

## Use advice
使用此数据集时，用户应考虑浸出过程中强溶剂使用和污染物排放的环境影响。将这些影响包含在生命周期评估中是重要的，以确保对流程的全面评价。此外，用户应考虑基于旨在回收某些金属和达到的纯度水平的技术适用性。不应将数据应用于不采用湿法冶金方法或对硝酸没有反应的材料的过程。还应考虑数据对特定应用背景的地理和技术相关性。

## Review details
清单： 内部审查通过几个迭代步骤完成，涉及原始数据验证、原始数据记录、代表性、完整性、与 ISO 14040 和 14044 有关的建模的一致性。

## Data sources
- Li, J. et al. Life cycle analysis of the economic costs and environmental benefits of photovoltaic module waste recycling in China. (2023).
