# Ethylene Production | Ethylene | Natural Gas Ethane to Ethylene Route | Natural Gas Ethane

Dataset: ILCD process, Unit process, black box
Geography: LZ-GS-CN
Reference year: 2021
Classification: Materials production / Other mineralic materials
Functional unit: Define 1t of industrial grade ethylene product as a functional unit
LCI method principle: Attributional
LCI method approaches: Allocation - mass
Generated by: Yanan Ren, renyn15@tsinghua.org.cn
Review: Dependent internal review by Tiangong LCI Data Working Group
Amounts: no units in this file; such an amount is in the reference unit of its flow, which a separate flow dataset defines
copyright: false

## General comment
800,000 tons/year ethylene, CNPC ethylene project, natural gas-based ethane to ethylene, CNPC's independent ethane to ethylene high temperature steam cracking technology

## Geography
Yuheng Industrial Zone, Yulin City, Shaanxi Province

## Time period
Not mentioned, replaced by the publication time of the document

## Technology and included processes
The model of ethylene production from natural gas based on ethane adopts the high-temperature steam cracking technology of my country National Petroleum Corporation from ethane to ethylene. The cracking process is a process in which ethane is decomposed under the condition of isolation from air and high temperature to generate alkenes or alkanes. During this process, there are superposition and condensation reactions at the same time, so that some hydrocarbons become larger molecules. The ethylene plant is divided into a cracking furnace unit (including raw material preheating, cracking in the furnace), a quenching unit (quick cooling stage, decoking system, process water stripping, dilution steam), compression and alkali cleaning unit (compression stage, alkali cleaning stage, pre- deethanization, acetylene hydrogenation), cold separation unit (cryogenic system, demethanization unit, methanation reaction), ethylene rectification and heat pump unit (heat pump unit, propylene refrigeration unit), spent alkali oxidation unit (waste alkali dehydrocarbonation , waste caustic oxidation, spent caustic neutralization) and torches, public works systems, etc.

## Reference product
- ethene (ethylene): 1000; measured
  乙烯

## Inputs
All rows: measured
- Ethane: 1120
  乙烷
- Methane: 110
  甲烷
- Methanol: 0.09
  甲醇
- Dimethyl disulfide: 0.17
  二甲基二硫
- sodium hydroxide: 3.77
  NaOH
- Sulphuric acid: 0.44
  浓硫酸
- Carbon Monoxide: 0.27
  CO
- Cooling water: 20
  冷却水
- Water (desalinated; deionized): 3480
  除盐水
- process steam: 260
  蒸汽
- Instrument Air: 35.57
  仪表空气
- air: 4.36
  工厂空气
- Hydrogen: 90
  氢气
- nitrogen: 5.33
  氮气
- electricity mix: 198.504
  电
- Compressor Washing Oil: 20
  压缩机洗油
- Phosphate: 2.67
  磷酸盐

## Outputs
All rows: measured
- biological oxygen demand: 0.06
  BOD5
- chemical oxygen demand: 0.23
  CODcr
- Oils, unspecified: 0.00108
  石油类
- total dissolved solids: 7.38
  TDS
- phenol: 0.02
  苯酚
- sulfide: 0.00113
  硫化物
- Water (groundwater from technosphere, waste water): 108.24
  稀释排污水
- nitrous oxide: 0.46
  NOx
- Dust (unspecified, from stack): 0.1
  颗粒物
- carbon monoxide: 0.27
  CO
- sulfur dioxide: 0.02
  SO2
- volatile organic compound: 0.1
  VOCs
- carbon dioxide: 0.02
  CO2
- Tar Residue: 0.29
  焦油残渣
- Waste Alumina Catalyst: 3.85e-5
  废Al2O3催化剂

## Deviations from the LCI method approaches
This study chooses quality assignment

## Data selection and combination
The data list comes from PetroChina Lanzhou Petrochemical Ethane to Ethylene Project

## Review details
Inventory: The internal review was done by several iteration steps concerning raw data validation, raw data documentation, representativity, completeness and consistency of modelling with regard to ISO 14040 and 14044.; Documentation: The review of the documentation was performed by Ecobilan and is in compliance with ISO 14040 and 14044. The data set documentation is correct in view of the appropriateness of the information provided. It includes all relevant information in view of data quality and scope of application of the respective LCI result.

## Data sources
- 赵悦如. 基于生命周期方法的乙烯生产环境影响分析. (大连理工大学, 2021).
