# 铝电解 ; 液态原铝 ; 预焙 ; 冶金用氧化铝 ; 2014年

Dataset: ILCD process, Unit process, single operation
Geography: CN
Reference year: 2021
Classification: Unit processes / Materials production / Metals and semimetals
Generated by: 蔡梓萌, caizm6178@163.com
Owner: 天工LCI数据工作小组
Review: Dependent internal review by 天工LCI数据工作小组
Amounts: no units in this file; such an amount is in the reference unit of its flow, which a separate flow dataset defines
copyright: false
licenseType: Free of charge for all users and uses

## General comment
该数据集主要描述2014年使用预焙方法从冶金用氧化铝生产液态原铝的铝电解过程。该过程是铝生产工业的一个组成部分，并为制造各种基于铝的产品提供基础。所获得的液态原铝对于生产汽车、航空航天、建筑、包装和电器行业中使用的轻质、耐腐蚀的组件至关重要。

## Time period
文献发表日期

## Reference product
- aluminium, primary, liquid: 1000; software or database

## Inputs
All rows: software or database
- Integrated AC power consumption: 47741.4
- aluminium oxide, metallurgical: 1915.94
- fluoride salt: 19.02
- anode, prebake, for aluminium electrolysis: 411.75
- Water, unspecified natural origin: 1.48

## Data selection and combination
本研究的数据参考了PA、SA、电力等背景数据的LCA数据。PA数据来自统计数据源，SA数据主要来自文献。背景数据主要来自中国科学院生态环境研究中心CASRCEES 2018建立的中国本地化LCA数据库，涵盖能源、材料、交通、废物管理等LCA数据。

## Use advice
用户在使用该数据集进行铝生产的生命周期评估时，应确保2014年的数据与其评估年份的情境相关性，因为技术进步和效率提高可能会改变随后的过程输出。值得注意的是，PA（原铝）数据基于统计来源，而SA（再生铝）数据主要基于文献。外部LCA从业者应当与更新的数据库进行交叉参考，同时注意技术适用性应符合当地特定行业实践。在适用的情况下应考虑回收，并应将CAS RCEES 2018数据库的背景数据与其地理和时间背景联系起来使用。

## Review details
清单： 内部审查通过几个迭代步骤完成，涉及原始数据验证、原始数据记录、代表性、完整性、与 ISO 14040 和 14044 有关的建模的一致性。

## Data sources
- Ding, N., Liu, N., Lu, B. & Yang, J. Life cycle greenhouse gas emissions of aluminum based on regional industrial transfer in China. J. Ind. Ecol. 25, 1657–1672 (2021).
