# 铝土矿开采 ; 铝土矿 ; 摇篮 ; 2010年

Dataset: ILCD process, Unit process, single operation
Geography: CN
Reference year: 2021
Classification: Unit processes / Materials production / Non-energetic raw materials
Generated by: 蔡梓萌, caizm6178@163.com
Owner: 天工LCI数据工作小组
Review: Dependent internal review by 天工LCI数据工作小组
Amounts: no units in this file; such an amount is in the reference unit of its flow, which a separate flow dataset defines
copyright: false
licenseType: Free of charge for all users and uses

## General comment
氧化铝生产2017

## Time period
文献发表日期

## Technical purpose
该数据集代表了铝土矿的提取和生产过程，铝土矿是生产氧化铝和随后的铝的主要原料。铝土矿的开采过程特定于数据集相应的开采地点和年份（2010年）。原铝土矿的结果意在用于通过单元过程（单一操作）在2017年生产氧化铝。

## Reference product
- bauxite: 4.34878e10; software or database

## Inputs
All rows: software or database
- electricity, high voltage, aluminium industry: 7.26624e7
  electricity
- other fuels: 2.10988e9
  electricity
- Coal, brown, in ground: 4.4762e7
  coal
- natural gas, high pressure: 495000
  coal
- Gasoline: 2.048e6
  gasoline
- Diesel oil: 1.1089e7
  diesel

## Data selection and combination
本研究的数据参考了PA、SA、电力等背景数据的LCA数据。PA数据来自统计数据源，SA数据主要来自文献。背景数据主要来自中国科学院生态环境研究中心CASRCEES 2018建立的中国本地化LCA数据库，涵盖能源、材料、交通、废物管理等LCA数据。

## Use advice
使用此数据的用户应注意，PA（生产分配）数据来自统计数据，而SA（现场分配）数据主要来自文献。必须确保将此数据的使用与相应的时间（数据有效性年份）和地理（特定矿点的开采条件）边界对齐。背景数据来自CAS RCEES 2018数据库，该数据库特定于中国本地化，如果在不同的环境或法规背景下应用可能需要调整。方法学考虑，如系统边界，分配程序和数据质量应与预期的LCA研究的目标和范围保持一致。

## Review details
清单： 内部审查通过几个迭代步骤完成，涉及原始数据验证、原始数据记录、代表性、完整性、与 ISO 14040 和 14044 有关的建模的一致性。

## Data sources
- Ding, N., Liu, N., Lu, B. & Yang, J. Life cycle greenhouse gas emissions of aluminum based on regional industrial transfer in China. J. Ind. Ecol. 25, 1657–1672 (2021).
