# 铝框拆卸;铝框;人工、机械拆卸

Dataset: ILCD process, Unit process, single operation
Geography: CN
Classification: Unit processes / End-of-life treatment / Reuse or further use
Generated by: 王楠, 1209824595@qq.com
Owner: 天工LCI数据工作小组
Review: Dependent internal review by 天工LCI数据工作小组
Amounts: no units in this file; such an amount is in the reference unit of its flow, which a separate flow dataset defines
copyright: false
licenseType: Free of charge for all users and uses

## General comment
在拆卸阶段，人工或机械拆卸铝框架和接线盒。

## Technical purpose
在本工艺中拆卸的铝框架和接线盒旨在用于回收或在废物管理设施中进一步加工。该过程通常适用于产品的生命周期终端、建筑废料，或在翻新活动期间拆除铝制组件以回收。

## Reference product
- PV Module Waste: 1000; input; software or database

## Inputs
- Electricity: 19.08; software or database

## Outputs
All rows: software or database
- aluminium: 179
- Junction Box: 14.4
- copper wire: 9.767
- Laminate,Laminate: 745.833
  层压件
- Electricity: 64.2413
- municipal solid waste deposition: 51
- chemical waste, inert (unspecified): 0.03029
- particles (> PM10),particles (>PM10): 3e-5

## Use advice
使用此数据集时，重要的是确保它代表了特定的铝框拆卸过程（手动或机械）。用户应考虑过程的效率和回收材料的质量。对于LCA研究，关于下游处理、再利用或回收铝材的假设应清楚陈述并有充分理由。在共同处理产品的情况下，需要定义环境影响的分配程序。

## Review details
清单： 内部审查通过几个迭代步骤完成，涉及原始数据验证、原始数据记录、代表性、完整性、与 ISO 14040 和 14044 有关的建模的一致性。

## Data sources
- Li, J. et al. Life cycle analysis of the economic costs and environmental benefits of photovoltaic module waste recycling in China. (2023).
