# 聚氯乙烯（PVC）生产;聚氯乙烯;乙烯法

Dataset: ILCD process, Unit process, black box
Geography: CN
Reference year: 2020
Classification: Unit processes / Materials production / Plastics
Functional unit: considering 1 kg resin production as the functional unit.
Generated by: 郭慧娟, GHJ@email.ncu.edu.cn
Owner: 天工LCI数据工作小组
Review: Dependent internal review by 天工LCI数据工作小组
Amounts: no units in this file; such an amount is in the reference unit of its flow, which a separate flow dataset defines
copyright: false
licenseType: Free of charge for all users and uses

## General comment
对国内生产PVC的两种商用合成方法(电石和乙烯)进行了评价。

## Geography
Process-based data from China were used, yet if not available, data from Europe were applied instead.

## Time period
Process-based data from China were used, yet if not available, data from Europe were applied instead. The electricity input was developed based on the national grid structure in China (Table S3), which was obtained from the share of the electric power structure in 2020 (National Bureau Statistics of China, 2020).

## Technical purpose
该数据集描述了中国聚氯乙烯（PVC）生产的工业过程，使用了两种合成方法：电石法和乙烯法。这些数据可用于了解通过任一合成方法生产的PVC的环境影响。PVC是一种广泛使用的塑料材料，用于生产管道、电线、电缆绝缘、地板和医疗器械等产品。

## Model description
life cycle environmental and human health impacts were modeled using SimaPro software (version 8.5) with Ecoinvent 3 and ELCD (European Reference Life Cycle Database) databases.

## Reference product
- polyvinylchloride resin (B-PVC): 1; missing unimportant
  PVC

## Inputs
All rows: missing unimportant
- ethylene: 0.5
- chlorine: 0.65
- oxygen: 0.14
- hydrogen: 0.00029
- sodium hydroxide: 1.02e-5
- Process water: 6.05
  Processed water
- Electricity: 0.594
- process steam: 26.5862
  Steam
- natural gas; 44.1 MJ/kg: 0.0197
- Calcium Oxide: 2.67
- Calcium Oxide: 2.67e-5
  Quicklime

## Outputs
All rows: missing unimportant
- sulfur dioxide: 0.00043
- Nitrogen oxides: 0.00043
- chlorine: 1.2e-7
- hydrogen chloride: 2.33e-9
- Suspended solids, unspecified,Suspended solids, unspecified: 9.13e-6
- chemical oxygen demand: 4.9e-5
- biological oxygen demand: 9.35e-6
- mercury: 5.61e-10
- Waste (unspecified): 1.46
- Dust: 0.00021

## Data treatment and extrapolations
ReCiPe method (Europe H/H) was used as the assessment method for consistency.

## Use advice
在使用本生命周期评价（LCA）数据时，应考虑地理和技术的代表性。如果用于比较目的，请确保系统边界和假设的一致性。对于电力投入，需注意中国国家电网结构的具体情况，如表S3所述；对于中国无法提供的数据，使用了欧洲的数据集。所遵循的方法论框架是ReCiPe方法（欧洲H/H），功能单元是1千克树脂。建模应使用提供的SimaPro软件（版本8.5）以及Ecoinvent 3和ELCD数据库，以评估生命周期环境和人类健康影响。

## Review details
清单： 内部审查通过几个迭代步骤完成，涉及原始数据验证、原始数据记录、代表性、完整性、与 ISO 14040 和 14044 有关的建模的一致性。

## Data sources
- An, J., Wu, F., Wang, D. & You, J. Estimated material metabolism and life cycle greenhouse gas emission of major plastics in China: A commercial sector-scale perspective. Resources, Conservation and Recycling 180, (2022).
