# cement production|cement, ordinary portland cement, 42.5MPa|new dry process rotary kiln, 4000 t/d|mixed solid wastes

Dataset: ILCD process, Unit process, black box
Geography: BJ-CN
Classification: Materials production / Other mineralic materials
Generated by: Siqi Yang
Amounts: no units in this file; such an amount is in the reference unit of its flow, which a separate flow dataset defines
copyright: false

## General comment
Slag-based cement (SBC). According to Chinese cement standards (GB175-2007), SBC is a kind of ordinary portland cement (OPC), which is consist of 80-95% of Portland cement clinker and appropriate gypsum, and 5-20% of granulated BFS.
This plant adopted new dry process and rotary kiln with 5 stages preheater to product SBC. The production scale was about 4000 ton/day. The content of blast furnace slag (BFS) was approximately 10%.
BFS was generated as a co-product of pig iron in blast furnaces, and further treated by the means of aircooling and water-quenching. Air-cooled BFS was typically used in low-grade applications; while water-quenching BFS can be grinded with gypsum as a substitute of cementitious materials in cement production. Moreover, the utilization of BFS as admixture in SBC can improve technical properties, including strength, permeability and corrosion resistance.

## Geography
Modern cement plants in Beijing

## Model description
The functional unit was defined as 1 kg cement with compressive strength of 42.5 MPa.
The system boundary was defined as cement production process.

## Reference product
- cement, ordinary portland cement, 42.5MPa: 1000
  Ordinary Portland cement, 42.5 MPa

## Inputs
All rows: measured
- blast furnace slag: 102
  Blast furnace slag (BFS)
- sandstone: 70.2
  Sandstone
- limestone, crushed, for mill: 1080
  Limestone
- dolomite: 0.000649
  Dolomite
- iron ore: 21.4
  Iron ore
- ash: 2.96
  Fly ash
- gypsum (desulphurized): 76.3
  Gypsum
- hard coal, run-of-mine: 137
  Raw coal
- crude oil; 42.3 MJ/kg: 0.0416
  Crude oil

## Outputs
All rows: measured
- carbon dioxide: 744
  CO2. CO2 emission: Based on the consumption of fossil fuels andlimestone, CO2 emission was calculated by equation, expressed as follows: ECO2 = 3.67FQkα + mc x 0.48 x 44/56. where ECO2 is the total amount of CO2 emission (kg); F and Q are the amount of energy combustion (kg) and the calorific value (MJ/kg) of fossil fuel, respectively; k is the carbon emission factors of fossil fuel (kg C/MJ), which is 24.74E-3 kg C/MJ for coal (the average of burning coal in China); α is the oxidation rate of carbon combustion, with a value of 0.9; and mc is the consumption amount of limestone (kg).
- sulfur dioxide: 0.239
  SO2. SO2 emission: Based on the sulfur content, sulfur emissionrate of fuel, and relative desulfurization situation in investigated factories, SO2 emission was calculated using thefollowing equation: Eso2 = 2FSα(1 - γ). where Eso2 is the quantity of SO2 emission (kg); F and S are theconsumption amount (kg) and sulfur content (wt%) of fuel, respectively; α is the SO2 emission rate of fuel, which is 1.74E-3 for coal; and γ is the desulfurization rate. As desul-furization in Chinese cement industry is still in the research stage without actual application, y was assumed to be zero.
- Nitrogen oxides: 1.37
  NOX. NOx emission: Based on the consumption of fossil fuel, NOx emission factor, and denitrification rate in investigated factories, NOx emission was estimated by equation, expressed as follows: ENox = 0.001Fα(1 - γ). where ENox is the amount of NOx emission (kg); F is the consumption amount (kg) of fuel; α is the NOx emission factor of fuelcombustion (kg/t), which is 9.95 kg/t forcoal combustion; and γ is the denitration rate. Denitration wouldnot be considered because denitration in Chinese cement plant isstill in the research stage at present.
- carbon monoxide: 0.244
  CO. CO emission was calculated by using Formula, expressed as follows: E = FQα. where E is the amount of relative gas emissions (kg); Fand Q are the consumption amount (kg) and the calorific value (MJ/kg) of fossil fuel, respectively; and α is the gas emission factor (kg/TJ). Based on the default value recommended by the IPCC (2006), the gas emission factor for CO ais 106 kg/TJ.
- methane: 0.00184
  CH4. CH4 emission was calculated by using Formula, expressed as follows: E = FQα. where E is the amount of relative gas emissions (kg); Fand Q are the consumption amount (kg) and the calorific value (MJ/kg) of fossil fuel, respectively; and α is the gas emission factor (kg/TJ). Based on the default value recommended by the IPCC (2006), the gas emission factor for CH4 is 0.8 kg/TJ.
- non-methane volatile organic compounds: 0.0575
  NMVOC. NMVOC emission was calculated by using Formula, expressed as follows: E = FQα. where E is the amount of relative gas emissions (kg); Fand Q are the consumption amount (kg) and the calorific value (MJ/kg) of fossil fuel, respectively; and α is the gas emission factor (kg/TJ). The gas emission factor for NMVOC is 25 kg/TJ.

## Data selection and combination
The environmental data of cement manufacturing process were investigated and measured from modern cement plants in Beijing.

## Data sources
- Yao Li et al. (2016). Environmental impact analysis of blast furnace slag applied to ordinary Portland cement production. Journal of Cleaner Production 120, 221–230 (2016).
