# PV module packaging

Dataset: ILCD process, Unit process, single operation
Geography: CN
Reference year: 2016
Classification: Materials production / Other mineralic materials
Functional unit: Grid-connected electricity generation from a 1 MWp multi-Si PV system, whose lifespan is 30 years of a 10 MWp power station has been taken as the research object and the functional unit
LCI method principle: Attributional
LCI method approaches: Allocation
Generated by: Jinfeng Yang, yjfzfshn@163.com
Review: Dependent internal review by Tiangong LCI Data Working Group
Amounts: no units in this file; such an amount is in the reference unit of its flow, which a separate flow dataset defines
copyright: false

## General comment
Multi-Si

## Geography
The power station is located in the central region of Ningxia, China, where the average annual solar radiation is approximately
5955.80 MJ m2 a-1, and the annual average number of peak sun-
shine hours are 1718 h.

## Time period
Available online

## Reference product
- Solar Module: 1; article inperiodical
  PV module

## Inputs
All rows: article inperiodical
- electricity: 42.84
  Electricity
- Multi-Si solar cell: 60
  PV cells
- Water (fresh water): 20.7
  Fresh water
- Glass: 14.5
- Polyvinyl fluoride (PVF): 0.28
  Polyvinylfluoride film (PVF)
- Polyethylene terephthalate: 0.28
  Polyethylene terephthalate
  (PET)
- Ethylene-vinyl acetate copolymer: 1.29
  Ethylene vinyl acetate
  copolymer (EVA)
- Organic Silicone: 0.05
  Silicone
- aluminium: 3.48
  Aluminum
- Ethanol: 0.00253
- Isopropanol: 0.00081
- Tin coated copper strips: 0.00311
- copper wire: 0.006
  Copper wire

## Outputs
- volatile organic compound: 0.00025; article inperiodical
  Volatile organic compound
  (VOC)
- waste water - untreated: 1.32; article inperiodical
  Waste water
- industrial waste (unspecified): 0.00734; article inperiodical
  Solid waste
- Hazardous organic waste for disposal (unspecific): 0.01188; article inperiodical
  Solid waste (organic waste)

## Deviations from the LCI method approaches
A life cycle assessment (LCA) has been performed for the grid-connected electricity generation from a metallurgical route multi-crystalline silicon (multi-Si) photovoltaic (PV) system in China.

## Data selection and combination
Survery of factories in Yunnan and Ningxia

## Review details
Inventory: The internal review was done by several iteration steps concerning raw data validation, raw data documentation, representativity, completeness and consistency of modelling with regard to ISO 14040 and 14044.; Documentation: The review of the documentation was performed by Ecobilan and is in compliance with ISO 14040 and 14044. The data set documentation is correct in view of the appropriateness of the information provided. It includes all relevant information in view of data quality and scope of application of the respective LCI result.

## Data sources
- Yu, Z. et al. Life cycle assessment of grid-connected power generation from metallurgical route multi-crystalline silicon photovoltaic system in China. Applied Energy 185, 68–81 (2017).
