# 氧化铝生产; 冶金用氧化铝 ; 铝土矿 ; 2011年

Dataset: ILCD process, Unit process, single operation
Geography: CN
Reference year: 2021
Classification: Unit processes / Materials production / Non-energetic raw materials
Generated by: 封羽真, fyz22
Owner: 天工LCI数据工作小组
Review: Dependent internal review by 天工LCI数据工作小组
Amounts: no units in this file; such an amount is in the reference unit of its flow, which a separate flow dataset defines
copyright: false
licenseType: Free of charge for all users and uses

## General comment
该数据集涉及2011年从铝土矿生产冶金级氧化铝的工艺。通过此过程生产的氧化铝主要用于通过电解霍尔-埃鲁法提取铝。该工业过程针对的是大规模铝生产设施，在那里氧化铝是熔炼作业中生产纯铝的关键输入。

## Time period
文献发表日期

## Reference product
- aluminium oxide, metallurgical: 1000; software or database
  alumina

## Inputs
All rows: software or database
- soda ash, dense: 150.1
  soda ash
- Petroleum Coke: 1193.78
  Energy sources proportion of energy consumption is coal: fuel oil: coke: natural gas: coke even gas=46.0%: 11.0%: 7.1%: 14.1%: 21.7%
- coal gas: 3648.59
  (same comment as for Petroleum Coke)
- natural gas, high pressure: 2370.74
  (same comment as for Petroleum Coke)
- fuel oil, unspecified: 1849.51
  (same comment as for Petroleum Coke)
- hard coal: 7734.33
  (same comment as for Petroleum Coke)
- Water, unspecified natural origin: 3.19
  water consumption

## Data selection and combination
本研究的数据参考了PA、SA、电力等背景数据的LCA数据。PA数据来自统计数据源，SA数据主要来自文献。背景数据主要来自中国科学院生态环境研究中心CASRCEES 2018建立的中国本地化LCA数据库，涵盖能源、材料、交通、废物管理等LCA数据。

## Use advice
在使用此数据进行生命周期评估研究时，请考虑数据的年份，因为它反映了2011年的技术和实践。应谨慎对待PA数据，因为它基于可能并未完全捕获所评估工业过程细节的统计来源。SA数据源自文献，并应检查其与当前工艺的相关性和一致性。背景数据来自2018年的CAS RCEES数据库，提供了中国本地化的生命周期评估视角；在将这些数据应用到不同地理环境时应特别小心。另外，用户应考虑自2011年以来发生的任何技术或实践上的发展，这些可能会影响生命周期评估结果的准确性。

## Review details
清单： 内部审查通过几个迭代步骤完成，涉及原始数据验证、原始数据记录、代表性、完整性、与 ISO 14040 和 14044 有关的建模的一致性。

## Data sources
- Ding, N., Liu, N., Lu, B. & Yang, J. Life cycle greenhouse gas emissions of aluminum based on regional industrial transfer in China. J. Ind. Ecol. 25, 1657–1672 (2021).
