# 日光温室茄子生产 ; 农作生产（综合）

Dataset: ILCD process, Unit process, single operation
Geography: HD-HEB-CN
Reference year: 2002
Valid until: 2017
Classification: Unit processes / Materials production / Agricultural production means
Functional unit: 1T eggplant
Generated by: Haoran Zhang, hrzhang@whu.edu.cn
Owner: 天工LCI数据工作小组
Review: Dependent internal review by 天工LCI数据工作小组
Amounts: no units in this file; such an amount is in the reference unit of its flow, which a separate flow dataset defines
copyright: false
licenseType: Free of charge for all users and uses

## General comment
实验采用的日光温室为拱圆式，长 60 m、宽 7 m． 温室内多种蔬菜轮作( 每年两茬) ，本研究茄 子生长 于 每 年 3 ～ 8 月，进 行 了 为 期 4 a ( 2013 ～ 2016 年) 的实验． 实验设 3 个处理 ①常规模式: 采 用当地农民传统的温室管理模式，主要施用化肥， 少量施用有机肥，病虫害的防治以化学防治为主; ②综合模式: 所施有机肥和化肥用量分别为有机和 常规模式施用量的 50% ，病虫害防治主要用生物防 治方法，严重时用低毒低残留的化学农药进行处 理; ③有机模式: 按照有机蔬菜生产标准，只施用 有机肥( 堆肥和鸡粪) ，不使用化肥和农药，病虫害 防治以农业措施和物理防治为主 ( 如使用黄板诱 杀、防虫网等) ． 综合和有机模式施氮量同常规模 式均为同一水平，各处理灌水情况一致，灌溉方式 为大水漫灌( 表 1)

## Geography
曲周

## Time period
设施蔬菜长期定位实验于2002年3月开始

## Technology and included processes
本实验采用的日光温室为拱圆式, 长60 m、宽7 m.温室内多种蔬菜轮作 (每年两茬) , 本研究茄子生长于每年3~8月, 进行了为期4 a (2013~2016年) 的实验.实验设3个处理：常规、综合、有机

## Technical purpose
该数据集描述了通过长期定位实验使用温室设施进行蔬菜生产的技术用途。 该温室专门用于不同蔬菜的轮作栽培，重点是茄子。 数据集详细介绍了三种不同处理方式：常规、综合和有机，并评估了它们对农业过程产量和环境足迹的各自影响。

## Reference product
- eggplant: 1000; calculated
  综合

## Inputs
- Electricity: 17.45; calculated
  综合
- arable, non-irrigated: 81.92; calculated
  综合
- water: 77.21; calculated
  综合

## Outputs
All rows: calculated
- Hydrocarbons, aliphatic, alkanes, unspecified: 1.19e-5
  综合
- carbon monoxide: 0.0003
  综合
- carbon dioxide (fossil): 1.31
  综合
- ammonium: 1.1134
  综合
- nitrous oxide: 0.179
  综合
- Nitrogen oxides: 0.002
  综合
- nitrate: 2.1173
  综合
- sulfide: 0.0017
  综合
- methane: 2.99e-6
  综合
- phosphorus, total: 0.0165
  综合
- cadmium: 0.0004
  综合
- lead-210: 0.001
  综合
- copper: 0.0079
  综合
- zinc: 0.0237
  综合
- phosphate: 0.0005
  综合
- Pyrethrins: 0.012
  综合
- benomyl: 0.0125
  综合
- carbendazim: 0.0124
  综合
- mancozeb: 0.0125
  综合

## Deviations from the LCI method approaches
生命周期评价包括以下 4 个步骤: 目标定义与范围界定、清单分析、影响评价和结果解释． 下面对主要步骤进行简要描述

## Data selection and combination
清单分析包括数据的收集和对数据进行量化处理． 农资生产子系统中化肥、有机肥、杀虫剂、地膜和柴油等生产的污染物排放( 包括CO、CO2、NOx、SO2、CH4、N2O和COD 等) 及能源消耗等计算参考梁龙［22］的研究结果．

## Data treatment and extrapolations
氧化亚氮的收集采用静态箱法［19］，测定采用Agilent 7890A 型气相色谱仪． 土壤硝态氮( NO3－ -N和总磷淋溶采用自流式农田地下淋溶收集装置，每次灌溉后 3 ～ 5 d 内用抽水器抽取渗漏液，用流动分析仪( TＲAACS2000 ) 测定． 有机肥中重金属含量( 主要考虑 Cu、Zn、Pb 和 Cd) 的浸提采用硝酸-盐酸-氢氟酸消煮法，待测液用 ICP-MS 测定． 作物收获时，对每次采摘果实进行称量和记录，取 3 次平均值． 各指标的详细测定过程参见文献［

## Use advice
该LCA数据集的用户应将其应用于了解温室蔬菜生产中不同农业实践相关的环境影响。 数据集侧重于茄子的生产，但也可能适用于类似的温室作物。 用户必须考虑从摇篮到农场大门划定的系统边界，包括农资生产子系统、农作生产和运输子系统。 应密切注意按描述收集污染物排放和能源消耗数据、测量土壤养分淋洗以及使用特定分析仪器等方法细节。 该数据集不应应用于设定的系统边界之外，对于不同的作物类型或农业实践，可能需要进行调整。

## Review details
清单： 内部审查通过几个迭代步骤完成，涉及原始数据验证、原始数据记录、代表性、完整性、与 ISO 14040 和 14044 有关的建模的一致性。

## Data sources
- 徐强,胡克林,李季等.华北平原不同生产模式设施蔬菜生命周期环境影响评价[J].环境科学,2018,39(05):2480-2488.
