# 花生生产

Dataset: ILCD process, Unit process, black box
Geography: IR
Reference year: 2007
Valid until: 2008
Classification: Unit processes / Materials production / Agricultural production means
Functional unit: 1000 kg peanuts
Generated by: 朱娴, zzhu0918@163.com
Owner: 天工LCI数据工作小组
Review: Dependent internal review by 天工LCI数据工作小组
Amounts: no units in this file; such an amount is in the reference unit of its flow, which a separate flow dataset defines
copyright: false
licenseType: Free of charge for all users and uses

## General comment
将花生生产所需的种子进行播种，加入肥料、农药等物质，并通过人工或机械的方式完成播种、灌溉、施肥和收获。

## Geography
位于伊朗吉兰省东部的阿斯塔内耶·阿什拉菲耶

## Technical purpose
伊朗吉兰省东部阿斯塔内耶·阿什拉菲耶的花生生产包括种植过程，涉及播种花生种子，施用肥料和杀虫剂，并使用人工或机械方法进行播种、灌溉、施肥和收获活动。这一过程产出的花生广泛用于直接人类消费作为丰富营养的食物，用于提取油的工业，经烘烤或加工后作为小吃产品，用于糖果制造和生产花生酱。

## Reference product
- Peanut: 2406.56; measured

## Inputs
All rows: measured
- Nitrogenous fertilizer: 16.24
- Phosphate fertilizer: 7.44
- Potassium fertilizer: 6.81
- Labor: 27.9167
- Diesel: 0.05667

## Outputs
All rows: measured
- Nitrogen oxides: 0.0611
- ammonia: 3.33
- nitrous oxide: 0.5041
- carbon dioxide (fossil): 154.71
  原文未区分bio和fossil，根据专家判断此处为fossil。
- sulfur dioxide: 0.2267
- methane (fossil): 0.0098
  原文未区分bio和fossil，根据专家判断此处为fossil。

## Use advice
在使用该数据集对基于花生的产品进行生命周期评估时，用户应仔细考虑数据的地理特殊性。应考虑吉兰省阿斯塔内耶·阿什拉菲耶特有的农业实践、产量和诸如肥料和杀虫剂之类的输入。在花生生产是更大农业系统的一部分或当产生共产品时，应特别注意环境影响的分配。在废物管理阶段，应考虑农业废物（例如，花生壳）的回收或二次使用。

## Review details
清单： 内部审查通过几个迭代步骤完成，涉及原始数据验证、原始数据记录、代表性、完整性、与 ISO 14040 和 14044 有关的建模的一致性。
