# Rare earth Leaching, precipitation and inorganic pre-separation|dysprosium|B/M|REE containing ore

Dataset: ILCD process, Unit process, single operation
Geography: CN
Reference year: 2010
Valid until: 2019
Classification: Materials production / Other mineralic materials
Functional unit: The goal of this investigation is to compare environmental impacts related to the production of 1 kg Dy (functional unit) from IAC (Southern China), from B/M ore (Bayan Obo), and from an eudialyte deposit (Norra Kärr) using the LCA method
LCI method principle: Attributional
LCI method approaches: Allocation - mass
Generated by: Tao Wang, twang@iue.ac.cn
Review: Dependent internal review by Tiangong LCI Data Working Group
Amounts: no units in this file; such an amount is in the reference unit of its flow, which a separate flow dataset defines
copyright: false

## Geography
Southern China and Bayan Obo

## Technology and included processes
The goal of this investigation is to compare environmental impacts related to the production of 1 kg Dy (functional unit) from IAC (Southern China), from B/M ore (Bayan Obo), and from an eudialyte deposit (Norra Kärr) using the LCA method

## Reference product
- carbonate: 24.3
  RE carbonate. Precipitation: nput for next process: HCl leaching
- RE chloride solution: 441
  RE chloride solution. HCl Leaching: input for next process Solvent extraction

## Inputs
- sulphuric acid: 29.03; article inperiodical
  Leaching: Sulphuric acid, liquid, at plant, calculation based on Xu et al. (2008)
- Electricity: 1.584
  Leaching: electricity mix 2014, estimation based on energy demand of solvent extraction
- transport in t*km,transport in t*km: 0.58
  Leaching: market for transport, freight, lorry >32 metric ton, EURO3, 20 km assumed
- water: 570; article inperiodical
  Leaching: Water, calculation based on Xu et al. (2008)
- Electricity: 1.584; calculated
  Precipitation: estimation based on energy demand of solvent extraction, electricity mix 2014
- Ammonium bicarbonate: 27.9
  Ammonium bicarbonate. Precipitation: ecoinvent process adapted to lifetime and throughput, aluminium hydroxide factory construction
- Lime: 18.96; article inperiodical
  Precipitation: market for lime, hydraulic, for waste water treatment, stoichiometric calculation
- transport in t*km,transport in t*km: 0.561; estimated
  Precipitation: 20 km, market for transport, freight, lorry >32 metric ton, EURO3
- water: 92.8; calculated
  Precipitation: based on solubility of ammonium bicarbonate
- Electricity: 1.584; article inperiodical
  HCl Leaching: electricity mix 2014, estimation based on energy demand of solvent extraction
- hydrogen chloride: 24.21; article inperiodical
  HCl Leaching: hydrochloric acid, 36 % in H2O, from reacting propylene and chlorine, at plant (adapted with CN: electricity mix 2014), calculated under consideration of a pH value of 4.
- water: 416; article inperiodical
  HCl Leaching: value based on mass and humidity of REE carbonat
- transport in t*km,transport in t*km: 0.484; estimated
  HCl Leaching: market for transport, freight, lorry >32 metric ton, EURO3, 20km

## Outputs
- Sludge: 26.7; article inperiodical
  Leaching: separate process, see Table S 20 and Table S 22
- Particulates: 609; article inperiodical
  Leaching: input for next process: Precipitation
- waste water - untreated: 589; measured
  Precipitation: main emissions, without waste water treatment
- ammonium: 4.41; measured
  Precipitation: main emissions, without waste water treatment
- sulfite: 1.1; measured
  Precipitation: main emissions, without waste water treatment
- carbon dioxide: 4.52; calculated
  HCl Leaching: emitted during HCl leaching, stoichiometric calculation

## Deviations from the LCI method approaches
In this study, an allocation method based on the mass of produced REEs combined with their market prices (based on an international metals market analysis and pricing index company ) are considered, as usual for metals with strongly different prices. As the ores have different compositions, the allocation factor has to be assessed individually for each site.

## Review details
Inventory: The internal review was done by several iteration steps concerning raw data validation, raw data documentation, representativity, completeness and consistency of modelling with regard to ISO 14040 and 14044.; Documentation: The review of the documentation was performed by Ecobilan and is in compliance with ISO 14040 and 14044. The data set documentation is correct in view of the appropriateness of the information provided. It includes all relevant information in view of data quality and scope of application of the respective LCI result.

## Data sources
- Zapp, P., Marx, J., Schreiber, A., Friedrich, B. & Voßenkaul, D. Comparison of dysprosium production from different resources by life cycle assessment. Resources, Conservation and Recycling 130, 248–259 (2018).
