# 西北（张掖高台）玉米生产 ; 种植

Dataset: ILCD process, Unit process, single operation
Geography: ZY-GS-CN
Reference year: 2012
Valid until: 2012
Classification: Unit processes / Materials production / Agricultural production means
Functional unit: 1 t
LCI method principle: Attributional
LCI method approaches: Consequential
Generated by: Haoran Zhang, hrzhang@whu.edu.cn
Owner: 天工LCI数据工作小组
Review: Dependent internal review by 天工LCI数据工作小组
Amounts: no units in this file; such an amount is in the reference unit of its flow, which a separate flow dataset defines
copyright: false
licenseType: Free of charge for all users and uses

## General comment
文章基于农户调研数据,运用农业碳足迹理论及生命周期法定量研究长江下游地区稻麦轮作系统碳足迹大小及组成,并进一步分析碳足迹影响因素

## Geography
高台县

## Technology and included processes
用 LCA 方法评估制种玉米农业系统，是把产品 从投入到最终产出的处理的整个过程作为研究对象， 进行量化分析和比较，以评价制种玉米环境影响[13]。本 文使用制种玉米质量 1 t 作为功能单元，系统边界从化 肥和电力的生产开始，终止边界为作物种植过程输出 农产品和污染物，即存在两个生产系统，分别是农资生 产系统和作物生产系统

## Technical purpose
该数据代表中国西北地区张掖高台县的玉米生产过程。它具体涵盖了种植阶段的玉米，包括在生产过程中使用的化肥和电力。这一详细的农业数据集可用于生命周期评估（LCA）研究，以评估该地区玉米生产的环境影响，包括碳足迹和种植过程中产生的废物等环境输出。

## Reference product
- maize grain: 1; measured

## Inputs
All rows: measured
- nitrogen: 66.69
- potassium chloride: 16.01
- phosphorus: 18.14
- Fertilizer: 213.41
- Electricity: 658.368
- Rice Seeds: 36.77
- water: 361.55

## Outputs
All rows: measured
- water: 361.55
- carbon dioxide (fossil),carbon dioxide (fossil): 780.61
- carbon monoxide (fossil): 0.33
- nitrous oxide: 4.1, 2.67 (2 entries)
- Hydrocarbons, aliphatic, alkanes, unspecified: 0.04
- particles (PM10): 0.37
- sulfide: 2.31
- ammonium: 31.01
- nitrate: 4.33
- Phosphate Anion: 0.16
- atrazine: 0.12
- Methyl-1650,Methyl-1650: 0.09
- dimethoate: 0.07
- copper: 0.0002
- cadmium: 1e-5
- lead: 5e-5
- zinc: 8e-5

## Deviations from the LCI method approaches
系统边界从化肥和电力的生产开始，终止边界为作物种植过程输出农产品和污染物，即存在两个生产系统，分别是农资生产系统和作物生产系统

## Data selection and combination
本文数据来源于张掖市统计抽样调查 2012年投 入产出表时，增加专项调查所获得的数据。甘州区选择碱滩镇、党寨村和小满村三个村镇，临泽县选择沙河镇和平川镇，高台县选择宣化镇、巷道村和骆驼城乡三个村镇， 剔除其中不完整的数据，共得到 72户农户的有效数 据

## Data treatment and extrapolations
，采用分层随机抽样和典型样本选择 法结合，问卷调查和典型样本结构化访谈的方式收集 数据。。调查内容围 绕所有投入的生产要素和经济成本以及资源性消耗 等，产出主要关注产品产量和当期的经济价值 ，以及 产生的废弃物量和处理方式等。

## Sampling procedure
确定张掖市三县区调 查样本量需补充人户调查 80户。样本的构成保持与 当地农业增加值比例相同的原则，按照农业增加值比 例 7：5：8确定相应调查户数，即三县区分别抽取28、 20、32户

## Use advice
使用这些生命周期评估（LCA）数据的用户应确保在评估中正确应用系统边界，从化肥和电力的生产开始，到种植过程中农产品和污染物的输出终止。考虑农资生产系统和作物生产系统都是非常重要的。提供的数据应用于评估高台县玉米生产过程的完整生命周期，从投入品生产到庄稼收获。在适用的情况下确保使用额外的本地数据来完善评估。这些数据基于分层随机抽样，并应按照类似的方法论框架使用。

## Review details
清单： 内部审查通过几个迭代步骤完成，涉及原始数据验证、原始数据记录、代表性、完整性、与 ISO 14040 和 14044 有关的建模的一致性。

## Data sources
- 杨肖,钟方雷,郭爱君,王琼.干旱区绿洲制种玉米生命周期环境影响评价——以张掖市为例[J].农业环境科学学报,2017,36(8):1664-1671
