# Beneficiation of REEs|REE|bastnaesite route|REE containing ore

Dataset: ILCD process, Unit process, single operation
Geography: NMG-CN
Reference year: 2014
Classification: Materials production / Other mineralic materials
Functional unit: The functional unit of this study is the production of 1 kg of the basket REO from each corresponding mineralogical and processing route.
LCI method principle: Attributional
LCI method approaches: Allocation - market value
Generated by: Tao Wang, twang@iue.ac.cn
Review: Dependent internal review by Tiangong LCI Data Working Group
Amounts: no units in this file; such an amount is in the reference unit of its flow, which a separate flow dataset defines
copyright: false

## Technology and included processes
In this study, the REE production system was analyzed from mining up to and including solvent extraction which contains product finishing processes such as precipitation and calcination

## Reference product
- REO: 1; article inperiodical

## Inputs
All rows: article inperiodical
- transport in t*km,transport in t*km: 0.303, 1.52 (2 entries)
- Sodium silicate: 0.068
- hydrogen peroxide: 0.032
  H2O5 and H102
- Electricity: 1.1988
- Raw ore: 15.15
- ammonium hydroxide: 0.047
- water: 0.0174

## Outputs
All rows: article inperiodical
- Iron ore: 7.365
- industrial area: 1
- waste heat: 1.22
- chemical oxygen demand: 0.002272
- biological oxygen demand: 0.00157
- dissolved organic carbon: 5.68e-5
- total organic carbon: 5.68e-5
- Suspended solids, unspecified: 0.00303
- thorium-232: 0.0029, 1 (2 entries)
- ammonia: 0.000379
- chromium: 1.5152e-5
- fluoride: 0.00022727
- Oils, unspecified: 7.575e-5
- phosphorus, total: 4.545e-5
- nitrogen, total (excluding N2): 0.00075757
- uranium-234: 0.022
- Dust (unspecified, from stack): 0.000364
- Water (sea water from technosphere, waste water): 17.4
- nickel: 5.25e-6
- mercury: 1.05e-7
- iron: 3.67e-5

## Deviations from the LCI method approaches
In this study, the REE production system was analyzed from mining up to and including solvent extraction which contains product finishing processes such as precipitation and calcination (Fig. 1). The other categories assessed in the literature review were mineral type, radioactivity, waste treatment, and co-mining. For mineral type, it was noted that the mineralogy accounted for in each study was different, which makes comparison difficult. For radioactivity, we marked with an X those studies which exemplified radioactivity flows in the LCI (if provided). For waste, we distinguished those LCIs which quantified waste treatment flows. For co-mining, since all REE are co-products of each other, this column is meant to highlight the co-products in addition to REE.

## Review details
Inventory: The internal review was done by several iteration steps concerning raw data validation, raw data documentation, representativity, completeness and consistency of modelling with regard to ISO 14040 and 14044.; Documentation: The review of the documentation was performed by Ecobilan and is in compliance with ISO 14040 and 14044. The data set documentation is correct in view of the appropriateness of the information provided. It includes all relevant information in view of data quality and scope of application of the respective LCI result.

## Data sources
- Bailey, G. et al. Review and new life cycle assessment for rare earth production from bastnäsite, ion adsorption clays and lateritic monazite. Resources, Conservation and Recycling 155, 104675 (2020).
