# cement production|cement, ordinary portland cement|sulfate slag

Dataset: ILCD process, Unit process, black box
Geography: JS-CN
Classification: Materials production / Other mineralic materials
Generated by: Siqi Yang
Amounts: no units in this file; such an amount is in the reference unit of its flow, which a separate flow dataset defines
copyright: false

## General comment
Ordinary portland cement. Cement production unit process.

## Geography
A cement plant in Jiangsu

## Model description
The functional unit is 1 ton of P.O 42.5 ordinary portland cement. The system boundary for the study of ordinary portland cement is determined from raw meal preparation, clinker grinding, calcination, and cement preparation, all the way to the final cement storage, but does not include the environmental impact of cement during the use and waste recycling phases.

## Reference product
- cement, ordinary portland cement: 1000
  Ordinary Portland Cement

## Inputs
All rows: missing unimportant
- limestone, crushed, for mill: 1300
  Limestone
- sandstone: 300
  Sandstone
- Sulfate slag: 20
- hard coal, run-of-mine: 190
  Coal
- electricity, medium voltage: 370.296
  Electricity

## Outputs
- carbon dioxide: 998.3; calculated
  CO2. Cement companies generally do not test for CO2 emissions, so an empirical formula is used, which is the CO2 emissions from burning cement clinker = 0.51 + 2.57 × standard coal consumption (t).
- sulfur dioxide: 0.55; measured
  SO2. Emissions data for SO2, NOX, and dust needs to be obtained through monitoring.
- Nitrogen oxides: 0.843; measured
  NOX. Emissions data for SO2, NOX, and dust needs to be obtained through monitoring.
- particles (> PM10): 2.697; measured
  Dust, with an unspecified particle size, is treated as PM > 10 micrometers in diameter. Emissions data for SO2, NOX, and dust needs to be obtained through monitoring.

## Data sources
- 张乐. (2009). 磷石膏基生态水泥的开发及其生命周期评价研究 [硕士, 华中科技大学].
