# Stainlesssteel|scrapsteel,pigiron(lump)，ferrochromealloy,directreductioniron,slaggingagent|Converter method|All sizes / 不锈钢|废钢、铁水（块）、铁铬合金、直接还原铁、造渣剂|转炉法|所有规模

Dataset: ILCD process, Unit process, single operation
Geography: CN
Reference year: 2019
Classification: Materials production / Metals and semimetals
Generated by: The data was created by the Office of the Second National Pollution Source Census of the Ministry of Ecology and Environment, and the data was organized by the TianGong Plan team for ILCD format / 生态环境部第二次全国污染源普查工作办公室创建数据，天工计划团队常慧敏整理数据为ILCD格式
Owner: Tiangong LCI Data Working Group / 天工LCI数据工作小组
Amounts: no units in this file; such an amount is in the reference unit of its flow, which a separate flow dataset defines
copyright: false
licenseType: Free of charge for all users and uses

## Technology and included processes
the Technical of end-of-pipe management technology for pollution Petroleum-related wasteisPrecipitation separation + floating separation + filter separation，Its Technical efficiency of end-of-pipe management90

## Reference product
- Stainless Steel: 1000; calculated
  源文件中描述为为不锈钢，此处对其进行了匹配工作，将其匹配到LCAflow库里面相最符合的流，污染物指标备注为转炉二次烟气废气量

## Outputs
All rows: calculated
- Exhaust gas: 4752
  污染物指标转炉二次烟气废气量的末端治理技术是/，其效率为0。原文件中描述污染物类别为废气，污染物指标为转炉二次烟气废气量，此处对其进行了匹配工作，将其匹配到LCAflow库里面相最符合的流，污染物指标备注为转炉二次烟气废气量
- particles (PM2.5 - PM10): 0.00568
  污染物指标转炉二次烟气有组织颗粒物的末端治理技术是布袋除尘，其效率为99.6，末端治理设施实际运行率（k值）计算公式为k=除尘设备年正常运行小时数（小时）/生产系统年运行小时数（小时）。原文件中描述污染物类别为废气，污染物指标为转炉二次烟气有组织颗粒物，此处对其进行了匹配工作，将其匹配到LCAflow库里面相最符合的流，污染物指标备注为转炉二次烟气有组织颗粒物
- Exhaust gas: nan
  污染物指标一般排放口废气量的末端治理技术是/，其效率为0。原文件中描述污染物类别为废气，污染物指标为一般排放口废气量，此处对其进行了匹配工作，将其匹配到LCAflow库里面相最符合的流，污染物指标备注为一般排放口废气量，产污系数备注为专指上料系统、精炼炉、一次烟气、三次烟气、连铸切割等过程产生的废气污染物指标
- particles (PM2.5 - PM10): nan
  污染物指标一般排放口颗粒物的末端治理技术是布袋除尘，其效率为99.6②，末端治理设施实际运行率（k值）计算公式为k=除尘设备年正常运行小时数（小时）/生产系统年运行小时数（小时），②专指除一次烟气外的其他烟气除尘技术对应的末端治理技术处理效率；。原文件中描述污染物类别为废气，污染物指标为一般排放口颗粒物，此处对其进行了匹配工作，将其匹配到LCAflow库里面相最符合的流，污染物指标备注为一般排放口颗粒物，产污系数备注为专指上料系统、精炼炉、一次烟气、三次烟气、连铸切割等过程产生的废气污染物指标
- particles (PM2.5 - PM10): nan
  污染物指标一般排放口颗粒物的末端治理技术是干法除尘，其效率为96③，末端治理设施实际运行率（k值）计算公式为k=除尘设备年正常运行小时数（小时）/生产系统年运行小时数（小时），③指一次烟气干法除尘技术对应的末端治理技术处理效率；。原文件中描述污染物类别为废气，污染物指标为一般排放口颗粒物，此处对其进行了匹配工作，将其匹配到LCAflow库里面相最符合的流，污染物指标备注为一般排放口颗粒物，产污系数备注为专指上料系统、精炼炉、一次烟气、三次烟气、连铸切割等过程产生的废气污染物指标
- particles (PM2.5 - PM10): nan
  污染物指标一般排放口颗粒物的末端治理技术是湿法除尘，其效率为94④，末端治理设施实际运行率（k值）计算公式为k=除尘设备年正常运行小时数（小时）/生产系统年运行小时数（小时），④专指一次烟气新OG法除尘技术对应的末端治理技术处理效率；⑤特指从连铸旋流池排向厂区总污水处理站废水的相关指标。。原文件中描述污染物类别为废气，污染物指标为一般排放口颗粒物，此处对其进行了匹配工作，将其匹配到LCAflow库里面相最符合的流，污染物指标备注为一般排放口颗粒物，产污系数备注为专指上料系统、精炼炉、一次烟气、三次烟气、连铸切割等过程产生的废气污染物指标
- Waste water: nan
  污染物指标废水量的末端治理技术是/，其效率为0。原文件中描述污染物类别为废水，污染物指标为废水量，此处对其进行了匹配工作，将其匹配到LCAflow库里面相最符合的流，污染物指标备注为废水量，产污系数备注为特指从连铸旋流池排向厂区总污水处理站废水的相关指标
- chemical oxygen demand: nan
  污染物指标化学需氧量的末端治理技术是沉淀分离+上浮分离+过滤分离，其效率为70，末端治理设施实际运行率（k值）计算公式为k=废水治理设备年正常运行小时数（小时）/生产系统年运行小时数（小时）。原文件中描述污染物类别为废水，污染物指标为化学需氧量，此处对其进行了匹配工作，将其匹配到LCAflow库里面相最符合的流，污染物指标备注为化学需氧量，产污系数备注为特指从连铸旋流池排向厂区总污水处理站废水的相关指标
- Petroleum-related waste: nan
  污染物指标石油类的末端治理技术是沉淀分离+上浮分离+过滤分离，其效率为90，末端治理设施实际运行率（k值）计算公式为k=废水治理设备年正常运行小时数（小时）/生产系统年运行小时数（小时）。原文件中描述污染物类别为废水，污染物指标为石油类，此处对其进行了匹配工作，将其匹配到LCAflow库里面相最符合的流，污染物指标备注为石油类，产污系数备注为特指从连铸旋流池排向厂区总污水处理站废水的相关指标

## Data sources
- 第二次全国污染源普查产排污核算系数手册（试用版）,四级代码3120文件，在完整版文件中第4111页
