# Wet sand Production| sand and gravel crushing | cone crushing technology

Dataset: ILCD process, Unit process, single operation
Geography: CS-HUN-CN
Reference year: 2020
Classification: Materials production / Other mineralic materials
Generated by: Cui hang, Cuihang0716@163.com
Review: Dependent internal review by Tiangong LCI Data Working Group
Amounts: no units in this file; such an amount is in the reference unit of its flow, which a separate flow dataset defines
copyright: false

## General comment
Secondary crushing, screening and processing (cone crushing)

## Technology and included processes
After jaw crushing, it is transported to cone crusher through conveyor belt for second crushing, after crushing, it enters into vibrating screen for screening, and the 1~2cm crushed stone obtained enters into finished product yard through conveyor belt, and the unqualified products larger than 2cm return to cone crusher for crushing, and sand maker enters into sand making, and the other parts are sent to sand maker through conveyor belt for sand making after screening.

## Reference product
- gravel: 133333; measured
  中碎所产生的砂石

## Inputs
- gravel: 166667; measured
  中碎所投入的砂石
- electricity mix: 1800; measured
  圆锥破碎机用电量

## Outputs
- Rolling gravel: 33333.3; measured
  中碎所产生的中骨料
- particles (> PM10): 16.667; measured
  生产过程中产生的粉尘颗粒

## Review details
Inventory: The internal review was done by several iteration steps concerning raw data validation, raw data documentation, representativity, completeness and consistency of modelling with regard to ISO 14040 and 14044.; Documentation: The review of the documentation was performed by Ecobilan and is in compliance with ISO 14040 and 14044. The data set documentation is correct in view of the appropriateness of the information provided. It includes all relevant information in view of data quality and scope of application of the respective LCI result.

## Data sources
- 年产 60 万吨机制砂建设项目环评报告
