# 土壤修复;异位修复;生物堆;工程实施;土壤调理

Dataset: ILCD process
Geography: KR
Classification: Other Services / Repair and maintenance
Generated by: Sang Chunhui, sangch@mail.bnu.edu.cn
Owner: Tiangong LCI Data Working Group
Review: Dependent internal review by Tiangong LCI Data Working Group
Amounts: no units in this file; such an amount is in the reference unit of its flow, which a separate flow dataset defines
licenseType: Free of charge for all users and uses

## General comment
This soil remediation process involves ex-situ biopiles, a form of treatment where contaminated soil is excavated and biologically treated aboveground. The process includes conditioning of the soil by adding appropriate amounts of moisture, nutrients, and amendments to adjust soil moisture content, pH, and porosity for optimized biodegradation of pollutants.

## Reference product
- pre-treatment soil: 3600; article inperiodical

## Inputs
- water: 67400; article inperiodical
- ammonium sulfate: 2708; article inperiodical
- Potassium sulphate: 558; article inperiodical
- Micro-organism: 4.777; article inperiodical

## Use advice
Users of this data set should consider the specific conditions under which the biopile remediation is effective. This includes the type of contaminants, local climate conditions affecting biodegradation, and the scale of remediation. Care should be taken to ensure that all inputs, such as water and nutrients, are accounted for in the life cycle inventory. The exclusion or inclusion of downstream processes such as the final disposal of treated soil or emissions from biodegradation should be clearly documented based on the goal and scope of the LCA study.

## Review details
Inventory: The internal review was done by several iteration steps concerning raw data validation, raw data documentation, representativity, completeness and consistency of modelling with regard to ISO 14040 and 14044.
