# 铝再生 ; 再生铝锭 ; 废铝

Dataset: ILCD process, Unit process, single operation
Geography: CN
Reference year: 2022
Classification: Unit processes / Materials production / Metals and semimetals
Generated by: 熊若熙, xiongrx0126@163.com
Owner: 天工LCI数据工作小组
Review: Dependent internal review by 天工LCI数据工作小组
Amounts: no units in this file; such an amount is in the reference unit of its flow, which a separate flow dataset defines
copyright: false
licenseType: Free of charge for all users and uses

## General comment
通过此过程生产的再生铝锭通常用于包括汽车、建筑、包装和电子在内的各种行业。鉴于材料的多功能性，它可用于铸造、压铸和作为铝合金生产的原材料。

## Time period
文献发表日期

## Reference product
- secondary aluminium ingot: 1000; missing unimportant
  recycled aluminium

## Inputs
All rows: missing unimportant
- electricity, high voltage, aluminium industry: 925.2
- hard coal: 2.47
- Petroleum Coke: 42.5
- heavy fuel oil: 82.9
- natural gas, high pressure: 22.4
  natural gas
- liquefied petroleum gas: 341

## Data selection and combination
根据目标、范围、系统边界定义，使用相关规范、标准、年鉴，或其他相关资料，收集汇总生命周期各阶段的输入输出数据。

## Use advice
该数据集的用户应根据其生命周期评估（LCA）的目标、范围和系统边界定义来确保数据的适用性。应注意数据与指定年份或时期的相关性，并考虑自发布日期以来回收技术或行业标准的任何变化。用户必须了解特定于回收过程的输入和输出数据，并应考虑由于技术进步或区域实践的任何可能变化。此外，该过程仅有能源数据，仅作为能源消耗的参考数据，如需使用请根据实际情况补全其它信息。

## Review details
清单： 内部审查通过几个迭代步骤完成，涉及原始数据验证、原始数据记录、代表性、完整性、与 ISO 14040 和 14044 有关的建模的一致性。

## Data sources
- Zhang, Y. et al. Life cycle assessment of pollutants and emission reduction strategies based on the energy structure of the nonferrous metal industry in China. ENERGY 261, (2022).
