# 铝电解｜液态原铝 ; 冶金用氧化铝

Dataset: ILCD process, Unit process, single operation
Geography: HEN-CN
Reference year: 2018
Classification: Unit processes / Materials production / Metals and semimetals
Generated by: 徐常青, xcq@bit.edu.cn
Owner: 天工LCI数据工作小组
Review: Dependent internal review by 天工LCI数据工作小组
Amounts: no units in this file; such an amount is in the reference unit of its flow, which a separate flow dataset defines
copyright: false
licenseType: Free of charge for all users and uses

## General comment
无流程图

## Time period
论文发表年

## Technical purpose
通过铝电解过程生产的初级铝适用于冶金应用。其高纯度使其适用于生产铝合金、汽车工业组件、航空航天结构以及其他金属完整性至关重要的应用。

## Reference product
- aluminium, primary, liquid: 1000; missing unimportant
  铝液-无条目 搜不出来

## Inputs
All rows: missing unimportant
- electricity, high voltage, aluminium industry: 48391.2
- aluminium oxide, metallurgical: 1916
- anode, for metal electrolysis: 469
- Fluoride: 19
  氟化物在这里是作为输入，但是只有排放的elementary flow
- cryolite: 11.9

## Outputs
All rows: missing unimportant
- carbon dioxide (fossil),carbon dioxide (fossil): 11222
- carbon monoxide (fossil),carbon monoxide (fossil): 659
- sulfur dioxide: 16.8
- Nitrogen oxides: 26.2
- methane (fossil): 30.9
- hydrogen fluoride: 17
- particles (> PM10): 5.48
- particles (PM2.5): 3.15
- Ethane, hexafluoro-, HFC-116: 0.0034
  六氟乙烷，空气排放物
- FC-14: 0.034
  四氟化碳-无条目

## Use advice
当使用此数据集进行生命周期评估时，请特别注意电解过程的地域特性和能源来源的潜在差异。该数据集特定于铝的初级生产，不包括任何二级过程如回收。确保使用阶段的建模反映了特定应用和潜在的生命周期终点回收过程。

## Review details
清单： 内部审查通过几个迭代步骤完成，涉及原始数据验证、原始数据记录、代表性、完整性、与 ISO 14040 和 14044 有关的建模的一致性。

## Data sources
- 王姗姗, 刘赛男, 王灿, & 张瑞芹. 基于生命周期评价的河南省原铝生产环境影响分析. 轻金属 1-7+16 (2018)
