# Rare Earth mining|Rare Earth|In-situ leaching|neodymium iron boron (NdFeB) magnet

Dataset: ILCD process, Unit process, single operation
Geography: NMG-CN
Reference year: 2014
Classification: Materials production / Other mineralic materials
Functional unit: The functional unit is a 1 kg NdFeB magnet
LCI method principle: Attributional
LCI method approaches: Allocation - market value; Allocation - mass
Generated by: Tao Wang, twang@iue.ac.cn
Review: Dependent internal review by Tiangong LCI Data Working Group
Amounts: no units in this file; such an amount is in the reference unit of its flow, which a separate flow dataset defines
copyright: false

## Geography
Bayan Obo (China)

## Technology and included processes
The basic process for Nd and Pr production is the same at all three deposits. It is identical for Nd and Pr except for the last solvent extraction step (SX5) where both are separated.

## Reference product
- Raw ore: 336; article inperiodical
  Raw ore. Bayan Obo: input for next process, Crushing

## Inputs
- Electricity: 1.2024; article inperiodical
  Bayan Obo: value of iron mine
- Diesel: 2.76; article inperiodical
  Bayan Obo: Diesel for mining truck
- Explosive: 0.064; article inperiodical
  Explosive. Bayan Obo: 0.095 kg/t moved rock multiplied by stripping rate
- transport in t*km,transport in t*km: 0.123; measured
  Bayan Obo: Diesel 150 km, oil and explosives 929 km, EURO3 lorry
- transport in t*km,transport in t*km: 0.305; measured
  Bayan Obo: Rail, 1046 km
- lubricating oil, waste: 0.01; article inperiodical
  lubricating oil, waste. Bayan Obo: based on Ruhrberg adapted to mining rate
- to unspecified, used: 0.00515; article inperiodical
  Bayan Obo

## Outputs
All rows: article inperiodical
- Dust (unspecified, from stack): 0.754
  Bayan Obo: based on Arpacioglu and Er multiplied by stripping rate
- Radioactive dust, waste: 0.363
  Radioactive dust. Bayan Obo: based on Th232 and U238 activity in the ore
- Water (river water from technosphere, waste water): 409
  Bayan Obo
- overburden (unspecified): 336
  Bayan Obo: calculation based on stripping rate
- lubricating oil, waste: 0.01
  lubricating oil, waste. Bayan Obo: incineration of hazardous waste is assumed

## Deviations from the LCI method approaches
In this study, an allocation method based on the market prices of REOs28 is considered. To estimate uncertainties that refer to the allocation method, a mass-based allocation is undertaken as a sensitivity analysis

## Review details
Inventory: The internal review was done by several iteration steps concerning raw data validation, raw data documentation, representativity, completeness and consistency of modelling with regard to ISO 14040 and 14044.; Documentation: The review of the documentation was performed by Ecobilan and is in compliance with ISO 14040 and 14044. The data set documentation is correct in view of the appropriateness of the information provided. It includes all relevant information in view of data quality and scope of application of the respective LCI result.

## Data sources
- Marx, J., Schreiber, A., Zapp, P. & Walachowicz, F. Comparative Life Cycle Assessment of NdFeB Permanent Magnet Production from Different Rare Earth Deposits. ACS Sustainable Chem. Eng. 6, 5858–5867 (2018).
