# 开挖土壤;3~10 m;土壤异位修复;清挖运输;含密闭大棚建设

Dataset: ILCD process, Unit process, black box
Geography: ZB-SD-CN
Reference year: 2024
Classification: Unit processes / Other Services / Repair and maintenance
Functional unit: Excavation of 59922m3 contaminated soil. Using concrete cast-in-place piles, crown beams, and anchor cables for foundation pit support
Generated by: 杨欣桐, yangxt@caep.org.cn
Owner: 天工LCI数据工作小组
Review: Dependent internal review by 天工LCI数据工作小组
Amounts: no units in this file; such an amount is in the reference unit of its flow, which a separate flow dataset defines
copyright: false
licenseType: Free of charge for all users and uses

## General comment
3~10 m污染土壤清挖，运输至场内钢膜结构微负压密闭大棚

## Geography
污染场地位于山东省淄博市，占地总面积约8.78万 m2。

## Technology and included processes
使用挖掘机及运输车，将59922m3污染土壤开挖并转运至钢膜结构微负压密闭大棚，开挖过程采用基坑支护

## Technical purpose
此描述的修复程序涉及3至10米深度内受污染土壤的开挖和异位修复。它通常适用于环境修复项目，尤其是像位于山东省淄博市的污染场地的治理。该过程使用挖掘机和运输车辆移动土壤，并采用混凝土灌注桩、冠梁和锚索进行基坑支护。

## Reference product
- contaminated soil: 59922; measured
  开挖出的污染土壤，暂存于密闭负压大棚内，待进行氧化处置

## Inputs
All rows: measured
- Electricity: 1908
- Diesel,Diesel: 198.581
- Diesel,Diesel: 0.19543
  运输环节柴油消耗，主要为设备及材料入场环节的运输过程
- Tap Water: 360
- Concrete: 510
  基坑支护过程中，混凝土灌注桩的混凝土消耗量
- Steel: 55000
  基坑支护过程中，钢材的消耗量

## Outputs
- Soil Sample: 84; measured
  污染土壤开挖过程中，基坑及侧壁采集的土壤样品。
- waste water - untreated: 2481; measured
  开挖过程产生的基坑废水，以及车辆冲洗过程产生的洗车池废水

## Use advice
此数据集应在土壤修复项目的环境影响评估上下文中使用。应特别注意土壤开挖的指示深度，因为能源消耗和材料使用量将根据处理的受污染土壤的具体深度和体积而变化。用户必须考虑基坑支护材料的运输和生产，并在其环境影响计算中包括挖掘和运输设备操作的能源消耗。

## Review details
清单： 内部审查通过几个迭代步骤完成，涉及原始数据验证、原始数据记录、代表性、完整性、与 ISO 14040 和 14044 有关的建模的一致性。

## Data sources
- 桑春晖,杨欣桐,张红振等. 氰化物污染土壤修复工程环境足迹评估方法和案例研究 [J/OL]. 中国环境科学, 1-11[2024-02-11].
