# 土壤修复;原位修复;电修复;修复设施建设;电动修复设施

Dataset: ILCD process, Unit process, single operation
Geography: IT
Reference year: 2015
Classification: Unit processes / Other Services / Repair and maintenance
Generated by: 王宁, wang_ning@caep.org.cn
Owner: 天工LCI数据工作小组
Review: Dependent internal review by 天工LCI数据工作小组
Amounts: no units in this file; such an amount is in the reference unit of its flow, which a separate flow dataset defines
copyright: false
licenseType: Free of charge for all users and uses

## General comment
使用电极、PVC、PP等建造电动修复设施

## Technical purpose
该电动修复设施建设过程应用于环境工程领域，特别是用于土壤原位修复。它利用电极、PVC、PP和其他必要材料建造能够电处理受污染土壤的设施，并且无需挖掘和将材料转移到其他地点。

## Reference product
- Electric restoration facilities: 1; measured

## Inputs
- Electrode,Electrodes: 176; measured
- Polyvinyl chloride: 470; measured
- Polyethylene,Polyethylene: 9; measured

## Use advice
使用电动修复设施建设的LCA数据时，用户应确保精确计算所有原材料输入和能量消耗，包括维护阶段。数据集应排除被修复的土壤本身，但包括修复所需的总基础设施。在评估环境影响时，捕捉修复设施的完整生命周期至关重要。

## Review details
清单： 内部审查通过几个迭代步骤完成，涉及原始数据验证、原始数据记录、代表性、完整性、与 ISO 14040 和 14044 有关的建模的一致性。

## Data sources
- Vocciante, M., Caretta, A., Bua, L., Bagatin, R. & Ferro, S. Enhancements in ElectroKinetic Remediation Technology: Environmental assessment in comparison with other configurations and consolidated solutions. Chemical Engineering Journal 289, 123–134 (2016).
