# 修复后土壤;异位热处理;危废焚烧厂;焚烧

Dataset: ILCD process, Unit process, black box
Geography: SI
Reference year: 2018
Classification: Unit processes / Other Services / Repair and maintenance
Functional unit: The functional unit was the management of 1.0 m3 of contaminated soil at the Old Zinc-Works site. A time horizon of 100 years was assumed.
Generated by: 杨欣桐, yangxt@caep.org.cn
Owner: 天工LCI数据工作小组
Review: Dependent internal review by 天工LCI数据工作小组
Amounts: no units in this file; such an amount is in the reference unit of its flow, which a separate flow dataset defines
copyright: false
licenseType: Free of charge for all users and uses

## General comment
焚烧处理技术的原理是利用焚烧炉在一定温度下焚烧受污染的土壤,破坏有害化学物质的结构。

## Geography
本研究涉及在Celje镇（斯洛文尼亚东部）的旧锌厂现场进行的修复活动。

## Technology and included processes
挖掘出的受污染土壤已从现场清除。挖出的坑被废石回填了。从现场挖出的受污染土壤被假设装载到火车上，在危险废物焚烧厂进行运输和热处理，以减少废物的体积和质量。

## Technical purpose
通过危废焚烧厂的异位热处理修复后的土壤主要用于破坏历史污染工业场地中受污染土壤中有害化学物质的结构。这一过程主要适用于涉及清理旧工业设施（如锌厂）的环境修复项目，其中土壤污染通过高温焚烧方法得到处理。

## Reference product
- Remediated soil: 1; estimated

## Inputs
All rows: estimated
- Diesel,Diesel: 0.00169
  Excavation of the contaminated soil
- Electricity: 90.864
  Transport of the contaminated soil to the underground waste disposal location, by rail (1000 km)
- Waste rock: 1
  Reclamation of the degraded site
- Diesel,Diesel: 0.00072
  Delivery of the ﬁll material (waste rock) (35 km)
- Diesel,Diesel: 0.00058
  Spreading and compaction of the ﬁll material
- Light fuel oil: 0.085
  Incineration of the contaminated soil
- natural gas,natural gas: 22.6
  Incineration of the contaminated soil
- Tap Water: 6.0306
  Operation of the incineration plant
- Electricity: 1009.8
  Operation of the incineration plant
- Hydrogen peroxide,Hydrogen peroxide: 0.04
  Additives for ﬂue-gas treatment at the incineration plant
- Polyelectrolyte: 28
  Additives for ﬂue-gas treatment at the incineration plant
- iron chloride: 0.38
  Additives for ﬂue-gas treatment at the incineration plant
- Hydrochloric Acid,Hydrochloric Acid: 2.1
  Additives for ﬂue-gas treatment at the incineration plant
- Activated Carbon: 5.19
  Additives for ﬂue-gas treatment at the incineration plant
- Ammonia: 8.27
  Additives for ﬂue-gas treatment at the incineration plant
- sodium hydroxide: 21.74
  Additives for ﬂue-gas treatment at the incineration plant
- Lime,Lime: 40.11
  Additives for ﬂue-gas treatment at the incineration plant
- Electricity: 17.64
  Recovery of valuable metals from the bottom ash
- Polyethylene,Polyethylene: 3.91
  Landﬁlling of residues at the underground waste disposal location
- Wooden pallet (EURO): 5.44
  Landﬁlling of residues at the underground waste disposal location
- Brick: 5.17
  Landﬁlling of residues at the underground waste disposal location
- Mortar: 0.41
  Landﬁlling of residues at the underground waste disposal location
- Electricity: 2.376
  Operation of the underground waste disposal location (illumination, ventilation)
- contaminated soil: 1

## Use advice
在利用这个数据集进行环境影响评估或生命周期评估研究时，确保焚烧过程作为受污染土壤的废物处理方法被适当计入。特别需要对从挖掘现场到焚烧设施的土壤运输和处理过程进行建模。此外，还要考虑关于处理后土壤长期管理（100年时间范围）的假设。数据使用者应当模拟使用阶段的行为，考虑从土壤挖掘到用废石填充坑穴以及焚烧后材料的最终处置或再利用的完整周期。为了准确反映，与更广泛的生命周期评价框架的方法论一致性是至关重要的。

## Review details
清单： 内部审查通过几个迭代步骤完成，涉及原始数据验证、原始数据记录、代表性、完整性、与 ISO 14040 和 14044 有关的建模的一致性。

## Data sources
- Pranjić M A ,Oprčkal P ,Mladenovič A , et al. Comparative Life Cycle Assessment of possible methods for the treatment of contaminated soil at an environmentally degraded site. Journal of Environmental Management, 2018, 218 497-508.
