# 畜禽养殖 ; 粪便处理阶段 ; 肉鸡养殖小区

Dataset: ILCD process, Unit process, single operation
Geography: SD-CN
Reference year: 2014
Classification: Unit processes / Materials production / Agricultural production means
Functional unit: 1kg eggs
Generated by: 杨瑞, 1632707028@qq.com
Owner: 天工LCI数据工作小组
Review: Dependent internal review by 天工LCI数据工作小组
Amounts: no units in this file; such an amount is in the reference unit of its flow, which a separate flow dataset defines
copyright: false
licenseType: Free of charge for all users and uses

## General comment
畜禽粪便处理方式包括干清粪、水冲粪、垫料处理。水冲粪处理方式受《水 污染防治行动计划》（简称水十条）[88]和新《环保法》等严格约束，呈逐年下降 趋势；垫料方式的污染物排放少、对环境危害小，经过简单堆肥后可直接施用于 田地，但其受经济成本制约度较高，常见于禽舍粪便处理；干清粪对环境的危害 介于两者之间，经济成本较低[89,90]。

## Geography
本研究于 2014~2015 年，针对畜禽饲养周期、肉料比、饲料配方、饲料消耗 量、煤和电的消耗量等，先后对山东省高密正大种猪场、莱西市知双奶牛场、即 墨市段泊岚镇姜家坡村养猪场、即墨市刘家庄镇畜禽养殖场、日照市莒县长岭镇 上官庄村、莒县寨里河镇东兴农牧公司、莒县峤山镇东辰奶牛场、莒县峤山镇刘 家义水养猪场、诸城市外贸有限责任公司凤凰父母代种鸭场，新疆阜康宏发养殖 专业合作社、九运街镇旭鸿蛋鸡合作社、九运街镇六运村自成养殖场、中澳控股 集团有限公司、德州市庆云县洼于村、山东省庆云县四柳社区肉牛养殖基地、德 州市庆云青年鸡养殖基地、庆云县永利禽业蛋鸡育成公司、庆云县兴晨青年鸡养 殖专业合作社、庆云县东泰肉鸡养殖专业合作社、河北省盐山县博远饲料有限公 司、盐山县大华人饲料有限公司、无棣县六和饲料有限公司、中澳东方希望饲料 公司等地进行了实地调研。

## Technology and included processes
本文将畜禽养殖生命周期 分为饲料作物种植、饲料加工、畜禽饲养、粪便处理、屠宰、运输等 6 个阶段。 畜禽养殖的生命周期具体流程如图 2-1 所示。由于部分数据的缺乏和基础条件的 限制，未对农药、地膜、饲料添加剂等生产、运输、使用进行分析，其他相关的 基础设施建设、运输工具生产、人力成本所引起的环境影响也不再考虑的范畴内。

## Technical purpose
畜禽养殖粪便处理数据适用于农业部门的环境影响评估，特别是在分析废物管理实践中。数据可用于比较干粪分离、水冲洗和垫料处理等各种粪便处理方法的环境性能。这也与家禽行业的利益相关者评估和改进肉鸡生产过程的可持续性相关。

## Reference product
- manure: 0.0892857; input; calculated
  根据文献中畜禽排放系数计算

## Outputs
- methane (biogenic): 0.00166; measured
  肉鸡养殖小区
- nitrous oxide: 0.00166; measured
  肉鸡养殖小区
- ammonia: 0.0104; measured
  肉鸡养殖小区

## Use advice
在使用此数据集进行生命周期评估（LCA）时，应注意与整个LCA框架的方法学一致性。数据使用者必须考虑技术适用性，因为不同地区和农场可能采用不同的粪便处理过程。模型中粪便管理实践的选择应反映'水十'和环境法规等当前法律约束。确保对于饲料消耗量、畜禽养殖周期和农业实践选择中的能源使用的假设，根据最新数据进行验证以确保准确性。

## Review details
清单： 内部审查通过几个迭代步骤完成，涉及原始数据验证、原始数据记录、代表性、完整性、与 ISO 14040 和 14044 有关的建模的一致性。

## Data sources
- 周景月. 基于生命周期评价的畜禽养殖环境影响分析. (青岛科技大学, 2017).
