# 炼钢;钢;转炉炼钢（Z11）

Dataset: ILCD process, Unit process, single operation
Geography: CN
Reference year: 1998
Classification: Materials production / Metals and semimetals
Generated by: 付翔, 1162850692@qq.com
Owner: 天工LCI数据工作小组
Review: Dependent internal review by 天工LCI数据工作小组
Amounts: no units in this file; such an amount is in the reference unit of its flow, which a separate flow dataset defines
copyright: false
licenseType: Free of charge for all users and uses

## General comment
来自表 4-15 Z11 钢厂生产吨材环境负荷编目表

## Time period
论文提到钢铁企业环境总体数据为1998年的吨钢环境基础数据。

## Technical purpose
所描述的工艺用于钢铁厂中使用转炉（Z11）的钢铁制造。它旨在生产可用于创建各种钢制品的熔融钢，从建筑材料到汽车部件不等。这个高温工艺专为大规模钢铁生产设计。

## Reference product
- Crude Steel: 1050.6; measured
  粗钢

## Inputs
- Energy, geothermal, converted: 1063.19; measured
- water: 67648; measured
- Molten Iron: 1054.46; measured
  铁水

## Outputs
All rows: measured
- Dust (unspecified, from stack): 0.163
- sulfur dioxide: 0.116
- Hydrocarbons, aliphatic, alkanes, unspecified: 0.040133
  石油类
- Suspended solids, unspecified: 0.248677
- chemical oxygen demand: 0.094344
- Dust (unspecified, from stack): 13.973
  集尘
- Spoil (deposited, hibernating in ground, non elementary flow): 231.132

## Use advice
在使用这个数据集进行生命周期评价（LCA）时，考虑数据收集年份的具体技术相关性很重要，本例中数据为1998年的。该数据代表了钢铁厂生产一吨材料的环境负荷（单一操作的单元过程），如果工艺技术或效率随时间发生变化，则应相应调整。在方法论上应考虑回收和潜在的环境信用。可能需要调整以反映当前的生产方法和区域背景。

## Review details
清单： 内部审查通过几个迭代步骤完成，涉及原始数据验证、原始数据记录、代表性、完整性、与 ISO 14040 和 14044 有关的建模的一致性。

## Data sources
- 周和敏. 钢铁材料生产过程环境协调性评价研究. (北京工业大学, 2001).
