# 铝电解 ; 液态原铝 ; 预焙 ; 冶金用氧化铝 ; 2013年

Dataset: ILCD process, Unit process, single operation
Geography: CN
Reference year: 2021
Classification: Unit processes / Materials production / Metals and semimetals
Generated by: 蔡梓萌, caizm6178@163.com
Owner: 天工LCI数据工作小组
Review: Dependent internal review by 天工LCI数据工作小组
Amounts: no units in this file; such an amount is in the reference unit of its flow, which a separate flow dataset defines
copyright: false
licenseType: Free of charge for all users and uses

## General comment
该工艺数据集涉及使用冶金级氧化铝的铝电解产生液态初级铝，并采用预焙技术。它主要用于生产不同行业如汽车、建筑、电子和包装行业的铝制品和零部件。该数据与2013年有关。

## Time period
文献发表日期

## Reference product
- aluminium, primary, liquid: 1000; software or database

## Inputs
All rows: software or database
- Integrated AC power consumption: 48024.5
- aluminium oxide, metallurgical: 1915.89
- fluoride salt: 19.3
- anode, prebake, for aluminium electrolysis: 415.46
- Water, unspecified natural origin: 2.15

## Data selection and combination
本研究的数据参考了PA、SA、电力等背景数据的LCA数据。PA数据来自统计数据源，SA数据主要来自文献。背景数据主要来自中国科学院生态环境研究中心CASRCEES 2018建立的中国本地化LCA数据库，涵盖能源、材料、交通、废物管理等LCA数据。

## Use advice
在使用这份LCA数据集时，用户应考虑到2013年中国特定区域数据来源和技术标准的特殊性。确保使用环境与当时中国工业实践相符。主要铝（PA）和次级铝（SA）的数据输入必须来源于可靠的统计数据来源或科学文献。应以CAS RCEES 2018数据库或类似的中国本地化LCA数据库作为背景数据参考，确保数据与研究的方法论和地理适用性相一致。特别注意系统边界、分配方法以及根据具体情况是否包含回收过程等方法论方面。

## Review details
清单： 内部审查通过几个迭代步骤完成，涉及原始数据验证、原始数据记录、代表性、完整性、与 ISO 14040 和 14044 有关的建模的一致性。

## Data sources
- Ding, N., Liu, N., Lu, B. & Yang, J. Life cycle greenhouse gas emissions of aluminum based on regional industrial transfer in China. J. Ind. Ecol. 25, 1657–1672 (2021).
