# 电力生产 ; 混合电力 ; 江西

Dataset: ILCD process, Unit process, single operation
Geography: JX-CN
Reference year: 2019
Classification: Unit processes / Energy carriers and technologies / Electricity
Generated by: 熊若熙, xiongrx0126@163.com
Owner: 天工LCI数据工作小组
Review: Dependent internal review by 天工LCI数据工作小组
Amounts: no units in this file; such an amount is in the reference unit of its flow, which a separate flow dataset defines
copyright: false
licenseType: Free of charge for all users and uses

## General comment
混合电力产生形式包括火力发电、水力发电、风力发电、核能发电和太阳能发电

## Technical purpose
该数据集代表江西的混合电力生产，旨在用作供电，在从居民消费到工业过程的广泛应用范围内使用。混合包括来自热能、水力、风力、核能和太阳能的发电。

## Reference product
- Electricity: 3.6; missing unimportant
  [{'text': '3.6', 'type': 'text'}]

## Inputs
All rows: missing unimportant
- electricity for thermal power: 2.8805
  [{'text': '3.6', 'type': 'text'}]
- electricity from hydroelectric power plant: 0.439549
  [{'text': '3.6', 'type': 'text'}]
- electricity for nuclear power: 0
  [{'text': '3.6', 'type': 'text'}]
- electricity from wind power: 0.133434
  [{'text': '3.6', 'type': 'text'}]
- electricity for solar power: 0.146516
  [{'text': '3.6', 'type': 'text'}]

## Use advice
在使用该数据集进行生命周期评估时，考虑江西电力组合中热能、水力、风能、核能和太阳能发电的具体比例。用户应考虑能源使用的时间变化以及发电效率和环境影响的区域差异。应跟踪数据集的更新，以捕捉随时间变化的能源组合变化。

## Review details
清单： 内部审查通过几个迭代步骤完成，涉及原始数据验证、原始数据记录、代表性、完整性、与 ISO 14040 和 14044 有关的建模的一致性。

## Data sources
- 能源统计年鉴2020
