# 杏仁生产

Dataset: ILCD process, Unit process, black box
Geography: UM
Reference year: 2015
Valid until: 2016
Classification: Unit processes / Materials production / Food and renewable raw materials
Functional unit: 1 kg of raw brown-skin almond
Generated by: 朱娴, zzhu0918@163.com
Owner: 天工LCI数据工作小组
Review: Dependent internal review by 天工LCI数据工作小组
Amounts: no units in this file; such an amount is in the reference unit of its flow, which a separate flow dataset defines
copyright: false
licenseType: Free of charge for all users and uses

## General comment
准备杏仁生产所需的幼苗，并通过人工或机械完成培育、施肥，加入肥料、农药、水等物质，最后收获杏仁果实及其副产品。

## Geography
美国加利福利亚州

## Time period
该数据为杏仁树苗生长第7年至25年间所记录的值

## Technical purpose
该数据集代表杏仁生产过程，用于培育与加工原生棕皮杏仁。这些杏仁可直接食用，或用作糖果、烘焙食品、健康小吃等食品原料，或进一步加工成杏仁酱、杏仁奶、杏仁油、杏仁粉等基于杏仁的产品。

## Reference product
- Almond: 2309

## Inputs
All rows: measured
- Nitrogenous fertilizer: 224
- Potassium fertilizer: 224
- boron: 0.448
- zinc: 5.6
- water: 12954

## Use advice
在使用此数据进行生命周期评估时，请注意该数据对应于杏仁树苗第7年至第25年生长期间的投入与产出，并已以'黑箱'单元过程的形式记录。此数据不应用于代表早期生长阶段或收获后加工。应当考虑系统边界及来自施肥、使用农药和水的环境影响的纳入/排除。此数据集特定于美国加利福尼亚州，当应用于其他地区的杏仁生产时，应进行相应调整。

## Review details
清单： 内部审查通过几个迭代步骤完成，涉及原始数据验证、原始数据记录、代表性、完整性、与 ISO 14040 和 14044 有关的建模的一致性。

## Data sources
- Life Cycle–based Assessment of Energy Use and Greenhouse Gas Emissions in Almond Production, Part I: Analytical Framework and Baseline Results.
