# 畜禽养殖 ; 粪便处理阶段 ; 肉牛规模化

Dataset: ILCD process, Unit process, single operation
Geography: SD-CN
Reference year: 2014
Classification: Unit processes / Materials production / Agricultural production means
Functional unit: 1kg beef
Generated by: 杨瑞, 1632707028@qq.com
Owner: 天工LCI数据工作小组
Review: Dependent internal review by 天工LCI数据工作小组
Amounts: no units in this file; such an amount is in the reference unit of its flow, which a separate flow dataset defines
copyright: false
licenseType: Free of charge for all users and uses

## General comment
畜禽粪便处理方式包括干清粪、水冲粪、垫料处理。水冲粪处理方式受《水 污染防治行动计划》（简称水十条）[88]和新《环保法》等严格约束，呈逐年下降 趋势；垫料方式的污染物排放少、对环境危害小，经过简单堆肥后可直接施用于 田地，但其受经济成本制约度较高，常见于禽舍粪便处理；干清粪对环境的危害 介于两者之间，经济成本较低[89,90]。

## Geography
本研究于 2014~2015 年，针对畜禽饲养周期、肉料比、饲料配方、饲料消耗 量、煤和电的消耗量等，先后对山东省高密正大种猪场、莱西市知双奶牛场、即 墨市段泊岚镇姜家坡村养猪场、即墨市刘家庄镇畜禽养殖场、日照市莒县长岭镇 上官庄村、莒县寨里河镇东兴农牧公司、莒县峤山镇东辰奶牛场、莒县峤山镇刘 家义水养猪场、诸城市外贸有限责任公司凤凰父母代种鸭场，新疆阜康宏发养殖 专业合作社、九运街镇旭鸿蛋鸡合作社、九运街镇六运村自成养殖场、中澳控股 集团有限公司、德州市庆云县洼于村、山东省庆云县四柳社区肉牛养殖基地、德 州市庆云青年鸡养殖基地、庆云县永利禽业蛋鸡育成公司、庆云县兴晨青年鸡养 殖专业合作社、庆云县东泰肉鸡养殖专业合作社、河北省盐山县博远饲料有限公 司、盐山县大华人饲料有限公司、无棣县六和饲料有限公司、中澳东方希望饲料 公司等地进行了实地调研。

## Technology and included processes
本文将畜禽养殖生命周期 分为饲料作物种植、饲料加工、畜禽饲养、粪便处理、屠宰、运输等 6 个阶段。 畜禽养殖的生命周期具体流程如图 2-1 所示。由于部分数据的缺乏和基础条件的 限制，未对农药、地膜、饲料添加剂等生产、运输、使用进行分析，其他相关的 基础设施建设、运输工具生产、人力成本所引起的环境影响也不再考虑的范畴内。

## Technical purpose
该数据集描述了畜禽养殖过程中的粪便处理阶段，重点关注肉牛的规模化养殖。详细说明了干清粪、水冲粪和垫料处理等粪便处理方法。干清粪法在环境影响和经济成本之间平衡，而垫料方法虽然环境友好但成本更高。此数据集与畜牧业相关方尤其是肉牛养殖设施的设计、运营和管理人员息息相关。可以用于环境影响评估、效率优化和遵守环保法规。

## Reference product
- manure: 0.1006; input; calculated
  根据文献中畜禽排放系数计算

## Outputs
- methane (biogenic): 0.00115; measured
  肉牛规模化
- nitrous oxide: 0.0016; measured
  肉牛规模化
- ammonia: 0.02894; measured
  肉牛规模化

## Use advice
在使用此数据集进行生命周期评估时，用户应考虑肉牛规模化操作中粪便处理方法特定的环境和经济影响。同时，用户也应当考虑到监管环境，由于《水污染防治行动计划》和新《环保法》等法律法规的严格性，水冲粪处理方法的使用呈下降趋势。建议根据局部情况定制数据，考虑2014到2015年研究中突出的不同农场和处理方法之间在资源消耗和环境影响方面的差异。因法规和技术实践可能自研究以来有所发展，应批判性地评估数据对当前条件的相关性。

## Review details
清单： 内部审查通过几个迭代步骤完成，涉及原始数据验证、原始数据记录、代表性、完整性、与 ISO 14040 和 14044 有关的建模的一致性。

## Data sources
- 周景月. 基于生命周期评价的畜禽养殖环境影响分析. (青岛科技大学, 2017).
