# 地下水修复;原位修复;吸附;吸附剂的制备;干燥

Dataset: ILCD process, Unit process, single operation
Geography: ID
Reference year: 2022
Classification: Unit processes / Other Services / Repair and maintenance
Generated by: 肖萌, xiaomeng@mail.bnu.edu.cn
Owner: 天工LCI数据工作小组
Review: Dependent internal review by 天工LCI数据工作小组
Amounts: no units in this file; such an amount is in the reference unit of its flow, which a separate flow dataset defines
copyright: false
licenseType: Free of charge for all users and uses

## General comment
将沉淀物在105°C的烘箱中干燥24小时。颗粒以圆柱形随机制备。

## Technical purpose
该工艺用于制备用于原位地下水修复的吸附剂。这些吸附剂为干燥的圆柱形颗粒，旨在通过吸附过程从地下水中去除污染物。

## Reference product
- Aluminium hydroxide/oxide nanoparticles adsorption (Drying): 3.06; measured
  Dry Adsorbent

## Inputs
- Aluminium hydroxide/oxide nanoparticles adsorption (Electrolysis; prepeard; in water): 8.5; measured
  Wet Adsorbent
- Electricity: 23.328; measured

## Outputs
- water vapour: 6; measured

## Use advice
使用此数据时，请确保圆柱形吸附剂颗粒在105°C的干燥温度与预期应用的温度耐受性一致。考虑此吸附剂设计用于的特定污染物类型和浓度，以及所需的吸附能力和持续时间。相应地将此数据应用于具有类似操作条件和环境标准的场景。

## Review details
清单： 内部审查通过几个迭代步骤完成，涉及原始数据验证、原始数据记录、代表性、完整性、与 ISO 14040 和 14044 有关的建模的一致性。

## Data sources
- Goyal, H. & Mondal, P. Life cycle assessment (LCA) of the arsenic and fluoride removal from groundwater through adsorption and electrocoagulation: A comparative study. Chemosphere 304, 135243 (2022).
