# 乙烯生产 ; 乙烯 ; 石脑油路线 ; 石脑油

Dataset: ILCD process, Unit process, black box
Geography: CN
Reference year: 2010
Classification: Unit processes / Energy carriers and technologies / Energetic raw materials
Functional unit: The functional unit is 1t of ethylene product
LCI method principle: Attributional
LCI method approaches: Allocation - mass
Generated by: 任亚楠, renyn15@tsinghua.org.cn
Owner: 天工LCI数据工作小组
Review: Dependent internal review by 天工LCI数据工作小组
Amounts: no units in this file; such an amount is in the reference unit of its flow, which a separate flow dataset defines
copyright: false
licenseType: Free of charge for all users and uses

## General comment
2010年中石化和中石油的4家百万吨企业；乙烯联合装置，副产丙烯

## Geography
2010年中石化和中石油的4家百万吨企业

## Technology and included processes
我国乙烯生产的原料较多且来源复杂，主要包括石脑油、加裂尾油、富乙烯气和液化气等 ，因此本研究对乙烯的生产主要考察管式炉蒸汽裂解法，上游原料为四种石油炼制产品。

## Technical purpose
该数据集描述了使用石脑油途径的乙烯生产过程，其中石脑油和其他石油炼制产品（如加裂尾油、富乙烯气和液化石油气）用作原料。数据适用于工业乙烯生产设施，特别是使用管式炉蒸汽裂解方法的设施。使用此过程生产的乙烯用作各种化学品和塑料制造的原料。副产品丙烯具有自己的一系列工业应用，通常用于生产聚丙烯和丙烯醚。

## Model description
按照文献(IPCC，2006；中国石油化工集团公司，2007) 对冷却水、净化空气等进行折标，并对未知污染物CO2进行估算

## Reference product
- ethene (ethylene): 1000; measured
  乙烯

## Inputs
All rows: measured
- naphtha: 700
  石脑油
- tall oil: 230
  加裂尾油
- LPG - liquefied petroleum gas: 50
  液化气
- ethene (ethylene): 30
  富乙烯气
- Electricity: 137.484
  电
- light fuel oil: 126.13
  燃料油
- natural gas: 53.87
  燃料气

## Outputs
- carbon dioxide (fossil): 560; missing unimportant
  CO2
- carbon monoxide (fossil): 0.03079; measured
  CO
- sulfur dioxide: 1.36854; measured
  SO2
- nitrogen monoxide: 0.30795; measured
  NOx
- methane (fossil): 0.01854; measured
  CH4
- nitrous oxide: 0.00331; measured
  N2O
- Suspended solids, unspecified,Suspended solids, unspecified: 0.31159; measured
  TSP
- Water: 92.72; measured
  废水
- chemical oxygen demand: 0.0053; measured
  COD
- ammonia: 0.00033; measured
  NH3-N
- Oils, unspecified: 0.00033; measured
  油
- Suspended solids, unspecified,Suspended solids, unspecified: 0.00464; measured
  SS

## Deviations from the LCI method approaches
按照产物质量比重分配原则进行分配

## Data selection and combination
乙烯生产的原料投入、产品产出、能源消耗及污染物排放清单来源于2010年中石化和中石油的4家百万吨企业。

## Use advice
在使用该数据集进行生命周期评估（LCA）时，用户应考虑基于产品质量比例分配的方法论。提供的功能单位是1吨乙烯产品；LCA研究应规范化到该单位以保持一致性。输入物如冷却水和净化空气应根据指定文献的标准进行加权。作为未识别污染物的CO2排放量应根据IPCC和中国石油化工集团的指南进行估计。应注意确保数据在上下文中相关性，考虑2010年的技术水平和中石化、中石油百万吨企业的区域特定实践。

## Review details
清单： 内部审查通过几个迭代步骤完成，涉及原始数据验证、原始数据记录、代表性、完整性、与 ISO 14040 和 14044 有关的建模的一致性。

## Data sources
- 赵志仝, 王峰, 赵宁, 李学宽, 魏伟, 孙予罕. 生命周期评价在我国乙烯行业环境评估中的应用. 环境科学学报 34, 3200–3206 (2014).
