# Funnel and caisson-based gate ; In-situ groundwater remediation ; Funnel-and-gate PRB

Dataset: ILCD process, Unit process, single operation
Geography: US
Reference year: 2011
Classification: Unit processes / Other Services / Repair and maintenance
Generated by: Zhang Jianbin, zhangjb@caep.org.cn
Owner: Tiangong LCI Data Working Group
Review: Dependent internal review by Tiangong LCI Data Working Group
Amounts: no units in this file; such an amount is in the reference unit of its flow, which a separate flow dataset defines
copyright: false
licenseType: Free of charge for all users and uses

## General comment
The funnel and caisson-based gate is composed of impermeable funnel, a water gate, and active materials, which is used for large underground water pollution plumes buried in shallow water. The water gate is installed using caisson-based method.

## Geography
PRB is assumed to be installed at a simulated site

## Technical purpose
The funnel and caisson-based gate system described is utilized for in-situ remediation of shallow, large-scale groundwater contamination plumes. This system is specifically designed to intercept and treat contaminated groundwater via a structure consisting of an impermeable funnel and a gate that is fitted with active materials capable of removing contaminants. The gate is installed using a caisson method suitable for control within such environmental restoration projects.

## Reference product
- Funnel and caisson-based gate: 1; estimated

## Inputs
- Impermeable funnel: 36.6; estimated
  A 36.6 m length of funnel and four 2.4 m diameter cylindrical gates is installed
- Caisson-based gate: 4; estimated

## Use advice
When applying the LCA data for the described in-situ groundwater remediation process, practitioners must ensure that all assumptions used in the process match the intended site characteristics. This includes assessing whether the size and nature of the contamination plume, the water table depth, and site-specific hydrogeological conditions align with those presupposed in the data set. All primary raw materials and energy inputs necessary for the installation and maintenance of the funnel-and-gate system must be comprehensively accounted for in the LCA. Careful consideration should be given to the usage lifespan of the system and how it will affect potential environmental benefits, as well as the inclusion or exclusion of end-of-life recycling.

## Review details
Inventory: The internal review was done by several iteration steps concerning raw data validation, raw data documentation, representativity, completeness and consistency of modelling with regard to ISO 14040 and 14044.

## Data sources
- Mark S. H. Mak and Irene M. C. Lo.Environmental Life Cycle Assessment of Permeable Reactive Barriers: Effects of Construction Methods, Reactive Materials and Groundwater Constituents[J].Environmental Science & Technology 2011, 45, 23, 10148-10154
