# Sinter production|Sinter|Sintering

Dataset: ILCD process, Unit process, single operation
Geography: CN
Reference year: 2014
Classification: Materials production / Other mineralic materials
Generated by: Fuxiang, 1162850692@qq.com
Review: Dependent internal review by Tiangong LCI Data Working Group
Amounts: no units in this file; such an amount is in the reference unit of its flow, which a separate flow dataset defines
copyright: false

## Time period
基于 A 钢厂 2014 年的生产数据进行计算和分析对比。

## Reference product
- Sinter: 1211; measured
  烧结矿

## Inputs
All rows: measured
- quicklime: 121.36
  生石灰
- dolomite: 93.2
- Limestone: 72.91
- Coke: 49.35
  焦炭
- Electricity: 158.4
- Iron ore: 1340
  铁矿石
- Electricity: 115.2
  余热发电
- Sinter: 347
  烧结返矿
- Blast furnace gas: 53
  高炉煤气

## Outputs
- Sinter: 347; measured
  烧结返矿
- carbon dioxide: 513400; calculated
- methane: 50; calculated
- nitrous oxide: 2; calculated

## Review details
Inventory: The internal review was done by several iteration steps concerning raw data validation, raw data documentation, representativity, completeness and consistency of modelling with regard to ISO 14040 and 14044.; Documentation: The review of the documentation was performed by Ecobilan and is in compliance with ISO 14040 and 14044. The data set documentation is correct in view of the appropriateness of the information provided. It includes all relevant information in view of data quality and scope of application of the respective LCI result.

## Data sources
- 1. 刘宏强, 付建勋, 刘思雨, 谢欣悦, & 杨笑楹. 钢铁生产过程二氧化碳排放计算方法与实践. 钢铁 51, 74–82 (2016).
