# pre-drilling preparation, drilling and cementing, fracturing, gas testing production testing, etc.

Dataset: ILCD process, Unit process, single operation
Geography: CQ-CN
Reference year: 2012
Classification: Materials production / Other mineralic materials
LCI method principle: Attributional
LCI method approaches: Consequential
Generated by: 王筱琪, vickyo3ww@gmail.com
Review: Dependent internal review by 天工LCI数据工作小组
Amounts: no units in this file; such an amount is in the reference unit of its flow, which a separate flow dataset defines
copyright: false

## Geography
Fuling field

## Time period
Starting in 2012, the exploration and development process of the Fuling field went through three stages: exploration (discovery), development (testing), and production capacity building.

## Reference product
- freshwater: 30182.5; input; uniform; calculated
  平均用水量

## Inputs
- freshwater: 52; uniform; calculated
  单井平均耗水量
- freshwater: 668.7; uniform; calculated
  钻井和固井的平均总用水量
- freshwater: 30348.2; uniform; calculated
  单井压裂平均总用水量

## Deviations from the LCI method approaches
Water is used through the entire development cycle of shale gas wells, including pre-drilling preparation, drilling and cementing, fracturing, gas testing production testing, etc., with domestic water used throughout all processes (Fig. 2). Fresh water is used in drilling, cementing, fracturing, and domestic use; in Fuling, drilling fluids and fracturing flowback fluid are reused after treatment to reduce the consumption of fresh water and control the discharge of industrial waste water.

## Data selection and combination
The Fuling field is China’s first national shale gas demonstration area./The water use data of shale gas wells was collected and developed during field interviews with onsite well managers and engineers, conducted in June 2014, July 2017 and February 2018,

## Review details
清单： 内部审查通过几个迭代步骤完成，涉及原始数据验证、原始数据记录、代表性、完整性、与 ISO 14040 和 14044 有关的建模的一致性。

## Data sources
- Shi, W. et al. Water use for shale gas development in China’s Fuling shale gas field. Journal of Cleaner Production 256, 120680 (2020).
