# 废聚氯乙烯（PVC）回收; 再生聚氯乙烯; 机械回收; 废聚氯乙烯

Dataset: ILCD process, Unit process, black box
Geography: TJ-CN
Reference year: 2016
Valid until: 2016
Classification: Unit processes / End-of-life treatment / Material recycling
Functional unit: 1 ton of waste Polyvinyl chloride
Generated by: 程晓宇, xiaoyucheng@email.ncu.edu.cn
Owner: 天工LCI数据工作小组
Review: Dependent internal review by 天工LCI数据工作小组
Amounts: no units in this file; such an amount is in the reference unit of its flow, which a separate flow dataset defines
copyright: false
licenseType: Free of charge for all users and uses

## General comment
校准后，选择2016年的相应工艺数据来评估废塑料机械回收的环境影响。

## Geography
ZEDA位于天津西南部，是中国最大的可再生资源加工产业园区。

## Time period
文献中只说明是2016年。

## Technical purpose
通过废聚氯乙烯机械回收过程获得的再生聚氯乙烯（PVC），通常用于制造各种塑料产品，这些产品需要满足再生PVC的纯度和性能要求。这些应用包括建筑材料，如管道和窗框，以及消费品，如包装和汽车部件。

## Reference product
- Waste Polyvinyl Chloride: 1000; input; measured

## Inputs
- Water for industrial use: 453; measured
- Electricity: 974.952; measured
- natural gas; 44.1 MJ/kg: 62.5; measured

## Outputs
All rows: measured
- particles (>PM10): 0.62
- non-methane volatile organic compounds: 0.45
- Suspended solids, unspecified,Suspended solids, unspecified: 0.00896
- chemical oxygen demand: 0.1057
- biological oxygen demand: 0.01673
- Ammonia Nitrogen: 0.00651
- Phosphorus: 0.00028
- Oils, unspecified: 0.0001
- waste water - untreated: 372
- General Solid Waste: 96.23
- Hazardous Solid Waste: 3.12
- Recycled Polyvinyl chloride granules: 899.6

## Data selection and combination
2016年，再生塑料产量为327千吨，涵盖了所有主要塑料类别。

## Data treatment and extrapolations
校准

## Use advice
使用2016年校准的废聚氯乙烯机械回收环境影响评估过程数据时，确保正确定义系统边界，以包括上游过程（如废聚氯乙烯的收集和运输）和下游过程（如使用再生材料的制造）。应重视数据集质量，该数据集应代表中国天津ZEDA实际的工艺条件。数据使用者还应考虑与评估中使用的其他生命周期数据的方法论一致性，并包括自2016年以来技术发展或加工效率变化的必要调整。

## Review details
清单： 内部审查通过几个迭代步骤完成，涉及原始数据验证、原始数据记录、代表性、完整性、与 ISO 14040 和 14044 有关的建模的一致性。

## Data sources
- Chen, Y. et al. Life cycle assessment of end-of-life treatments of waste plastics in China. Resources, Conservation and Recycling 146, 348–357 (2019).
