# primary copper smelting|Refined copper|flash smelting|copper concentrate

Dataset: ILCD process, Unit process, single operation
Geography: CN
Reference year: 2018
Classification: Materials production / Other mineralic materials
Functional unit: The production of 1000 kg of refined copper (99.99% cathode copper) was selected as the FU in this paper” (Chen 等, 2019, p. 36)
LCI method principle: Attributional
LCI method approaches: Allocation - market value
Generated by: Peng Wang, 2867919560@qq.com
Review: Dependent internal review by Tiangong LCI Data Working Group
Amounts: no units in this file; such an amount is in the reference unit of its flow, which a separate flow dataset defines
copyright: false

## Geography
Resources, energy consumption and pollution data of primary copper production were collected mainly from the survey of production technology and typical enterprises in this study.

## Technology and included processes
flash smelting and converting were collectively called smelting.

## Reference product
- Refined copper: 1000; measured
  Refined copper 需要补充

## Inputs
- crude oil; 42.3 MJ/kg: 40; software or database
  Crude oil (resource)
- Hard coal, at consumer EU-27: 1140; software or database
  Hard coal (resource)
- natural gas; 44.1 MJ/kg: 53.2; software or database
  Natural gas (resource)
- copper: 197000; measured
  Copper ore
- Copper scrap（Cu 95%）: 0; measured
  Copper scrap需要补充
- Water (fresh water): 29600; measured
  Fresh water
- Butyl xanthate: 7.93; measured
  Butyl xanthate需要补充
- Pine camphor oil: 4.96; measured
  Pine camphor oil需要补充
- Limestone: 210; software or database
- quartz sand: 518; software or database
  Quartz sand
- Soften water: 3360; measured
  Soften water 需要补充flow
- Industrial oxygen: 1010; measured
  Industrial oxygen需要补充flow
- Refractory material: 13.3; measured
  Refractory material需要补充flow
- hydrogen chloride: 0.48; measured
- Sulfuric acid(98%): 6.5; measured
  Sulfuric acid resourse 需要补充
- Gelatin: 0.0448; measured
  Gelatin需要补充
- Thiourea: 0.035; measured
  Thioureas需要补充
- Casein: 0.025; measured
  Casein需要补充

## Outputs
All rows: measured
- carbon dioxide: 3180
- sulfur dioxide: 13.7
  Sulfur dioxide
- Nitrogen oxides: 0.785
  NOx需要补充
- carbon monoxide: 3.17
  Carbon monoxide
- methane (fossil): 8.33
  Methane
- nitrous oxide: 0.0491
  Nitrous oxide
- sulphuric acid: 0.553
- particles (PM2.5 - PM10): 10.5
- mercury: 0.00205
  Mercury
- lead: 0.00205
  Lead
- zinc: 0.00411
- nickel: 0.00615
  Nickel
- arsenic: 0.0103
  Arsenic
- chemical oxygen demand: 0.0164
  Chemical oxygen demand
- Biological oxygen demand: 0.0159
  Biochemical oxygen demand需要补充
- Solid suspension: 1.26
  Solid suspension需要补充
- Ammonia Nitrogen: 0.376
  Ammonia nitrogen需要补充
- municipal solid waste deposition: 106000
  Solid waste

## Deviations from the LCI method approaches
Combined with the characteristics of refined copper production in China, the CML2001 method (2016 revision), was selected for environmental impact accounting in this study.

## Data selection and combination
Resources, energy consumption and pollution data of primary copper production were collected mainly from the survey of production technology and typical enterprises in this study. The upstream date was from GaBi (ts vision) and Ecoinvent database

## Data treatment and extrapolations
This study used Gabi software (ts version) as the calculation software and the model was built for both technologies.

## Review details
Inventory: The internal review was done by several iteration steps concerning raw data validation, raw data documentation, representativity, completeness and consistency of modelling with regard to ISO 14040 and 14044.; Documentation: The review of the documentation was performed by Ecobilan and is in compliance with ISO 14040 and 14044. The data set documentation is correct in view of the appropriateness of the information provided. It includes all relevant information in view of data quality and scope of application of the respective LCI result.

## Data sources
- Chen, J. et al. Environmental benefits of secondary copper from primary copper based on life cycle assessment in China. Resources, Conservation and Recycling 146, 35–44 (2019).
