# 3.6 MW Turbine manufacture

Dataset: ILCD process, Unit process, black box
Geography: SH-CN
Reference year: 2009
Classification: Materials production / Other mineralic materials
Functional unit: The functional unit is 1 kWh on-grid electricity provision.
LCI method principle: Attributional
LCI method approaches: Allocation
Generated by: Yunzhi Zhao, ll10088@163.com
Amounts: no units in this file; such an amount is in the reference unit of its flow, which a separate flow dataset defines
copyright: false

## Geography
The studied wind farm, the Donghai Bridge Offshore Wind Farm (DBOWF), is China's first offshore wind farm within the jurisdiction of Shanghai, as well as the first offshore wind farm outside Europe. The project has two-phases of construction, located on each side of the Donghai bridge (Fig. 1).

## Reference product
- polyvinylchloride resin (E-PVC); measured

## Inputs
- Resin: 216000
  Resin and fiber glass
- iron: 78300
- Steel: 407900
- silicon,silicon: 500
  silica
- copper: 5200

## Deviations from the LCI method approaches
Furthermore, existing studies have mainly adopted process-based LCI (life cycle inventory) models to calculate the life-cycle energy consumption and GHG emissions, whereas the pollutant emissions of SO2,NOx and PM2.5 are not considered.

## Data selection and combination
The technical parameters of wind turbines, foundations and cables are obtained from the design documents of the DBOWF (Table 2). The energy and emissions factors (i.e., the energy consumption and environmental emissions of per unit material and component production) are derived from the Ecoinvent 2.2 dataset (Ecoinvent Centre, 2009), and the coefficients of China's practices were preferentially referred. For key materials and equipment, their sea transportation energy is calculated from the transportation load and shipping energy intensity. The facility installation energy and emissions were estimated based on the construction plan. The wind farm's operation and maintenance data, such as the frequency and working time of maintenance, were obtained from site investigations with engineers and technicians. The quantity of material consumption was estimated based on the project's design drawings, product specifications, and technical reports of equipment.

## Data sources
- Yang, J. et al. The life-cycle energy and environmental emissions of a typical offshore wind farm in China. Journal of Cleaner Production 180, 316–324 (2018).
