# Soil remediation ; In-situ remediation ; Enhanced bioremediation ; Equipment operation ; Injection of biomass culture medium

Dataset: ILCD process, Unit process, single operation
Geography: SH-CN
Classification: Other Services / Repair and maintenance
Generated by: Xiao Meng, xiaomeng@mail
Owner: Tiangong LCI Data Working Group
Review: Dependent internal review by Tiangong LCI Data Working Group
Amounts: no units in this file; such an amount is in the reference unit of its flow, which a separate flow dataset defines
licenseType: Free of charge for all users and uses

## General comment
CHC+ISB is used for site remediation, and during the equipment operation phase, the injection of the biomass culture medium occurs.

## Geography
The aquifer in a certain area in Shanghai, China, is uniformly contaminated with chlorinated volatile organic compounds (CVOCs), with a surface area of 20,000 m2 and a depth of 50 m, with the water table located at a depth of 30 m.

## Technical purpose
This dataset describes the industrial process of in-situ enhanced bioremediation for soil remediation, specifically the operation of equipment used in the injection of a biomass culture medium during the treatment of sites contaminated with chlorinated volatile organic compounds (CVOCs). It is applicable for environmental engineering projects aiming to treat uniformly contaminated aquifers, particularly those with similar conditions to the specified site in Shanghai with a surface area of 20,000 m² and a depth of 50 m.

## Reference product
- Groundwater after biological Medium injection: 600000; measured
  注射生物培养基后的地下水

## Inputs
- Electricity: 1884.71; software or database

## Use advice
Users of this dataset should specifically consider this process for remediation projects where in-situ bioremediation is feasible. The technology is designed for aquifers with depths and contamination characteristics similar to those described for the Shanghai site. Users should ensure that local hydrogeological conditions are adequately matched. Data users must exercise caution when generalizing the results for different environmental conditions or contamination levels and are advised to adjust the treatment parameters based on site-specific assessments, including aquifer characteristics and contaminant concentration profiles.

## Review details
Inventory: The internal review was done by several iteration steps concerning raw data validation, raw data documentation, representativity, completeness and consistency of modelling with regard to ISO 14040 and 14044.

## Data sources
- Ni, Z. et al. Comparative Life-Cycle Assessment of Aquifer Thermal Energy Storage Integrated with in Situ Bioremediation of Chlorinated Volatile Organic Compounds. Environ. Sci. Technol. 54, 3039–3049 (2020).
