# 三元锂电火法回收

Dataset: ILCD process, Unit process, single operation
Geography: CN
Reference year: 2022
Classification: End-of-life treatment / Material recycling
Functional unit: 1 kWh of the Eol NCM battery
Generated by: 陈利鹏, lpchen07@163.com
Owner: 天工LCI数据工作小组
Review: Dependent internal review by 天工LCI数据工作小组
Amounts: no units in this file; such an amount is in the reference unit of its flow, which a separate flow dataset defines
copyright: false
licenseType: Free of charge for all users and uses

## General comment
火法冶金回收是一种更简单的工艺，通过在电池放电和简单拆解后直接将它们熔化，以回收其中的贵重金属材料

## Technical purpose
火法冶金回收工艺用于从退役NCM锂电池中回收贵金属。这个过程多用于专门从事电池回收的设施，通过直接熔化放电和简单拆解后的电池，提供了一种较简单的处理方法。该流程主要用于回收有价值的材料，再用于新电池的制造。

## Reference product
- EoL NCM battery: 0.0157; input; article inperiodical

## Inputs
All rows: article inperiodical
- Electricity: 24.012
- Sodium hydroxide: 2.92
- coke: 1.1
- Limestone: 1
- slagging agent: 1

## Outputs
- hydrogen chloride: 0.0167; article inperiodical
- sulphuric acid: 0.025; article inperiodical
- Dust (unspecified, from stack),Dust (unspecified, from stack): 4.17e-5; article inperiodical
- sulfur dioxide: 2e-5; article inperiodical
- carbon dioxide: 2.03; article inperiodical
- nickel: 1.39; article inperiodical
- cobalt: 1.42; article inperiodical
- carbon: 3.86e-5
  煤烟

## Use advice
使用NCM锂电池火法冶金回收过程的数据时，必须考虑到回收材料的质量和成分。数据使用者应调整模型以反映因处理温度和操作过程可能造成的效率和潜在损失。退役电池应在回收前被视为完全放电，且任何偏差或额外的预处理步骤均应清楚记录并纳入评估。

## Review details
清单： 内部审查通过几个迭代步骤完成，涉及原始数据验证、原始数据记录、代表性、完整性、与 ISO 14040 和 14044 有关的建模的一致性。

## Data sources
- Feng, T., Guo, W., Li, Q., Meng, Z. & Liang, W. Life cycle assessment of lithium nickel cobalt manganese oxide batteries and lithium iron phosphate batteries for electric vehicles in China. Journal of Energy Storage 52, 104767 (2022).
