# 聚氯乙烯（PVC）生产;聚氯乙烯;电石法

Dataset: ILCD process, Unit process, black box
Geography: CN
Reference year: 2020
Classification: Unit processes / Materials production / Plastics
Functional unit: considering 1 kg resin production as the functional unit.
Generated by: 郭慧娟, GHJ@email.ncu.edu.cn
Owner: 天工LCI数据工作小组
Review: Dependent internal review by 天工LCI数据工作小组
Amounts: no units in this file; such an amount is in the reference unit of its flow, which a separate flow dataset defines
copyright: false
licenseType: Free of charge for all users and uses

## General comment
对国内生产PVC的两种商用合成方法(电石和乙烯)进行了评价。

## Geography
Process-based data from China were used, yet if not available, data from Europe were applied instead.

## Time period
Process-based data from China were used, yet if not available, data from Europe were applied instead. The electricity input was developed based on the national grid structure in China (Table S3), which was obtained from the share of the electric power structure in 2020 (National Bureau Statistics of China, 2020).

## Technical purpose
该数据集描述了使用电石法在中国国内市场生产聚氯乙烯(PVC)。通过这种方法生产的PVC通常用于包括建筑材料如管道和配件、电线电缆、地板和屋面板，以及包装材料、汽车零部件和医疗设备在内的广泛产品。

## Model description
life cycle environmental and human health impacts were modeled using SimaPro software (version 8.5) with Ecoinvent 3 and ELCD (European Reference Life Cycle Database) databases.

## Reference product
- polyvinylchloride resin (B-PVC): 1; missing unimportant
  PVC

## Inputs
All rows: missing unimportant
- hydrogen chloride: 2.05
  Hydrochloric acid
- acetylene: 0.44
- Process water: 0.58
  Processed water
- Electricity: 0.62
- process steam: 4.52
  Steam

## Outputs
All rows: missing unimportant
- ethylene: 4.4e-8
- chemical oxygen demand: 0.00147
- mercury: 1e-9
- Waste (unspecified): 10
- Acid Gases: 12.5
  Acid gases
- Dust: 0.00095

## Data treatment and extrapolations
ReCiPe method (Europe H/H) was used as the assessment method for consistency.

## Use advice
为了精确的生命周期评估(PVC)聚氯乙烯，必须考虑基于中国国家电网结构的电力输入的地域特性来应用提供的数据。如果没有中国数据，可以替换为欧洲数据，并注意区域差异。用户应使用ReCiPe方法（欧洲H/H版）以确保对环境和人类健康影响的一致性评价。此外，在使用此数据集时，应定义功能单元为1公斤树脂生产，以与评估基础对齐，并使用SimaPro软件以及Ecoinvent 3和ELCD数据库进行建模。

## Review details
清单： 内部审查通过几个迭代步骤完成，涉及原始数据验证、原始数据记录、代表性、完整性、与 ISO 14040 和 14044 有关的建模的一致性。

## Data sources
- An, J., Wu, F., Wang, D. & You, J. Estimated material metabolism and life cycle greenhouse gas emission of major plastics in China: A commercial sector-scale perspective. Resources, Conservation and Recycling 180, (2022).
