# 新鲜板栗生产

Dataset: ILCD process, Unit process, black box
Geography: PT
Reference year: 2010
Valid until: 2012
Classification: Unit processes / Materials production / Agricultural production means
Functional unit: 1 kg of edible chestnut kernel
Generated by: 朱娴, zzhu0918@163.com
Owner: 天工LCI数据工作小组
Review: Dependent internal review by 天工LCI数据工作小组
Amounts: no units in this file; such an amount is in the reference unit of its flow, which a separate flow dataset defines
copyright: false
licenseType: Free of charge for all users and uses

## General comment
使用小型野生板栗树并将它们嫁接到所需的品种，对嫁接的板栗树进行施肥、修剪和农药处理，最后收获新鲜板栗果实。

## Geography
葡萄牙北部

## Time period
收集了不同生产者（2010-2012年）的种植数据

## Technical purpose
本工艺描述的新鲜板栗生产过程包括采用小型野生板栗树，通过嫁接技术与所需的板栗品种结合。完成嫁接的板栗树接下来会进行施肥、修剪和喷洒农药的管理。此生产过程最终以收获新鲜板栗果实为结束，它们主要用于直接食用或加工成各种食品产品。该数据集代表了葡萄牙北部地区典型的生产环境，特指2010至2012年间的农业实践，用于生产1公斤可食用板栗仁。

## Reference product
- Chestnut: 881.3; measured

## Inputs
All rows: measured
- Nitrogenous fertilizer: 9
- Phosphate fertilizer: 38.57
- Potassium fertilizer: 18
- calcium carbonate: 348.57
- Pesticide: 12.5
- Diesel: 0.10109
- gasoline (regular): 0.00163

## Outputs
All rows: measured
- nitrous oxide: 0.19
- ammonia: 1.08
- carbon dioxide (biogenic): 153.37
  原文未区分bio和fossil，根据专家判断此处为biogenic。
- nitrate: 11.96
- phosphate: 0.8
- Phosphorus: 0.05

## Use advice
使用该数据集的用户需要注意其范围较窄 — 反映了特定于葡萄牙北部地区，在2010-2012年期间的板栗生产技术。由于农业实践可能随时间变化，将此数据外推至其他时段或地理区域时应谨慎处理。此外，用户在将此数据应用于新鲜板栗消费背景之外的生命周期评估时，应考虑需要进行的调整，以解释任何相关的农业实践差异。在将该数据集集成到更广泛的生命周期分析模型中时，应特别注意方法论的一致性。

## Review details
清单： 内部审查通过几个迭代步骤完成，涉及原始数据验证、原始数据记录、代表性、完整性、与 ISO 14040 和 14044 有关的建模的一致性。
