# 氧化铝生产 ; 冶金用氧化铝 ; 烧结法 ; 铝土矿

Dataset: ILCD process, Unit process, single operation
Geography: CN
Reference year: 2011
Classification: Materials production / Inorganic chemicals
Generated by: 谢金良, jinliang.research@gmail.com
Owner: 天工LCI数据工作小组
Review: Dependent internal review by 天工LCI数据工作小组
Amounts: no units in this file; such an amount is in the reference unit of its flow, which a separate flow dataset defines
copyright: false
licenseType: Free of charge for all users and uses

## General comment
我国氧化铝生产中拜耳法、烧结法、混联法三种工艺并行。因为我国铝土矿主要为品味较低的一水硬铝，单位资源与能源消耗较高。随着生产技术的进步，拜耳法生产的氧化铝在我国铝产量中的比例已经由2000年的11.4%提升到2010年的75.8%，而烧结法则由2000年的23.65%减至5.9%。烧结法氧化铝生产过程中主要的能耗介质中煤占60%，蒸汽约20%，电约12%，其中煤主要消耗在烧成工序，蒸汽主要消耗在脱硅与蒸发工序，油主要消耗在焙烧工序。

## Time period
学位论文完成日期

## Technical purpose
采用烧结法生产的氧化铝主要用于冶金工业中通过电解工艺生产铝。它来源于品味较低的铝土矿，因此资源和能源消耗较高。尽管在中国氧化铝生产中拜耳法更为普遍，烧结法仍占有一小部分市场份额，适应特定类型的铝土矿和具体的生产要求。

## Reference product
- aluminium oxide, metallurgical: 1000; missing unimportant

## Inputs
All rows: missing unimportant
- electricity, high voltage, aluminium industry: 1274.4
- bauxite: 1650
- petroleum coke: 35.79
- steam, in chemical industry: 3417.8
- heavy fuel oil: 77

## Outputs
All rows: missing unimportant
- carbon dioxide (fossil): 4411
- carbon monoxide: 12.315
- sulfur dioxide: 83.969
- methane: 9.055
- Nitrogen oxides: 35.658
- VOC, volatile organic compounds, unspecified origin: 3.03
- dinitrogen: 0.357
- Dust: 16.798
  粉尘
- chemical oxygen demand: 0.004
- Solid Waste: 1901
  固体废物

## Use advice
在将此数据集用于铝生产的生命周期评估（LCA）时，用户应确保LCA边界涵盖了从铝土矿开采到原铝生产的过程，包括铝土矿的提取、氧化铝的生产（具体指烧结法）、阳极的生产和铝电解过程。建议从评价系统中排除次要辅助材料如石灰石、沥青的开采、生产和运输过程。应特别关注在制造过程中资源消耗、能源使用和废物排放相比于运输、使用和回收阶段对环境的重大影响。

## Review details
清单： 内部审查通过几个迭代步骤完成，涉及原始数据验证、原始数据记录、代表性、完整性、与 ISO 14040 和 14044 有关的建模的一致性。

## Data sources
- 李贵奇. 基于生命周期思想的环境评估模型及其在铝工业中的应用. (中南大学, 2011).
