# 铁生产 ; 整个风电场

Dataset: ILCD process, Unit process, single operation
Geography: SH-CN
Reference year: 2009
Classification: Materials production / Metals and semimetals
Functional unit: The functional unit is 1 kWh on-grid electricity provision.
LCI method principle: Attributional
LCI method approaches: Allocation
Generated by: 赵云志, ll10088@163.com
Owner: 天工LCI数据工作小组
Review: Dependent internal review by 天工LCI数据工作小组
Amounts: no units in this file; such an amount is in the reference unit of its flow, which a separate flow dataset defines
copyright: false
licenseType: Free of charge for all users and uses

## General comment
该工业数据集描述了东海大桥海上风电场（DBOWF）的能源和环境影响，其服务于电网电力供应。作为中国及欧洲以外地区的首个此类项目，DBOWF是海上风力发电领域的先驱，为包括材料制造、海上运输、安装、运行和维护、拆除和回收在内的风力发电基础设施生命周期提供了洞见。这些数据适用于能源基础设施、可再生能源分析和海上风电场环境影响评估的相关行业。

## Geography
所研究的风电场- -东海大桥海上风电场( DBOWF )是中国在上海管辖范围内的第一个海上风电场，也是欧洲以外的第一个海上风电场。工程分两期施工，分别位于东海大桥两侧(图1 )。

## Reference product
- iron: 2.23e6; article inperiodical

## Inputs
- Energy, geothermal, converted: 5.58e7; software or database

## Outputs
- carbon dioxide: 3.29e6; software or database
  GHG
- particles (PM2.5): 6590; software or database
- sulfur dioxide: 7410; software or database
- nitrous oxide: 7390; software or database

## Deviations from the LCI method approaches
本研究采用PLCA建模方法计算了中国某典型海上风电场的能源和环境排放。从摇篮到坟墓的过程包括材料和设备制造、运输和安装、操作和维护、拆解和回收4个阶段(图2 )。

## Data selection and combination
风机、基础和电缆的技术参数从DBOWF的设计文件中获得(表2)。能源和排放因子(即单位材料和构件生产的能源消耗和环境排放)来源于Ecoinvent 2.2数据集(生态发明中心, 2009)，优先参考中国实践的系数。对于关键材料和设备，其海上运输能量由运输负荷和海运能量强度计算得到。根据施工方案，对设施安装能耗和排放进行了估算。风电场的运行和维护数据，如维护的频率和工作时间，是通过与工程技术人员的现场调查获得的。与模型参数和输入数据相关的不确定性在本文的敏感性分析部分进行了说明。

## Use advice
在使用此数据进行海上风电场生命周期评估（LCA）时，用户应遵循PLCA建模方法指定的方法论框架。评估应涵盖材料和设备制造、运输、安装、操作、维护、拆除和回收所需的阶段。应注意考虑中国的本地实践和特定的能源消耗及排放数据，因为这些可能与其他地区有显著不同。该数据集中提供的关于不确定性的敏感性分析应指导数据解读，并在必要时进行调整。对于功能单元，基础应是1千瓦时的电网电力供应。

## Review details
清单： 内部审查通过几个迭代步骤完成，涉及原始数据验证、原始数据记录、代表性、完整性、与 ISO 14040 和 14044 有关的建模的一致性。

## Data sources
- Yang, J. et al. The life-cycle energy and environmental emissions of a typical offshore wind farm in China. Journal of Cleaner Production 180, 316–324 (2018).
