# 烧结矿生产;烧结矿;烧结（Z08）

Dataset: ILCD process, Unit process, single operation
Geography: CN
Reference year: 1998
Classification: Materials production / Other mineralic materials
Generated by: 付翔, 1162850692@qq.com
Owner: 天工LCI数据工作小组
Review: Dependent internal review by 天工LCI数据工作小组
Amounts: no units in this file; such an amount is in the reference unit of its flow, which a separate flow dataset defines
copyright: false
licenseType: Free of charge for all users and uses

## General comment
来自表 4-16 Z08 钢厂生产吨材环境负荷编目表

## Time period
论文提到钢铁企业环境总体数据为1998年的吨钢环境基础数据。

## Technical purpose
烧结矿生产过程主要用于铁和钢铁产业。烧结矿是一种多孔的熔块状材料，通常在烧结厂通过将铁矿粉末与石灰、焦炭细粒和助熔剂等材料熔合在一起产生。这种材料是高炉作业的输入物料，有助于有效地熔炼铁以制造钢铁。

## Reference product
- Sinter: 1869; measured
  烧结矿

## Inputs
- Energy, geothermal, converted: 4502.59; measured
- water: 611; measured
- Refined Iron Ore: 1990; measured
  精铁矿

## Outputs
All rows: measured
- Dust (unspecified, from stack): 0.677
  烟尘
- Dust (unspecified, from stack): 3.8
- sulfur dioxide: 0.46
- Suspended solids, unspecified: 0.068592
- chemical oxygen demand: 0.051958
- Dust (unspecified, from stack): 131.036
  集尘
- Spoil (deposited, hibernating in ground, non elementary flow): 95.319

## Use advice
数据用户应注意，该数据基于1998年钢铁行业的环境负荷库存记录，可能不代表当前的工艺或环境影响概况。它适用于历史的钢铁生产环境绩效分析，但可能需要更新以用于当代评估。在与其他生命周期数据整合时，应确保方法论的一致性，特别是关于时间因素和技术进步。

## Review details
清单： 内部审查通过几个迭代步骤完成，涉及原始数据验证、原始数据记录、代表性、完整性、与 ISO 14040 和 14044 有关的建模的一致性。

## Data sources
- 周和敏. 钢铁材料生产过程环境协调性评价研究. (北京工业大学, 2001).
