# Brick production | concrete pavement brick | Fabric blending process

Dataset: ILCD process, Unit process, single operation
Geography: JNA-SD-CN
Reference year: 2018
Classification: Materials production / Other mineralic materials
Functional unit: The functional unit is the area of 1 m2 brick products.
Generated by: Wang xiangjin, r99rt4@163.com
Review: Dependent internal review by Tiangong LCI Data Working Group
Amounts: no units in this file; such an amount is in the reference unit of its flow, which a separate flow dataset defines

## Reference product
- brick dust: 14; measured
  Fabric blending 材料

## Inputs
All rows: measured
- portland cement: 6.17
- sand: 7.41
- Water (fresh water): 0.617
- Iron oxide pigment: 0.124
- electricity mix: 0.29196

## Outputs
- particles (PM10): 9e-5; measured

## Deviations from the LCI method approaches
ReCiPe midpoint (H) model is applied in this study.

## Data selection and combination
本研究从济南顺德水泥制品有限公司收集了混凝土路面砖和透水砖的生产能耗以及各种原材料、能源投入和废气排放的相关数据。济南顺德水泥制品有限公司 山东省。

## Sampling procedure
Most data of raw materials, energy input and waste discharge were collected from the site investigation of manufacturer. Water reducer is also called water reducing agent, whose chemical constituents is the sodium salt of the sulfonate formaldehyde condensation

## Review details
Inventory: The internal review was done by several iteration steps concerning raw data validation, raw data documentation, representativity, completeness and consistency of modelling with regard to ISO 14040 and 14044.; Documentation: The review of the documentation was performed by Ecobilan and is in compliance with ISO 14040 and 14044. The data set documentation is correct in view of the appropriateness of the information provided. It includes all relevant information in view of data quality and scope of application of the respective LCI result.

## Data sources
- Yuan, X. et al. Environmental and economic impacts assessment of concrete pavement brick and permeable brick production process - A case study in China. Journal of Cleaner Production 171, 198–208 (2018).
