# 硅铝合金生产 ; 硅铝合金 ; 铝土矿

Dataset: ILCD process, Unit process, single operation
Geography: CN
Reference year: 2012
Classification: Materials production / Metals and semimetals
Generated by: 傅晨玲, fu-chenling@tsinghua.edu.cn
Owner: 天工LCI数据工作小组
Review: Dependent internal review by 天工LCI数据工作小组
Amounts: no units in this file; such an amount is in the reference unit of its flow, which a separate flow dataset defines
copyright: false
licenseType: Free of charge for all users and uses

## General comment
硅铝合金主要用于生产汽车零件、航空航天组件和建筑材料，因其具有轻巧且高强度的特性。该合金通过冶炼铝土矿并掺入硅来制造。

## Time period
文献发表于2012年3月

## Reference product
- Silicon-Aluminum Alloy (Si, 12%): 1000; missing unimportant
  silicon-aluminum alloy (Si, 12%)

## Inputs
All rows: missing unimportant
- electricity, high voltage, aluminium industry: 54360
  Electricity
- steam, in chemical industry: 0.37
  Steam
- fluoride salt: 24.3
  Fluoride salt
- diesel: 1.45
  Diesel
- hard coal: 5.72
  Coal
- Copper, in ground: 8
  Copper
- inorganic chemicals: 4.1
  Inorganic chemicals
- natural gas, high pressure: 335.57
  Natural gas
- Nitrogen: 2.5
  Nitrogen gas
- coal gas: 21.75
  Coal gas
- bauxite: 4180
  Bauxite
- lime: 250
  Lime
- Sodium Hydroxide (100%): 160
  NaOH (100%)
- fresh water: 10480
  Fresh water
- petroleum coke: 590
  Petroleum coke
- bitumen: 90
  Bitumen
- anthracite: 120
  Anthracite
- silicon dioxide: 300
  Silica
- charcoal: 120
  Charcoal

## Outputs
All rows: missing unimportant
- Dust: 2.5
- sulfur dioxide: 5.4
  SO2
- Methane, tetrafluoro-, R-14: 0.26
  Tetrafluoro methane
- hexafluoroethane: 0.03
  Hexa-fluoro ethane
- hydrogen fluoride: 0.52
  HF
- Residue: 13.22
  Overhaul waste residues
- redmud from bauxite digestion: 1130
  Red mud
- chemical oxygen demand: 0.08105
  COD
- ammonia nitrogen: 0.00472
  NH3eN
- petroleum pollutions: 0.00659
  Petroleum pollutions
- Phenol: 0.00038
- Polycyclic Aromatic Hydrocarbon (PAH): 0.00067
  B(a)P

## Use advice
使用这些数据时，请特别注意2012年3月发表的文献时的适用方法。核实自文献发表以来是否有技术进步或行业标准变化，这些可能影响数据的相关性。在将此数据应用到当前情况时，考虑地理位置和技术背景。该数据排除了回收的考虑因素；因此，如果评估的生命周期中包含回收部分，则应集成反映回收过程的额外数据。

## Review details
清单： 内部审查通过几个迭代步骤完成，涉及原始数据验证、原始数据记录、代表性、完整性、与 ISO 14040 和 14044 有关的建模的一致性。

## Data sources
- Hong, J., Hong, J., Zhou, J. & Xu, X. Environmental and economic life cycle assessment of aluminum-silicon alloys production: A case study in China. J. Clean. Prod. 24, 11–19 (2012).
