# 抽提井;地下水抽出处理

Dataset: ILCD process, Unit process, single operation
Geography: UM
Reference year: 2009
Classification: Unit processes / Other Services / Repair and maintenance
Generated by: 杨欣桐, yangxt@caep.org.cn
Owner: 天工LCI数据工作小组
Review: Dependent internal review by 天工LCI数据工作小组
Amounts: no units in this file; such an amount is in the reference unit of its flow, which a separate flow dataset defines
copyright: false
licenseType: Free of charge for all users and uses

## General comment
PTS通过抽取和使用地上处理设施清除受污染的地下水。PTS处理导致的污染物浓度的降低在初始很快，但通常会导致长期缓慢、稳定的降低

## Geography
该案例研究使用了巴特尔为位于美国多佛空军基地

## Technology and included processes
抽出处理由五个单元系统组成：抽提井、气提单元（ASU）、催化氧化单元（COU）、颗粒活性炭单元（GAC）和处理设施。提取井使用8英寸螺旋钻（80 kW at 5 m/hour）建造，由PVC井管、滤料、灌浆和0.75 kW (1 hp)泵组成。

## Technical purpose
所描述的工业过程涉及污染地下水的抽取和处理，用于环境修复目的。它特别用于地下水污染对环境和人类健康构成重大威胁的场所，例如军事基地、工业场地以及有历史化学品泄漏或渗漏的地区。该过程设计用于通过包括抽取井、空气提升单元、催化氧化单元、颗粒活性炭单元和处理设施在内的一系列技术先进单元来处理污染地点的清理。

## Reference product
- Extraction wel: 1; measured

## Inputs
All rows: measured
- polyvinylchloride resin (S-PVC): 40
  Rxtraction Well pVC Pipe
- cement, unspecified: 2000
  Extraction Well Cerment
- Gravel Sand: 330
  Extraction Well Gravel
- Steel: 50
  Extraction Well Steel (Pump)
- Energy, unspecified: 2300
  Extraction Well Construction Energy

## Use advice
在使用此数据集进行生命周期评估时，用户应考虑地下水修复过程的具体情况，包括污染物的组成和浓度、地区的水文地质以及所涉及治理技术的性能特征。必须考虑修复系统建设和运营的环境影响。应寻找关于类似过程或平均行业实践的额外数据，以检查数据集的代表性和有效性。在存在数据空白时，用户应采用保守的假设，或参考最相关的文献和实践。未在该数据集中计算的排放应基于最佳可用技术进行估算，并且在评估中应明确记录和证明这种排放的遗漏。

## Review details
清单： 内部审查通过几个迭代步骤完成，涉及原始数据验证、原始数据记录、代表性、完整性、与 ISO 14040 和 14044 有关的建模的一致性。

## Data sources
- Life-Cycle Case Study Comparison of Permeable Reactive Barrier versus Pump-and-Treat Remediation
