# 铁塔的制造 ; 1.5 MW 风轮机铁塔

Dataset: ILCD process, Unit process, single operation
Geography: NMG-CN
Reference year: 2017
Classification: Unit processes / Systems / Construction
Functional unit: The functional unit is 1.5 MW wind turbine
LCI method principle: Attributional
LCI method approaches: Allocation
Generated by: 赵云志, ll10088@163.com
Owner: 天工LCI数据工作小组
Review: Dependent internal review by 天工LCI数据工作小组
Amounts: no units in this file; such an amount is in the reference unit of its flow, which a separate flow dataset defines
copyright: false
licenseType: Free of charge for all users and uses

## General comment
该工业过程的技术应用是生产1.5兆瓦风轮机铁塔，专为风电场环境设计。通过该过程制造的铁塔用于支撑1.5兆瓦风轮机单元，有助于可再生能源的生成。该工业过程适用于内蒙古等已知安装有大量风电设施的地区。

## Geography
风电功率参数的数据来自Wang ( 2012 )。以装有33台国产1.5兆瓦( MW )风电机组的风电场为案例，分析其环境影响及其替代效应。该风电场位于我国风电装机最多的省份- -内蒙古东北部。

## Reference product
- Wind foundation tower: 1; estimated
  Tower of wind turbine

## Inputs
- iron: 170000; calculated
  Steel and iron

## Deviations from the LCI method approaches
风电的生命周期清单如下所示。生产制造阶段包括风电机组、变电站、电缆的生产，这些设备消耗大量能源，排放污染物( Xue et al . , 2015)。

## Use advice
在使用这个风轮机铁塔制造过程的生命周期评估(LCA)数据集时，用户应确保考虑Xue等人(2015年)详细说明的特定能耗和污染物排放情况。评估中必须包括与风轮机、变电站和电缆生产相关的环境影响。用户还应注意原始数据源（Wang 2012年）的风电参数，并且意识到数据的地理特殊性（中国内蒙古），这可能会影响结果向其他地区的可移植性。

## Review details
清单： 内部审查通过几个迭代步骤完成，涉及原始数据验证、原始数据记录、代表性、完整性、与 ISO 14040 和 14044 有关的建模的一致性。

## Data sources
- Li, H., Jiang, H.-D., Dong, K.-Y., Wei, Y.-M. & Liao, H. A comparative analysis of the life cycle environmental emissions from wind and coal power: Evidence from China. Journal of Cleaner Production 248, 119192 (2020).
