# 铝土矿开采 ; 铝土矿 ; 摇篮 ; 铝合金轮毂制造工艺

Dataset: ILCD process, Unit process, single operation
Geography: CN
Reference year: 2018
Classification: Unit processes / Materials production / Non-energetic raw materials
Generated by: 傅晨玲, fu-chenling@tsinghua.edu.cn
Owner: 天工LCI数据工作小组
Review: Dependent internal review by 天工LCI数据工作小组
Amounts: no units in this file; such an amount is in the reference unit of its flow, which a separate flow dataset defines
copyright: false
licenseType: Free of charge for all users and uses

## General comment
铝矿开采 ; 铝合金枢纽制造工艺

## Time period
文献发表日期

## Technical purpose
此数据集描述了铝土矿的开采及初步加工，这是铝合金车轮制造过程中的主要原材料。从铝土矿开采中获得的铝是生产车辆铝合金轮毂的重要材料。

## Reference product
- bauxite: 296.5; missing unimportant

## Inputs
- electricity, high voltage, aluminium industry: 17.388; missing unimportant
- heavy fuel oil, burned in refinery furnace: 0.41; missing unimportant

## Outputs
All rows: missing unimportant
- carbon dioxide (fossil),carbon dioxide (fossil): 1.27
- carbon monoxide (fossil),carbon monoxide (fossil): 0.0005
- sulfur dioxide: 0.002
- Nitrogen oxides: 0.001
- methane (fossil): 0.002
- particles, unspecified: 23.48
  Particle

## Use advice
使用此数据集时，必须考虑铝土矿开采实践和环境影响的地区差异性。用户应确保数据与评估区域的特定技术和采矿过程的效率相对应。此外，在将此数据纳入生命周期评估时，还应考虑铝合金的生命周期末期回收问题，以及材料从矿场到制造设施的任何运输过程。

## Review details
清单： 内部审查通过几个迭代步骤完成，涉及原始数据验证、原始数据记录、代表性、完整性、与 ISO 14040 和 14044 有关的建模的一致性。

## Data sources
- Yi Qiu-ping & Tang Chang-ping. Environmental impact assessment of magnesium alloy automobile hub based on life cycle assessment. JOURNAL OF CENTRAL SOUTH UNIVERSITY 25, 1870–1878 (2018).
