# 生物表面活性剂;土壤地下水修复;微生物修复;生物表面活性剂生产

Dataset: ILCD process, Unit process, single operation
Geography: IT
Reference year: 2023
Classification: Unit processes / Other Services / Repair and maintenance
Functional unit: The functional unit is set to produce 10 mg of biosurfactant.
Generated by: 杨欣桐, yangxt@caep.org.cn
Owner: 天工LCI数据工作小组
Review: Dependent internal review by 天工LCI数据工作小组
Amounts: no units in this file; such an amount is in the reference unit of its flow, which a separate flow dataset defines
copyright: false
licenseType: Free of charge for all users and uses

## General comment
生物表面活性剂的生产也包括在这两种处理中，因为它是促进石油碳氢化合物降解的重要投入，而这些表面活性剂的生产对环境性能有相当大的影响。

## Geography
本研究基于室内试验，该处填写的为作者籍贯。

## Technology and included processes
生物表面活性剂可以作为改良剂应用于MET，通过提高污染物对微生物的生物利用度和降低表面张力、矿化和溶解，增强污染土壤石油的碳氢化合物的发电和降解。

## Technical purpose
所生产的生物表面活性剂用于土壤和地下水修复，特别是在石油碳氢化合物降解的生物修复过程中使用。在微生物电解池（MET）中作为改进剂使用，通过提高微生物的生物可用性和降低表面张力来增强被污染土壤中碳氢化合物的降解。

## Reference product
- Biosurfactant: 1e-5

## Inputs
All rows: normal
- Deionized Water: 0.001
- Crude Oil: 0.045
- Magnesium Sulfate Heptahydrate: 9.77e-5
- sodium chloride: 0.0001
- Ammonium sulfate,Ammonium sulfate: 2.12e-5
- Iron (II) chloride: 2e-5
- ethyl acetate: 0.113
- Methanol: 0.261
- Benzoic acid: 0.000847
- sodium hydroxide: 0.000555
- Potassium Dihydrogen Phosphate: 0.000391
- Potassium hydroxide: 0.000161
- Glucose: 0.0005
- Ethanol: 0.000789
- Electricity: 271.08

## Use advice
在使用这些数据集时，请理解它们基于实验室规模的试验，不包括修复系统的维护或接种剂的培养，这可能会影响到更大规模应用的普遍性。当将此数据应用于其他研究或工业应用时，如果维护和接种是影响因素，必须考虑对化学品、材料和电力使用的调整。

## Review details
清单： 内部审查通过几个迭代步骤完成，涉及原始数据验证、原始数据记录、代表性、完整性、与 ISO 14040 和 14044 有关的建模的一致性。

## Data sources
- Gebregiorgis T A ,Francesca F ,Silvia S , et al. Life cycle assessment of bioslurry and bioelectrochemical processes for sustainable remediation of soil polluted with petroleum hydrocarbons: An experimental study [J]. Sustainable Production and Consumption, 2023, 36 416-424.
