# 再生铝合金白车身生产和使用 ; 再生铝合金白车身 ; 新铝废料

Dataset: ILCD process, Unit process, single operation
Geography: CN
Reference year: 2011
Classification: Unit processes / Materials production / Metals and semimetals
Generated by: 常慧敏, huiminchang@tsinghua.edu.cn
Owner: 天工LCI数据工作小组
Review: Dependent internal review by 天工LCI数据工作小组
Amounts: no units in this file; such an amount is in the reference unit of its flow, which a separate flow dataset defines
copyright: false
licenseType: Free of charge for all users and uses

## General comment
再生铝合金白车身指的是使用回收铝合金材料制造的汽车主要结构框架。该组件通常用于汽车行业中车辆底盘的构造。铝合金采用新铝废料源头，确保了汽车制造中的可持续发展方法，同时减少了对原始铝的需求。这一工业过程在创造轻质、高效及环境友好型车辆中发挥着关键应用。

## Time period
论文发表年

## Reference product
- primary aluminum alloy body-in-white: 375.3; measured
  再生铝合金白车身

## Inputs
All rows: measured
- aluminium scrap, new: 1316
  铝合金废料
- sodium chloride, powder: 25
  (1)NaCl
- potassium chloride, industrial grade: 25
  (2)KCl
- heavy fuel oil: 136
  (1)重油
- electricity, high voltage, aluminium industry: 115
  (2)电力
- petrol, unleaded: 16775.7
  (3)汽油

## Outputs
All rows: measured
- carbon dioxide (fossil),carbon dioxide (fossil): 54729.1
  (1)CO2
- carbon monoxide (fossil),carbon monoxide (fossil): 3910.51
  (2)CO
- sulfur dioxide: 13.034
  (3)SO2
- Nitrogen oxides: 491.49
  (4)NOx
- hydrocarbons (unspecified): 770.59
  CxHy

## Use advice
使用此LCA数据的用户应确保包括再生铝合金白车身生产的所有阶段，从新铝废料的采购到生产过程，以及最终的生命周期回收。在应用这些数据时，至关重要的是要考虑使用再生材料相对于原始材料的能源和环境益处。此外，用户还应考虑技术适用性的潜在局限性，例如使用的具体回收过程和回收材料的质量，这些因素可能会影响整体的环境影响评估。应特别注意论文发表年份，以确保使用最新的数据和方法。

## Review details
清单： 内部审查通过几个迭代步骤完成，涉及原始数据验证、原始数据记录、代表性、完整性、与 ISO 14040 和 14044 有关的建模的一致性。

## Data sources
- 刘海东. 乘用车轻量化绿色效应评价理论与方法研究. (吉林大学, 2011).
