# 土壤修复;异位修复;水泥窑协同处置;准备阶段;生料制备

Dataset: ILCD process, Unit process, single operation
Geography: CN
Classification: Other Services / Repair and maintenance
Generated by: Cao Jiameng, 2979480760@qq.com
Owner: Tiangong LCI Data Working Group
Review: Dependent internal review by Tiangong LCI Data Working Group
Amounts: no units in this file; such an amount is in the reference unit of its flow, which a separate flow dataset defines
licenseType: Free of charge for all users and uses

## General comment
The described industrial process is utilized for soil remediation through off-site cement kiln co-processing during the preparation stage at a cement factory. The facility has a modern dry process production line with a capacity of 4000t/d, producing 1.9 million tons of cement and 1.5 million tons of clinker annually. It operates a proprietary quarry with an area of 0.448km2 and an annual limestone production capacity of 2 million tons. The production process employs advanced RSP five-stage precalciner technology. Hazardous wastes are transported by trucks specially designed for hazardous materials on a dedicated freight route. The transportation distance from the quarry to the plant is approximately 1.5km, while the distance for waste transportation is about 50km. The conventional cement production process includes mining and transportation of raw materials, raw meal preparation, coal powder preparation, clinker calcination, and cement grinding. By incorporating waste disposal into the process, waste materials (such as contaminated soil, digested sewage sludge, and waste drilling mud) can be used as alternative raw materials and fuels, conserving limestone and coal. During the cement kiln co-processing preparation stage, the raw meal preparation mainly involves the crushing, homogenization, drying, and grinding of raw and auxiliary materials such as limestone, shale, and industrial waste (contaminated soil, digested sewage sludge, and waste catalysts). This is considered a unit process (single operation).

## Reference product
- carbon dioxide: 51.1

## Inputs
All rows: article inperiodical
- calcium carbonate: 1073.81
- shale: 1.23
- diatomite: 17.75
- iron powder: 27.25
- Spent catalyst: 2.11
- contaminated soil: 5.26
- Digested Sludge: 15.79
- Electricity: 63.648

## Use advice
LCA data users should note that the inclusion of waste material co-processing in cement production is specific to this dataset and reflects an alternative resource approach. When employing this data set, it is crucial to acknowledge the scope boundaries and the technological applicability of the described process. This includes understanding the use of hazardous waste as alternative raw materials and fuels and its implications for material and energy balances. Transport distances for raw materials and wastes should be considered when modeling transportation impacts. The five-stage precalciner technology should be factored in as a specific technology that may not be representative of all cement production facilities. Proper allocation methods must be applied when attributing environmental impacts to the main product (cement) and co-products or avoided productions due to waste co-processing.

## Review details
Inventory: The internal review was done by several iteration steps concerning raw data validation, raw data documentation, representativity, completeness and consistency of modelling with regard to ISO 14040 and 14044.
