# 水泥生产|水泥, 普通硅酸盐水泥|新型干法, 2500 t/d|高炉矿渣 10％

Dataset: ILCD process, LCI结果
Geography: CN
Classification: Materials production / Other mineralic materials
LCI method principle: Other
Generated by: 杨思琪
Amounts: no units in this file; such an amount is in the reference unit of its flow, which a separate flow dataset defines
copyright: false

## General comment
基于矿渣的水泥生产。

## Model description
功能单元为42.5MPa强度的1千克水泥。系统边界包括采矿、水泥生产、发电、煤炭生产和运输。

## Reference product
- cement, ordinary portland cement: 1000
  基于炉渣的水泥

## Inputs
All rows: measured
- blast furnace slag: 102
  高炉矿渣。此外，基于矿渣的水泥中矿渣的含量约为10％。该矿渣可以替代水泥产量中的粘土，并且由于其磨损性差而在研磨过程中影响能量消耗。
- sandstone: 70.2
  砂岩
- calcium carbonate: 1080
  石灰石
- gypsum: 152
  石膏
- hard coal, run-of-mine: 137
  原煤
- crude oil; 42.3 MJ/kg: 0.0325
  原油
- electricity, medium voltage: 346.32
  电

## Outputs
- carbon dioxide: 744; measured
  二氧化碳
- methane: 0.00184; measured
  CH4
- dinitrogen: 0.000429; measured
  N2O

## Data selection and combination
水泥生产的数据是从中国生产规模和技术水平相似的典型水泥厂（新型干法生产工艺，生产规模为2500吨/天）获取的。

## Data sources
- Yao Li, Yu Liu, Fei Fei Shi, Zhi Hong Wang, & Xian Zheng Gong. (2015). Life Cycle Analysis on Carbon Emission Reduction and Energy Saving by Using Slag as Alternative Materials in Cement Production. Materials Science Forum 814, 411–417.
