# Reverse osmosis module production | spiral-wound , CN

Dataset: ILCD process, Unit process, single operation
Geography: CN
Reference year: 2022
Classification: Materials production / Other mineralic materials
Functional unit: 1 item of reverse osmosis module
Generated by: Jiaqi Lu, wilsherelu@foxmail.com
Review: Dependent internal review by Tiangong LCI Data Working Group
Amounts: no units in this file; such an amount is in the reference unit of its flow, which a separate flow dataset defines

## Reference product
- Reverse Osmosis Component: 1; measured
  1 Reverse osmosis module

## Inputs
All rows: measured
- 1,1-Difluoroethane, HFC-152a: 0.014
  1,1-二氟乙烷，HFC-152a
- polyvinylchloride resin (E-PVC): 0.052
  PVC
- Polyvinylidene fluoride: 0.088
  聚偏二氟乙烯（PVDF）膜
- polypropylene fibres (PP): 0.129
  PP膜
- Adhesive Tape: 1.643
  胶带（缠绕外壳）
- plastic pipes: 0.016
  挤压塑料管
- Plastic (unspecified): 0.012
  注塑塑料
- isopropanol: 0.013
  异丙醇
- Polyurethane (PU) Filler: 0.032
  PU填充剂
- Water (fresh water): 0.001
  自来水
- electricity mix: 3.7116
  过程电耗

## Review details
Inventory: The internal review was done by several iteration steps concerning raw data validation, raw data documentation, representativity, completeness and consistency of modelling with regard to ISO 14040 and 14044.; Documentation: The review of the documentation was performed by Ecobilan and is in compliance with ISO 14040 and 14044. The data set documentation is correct in view of the appropriateness of the information provided. It includes all relevant information in view of data quality and scope of application of the respective LCI result.
