# 铜渣回收;耐火砖;浮选后生产耐火砖;铜渣

Dataset: ILCD process, Unit process, single operation
Geography: CN
Reference year: 2010
Classification: Unit processes / Materials production / Other mineralic materials
Functional unit: The functional unit was defined as the recycling of 1 ton of copper slag from copper smelting process.
LCI method principle: Attributional
LCI method approaches: Substitution
Generated by: 王鹏, 2867919560@qq.com
Owner: 天工LCI数据工作小组
Review: Dependent internal review by 天工LCI数据工作小组
Amounts: no units in this file; such an amount is in the reference unit of its flow, which a separate flow dataset defines
copyright: false
licenseType: Free of charge for all users and uses

## General comment
铜渣回收工艺旨在通过再利用铜冶炼的副产品来减少废物和环境影响。由此产生的材料，如水泥和未煅烧砖，用于建筑应用。这四种开发的方案反映了将铜渣整合到水泥生产中的不同方法，或使用它来生产用于构建基础设施的非烧结砖。

## Geography
中国领先的铜业公司。

## Time period
摘自相关公司2010年内部报告。

## Technology and included processes
根据技术可用性，开发了四种铜渣回收方案：（1）直接生产水泥，（2）电炉处理后生产水泥，（3）浮选后生产水泥，（4）生产不烧砖浮选后。

## Reference product
- Limestone: 311.4; input; measured

## Inputs
- hard coal,hard coal,hard coal: 47.2; measured
  Hard coal
- crude oil; 42.3 MJ/kg: 12; measured
  Crude oil
- natural gas; 44.1 MJ/kg: 2.8; measured
  Natural gas
- clay: 108.7; measured
  Clay
- gypsum: 19.5; measured
  Gypsum
- sand: 616; measured
- Scrap: 1000

## Outputs
All rows: measured
- carbon dioxide (fossil): 318.9
  CO2
- carbon monoxide,carbon monoxide (fossil): 0.2
  CO
- sulfur dioxide: 1.3
  SO2
- Nitrogen oxides: 0.8
  NOx需要补充
- particles (PM2.5 - PM10): 0.7
  Dust需要补充

## Deviations from the LCI method approaches
在分配程序之后，使用避免负担方法进行表征、归一化和加权。

## Data selection and combination
铜渣处理数据主要来源于国内某铜业龙头企业。水泥和砖的生产数据大部分来自采用先进设备和工艺的真实工厂，并辅以公开发表的文献。

## Data treatment and extrapolations
本研究中使用 GaBi 4 软件对铜回收系统进行建模并确定对环境的影响。采用生态指标99（EI99）进行生命周期影响评估

## Use advice
在使用该数据集进行生命周期评估（LCA）时，用户必须确保其研究特定背景下的方法论选择，如分配程序和避免负担方法，保持一致性。功能单元设置为1吨回收的铜渣，必须在分析过程中保持不变。这些数据应该在理解它反映了2010年中国一个主导铜公司的技术能力和环境条件的情况下使用，该情况通过内部报告记录。自那时以来，任何实践的更新或变化都应在分析中考虑。使用GaBi 4软件和生态指标99（EI99）进行影响评估，表明它与类似的LCA软件和方法兼容。

## Review details
清单： 内部审查通过几个迭代步骤完成，涉及原始数据验证、原始数据记录、代表性、完整性、与 ISO 14040 和 14044 有关的建模的一致性。

## Data sources
- Song, X. L., Yang, J. X., Wang, J. W. & Wu, W. J. Assessing the Life Cycle Environmental and Economic Performance of Copper Slag Recycling. AMR 878, 219–225 (2014).
