# Asphalt-basedwaterproofingmembranes|Asphalt,SBS,APP,SBR,stonepowderandtirebase|Melting, dip coating|All sizes / 沥青基防水卷材|沥青、SBS、APP、SBR、石粉及胎基|熔炼、浸涂|所有规模

Dataset: ILCD process, Unit process, single operation
Geography: CN
Reference year: 2019
Classification: Materials production / Non-energetic raw materials
Generated by: The data was created by the Office of the Second National Pollution Source Census of the Ministry of Ecology and Environment, and the data was organized by the TianGong Plan team for ILCD format / 生态环境部第二次全国污染源普查工作办公室创建数据，天工计划团队常慧敏整理数据为ILCD格式
Owner: Tiangong LCI Data Working Group / 天工LCI数据工作小组
Review: Dependent internal review by Tiangong LCI Data Working Group / 天工LCI数据工作小组
Amounts: no units in this file; such an amount is in the reference unit of its flow, which a separate flow dataset defines
copyright: false
licenseType: Free of charge for all users and uses

## General comment
the Technical of end-of-pipe management technology for pollution Nitrogen oxidesis/，Its Technical efficiency of end-of-pipe management0

## Reference product
- Bitumen: 1; calculated
  源文件中描述为为沥青基防水卷材，此处对其进行了匹配工作，将其匹配到LCAflow库里面相最符合的流，污染物指标备注为工业废水量

## Outputs
All rows: calculated
- Waste water: nan
  污染物指标工业废水量的末端治理技术是/。原文件中描述污染物类别为废水，污染物指标为工业废水量，此处对其进行了匹配工作，将其匹配到LCAflow库里面相最符合的流，污染物指标备注为工业废水量
- chemical oxygen demand: 0.1866
  污染物指标化学需氧量的末端治理技术是中和法，其效率为40，末端治理设施实际运行率（k值）计算公式为k=处理设施耗电量（千瓦时/年）/（设备额定功率（千瓦）×设备运行时间（小时/年））。原文件中描述污染物类别为废水，污染物指标为化学需氧量，此处对其进行了匹配工作，将其匹配到LCAflow库里面相最符合的流，污染物指标备注为化学需氧量
- chemical oxygen demand: 0.2177
  污染物指标化学需氧量的末端治理技术是其他①，其效率为30，末端治理设施实际运行率（k值）计算公式为k=处理设施耗电量（千瓦时/年）/（设备额定功率（千瓦）×设备运行时间（小时/年）），①其他包括机械除尘、喷雾降尘等。。原文件中描述污染物类别为废水，污染物指标为化学需氧量，此处对其进行了匹配工作，将其匹配到LCAflow库里面相最符合的流，污染物指标备注为化学需氧量
- chemical oxygen demand: 0.311
  污染物指标化学需氧量的末端治理技术是/，其效率为0。原文件中描述污染物类别为废水，污染物指标为化学需氧量，此处对其进行了匹配工作，将其匹配到LCAflow库里面相最符合的流，污染物指标备注为化学需氧量
- Petroleum-related waste: 0.001302
  污染物指标石油类的末端治理技术是中和法，其效率为30，末端治理设施实际运行率（k值）计算公式为k=处理设施耗电量（千瓦时/年）/（设备额定功率（千瓦）×设备运行时间（小时/年））。原文件中描述污染物类别为废水，污染物指标为石油类，此处对其进行了匹配工作，将其匹配到LCAflow库里面相最符合的流，污染物指标备注为石油类
- Petroleum-related waste: 0.000372
  污染物指标石油类的末端治理技术是其他①，其效率为80，末端治理设施实际运行率（k值）计算公式为k=处理设施耗电量（千瓦时/年）/（设备额定功率（千瓦）×设备运行时间（小时/年）），①其他包括机械除尘、喷雾降尘等。。原文件中描述污染物类别为废水，污染物指标为石油类，此处对其进行了匹配工作，将其匹配到LCAflow库里面相最符合的流，污染物指标备注为石油类
- Petroleum-related waste: 0.00186
  污染物指标石油类的末端治理技术是/，其效率为0。原文件中描述污染物类别为废水，污染物指标为石油类，此处对其进行了匹配工作，将其匹配到LCAflow库里面相最符合的流，污染物指标备注为石油类
- Exhaust gas: nan
  污染物指标工业废气量的末端治理技术是/。原文件中描述污染物类别为废气，污染物指标为工业废气量，此处对其进行了匹配工作，将其匹配到LCAflow库里面相最符合的流，污染物指标备注为工业废气量
- volatile organic compound: 0.0153
  污染物指标挥发性有机物的末端治理技术是燃烧法，其效率为99，末端治理设施实际运行率（k值）计算公式为k=处理设施耗电量（千瓦时/年）/（设备额定功率（千瓦）×设备运行时间（小时/年））。原文件中描述污染物类别为废气，污染物指标为挥发性有机物，此处对其进行了匹配工作，将其匹配到LCAflow库里面相最符合的流，污染物指标备注为挥发性有机物
- volatile organic compound: 0.153
  污染物指标挥发性有机物的末端治理技术是光解+光催化，其效率为90，末端治理设施实际运行率（k值）计算公式为k=处理设施耗电量（千瓦时/年）/（设备额定功率（千瓦）×设备运行时间（小时/年））。原文件中描述污染物类别为废气，污染物指标为挥发性有机物，此处对其进行了匹配工作，将其匹配到LCAflow库里面相最符合的流，污染物指标备注为挥发性有机物
- volatile organic compound: 0.2295
  污染物指标挥发性有机物的末端治理技术是等离子法，其效率为85，末端治理设施实际运行率（k值）计算公式为k=处理设施耗电量（千瓦时/年）/（设备额定功率（千瓦）×设备运行时间（小时/年））。原文件中描述污染物类别为废气，污染物指标为挥发性有机物，此处对其进行了匹配工作，将其匹配到LCAflow库里面相最符合的流，污染物指标备注为挥发性有机物
- volatile organic compound: 0.306
  污染物指标挥发性有机物的末端治理技术是吸附法，其效率为80，末端治理设施实际运行率（k值）计算公式为k=处理设施耗电量（千瓦时/年）/（设备额定功率（千瓦）×设备运行时间（小时/年））。原文件中描述污染物类别为废气，污染物指标为挥发性有机物，此处对其进行了匹配工作，将其匹配到LCAflow库里面相最符合的流，污染物指标备注为挥发性有机物
- volatile organic compound: 1.53
  污染物指标挥发性有机物的末端治理技术是/，其效率为0。原文件中描述污染物类别为废气，污染物指标为挥发性有机物，此处对其进行了匹配工作，将其匹配到LCAflow库里面相最符合的流，污染物指标备注为挥发性有机物
- particles (PM2.5 - PM10): 4.455
  污染物指标颗粒物的末端治理技术是湿法，其效率为85，末端治理设施实际运行率（k值）计算公式为k=处理设施耗电量（千瓦时/年）/（设备额定功率（千瓦）×设备运行时间（小时/年））。原文件中描述污染物类别为废气，污染物指标为颗粒物，此处对其进行了匹配工作，将其匹配到LCAflow库里面相最符合的流，污染物指标备注为颗粒物
- particles (PM2.5 - PM10): 11.88
  污染物指标颗粒物的末端治理技术是其他①，其效率为60，末端治理设施实际运行率（k值）计算公式为k=处理设施耗电量（千瓦时/年）/（设备额定功率（千瓦）×设备运行时间（小时/年）），①其他包括机械除尘、喷雾降尘等。。原文件中描述污染物类别为废气，污染物指标为颗粒物，此处对其进行了匹配工作，将其匹配到LCAflow库里面相最符合的流，污染物指标备注为颗粒物
- particles (PM2.5 - PM10): 29.7
  污染物指标颗粒物的末端治理技术是/，其效率为0。原文件中描述污染物类别为废气，污染物指标为颗粒物，此处对其进行了匹配工作，将其匹配到LCAflow库里面相最符合的流，污染物指标备注为颗粒物
- sulfur dioxide: 0.1236
  污染物指标二氧化硫的末端治理技术是湿法，其效率为60，末端治理设施实际运行率（k值）计算公式为k=处理设施耗电量。原文件中描述污染物类别为废气，污染物指标为二氧化硫，此处对其进行了匹配工作，将其匹配到LCAflow库里面相最符合的流，污染物指标备注为二氧化硫
- sulfur dioxide: 0.0309
  污染物指标二氧化硫的末端治理技术是其他①，其效率为90，末端治理设施实际运行率（k值）计算公式为（千瓦时/年）/（设备额定功率（千瓦）×设备运行时间（小时/年）），①其他包括机械除尘、喷雾降尘等。。原文件中描述污染物类别为废气，污染物指标为二氧化硫，此处对其进行了匹配工作，将其匹配到LCAflow库里面相最符合的流，污染物指标备注为二氧化硫
- sulfur dioxide: 0.309
  污染物指标二氧化硫的末端治理技术是/，其效率为0。原文件中描述污染物类别为废气，污染物指标为二氧化硫，此处对其进行了匹配工作，将其匹配到LCAflow库里面相最符合的流，污染物指标备注为二氧化硫
- Nitrogen oxides: 0.0329
  污染物指标氮氧化物的末端治理技术是湿法，其效率为30，末端治理设施实际运行率（k值）计算公式为k=处理设施耗电量（千瓦时/年）/（设备额定功率（千瓦）×设备运行时间（小时/年））。原文件中描述污染物类别为废气，污染物指标为氮氧化物，此处对其进行了匹配工作，将其匹配到LCAflow库里面相最符合的流，污染物指标备注为氮氧化物
- Nitrogen oxides: 0.0235
  污染物指标氮氧化物的末端治理技术是其他①，其效率为50，末端治理设施实际运行率（k值）计算公式为k=处理设施耗电量（千瓦时/年）/（设备额定功率（千瓦）×设备运行时间（小时/年）），①其他包括机械除尘、喷雾降尘等。。原文件中描述污染物类别为废气，污染物指标为氮氧化物，此处对其进行了匹配工作，将其匹配到LCAflow库里面相最符合的流，污染物指标备注为氮氧化物
- Nitrogen oxides: 0.047
  污染物指标氮氧化物的末端治理技术是/，其效率为0。原文件中描述污染物类别为废气，污染物指标为氮氧化物，此处对其进行了匹配工作，将其匹配到LCAflow库里面相最符合的流，污染物指标备注为氮氧化物

## Use advice
This dataset is derived from the Pollution Source Census Report and contains information on pollution emissions and related products. However, it does not include data on energy or chemical consumption, nor does it provide information on waste or co-product generation. When utilizing this dataset, please supplement the missing data based on actual conditions before use
该数据集来源于污染源普查报告，包含污染物排放及相关产品信息，但不包含能源或化学品消耗数据，也不提供废弃物或共生产物产生信息。在使用该数据集时，请根据实际情况补充缺失数据后再使用。

## Review details
Inventory: The internal review was done by several iteration steps concerning raw data validation, raw data documentation, representativity, completeness and consistency of modelling with regard to ISO 14040 and 14044.
清单： 内部审查通过几个迭代步骤完成，涉及原始数据验证、原始数据记录、代表性、完整性、与 ISO 14040 和 14044 有关的建模的一致性。

## Data sources
- 第二次全国污染源普查产排污核算系数手册（试用版）,二级代码30,四级代码3033文件，在完整版文件中第3368页
