# clinker production|clinker|selective catalytic reduction denitration technology

Dataset: ILCD process, Unit process, black box
Geography: TJ-CN
Reference year: 2010
Classification: Materials production / Other mineralic materials
Generated by: Siqi Yang
Amounts: no units in this file; such an amount is in the reference unit of its flow, which a separate flow dataset defines
copyright: false

## General comment
The cement inventories without selective catalytic reduction (SCR) reactor are calculated as the bench mark.

## Geography
SINOMA Corporation Branch in Tianjin City

## Model description
LCA models the life cycle of cement manufacturing with selective catalytic reduction denitration (SCR DeNOx) technology applied as its SCR system. The life cycle is from the coal and raw materials transportation, through the coal and raw meal grinding, to the clinker incineration, and finally the flue gas including NOx to the SCR reactor. The functional unit is 1 ton clinker.

## Reference product
- clinker: 1000
  Clinker

## Inputs
- hard coal, run-of-mine: 146; article inperiodical
  Coal
- limestone, crushed, for mill: 1533; article inperiodical
  Limestone
- sandstone: 52.96; article inperiodical
  Sandstone
- electricity, medium voltage: 227.448; article inperiodical
  Electricity

## Outputs
All rows: uniform; article inperiodical
- carbon dioxide: 807.3; min 807.3; max 807.3
  CO2
- carbon monoxide: 1.765; min 1.765; max 1.765
  CO
- sulfur dioxide: 0.004573; min 0.004573; max 0.004573
  SO2
- nitrogen monoxide: 0.4071; min 0.4071; max 0.4071
  NO
- nitrogen dioxide: 0.06935; min 0.06935; max 0.06935
  NO2
- particles (> PM10): 0.01692; min 0.01692; max 0.01692
  PM. The particle size is not specified. Here we treat it as PM>10.
- non-methane volatile organic compounds: 0.0002896; min 0.0002896; max 0.0002896
  NMVOC
- arsenic: 2.21e-5; min 7.621e-6; max 3.658e-5
  As
- cadmium: 3.811e-6; min 1.524e-6; max 6.097e-6
  Cd
- chromium: 1.524e-5; min 1.524e-5; max 1.524e-5
  Cr
- mercury: 9.906e-7; min 7.621e-7; max 1.219e-6
  Hg
- nickel: 2.286e-5; min 1.219e-5; max 3.353e-5
  Ni
- lead: 5.335e-5; min 1.524e-5; max 9.145e-5
  Pb
- zinc: 6.706e-5; min 1.524e-6; max 0.0001326
  Zn
- fluorine: 0.000218; min 0.000218; max 0.000218
  F
- 2,3,7,8-tetrachlorodibenzo-p-dioxin: 4.42e-11; min 4.42e-11; max 4.42e-11
  Dioxin
- cadmium: 1.524e-6; min 1.524e-6; max 1.524e-6
  Cu
- hydrogen chloride: 0.0001951; min 0.0001951; max 0.0001951
  HCI

## Data selection and combination
In 2010, SINOMA Corporation Branch in Tianjin City measured the heat balance and materials balance. The input and output data was from this report.

## Data treatment and extrapolations
The emission values for pollutants in the original data are given as maximum and minimum values. We assume a uniform distribution and calculate the average value for further analysis.

## Sampling procedure
Considering the formal fluctuations of emissions, some data are shown in min and max form.

## Data sources
- Chen Li, Suping Cui, Xianzheng Gong, Xiance Meng, & Boxue Sun. (2013). LCI Study of SCR DeNOx Technology for Cement Industry (XF Tang, Y Wu, Y Yao, & ZZ Zhang, Eds.; WOS:000319791800042; Vols. 743–744, pp. 252–257).
