# equipment installation and withdrawal | coal mining

Dataset: ILCD process, Unit process, single operation
Geography: LF-SX-CN
Reference year: 2022
Classification: Materials production / Other mineralic materials
Generated by: Linlin Yin, yinlinlin0623@163.com
Review: Dependent internal review by Tiangong LCI Data Working Group
Amounts: no units in this file; such an amount is in the reference unit of its flow, which a separate flow dataset defines

## Geography
The annual output of M coal mine is 1.2 million tons, and the actual working time is 360 days per year, so the working face needs 499 days to complete the mining. In the mining process of a working face in M coal mine, the time of installation and withdrawal of equipment is half a month respectively. In one year of production, the time of excavation is 11 months, and the time of mining is 10 months.

## Technology and included processes
Equipment Installation and Equipment Retracement

## Inputs
- Electricity: 5.18899e7; uniform; article inperiodical
  根据M煤矿煤炭开采全生 命周期内各个阶段的时间进度安排以及整个工作面的开采时间,计算得出这一工作面开采的全生命周期中设备安装与回撤的电力消耗量。

## Outputs
- carbon dioxide (fossil): 1.06648e7; uniform; article inperiodical
  根据M煤矿煤炭开采全生 命周期内各个阶段的时间进度安排以及整个工作面的开采时间,计算得出这一工作面开采的全生命周期中设备安装与回撤中消耗14413.87mw·h的电量产生的CO2排放量。

## Review details
Inventory: The internal review was done by several iteration steps concerning raw data validation, raw data documentation, representativity, completeness and consistency of modelling with regard to ISO 14040 and 14044.; Documentation: The review of the documentation was performed by Ecobilan and is in compliance with ISO 14040 and 14044. The data set documentation is correct in view of the appropriateness of the information provided. It includes all relevant information in view of data quality and scope of application of the respective LCI result.
