# Natural gas reservoir development | Geology of abundant gas reservoir reserves | Multi-attribute development decision making

Dataset: ILCD process, Unit process, single operation
Geography: SC-CN
Reference year: 2013
Classification: Materials production / Other mineralic materials
LCI method principle: Attributional
LCI method approaches: Consequential
Generated by: Shikang Kang, 908798159@qq.com
Review: Dependent internal review by Tiangong LCI Data Working Group
Amounts: no units in this file; such an amount is in the reference unit of its flow, which a separate flow dataset defines
copyright: false

## General comment
The multi-attribute decision-making method is applied to the natural gas development decision-making field, and a comprehensive evaluation model is constructed. Through the model analysis and calculation results, we can know how the exploitation sequence will maximize the benefit

## Geography
Sichuan oil and gas field is an oil and gas producing area located in southwest China with Sichuan basin as the center

## Time period
Data collection time

## Technology and included processes
Taking Sichuan gas field as the research object, 12 blocks are selected as evaluation samples. According to the index system constructed in chapter four and the evaluation method described, the exploration and development of Sichuan gas field are decided and the optimal ranking is made.

## Reference product
- natural gas: 0.8861; min 0.6362; max 0.8861; uniform; article inperiodical
  权重系数

## Data selection and combination
Twelve blocks of Sichuan gas field are selected, namely: Xinchangpeng 1, Xinchangpeng 2, Xinchang Shaxi Temple, Hexingchang Penglai Town, Hexingchang Xuer, Luodaipeng 1, Luodaipeng 2, Luodaipeng 3, Luodaipeng 4, Majing Penglai Town, Xindu Penglai Town and Dongtai Penglai Town, which are expressed by p= {p1, p2,... p12}. From the fourth chapter, we have selected eight indexes as the evaluation criteria

## Data treatment and extrapolations
The important and difficult point of this paper lies in the determination of weight coefficient. At present, there are two commonly used methods: subjective weight method and objective weight method, but both methods have their advantages and some shortcomings. In order to make up for their shortcomings, this paper adopts the combination weight method of maximum deviation, which integrates subjective and objective weights to determine the final weight value of attributes. More scientific.

## Review details
Inventory: The internal review was done by several iteration steps concerning raw data validation, raw data documentation, representativity, completeness and consistency of modelling with regard to ISO 14040 and 14044.; Documentation: The review of the documentation was performed by Ecobilan and is in compliance with ISO 14040 and 14044. The data set documentation is correct in view of the appropriateness of the information provided. It includes all relevant information in view of data quality and scope of application of the respective LCI result.

## Data sources
- 刘亚莉. 基于多属性决策的天然气气藏开发决策方法研究. (2012).
