# 电力生产 ; 混合电力 ; 新疆维吾尔自治区

Dataset: ILCD process, Unit process, single operation
Geography: XJ-CN
Reference year: 2019
Classification: Unit processes / Energy carriers and technologies / Electricity
Generated by: 熊若熙, xiongrx0126@163.com
Owner: 天工LCI数据工作小组
Review: Dependent internal review by 天工LCI数据工作小组
Amounts: no units in this file; such an amount is in the reference unit of its flow, which a separate flow dataset defines
copyright: false
licenseType: Free of charge for all users and uses

## General comment
混合电力产生形式包括火力发电、水力发电、风力发电、核能发电和太阳能发电

## Technical purpose
该数据集代表在新疆维吾尔自治区不同行业中使用的混合电力。它包括由火力（可能是煤炭或天然气）、水电、风电、核能和太阳能发电厂产生的电力。这种组合被应用在需要可靠性和可再生能源来源相结合的居民、商业和工业应用中。对于希望优化其能源消耗组合以实现可持续性和环境影响考虑的公司来说，这种组合尤为合适。

## Reference product
- Electricity: 3.6; missing unimportant
  [{'text': '3.6', 'type': 'text'}]

## Inputs
All rows: missing unimportant
- electricity for thermal power: 2.78419
  [{'text': '3.6', 'type': 'text'}]
- electricity from hydroelectric power plant: 0.285386
  [{'text': '3.6', 'type': 'text'}]
- electricity for nuclear power: 0
  [{'text': '3.6', 'type': 'text'}]
- electricity from wind power: 0.400525
  [{'text': '3.6', 'type': 'text'}]
- electricity for solar power: 0.129899
  [{'text': '3.6', 'type': 'text'}]

## Use advice
在使用该数据集进行生命周期评估（LCA）时，用户应注意，该数据代表了特定于新疆维吾尔自治区的平均电力组合。应将其应用于地理和时间上与这一区域相关的过程或产品。同时，也必须考虑评估产品或过程的技术发展和预期寿命，以确保随着时间的推移影响评估的准确性。此外，用户可能需要考虑由于政策转变和能源行业技术发展而导致的电力组合的未来变化。根据特定LCA研究的目标，应考虑是否包括上游影响（例如，燃料运输）以及未来回收的潜力。

## Review details
清单： 内部审查通过几个迭代步骤完成，涉及原始数据验证、原始数据记录、代表性、完整性、与 ISO 14040 和 14044 有关的建模的一致性。

## Data sources
- 能源统计年鉴2020
