# Soil remediation ; ex-situ remediation ; thermal desorption remediation ; engineering implementation ; soil pretreatment

Dataset: ILCD process, Unit process, single operation
Geography: SH-CN
Classification: Other Services / Repair and maintenance
Generated by: Wang Feng, wangfeng@caep.org.cn
Owner: Tiangong LCI Data Working Group
Review: Dependent internal review by Tiangong LCI Data Working Group
Amounts: no units in this file; such an amount is in the reference unit of its flow, which a separate flow dataset defines
copyright: false
licenseType: Free of charge for all users and uses

## General comment
Remediation of 1 cubic meter of contaminated soil by ectopic thermal desorption. In order to prevent odor dissipation and secondary pollution, the contaminated soil needs to be broken in a negative pressure greenhouse made of PVDF membrane. Pretreatment processes such as crushing, screening, and moisture content adjustment

## Geography
我国华东区域5 个污染土壤异位热脱附修复工程案例

## Technology and included processes
In order to prevent odor emission and secondary pollution, the contaminated soil needs to be broken in the negative pressure greenhouse of PVDF membrane material.

## Technical purpose
Soil remediation using off-site thermal desorption techniques for treatment of contaminated soil is tailored for handling heavy metal, hydrocarbon, or other pollutant removal. This process is employed predominantly for large-scale environmental rehabilitation projects, where 1 cubic meter of polluted soil undergoes a series of pre-treatment operations including crushing, screening, and moisture adjustment within a negative pressure tent made of PVDF membrane material to prevent odor escape and secondary pollution.

## Reference product
- Pre-treatment Soil: 1

## Inputs
All rows: measured
- Oils, unspecified: 0.00075
- Limestone: 6
- Steel sections: 0.13
- Polyethylene: 0.0012
- lightweight concrete block: 0.0054
- electricity from hydroelectric power plant: 9.07

## Outputs
- Waste (solid): 50; measured

## Use advice
LCA data users should include the environmental impacts of PVDF membrane material production and maintenance for the negative pressure tent as well as energy consumption during the pre-treatment and thermal desorption processes. It's imperative to consider regional differences in pollution levels and regulations—this data set pertains to five cases of contaminated soil off-site thermal desorption remediation projects in the East China region. Site-specific factors such as transportation to the treatment facility and the origin of energy sources for thermal desorption should also be incorporated into the life cycle analysis.

## Review details
Inventory: The internal review was done by several iteration steps concerning raw data validation, raw data documentation, representativity, completeness and consistency of modelling with regard to ISO 14040 and 14044.

## Data sources
- 刘爽,陈盼,宋慧敏等.我国华东地区污染土壤异位热脱附修复碳排放及减排策略[J].环境工程学报,2022,16(08):2663-2671.
