# cement production|cement, ordinary portland cement, 42.5MPa|new dry process, 4000 t-cl/d|mixed solid wastes

Dataset: ILCD process, Unit process, black box
Geography: CN
Reference year: 2005
Classification: Materials production / Other mineralic materials
Generated by: Siqi Yang
Amounts: no units in this file; such an amount is in the reference unit of its flow, which a separate flow dataset defines
copyright: false

## General comment
Precalciner kiln dry process cement production is a typical representative of new dry process. The process flow of new dry process cement production line of precalciner kiln with a daily production capacity of 4000t clinker in China.
Limestone from the mine is transported into the crusher feed bib by the dump truck. crushed by crusher and crusher, sent to the crushed stone storage, and then sent to the pre-homogenization yard by skirt plate feeder and belt conveyor in a quantitative manner. Clay is imported by dump truck or unloaded from the clay pile shed of the plant into the clay feed bin by bucket, fed by feeder into the double-roll crusher for crushing, and sent to the pre-batch homogenization yard by metering equipment. The limestone and clay are automatically combined in the pre-batching homogenizing yard and homogenized into a uniform mixed raw material. The mixed raw materials, limestone and iron powder are sent to the feeding bin of the grinding head of the raw mill from the yard by belt conveyor, and then sent to the drying mill for drying and grinding by quantitative unloading and feeding. The hot gas for the drying mill comes from the exhaust gas discharged from the suspension preheater, and the hot air is supplied with the help of the hot air furnace during start-up.
The powdered raw meal after grinding is lifted by a pneumatic pump and sent to two continuous air homogenization silos for further air mixing and storage. The raw material in the homogenizing storage is discharged, measured, lifted and fed into the suspension preheater and decomposer at the kiln tail by the pneumatic pump, and then preheated and decomposed. After that, it enters the rotary kiln for calcination to produce clinker. The raw coal used in the rotary kiln and decomposition furnace is dried and ground to make coal powder and stored in the coal powder bin for supply. The clinker is cooled by castor cooler and then sent to the clinker storage by skirt conveyor, metering scale and bucket elevator respectively.
The clinker and gypsum are fed into the cement mill for grinding by a metering device. The cement mill with powder selector constitutes a so-called ring-flow cement mill, which can also be ground with the appropriate amount of mixed materials and clinker and gypsum according to the product requirements. After grinding, the cement is sent to the cement warehouse by the silo air transfer pump for storage. Part of the cement is packaged in bags by the packaging machine and transported out of the factory by train or truck, while the other part is shipped in bulk by bulk special vehicle.

## Model description
Taking the usage performance of cement with a compressive strength of 42.5 MPa at 28 days per 1 kg as the functional unit, that is IFu=42.5 kgMPa. The research scope is defined as: raw material pretreatment, raw material grinding, clinker calcination, clinker grinding, cement homogenization, and cement storage.

## Reference product
- cement, ordinary portland cement, 42.5MPa: 1000
  42.5 grade silicate composite cement cement

## Inputs
All rows: measured
- limestone, crushed, for mill: 1073.7
  Limestone
- gypsum (desulphurized): 51.1
  Gupsum
- ash: 98
  Fly ash
- blast furnace slag: 137.6
  The original document is labeled as "slag" (i.e. blast furnace slag).
- hard coal: 100.957
  Standard coal. The original data is 0.0938kg standard coal, here converted to hard coal, the conversion formula is 1kg hard coal = 0.929kg standard coal.
- electricity, medium voltage: 347.76
  Electricity

## Outputs
- particles (> PM10): 0.15; measured
  Dust, with an unspecified particle size, is treated as PM > 10 micrometers in diameter.
- sulfur dioxide: 0.3501; measured
  Sulfur dioxide. Considering the actual operating conditions of domestic cement plants and the development trend for the foreseeable future, the statistical average of measured data is adopted for this evaluation.
- Nitrogen oxides: 1.419; measured
  Nitrogen oxides. Considering the actual operating conditions of domestic cement plants and the development trend for the foreseeable future, the statistical average of measured data is adopted for this evaluation.
- carbon dioxide: 807.3; measured
  Carbon dioxide. Considering the actual operating conditions of domestic cement plants and the development trend for the foreseeable future, the statistical average of measured data is adopted for this evaluation.

## Data sources
- 曹晓润. (2005). 低环境负荷型水泥的生态环境评价 [硕士, 武汉理工大学].
