# Goldclayorgold-bearingcarbon|GoldConcentrate|Cyclic roasting + thiourea gold leaching|All sizes / 金泥或载金炭|金精矿|循环焙烧+硫脲浸金|所有规模

Dataset: ILCD process, Unit process, single operation
Geography: CN
Reference year: 2019
Classification: Materials production / Metals and semimetals
Generated by: The data was created by the Office of the Second National Pollution Source Census of the Ministry of Ecology and Environment, and the data was organized by the TianGong Plan team for ILCD format / 生态环境部第二次全国污染源普查工作办公室创建数据，天工计划团队常慧敏整理数据为ILCD格式
Owner: Tiangong LCI Data Working Group / 天工LCI数据工作小组
Amounts: no units in this file; such an amount is in the reference unit of its flow, which a separate flow dataset defines
copyright: false
licenseType: Free of charge for all users and uses

## Technology and included processes
the Technical of end-of-pipe management technology for pollution arsenicisSettling chamber + cyclone dust collector + bag filter，Its Technical efficiency of end-of-pipe management99

## Reference product
- Gold concentrate: 1000; input; calculated
  源文件中描述为为金精矿，此处对其进行了匹配工作，将其匹配到LCAflow库里面相最符合的流，污染物指标备注为工业废水量

## Outputs
All rows: calculated
- Waste water: 2000
  污染物指标工业废水量的末端治理技术是/，末端治理设施实际运行率（k值）计算公式为k=废水治理设施年正常运行时间（小时）/企业年正常生产时间（小时）。原文件中描述污染物类别为废水，污染物指标为工业废水量，此处对其进行了匹配工作，将其匹配到LCAflow库里面相最符合的流，污染物指标备注为工业废水量
- chemical oxygen demand: 0.091
  污染物指标化学需氧量的末端治理技术是中和法，其效率为30，末端治理设施实际运行率（k值）计算公式为k=废水治理设施年正常运行时间（小时）/企业年正常生产时间（小时）。原文件中描述污染物类别为废水，污染物指标为化学需氧量，此处对其进行了匹配工作，将其匹配到LCAflow库里面相最符合的流，污染物指标备注为化学需氧量
- cadmium: 0.00028
  污染物指标镉的末端治理技术是中和法，其效率为30，末端治理设施实际运行率（k值）计算公式为k=废水治理设施年正常运行时间（小时）/企业年正常生产时间（小时）。原文件中描述污染物类别为废水，污染物指标为镉，此处对其进行了匹配工作，将其匹配到LCAflow库里面相最符合的流，污染物指标备注为镉
- lead: 0.00126
  污染物指标铅的末端治理技术是中和法，其效率为30，末端治理设施实际运行率（k值）计算公式为k=废水治理设施年正常运行时间（小时）/企业年正常生产时间（小时）。原文件中描述污染物类别为废水，污染物指标为铅，此处对其进行了匹配工作，将其匹配到LCAflow库里面相最符合的流，污染物指标备注为铅
- arsenic: 0.000798
  污染物指标砷的末端治理技术是中和法，其效率为30，末端治理设施实际运行率（k值）计算公式为k=废水治理设施年正常运行时间（小时）/企业年正常生产时间（小时）。原文件中描述污染物类别为废水，污染物指标为砷，此处对其进行了匹配工作，将其匹配到LCAflow库里面相最符合的流，污染物指标备注为砷
- Mercury: 9.8e-7
  污染物指标汞的末端治理技术是中和法，其效率为30，末端治理设施实际运行率（k值）计算公式为k=废水治理设施年正常运行时间（小时）/企业年正常生产时间（小时）。原文件中描述污染物类别为废水，污染物指标为汞，此处对其进行了匹配工作，将其匹配到LCAflow库里面相最符合的流，污染物指标备注为汞
- Exhaust gas: 17653
  污染物指标工业废气量的末端治理技术是/，末端治理设施实际运行率（k值）计算公式为k=废气治理设施年正常运行时间（小时）/企业年正常生产时间（小时）。原文件中描述污染物类别为废气，污染物指标为工业废气量，此处对其进行了匹配工作，将其匹配到LCAflow库里面相最符合的流，污染物指标备注为工业废气量
- particles (PM2.5 - PM10): 0.2648
  污染物指标颗粒物的末端治理技术是沉降室+旋风除尘器+袋式除尘，其效率为99，末端治理设施实际运行率（k值）计算公式为k=废气治理设施年正常运行时间（小时）/企业年正常生产时间（小时）。原文件中描述污染物类别为废气，污染物指标为颗粒物，此处对其进行了匹配工作，将其匹配到LCAflow库里面相最符合的流，污染物指标备注为颗粒物
- sulfur dioxide: 1.059
  污染物指标二氧化硫的末端治理技术是双氧水+三级喘动塔石灰乳洗涤，其效率为95，末端治理设施实际运行率（k值）计算公式为k=废气治理设施年正常运行时间（小时）/企业年正常生产时间（小时）。原文件中描述污染物类别为废气，污染物指标为二氧化硫，此处对其进行了匹配工作，将其匹配到LCAflow库里面相最符合的流，污染物指标备注为二氧化硫
- Nitrogen oxides: nan
  污染物指标氮氧化物的末端治理技术未说明，末端治理设施实际运行率（k值）计算公式为k=废气治理设施年正常运行时间（小时）/企业年正常生产时间（小时）。原文件中描述污染物类别为废气，污染物指标为氮氧化物，此处对其进行了匹配工作，将其匹配到LCAflow库里面相最符合的流，污染物指标备注为氮氧化物
- lead: 0.01218
  污染物指标铅及其化合物的末端治理技术是沉降室+旋风除尘器+袋式除尘，其效率为99，末端治理设施实际运行率（k值）计算公式为k=废气治理设施年正常运行时间（小时）/企业年正常生产时间（小时）。原文件中描述污染物类别为废气，污染物指标为铅及其化合物，此处对其进行了匹配工作，将其匹配到LCAflow库里面相最符合的流，污染物指标备注为铅及其化合物
- arsenic: 0.00865
  污染物指标砷及其化合物的末端治理技术是沉降室+旋风除尘器+袋式除尘，其效率为99，末端治理设施实际运行率（k值）计算公式为k=废气治理设施年正常运行时间（小时）/企业年正常生产时间（小时）。原文件中描述污染物类别为废气，污染物指标为砷及其化合物，此处对其进行了匹配工作，将其匹配到LCAflow库里面相最符合的流，污染物指标备注为砷及其化合物

## Data sources
- 第二次全国污染源普查产排污核算系数手册（试用版）,四级代码3221文件，在完整版文件中第5074页
