# 再生硅铝合金生产 ; 再生硅铝合金 ; 消费流转铝废料

Dataset: ILCD process, Unit process, single operation
Geography: ZJ-CN
Reference year: 2011
Classification: Unit processes / Materials production / Metals and semimetals
Generated by: 谢金良, jinliang.research@gmail.com
Owner: 天工LCI数据工作小组
Review: Dependent internal review by 天工LCI数据工作小组
Amounts: no units in this file; such an amount is in the reference unit of its flow, which a separate flow dataset defines
copyright: false
licenseType: Free of charge for all users and uses

## General comment
The functional unit is chosen as 1 ton of recycled aluminum alloy. Process of transport raw materials to recycled aluminum alloy site, infrastructure of aluminum alloy production plant, chemicals and energy production, wastewater treatment, direct emissions, and old aluminum scrap collection is included.

## Time period
文献发表于2011年

## Technical purpose
在该工艺中生产的再生硅铝合金通常用于制造各种铝制品，其中，二次铝适用于汽车和建筑行业，电子设备组件以及铝的强度与重量比及耐腐蚀性为优点的消费品。

## Reference product
- Silicon Aluminum Alloy: 1000; measured
  Recycled Aluminum Alloy (Recycled high silicon aluminum alloy)

## Inputs
All rows: measured
- electricity, high voltage, aluminium industry: 129.6
- potassium chloride: 1.44
- Barium chloride: 2.66
  Barium chloride (BaCl2)
- Copper, in ground: 8
  copper
- Silicon, in ground: 120
- Water, unspecified natural origin: 6.11
  water
- Nitrogen: 0.25
- natural gas, high pressure: 76.67
  natural gas
- aluminium scrap, post-consumer: 1080
- buildings, unspecified: 0.0056
  buildings
- aluminium electrolysis facility: 34
  Equipment (yuan ; RMB)

## Outputs
- particles, unspecified: 0.24; measured
- chemical oxygen demand: 0.02; measured
- wastewater, average: 0.13; measured
  wastewater
- ammonia: 0.0034; measured
  Ammonia nitrogen (NH3-N)

## Use advice
在使用这个数据集进行生命周期评估时，重要的是要考虑它代表了一个与中国地理相关的过程，具有特定的能源结构，尤其是以煤炭为基础的电力生成。用户应该调整他们的LCA研究系统边界，包括到合金生产地的运输阶段、生产厂的基础设施、化工产品和能源生产、废水处理、直接排放和废料收集。建筑和设备的耐久性应考虑其分别为40年和8年的寿命。如果在另一个地理背景下应用，用于基础设施和其他背景过程的欧洲数据集可能需要调整以反映本地条件。

## Review details
清单： 内部审查通过几个迭代步骤完成，涉及原始数据验证、原始数据记录、代表性、完整性、与 ISO 14040 和 14044 有关的建模的一致性。

## Data sources
- Hong, J., Ismail, Z. Z. & Hong, J. Environmental and economic assessment of recycled aluminum alloy production - A case study of China. in Adv. Mater. Res. vols 146–147 1027–1030 (2011).
