# 电力生产 ; 混合电力 ; 云南

Dataset: ILCD process, Unit process, single operation
Geography: YN-CN
Reference year: 2019
Classification: Unit processes / Energy carriers and technologies / Electricity
Generated by: 熊若熙, xiongrx0126@163.com
Owner: 天工LCI数据工作小组
Review: Dependent internal review by 天工LCI数据工作小组
Amounts: no units in this file; such an amount is in the reference unit of its flow, which a separate flow dataset defines
copyright: false
licenseType: Free of charge for all users and uses

## General comment
混合电力产生形式包括火力发电、水力发电、风力发电、核能发电和太阳能发电

## Technical purpose
云南省所描述的工业过程中产生的电力用于居民和工业用途。这包括为家庭中的家用电器、照明、供暖和制冷系统以及制造业、技术和服务等各个行业的机械、计算机系统和基础设施供电。多种能源来源的组合确保了更可持续、更可靠的能源供应。

## Reference product
- Electricity: 3.6; missing unimportant
  [{'text': '3.6', 'type': 'text'}]

## Inputs
All rows: missing unimportant
- electricity for thermal power: 0.32908
  [{'text': '3.6', 'type': 'text'}]
- electricity from hydroelectric power plant: 2.96922
  [{'text': '3.6', 'type': 'text'}]
- electricity for nuclear power: 0
  [{'text': '3.6', 'type': 'text'}]
- electricity from wind power: 0.25177
  [{'text': '3.6', 'type': 'text'}]
- electricity for solar power: 0.0499392
  [{'text': '3.6', 'type': 'text'}]

## Use advice
在使用云南电力生产工业过程的数据集时，确保能源组合反映了火力、水力、风力、核能和太阳能发电的实际比例。考虑可能影响总体环境影响的地区特征，如可再生资源的可用性和当地电厂的效率。注意能源供应的时间变化，因为每种电力来源的比例可能会随着尤其是水力和太阳能等可再生资源的季节性可用性而波动。

## Review details
清单： 内部审查通过几个迭代步骤完成，涉及原始数据验证、原始数据记录、代表性、完整性、与 ISO 14040 和 14044 有关的建模的一致性。

## Data sources
- 能源统计年鉴2020
