# Combustion-Heavyoil|PotassiumSulfate|Potassiumchloride,sulfuricacid|Mannheim method|All sizes / 燃烧-重油|硫酸钾|氯化钾、硫酸|曼海姆法|所有规模

Dataset: ILCD process, Unit process, single operation
Geography: CN
Reference year: 2019
Classification: Energy carriers and technologies / Crude oil based fuels
Generated by: The data was created by the Office of the Second National Pollution Source Census of the Ministry of Ecology and Environment, and the data was organized by the TianGong Plan team for ILCD format / 生态环境部第二次全国污染源普查工作办公室创建数据，天工计划团队常慧敏整理数据为ILCD格式
Owner: Tiangong LCI Data Working Group / 天工LCI数据工作小组
Amounts: no units in this file; such an amount is in the reference unit of its flow, which a separate flow dataset defines
copyright: false
licenseType: Free of charge for all users and uses

## Technology and included processes
the Technical of end-of-pipe management technology for pollution Nitrogen oxidesis/，Its Technical efficiency of end-of-pipe management0

## Reference product
- Potassium sulfate: 1000; calculated
  源文件中描述为为硫酸钾，此处对其进行了匹配工作，将其匹配到LCAflow库里面相最符合的流，污染物指标备注为工业废气量

## Outputs
- Exhaust gas: 900; calculated
  污染物指标工业废气量的末端治理技术是/，其效率为0。原文件中描述污染物类别为废气，污染物指标为工业废气量，此处对其进行了匹配工作，将其匹配到LCAflow库里面相最符合的流，污染物指标备注为工业废气量
- Flue dust: 0.042; calculated
  污染物指标烟尘的末端治理技术是/，其效率为0。原文件中描述污染物类别为废气，污染物指标为烟尘，此处对其进行了匹配工作，将其匹配到LCAflow库里面相最符合的流，污染物指标备注为烟尘
- sulfur dioxide: 0.1064; calculated
  污染物指标二氧化硫的末端治理技术是双碱法，其效率为92，末端治理设施实际运行率（k值）计算公式为k=处理设施运行时间(小时/年)/正常生产时间(小时/年)。原文件中描述污染物类别为废气，污染物指标为二氧化硫，此处对其进行了匹配工作，将其匹配到LCAflow库里面相最符合的流，污染物指标备注为二氧化硫
- Nitrogen oxides: 0.252; calculated
  污染物指标氮氧化物的末端治理技术是/，其效率为0。原文件中描述污染物类别为废气，污染物指标为氮氧化物，此处对其进行了匹配工作，将其匹配到LCAflow库里面相最符合的流，污染物指标备注为氮氧化物

## Data sources
- 第二次全国污染源普查产排污核算系数手册（试用版）,二级代码26,四级代码2623文件，在完整版文件中第4111页
