# 生物质航空燃油水热液化

Dataset: ILCD process, Unit process, black box
Geography: CN
Classification: Unit processes / Energy carriers and technologies / Renewable fuels
Functional unit: 1 MJ aviation fuel
LCI method principle: Attributional
LCI method approaches: Allocation - gross calorific value
Generated by: 张艺璇, zhangyixuan0444@igsnrr.ac.cn
Owner: 天工LCI数据工作小组
Review: Dependent internal review by 天工LCI数据工作小组
Amounts: no units in this file; such an amount is in the reference unit of its flow, which a separate flow dataset defines
licenseType: Free of charge for all users and uses

## General comment
该路径能够使用水作为介质，在 250-550 °C，5-25 MPa 压力的反应条件下，将纤维素类生物质转化为生物航油。 水热液化技术主要分为两个阶段，分别是生物质液化与生物油加氢阶段。

## Technical purpose
生物质航空燃油的水热液化是一种过程，利用水作为溶剂，将纤维素生物质转化为生物航油。在250-550°C温度和5-25 MPa压力条件下运行，该技术适用于生成可再生的航空燃料。这个过程通常分为两个主要阶段：生物质液化和随后的生物油加氢。这种由生物质衍生的航空燃料旨在用作航空业中的可持续能源来源，主要目的是减少空中运输的碳足迹。

## Model description
Build a simulation model of the complete process using Aspen Plus software and perform simulation calculations to obtain the mass flow, energy flow, thermodynamic parameters, and reactor power consumption of each process based on mass balance

## Reference product
- Electricity: 0.02628; input; calculated

## Inputs
- Electricity: 0.03492, 0.00828 (2 entries); calculated
- water: 0.096; calculated

## Outputs
- water: 0.1, 0.0058 (2 entries); calculated
- carbon monoxide (biogenic): 6.6e-5; calculated
  原文未区分bio和fossil，根据专家判断此处为bio
- hydrocarbons (unspecified): 6.8e-6; calculated

## Deviations from the LCI method approaches
按照能量分配的方式分配环境影响值，即在排放分配的过程中，根据航油以及其他燃料的能量分配给每 MJ 的航油生产

## Use advice
在使用生物质航空燃油水热液化的生命周期评价(LCA)数据集时，用户必须谨慎分配环境影响值。数据集需要能量分配进行适当核算，其中影响根据生产的航油和其他辅助燃料的能量含量按比例分配。具体来说，分配应反映每兆焦耳航油生产的能量含量。在分析完整的两阶段过程 - 生物质液化和生物油加氢 - 以确保全生命周期评估时，还应给予方法学上的注意。用户必须考虑技术适用性假设，特别是当将数据概括为不同规模或超出提供参数的不同背景时。

## Review details
清单： 内部审查通过几个迭代步骤完成，涉及原始数据验证、原始数据记录、代表性、完整性、与 ISO 14040 和 14044 有关的建模的一致性。

## Data sources
- 朱啸南. 基于生命周期评价的生物航油制备及利用对环境的影响研究. (浙江大学, 2022).
