# cement production|cement, portland-composite cement|dry process rotary kiln, 4000t/d|mixed solid wastes

Dataset: ILCD process, Unit process, black box
Geography: CN
Classification: Materials production / Other mineralic materials
Generated by: Siqi Yang
Amounts: no units in this file; such an amount is in the reference unit of its flow, which a separate flow dataset defines
copyright: false

## General comment
Synergistic disposal is a production process that involves adding industrial waste as alternative raw materials and fuels at the raw material mill and kiln tail positions, specifically including waste clay, waste catalysts, and contaminated soil.
The company's cement production line consists of a vertical raw material mill, a 5-stage preheater, a rotary kiln, and a large ball mill (cement mill) equipped with a roller press, as well as equipment for crushing, grinding, and conveying limestone and gypsum. The production system is referred to as the "two mills and one kiln" system, namely the raw material mill, cement mill, and rotary kiln incineration.

## Model description
The system boundary includes the processes of raw material preparation, coal powder preparation, clinker calcination, and cement grinding. The functional unit is defined as 1 ton of cement product.

## Reference product
- cement, portland-composite cement: 1000
  Cement

## Inputs
All rows: measured
- limestone, crushed, for mill: 1125.43
  Limestone
- shale: 1.23
  Shale
- silica stone: 17.75
  Silica
- iron, powder: 27.25
  Iron powder
- gypsum (desulphurized): 52.15
  Gupsum
- ash: 124.24
  Fly ash
- blast furnace slag: 203.78
  Blast furnace slag
- waste clay: 1.05
  Waste clay. Industrial waste.
- Coating slag: 0.16
  Coating slag. Industrial waste.
- refinery sludge: 5.26
  Waste oily sludge. Industrial waste.
- Catalyst waste: 2.11
  Waste catalyst. Industrial waste.
- soil, contaminated: 5.26
  Contaminated soil. Industrial waste.
- digester sludge: 15.79
  Digestion sludge. Industrial waste.
- hard coal, run-of-mine: 98.28
  Coal
- electricity, medium voltage: 290.412
  Electricity. The electricity consumption is measured in kWh·t^-1, in which the electricity consumption in the raw material extraction and cement grinding stages is calculated based on cement production, and the electricity consumption in the raw material preparation, coal powder preparation, and clinker calcination stages is calculated based on clinker production. Other resource and energy consumption, as well as pollutant emissions, are calculated based on cement production.

## Outputs
All rows: measured
- carbon dioxide: 845.44
  CO2. CO2 emissions come from the calcination of limestone and coal combustion. Since CO2 monitoring devices are generally not installed in Chinese cement enterprises, the emissions are calculated based on the CO2 emission formula.
- sulfur dioxide: 0.256
  SO2
- Nitrogen oxides: 0.9
  NOX
- carbon monoxide: 0.02522
  CO
- particles (> PM10): 0.5808
  Dust (exhaust emissions), with an unspecified particle size, is treated as PM > 10 micrometers in diameter.
- chloride: 2.723
  Chloride (wastewater). Wastewater is mainly producing water, emission data comes from corporate monitoring values ​​and GABI databases.
- sulfate: 0.351
  Sulfate (wastewater). Wastewater is mainly producing water, emission data comes from corporate monitoring values ​​and GABI databases.
- blast furnace dust, for recovery: 657.39
  Dust (solid waste recycling). The solid waste is mainly the dust generated during the production process. After unified collection and processing, it is recycled and reused. The data is obtained by the actual monitoring of the enterprise.

## Data selection and combination
Industrial waste can replace part of coal, therefore, tthe ratio of calorific value and mass (i.e., the ratio of coal per unit of waste corresponding to calorific value to the total mass of material input in co-disposal) is used as the basis for data allocation of input and output, as shown in equation αp = W'p/(W'p + Wc + Wr). Where αp is the allocation ratio of waste in the input and output of the co-disposal system; W'p is the mass of coal corresponding to 1 ton of waste by calorific value ratio (t); Wc is the mass of coal to be added to 1 t of waste in clinker production (t); Wr is the mass of raw material to be added to 1 t of waste in clinker production (t).

## Data sources
- 侯星宇, 张芸, 戚昱, 蒋慧, 张琳, & 曲殿利. (2015). 水泥窑协同处置工业废弃物的生命周期评价. 环境科学学报, 35(12), 4112–4119.
