# 污泥处理与处置|填埋

Dataset: ILCD process, Unit process, single operation
Geography: HF-AH-CN
Classification: Materials production / Other mineralic materials
Generated by: Jin Sitian, JSTian0302@163.com
Review: Dependent internal review by Tiangong LCI Data Working Group
Amounts: no units in this file; such an amount is in the reference unit of its flow, which a separate flow dataset defines

## Geography
合肥望塘污水处理厂

## Reference product
- Sludge: 1000; input; estimated
  1t含水率为80.94%的剩余污泥

## Inputs
- Diesel: 0.0001906; article inperiodical
- Electricity: 5.148; article inperiodical

## Outputs
All rows: article inperiodical
- carbon dioxide: 47.51
- methane: 21.12
- carbon monoxide
- hydrogen chloride
- hydrogen fluoride
- hydrogen sulfide
- ammonia
- hydrocarbons (unspecified): 0.1075
- cadmium
- chromium
- lead
- mercury
- zinc
- copper
- nickel
- chemical oxygen demand
- Biochemical Oxygen Demand
- ammonia
  氨氮
- Suspended solids, unspecified
- Non Hazardous non organic waste for disposal (unspecific sludges and dusts): 0.319
  粉尘
- Waste (solid): 476.5

## Review details
Inventory: The internal review was done by several iteration steps concerning raw data validation, raw data documentation, representativity, completeness and consistency of modelling with regard to ISO 14040 and 14044.; Documentation: The review of the documentation was performed by Ecobilan and is in compliance with ISO 14040 and 14044. The data set documentation is correct in view of the appropriateness of the information provided. It includes all relevant information in view of data quality and scope of application of the respective LCI result.

## Data sources
- 基于生命周期评价的典型剩余污泥处理方法的环境影响比较研究
