# cement production|cement, common portland cement|new dry process

Dataset: ILCD process, Unit process, black box
Geography: CN
Reference year: 2011
Classification: Materials production / Other mineralic materials
Generated by: Siqi Yang
Amounts: no units in this file; such an amount is in the reference unit of its flow, which a separate flow dataset defines
copyright: false

## General comment
New dry-process technology for producing common portland cement. In 2011, the proportion of newly developed dry-process cement accounted for 89.0% of the national total, and it was still on the rise, thus basically representing the national level.

## Model description
The study only focused on common cement, and selected domestically produced common cement with a 1kg clinker content of 70% using the new dry-process technology as the functional unit.

## Reference product
- cement, common portland cement: 1000
  General cement, 70% content

## Inputs
All rows: article inperiodical
- clinker, portland cement clinker, 52.5MPa: 700
  Clinker, 52.5MPa. The input data for the benchmark scenario is based on the Level III benchmark value of the clean production index system.
- electricity, medium voltage: 144
  Electricity. The input data for the benchmark scenario is based on the Level III benchmark value of the clean production index system.
- hard coal, run-of-mine: 4.3
  Raw coal. The input data for the benchmark scenario is based on the Level III benchmark value of the clean production index system.
- gypsum (desulphurized): 50
  Gypsum. The input data for the benchmark scenario is based on the Level III benchmark value of the clean production index system.
- tap water: 2
  Industrial fresh water. The input data for the benchmark scenario is based on the Level III benchmark value of the clean production index system.

## Outputs
- carbon dioxide: 8.7; article inperiodical
  Carbon dioxide. Environmental emissions are mainly based on the pollution coefficient manual and literature survey data.
- chemical oxygen demand: 6e-5; article inperiodical
  Chemical oxygen demand. Environmental emissions are mainly based on the pollution coefficient manual and literature survey data.

## Cut-off and completeness
The data is incomplete, focusing only on the list of indicators relevant to the ECER policy objectives.

## Data selection and combination
By investigating relevant literature on domestic cement production, and combining with the evaluation index system for clean production in the cement industry, as well as the pollutant discharge coefficient manual, a list of data on clinker production and cement grinding processes was obtained.

## Data sources
- 何晓雪, 张璐, & 王洪涛. (2014). 基于生命周期节能减排评价方法的水泥行业清洁生产评价指标权重的计算. 化学工程与装备, 4, 208–211.
