# 市政污泥处理与处置;干污泥;脱水

Dataset: ILCD process, Unit process, single operation
Geography: CN
Classification: Unit processes / End-of-life treatment / Waste water treatment
Functional unit: The functional unit used for GHGs in this LCA is one dry ton (DT) of sludge.
Generated by: 金思甜, 2331276@tongji.edu.cn
Owner: 天工LCI数据工作小组
Review: Dependent internal review by 天工LCI数据工作小组
Amounts: no units in this file; such an amount is in the reference unit of its flow, which a separate flow dataset defines
copyright: ['opt4ROkqig']
licenseType: Free of charge for all users and uses

## General comment
本文研究的主要数据来源如下:1)能源消耗和物质投入来源于对太湖流域的调查;2)能源利用排放因子来源于我们自己的计算、IPCC和文献。3)填埋过程中的CH4排放由文献获得，填埋、焚烧和堆肥过程中的无组织排放主要由文献研究中给出的模型和IPCC因子(2006)决定。4)理论计算数据(焚烧部分)。

## Geography
太湖流域

## Technology and included processes
采用“先进板框压滤机”对污泥进行压滤，降低污泥含水量，在原污泥中添加5kg /DT的聚合絮凝剂。

## Technical purpose
所描述的过程用于太湖流域地区市政污泥的处理和处置。该过程涉及污泥的脱水作业，以产生适合进一步处理或最终处置的干污泥。与此过程相关的数据可以用于评估系统中市政废弃污泥处理和管理的环境影响，特别是在以每干吨为基础评估温室气体排放时。

## Reference product
- Sludge: 1000; input; estimated
  一干吨 （DT） 污泥

## Inputs
- Polymer: 9.38; measured
- Electricity: 388.8; measured

## Use advice
在使用此数据集进行生命周期评估时，请确保包括污泥处理和处置的所有相关生命周期阶段。特别关注数据的方法学适用性，尤其是关于太湖流域背景的数据。考虑数据对特定地理区域和时间段的代表性。建议考虑技术变化和可能影响温室气体排放的操作实践。功能单位为一干吨污泥，应在整个评估过程中保持一致应用。

## Review details
清单： 内部审查通过几个迭代步骤完成，涉及原始数据验证、原始数据记录、代表性、完整性、与 ISO 14040 和 14044 有关的建模的一致性。

## Data sources
- Liu, B., Wei, Q., Zhang, B. & Bi, J. Life cycle GHG emissions of sewage sludge treatment and disposal options in Tai Lake Watershed, China. Science of The Total Environment 447, 361–369 (2013).
