# Vegetable Production ; Agricultural Inputs (Greenhouse)

Dataset: ILCD process, Unit process, single operation
Geography: CN
Classification: Materials production / Agricultural production means
Functional unit: hm2
Generated by: Haoran Zhang, hrzhang@whu.edu.cn
Owner: Tiangong LCI Data Working Group
Review: Dependent internal review by Tiangong LCI Data Working Group
Amounts: no units in this file; such an amount is in the reference unit of its flow, which a separate flow dataset defines
copyright: false
licenseType: Free of charge for all users and uses

## General comment
The boundary of the system is concentrated in the whole process of open field vegetable production (from sowing to harvesting), which is divided into agricultural phase and agricultural phase. The agricultural phase focuses on greenhouse gas emissions from the production and transportation of fertilizers (fertilizers and organic fertilizers), pesticides and agricultural film. The agricultural stage mainly focuses on the greenhouse gas emissions generated by the application process of fertilizer and pesticide, the diesel consumption and artificial energy consumption in the process of agricultural operation (tillage, irrigation, etc.), and the fixation of soil organic carbon caused by the net primary productivity of vegetables and the input of organic fertilizer [16]. Select unit area (per hm2) for this system evaluation unit.

## Technology and included processes
Based on national agricultural statistical data, using the life cycle assessment (LCA) method, the net greenhouse gas emissions (NGHGE) of four typical field vegetable productions in China, including open-field tomatoes, cucumbers, Chinese cabbage, and radishes, were quantified. The study compared the differences in net greenhouse gas emissions among vegetable types and provinces, and analyzed emission reduction measures.

## Technical purpose
This dataset provides lifecycle inventory and assessment for open-field vegetable production in China, focusing on tomatoes, cucumbers, Chinese cabbage, and radishes. It is useful for environmental researchers and professionals in the agricultural sector evaluating the sustainability and environmental impact of vegetable cultivation practices, particularly the net greenhouse gas emissions (NGHGE) associated with fertilizer, pesticide, diesel, and agricultural film inputs, as well as labor.

## Reference product
- tomato: 1000
  solar greenhouse

## Inputs
- steel: 18.746
  solar greenhouse
- cement: 6.6149
  solar greenhouse
- brick: 30.81
  solar greenhouse
- Electricity: 98.7228
  solar greenhouse
- Diesel: 0.002399
  solar greenhouse
- polyethylene terephthalate fibres (PET): 11.927
  solar greenhouse
- polyvinyl chloride: 1.365
  solar greenhouse
- water: 50.387
  solar greenhouse
- nitrogen: 3.952
  Solar greenhouse fertilizer
- nitrogen: 5.303
  solar greenhouse
- phosphorus: 3.662
  Solar greenhouse fertilizer
- phosphorus: 4.881
  solar greenhouse
- potassium: 5.279
  Solar greenhouse fertilizer
- potassium: 2.558
  solar greenhouse
- Rice Seeds: 0.044
  solar greenhouse
- Insecticide: 0.08
  solar greenhouse

## Deviations from the LCI method approaches
The process is divided into two phases: agricultural input and farming. The agricultural input phase mainly focuses on the greenhouse gas emissions produced and transported during the production of fertilizers (chemical and organic), pesticides, and agricultural films. The farming phase primarily concentrates on the greenhouse gas emissions from the application of fertilizers and pesticides, agricultural operations (such as plowing and irrigation), diesel consumption, and the energy consumed by human labor. Additionally, this phase considers the carbon sequestration in vegetables through net primary productivity and the fixation of soil organic carbon caused by the input of organic fertilizers.

## Data selection and combination
Based on the types of vegetables and the planting distribution information available in the database, four typical open-field vegetables were selected, namely fruit vegetables (tomatoes, cucumbers), leafy vegetables (Chinese cabbage), and root vegetables (radishes). The related planting production data from various provinces across the country for these four types of open-field vegetables were collected and organized for the year 2016 (data from Taiwan, China is temporarily unavailable).

## Data treatment and extrapolations
Various vegetables’ fertilizer application rates, diesel consumption, agricultural film usage, labor employment, and yield data are obtained from the literature. Diesel cost is calculated using the formula [18]: Diesel cost = (mechanical operation fee + irrigation fee - water fee) x 21% + fuel power fee, and the diesel price data comes from China's oil price network database [19]. Pesticide input data refer to Luo Wei’s [20] study results on the big data analysis of pesticide application in open-field vegetables across the country. The planting areas of various types of vegetables in different provinces were retrieved from the literature [15].

## Use advice
When using this dataset, ensure accurate representation of the regional practices and inputs for the four specified vegetable types. Consider the methodological framework necessary for NGHGE calculation as provided in the references and be mindful of the system boundaries focused on the entire production process. Note that data from Taiwan is not included in the dataset. Assess the technological variability and any emission reduction measures analyzed within the dataset for applicability in other contexts.

## Review details
Inventory: The internal review was done by several iteration steps concerning raw data validation, raw data documentation, representativity, completeness and consistency of modelling with regard to ISO 14040 and 14044.

## Data sources
- 张芬,程泰鸿,陈新平,王孝忠.我国典型露地蔬菜生产中的温室气体排放[J].环境科学,2020,41(07):3410-3417.
