# copper-based mixed waste recycling|Blister copper|refining process|Black copper

Dataset: ILCD process, Unit process, single operation
Geography: JX-CN
Reference year: 2020
Classification: Materials production / Other mineralic materials
Functional unit: We consider the functional unit of the recycling of copper-based mixed waste to be 1000 kg electrolytic copper.
LCI method principle: Attributional
LCI method approaches: Allocation - market value
Generated by: Peng Wang, 2867919560@qq.com
Review: Dependent internal review by Tiangong LCI Data Working Group
Amounts: no units in this file; such an amount is in the reference unit of its flow, which a separate flow dataset defines
copyright: false

## Geography
The typical case is a metal recycling enterprise located in Jiangxi Province, China,

## Technology and included processes
Refining relies on the black copper from the smelting process as the main raw material, with heavy oil and coal used as fuel and oxygen, quartz sand, and other auxiliary materials used to produce anode copper as the main product (sent to the electrolytic process).

## Reference product
- copper: 1200; measured
  Blister copper(98.50%)

## Inputs
All rows: measured
- Activated coke: 2.4
  Activated coke需要补充
- Anodes (used): 210
  Anodes (used)|
  Self-produced
- Black copper（90% Cu）: 1350
  Black copper|90%copper需要补充
- clay: 5.9
  Clay bricks
- Hard coal, at consumer EU-27: 23.8
  Hard coal
- heavy fuel oil: 85.5
  Heavy fuel oil (1.0wt.% S)
- magnesium: 5.9
  Magnesium powder
- oxygen: 0.3
  Oxygen (gaseous)
- quartz sand: 48.8
  Quartz sand(90%)
- Sodium silicate: 9.6
  Sodium silicate需要补充
- transport in t*km,transport in t*km: 13.0828
  Transport

## Outputs
All rows: measured
- mineral waste (ash): 31.9
  Ash |To zinc recovery
- particles (PM2.5 - PM10): 1.4
  Dust|需要补充
- Slag: 190.2
  Slag|To smelting
- mineral waste (ash): 0.1
  Ash|Emission into the air
- carbon dioxide: 151.7
  Emission into the air

## Deviations from the LCI method approaches
Using the LCA-ReCiPe 2016 (Heijungs et al., 2017) characterization and normalization method (the midpoint and endpoint method), the life cycle inventory is converted into impact scores in multiple fields.

## Data selection and combination
foreground data and background data.

## Data treatment and extrapolations
GaBi 9.0 software is adopted to calculate the inventory, resource consumption, and waste emissions of the various copper-based mixed-waste recovery processes per unit mass.

## Review details
Inventory: The internal review was done by several iteration steps concerning raw data validation, raw data documentation, representativity, completeness and consistency of modelling with regard to ISO 14040 and 14044.; Documentation: The review of the documentation was performed by Ecobilan and is in compliance with ISO 14040 and 14044. The data set documentation is correct in view of the appropriateness of the information provided. It includes all relevant information in view of data quality and scope of application of the respective LCI result.

## Data sources
- Zhang, W. et al. Analyzing the environmental impact of copper-based mixed waste recycling-a LCA case study in China. Journal of Cleaner Production 284, 125256 (2021).
