# cement production|cement, portland fly-ash cement, 52.5MPa|dry rotary kiln|Sewage sludge

Dataset: ILCD process, Unit process, black box
Geography: CN
Classification: Materials production / Other mineralic materials
Generated by: Siqi Yang
Amounts: no units in this file; such an amount is in the reference unit of its flow, which a separate flow dataset defines
copyright: false

## General comment
Dry rotary kiln scenarios with 100% cement kiln dust recycling technology were considered.

## Geography
Beijing and Chongqing

## Model description
Management of 1 ton Portland fly ash cement (P.F 52.5) was chosen.
Dry rotary kiln scenarios with 100% cement kiln dust recycling technology were considered. Processes of infrastructure of each scenario, road transport of raw material to cement production site, direct emissions, sewage treatment, raw material and energy production, and electricity recovery from dry rotary kiln scenarios are included.

## Reference product
- cement, portland fly-ash cement, 52.5MPa: 1000
  Portland fly ash cement (P.F 52.5)

## Inputs
- limestone, crushed, for mill: 1160; article inperiodical
  Limestone
- hard coal: 94.69; article inperiodical
  Bituminous coal
- iron, powder: 1.7; article inperiodical
  lron powder
- gypsum (desulphurized): 50; article inperiodical
  Gypsum
- ash: 170; article inperiodical
  Coal ash, namely fly ash.
- sandstone: 6.1; article inperiodical
  Sandstone
- electricity, medium voltage: 372.204; article inperiodical
  Electricity
- Water (fresh water): 180; article inperiodical
  Fresh water consumption
- crude oil; 42.3 MJ/kg: 0.35; article inperiodical
  Oil
- sewage sludge, dried: 83.55; measured
  Dewatered sludge. The sewage sludge used in Beijing cement production site is coming from Jiuxianqiao sewage treatment plant in Beijing City. The calorific value of sewage sludge is 3800 kcal/kg-dry mass. The data for heavy metal emissions from sludge were used from the cement production process at the Runjiang cement production site in Chongqing, China.

## Outputs
All rows: article inperiodical
- sulfur dioxide: 0.09
  SO2
- hydrogen chloride: 0.00528
  HCI
- carbon dioxide: 760
  CO2
- hydrogen fluoride: 0.00025
  HF
- carbon monoxide: 0.15
  CO
- Nitrogen oxides: 0.93
  NOx
- zinc: 1e-5
  Zn
- arsenic: 5.09e-8
  As
- nickel: 1e-5
  Ni
- cadmium: 7.92e-7
  Cd
- lead: 0.0002
  Pb
- mercury: 0.00024
  Hg
- chromium: 5.28e-6
  Cr
- copper: 3.02e-6
  Cu
- 2,3,7,8-tetrachlorodibenzo-p-dioxin: 3.08e-10
  Dioxins (TEQ-g)
- hydrogen sulfide: 9.36e-6
  H2S
- ammonia: 1.2e-5
  NH3
- methyl mercaptan: 1.2e-6
  Methyl mercaptan
- particles (> PM10): 0.036
  Particulates. The particle size is not specified. Here we treat it as PM>10.

## Data selection and combination
China data have been used as much as possible. Where China data were not available, data and relevant background data from Europe were used (Ecoinvent centre, 2007). Based on the data from China, the average yearly monitoring data of cement production processes (including energy, water, and raw material consumption, direct emissions) of Beijing cement production site in China were used(http://www.jiancai.hk/news/show/265/).
Data on heavy metal gas emissions from general cement in Beijing cement production site is coming from report (2007). The data for heavy metal emissions from sludge were used from the cement production process at the Runjiang cement production site in Chongqing, China.

## Sampling procedure
The actual annual production of cement was around 2000,000 ton.

## Data sources
- Jinglan Hong & Xiangzhi Li. (2011). Environmental assessment of sewage sludge as secondary raw material in cement production – A case study in China. Waste Management 31, 1364–1371.
