# 天然气管道碳排放 ;长输天然气管道; 碳足迹分析

Dataset: ILCD process, Unit process, single operation
Geography: CN
Reference year: 2022
Classification: Unit processes / Energy carriers and technologies / Natural gas based fuels
LCI method principle: Attributional
LCI method approaches: Consequential
Generated by: Shikang Kang, 908798159@qq.com
Owner: 天工LCI数据工作小组
Review: Dependent internal review by 天工LCI数据工作小组
Amounts: no units in this file; such an amount is in the reference unit of its flow, which a separate flow dataset defines
copyright: false
licenseType: Free of charge for all users and uses

## General comment
提出了一种天然气管道的生命周期评价方法，以量化从建设到处置的碳排放量。该模型将天然气管道的碳排放分为制造、建设、运营和回收四部分。对于这四个阶段中的每一个阶段，材料生产和建设、设施建设和设备运行的碳排放量都进行了详细计算。

## Geography
中国实际管道数据

## Time period
文献发表时间

## Technology and included processes
天然气管道在其生命周期内所需的能量输入与温室气体排放之间的关系需要使用一系列输入参数来计算，例如管道经过地区的电网、压缩机战的布局、管道的长度和直径。因此，需要将这些参数用作计算碳足迹的模型输入。该模型包含四个排放计算模块：制造、建造、运营和回收。

## Technical purpose
此数据集描述了针对长输天然气管道的生命周期评价方法。该方法用于量化从建设到处置整个管道生命周期的碳排放量。这类数据集通常用于环境评估和碳足迹分析，以了解天然气输送基础设施的环境影响。它适用于能源行业的大规模环境评价，特别是对于管理和运营天然气管道的公司。

## Reference product
- carbon dioxide (fossil): 7.31e8; log-normal; software or database
  原文已区分为fossil。该过程来自第一阶段碳排放

## Inputs
- natural gas: 7.31e8; log-normal
  文献中没有input多少天然气，假设(1:1)

## Outputs
- carbon dioxide (fossil): 2.29619e6; log-normal; software or database
  原文已区分为fossil。该过程来自第二阶段碳排放
- carbon dioxide (fossil): 1.13e8; log-normal; software or database
  原文已区分为fossil。该过程来自第三阶段碳排放
- carbon dioxide (fossil): 2.65e7; log-normal; software or database
  原文已区分为fossil。该过程来自第四阶段碳排放

## Data selection and combination
管道主要分为干线和支线，埋设。干线从矿场附近的输气初始站开始，到最终的配气站结束。各站按功能主要分为压缩机站和输气站，以及受气站和配气站等

## Data treatment and extrapolations
利用所提出的模型计算了26条实际天然气管道的碳排放量，并进行了深入分析

## Use advice
使用此数据集进行生命周期评估时，应考虑天然气管道生命周期的特定阶段，如制造、建设、运营和回收。确保输入参数（如所在地区的电网、压缩机站布局、管道长度和直径）在模型中得到准确反映。适当应用数据集的四个排放计算模块，分别针对每个阶段。验证数据与相关地理区域的吻合度，并在将模型应用于原始分析未涵盖的管道时调整参数。同时，考虑文献发布时间以确定数据的相关性和有效性，以供当前评估使用。

## Review details
清单： 内部审查通过几个迭代步骤完成，涉及原始数据验证、原始数据记录、代表性、完整性、与 ISO 14040 和 14044 有关的建模的一致性。

## Data sources
- Xu, S. et al. Life cycle assessment of carbon emission from natural gas pipelines. Chemical Engineering Research and Design 185, 267–280 (2022).
