# 氧化铝生产 ; 冶金用氧化铝 ; 拜耳法 ; 铝土矿

Dataset: ILCD process, Unit process, single operation
Geography: CN
Reference year: 2020
Classification: Unit processes / Materials production / Non-energetic raw materials
Generated by: 熊若熙, xiongrx0126@163.com
Owner: 天工LCI数据工作小组
Review: Dependent internal review by 天工LCI数据工作小组
Amounts: no units in this file; such an amount is in the reference unit of its flow, which a separate flow dataset defines
copyright: false
licenseType: Free of charge for all users and uses

## General comment
通过拜耳法生产的氧化铝主要用于冶金目的。它作为电解过程中冶金厂生产铝的基础原料。

## Time period
文献发表日期

## Reference product
- aluminium oxide, metallurgical: 1000; missing unimportant
  alumina

## Inputs
All rows: missing unimportant
- electricity, high voltage, aluminium industry: 968.4
- bauxite: 2480
- lime: 32
- Sodium hydroxide: 61.5
- steam, in chemical industry: 2430
  Steam
- natural gas, high pressure: 72.5
  Natural gas
- Water, unspecified natural origin: 2000

## Outputs
All rows: missing unimportant
- wastewater, average: 791
  Waste water
- Residue: 758
  Filter residue 搜不出来
- Dust: 0.29
- ammonia: 0.0125
- chromium: 0.00132
  Chromium
- Bromine: 0.00115
- carbon monoxide (fossil),carbon monoxide (fossil): 1.16
- hydrogen fluoride: 0.00157
- hydrogen sulfide: 0.00644
- sulfur dioxide: 3.41
- Propane: 0.0252
- Xylene: 0.0917
- particles (PM2.5 - PM10): 0.161
  Particulate matters 10
- particles (PM2.5): 1.03
  Particulate matters 2.5
- BOD5, Biological Oxygen Demand: 0.00952
  Biochemical oxygen demand
- chemical oxygen demand: 0.26

## Use advice
该数据集代表了使用拜耳法从铝土矿中生产冶金级氧化铝的过程。用户需要注意的是，此数据排除了氧化铝潜在的回收利用，专注于原生产阶段。在为该材料建立使用阶段行为模型时，考虑地理位置和技术适用性是至关重要的，因为区域能源来源的环境影响和生产设施的排放标准直接影响该过程。

## Review details
清单： 内部审查通过几个迭代步骤完成，涉及原始数据验证、原始数据记录、代表性、完整性、与 ISO 14040 和 14044 有关的建模的一致性。

## Data sources
- Zhu, X., Jin, Q. & Ye, Z. Life cycle environmental and economic assessment of alumina recovery from secondary aluminum dross in China. J. Clean. Prod. 277, (2020).
