# 市政污泥处理与处置;湿污泥 含水率80.94%;堆肥

Dataset: ILCD process, Unit process, single operation
Geography: HF-AH-CN
Classification: Unit processes / End-of-life treatment / Waste water treatment
Functional unit: The residual sludge moisture content of Hefei Wangtang Sewage Treatment Plant is 80.94%, and the functional unit is 1t of residual sludge.
Generated by: 金思甜, 2331276@tongji.edu.cn
Owner: 天工LCI数据工作小组
Review: Dependent internal review by 天工LCI数据工作小组
Amounts: no units in this file; such an amount is in the reference unit of its flow, which a separate flow dataset defines
copyright: ['opt4ROkqig']
licenseType: Free of charge for all users and uses

## General comment
堆肥工艺指的是高温好氧堆肥。

## Geography
合肥望塘污水处理厂

## Technology and included processes
在堆肥过程中，微生物在新陈代谢时，约有 2/3 的碳转化成为二氧化碳，有 13.16%的氮转化成氨。

## Technical purpose
合肥市望塘污水处理厂的残留污泥主要用于土壤改良的堆肥过程。含水率为80.94%的污泥可以被加工成对农田、绿化工程乃至土地复垦有益的堆肥。该数据代表了处理和处置1吨湿污泥所伴随的环境影响。

## Reference product
- Sludge: 1000; input; estimated
  1t含水率为80.94%的剩余污泥

## Outputs
All rows: calculated
- carbon dioxide (biogenic): 143.55
  原文未区分biogenic和fossil，根据专家判断此处为biogenic。
- ammonia: 1.051
- Nitrogen oxides: 0.001292
- hydrogen sulfide: 0.01944
- sulfur dioxide: 0.002648

## Use advice
使用这些生命周期评估数据进行市政污泥处理与堆肥处置时，必须考虑污泥组成和法规的区域差异。技术适用性特定于合肥市望塘污水处理厂污泥的特性，其他地区或工厂的污泥可能导致不同的结果。将这些数据外推到其他情境应谨慎处理，并且在评估中应明确考虑除堆肥之外的任何回收或下游利用途径。

## Review details
清单： 内部审查通过几个迭代步骤完成，涉及原始数据验证、原始数据记录、代表性、完整性、与 ISO 14040 和 14044 有关的建模的一致性。

## Data sources
- 齐星昊. 基于生命周期评价的典型剩余污泥处理方法的环境影响比较研究[D].河南师范大学,2020.
