# 铝箔生产;铝箔;润滑油、铝

Dataset: ILCD process, Unit process, single operation
Geography: AH-CN
Classification: Materials production / Metals and semimetals
Functional unit: Produce 1kg aluminum foil
LCI method principle: Attributional
Generated by: 陈鑫, xinchen@mail.nankai.edu.cn
Owner: 天工LCI数据工作小组
Review: Dependent internal review by 天工LCI数据工作小组
Amounts: no units in this file; such an amount is in the reference unit of its flow, which a separate flow dataset defines
copyright: false
licenseType: Free of charge for all users and uses

## General comment
该过程生产的铝箔用途广泛，包括包装、隔热、电磁屏蔽和电导性等领域。可用于食品行业的包装、烹饪和储存易腐物品，以及电子产业中的部件屏蔽。过程中使用的润滑油专为铝箔生产中的高速机械设计，以保证设备操作的平滑和维护。

## Geography
安徽美信铝业有限公司

## Reference product
- Aluminum foil: 1
  数据来源于安徽美信铝业有限公司环境影响评价报告

## Inputs
- aluminium: 1.11
  数据来源于安徽美信铝业有限公司环境影响评价报告
- lubricating oil: 0.0267
  数据来源于安徽美信铝业有限公司环境影响评价报告
- Electricity: 2.6172
  数据来源于安徽美信铝业有限公司环境影响评价报告
- transport in t*km: 0.209
  数据来源于安徽美信铝业有限公司环境影响评价报告

## Outputs
- non-methane volatile organic compounds: 0.000404
  数据来源于安徽美信铝业有限公司环境影响评价报告
- chemical oxygen demand: 7.9e-5
  数据来源于安徽美信铝业有限公司环境影响评价报告
- biological oxygen demand: 7.9e-5
  数据来源于安徽美信铝业有限公司环境影响评价报告

## Data selection and combination
数据来源于环境影响评价报告

## Use advice
使用这些数据的用户在进行生命周期评估（LCA）时必须考虑铝生产的整个生命周期。这包括原铝的提取和加工、制造阶段使用的润滑剂，以及消费后铝箔的潜在回收或处置。应仔细考虑环境性能评估报告中详细的能源和材料输入，以准确反映生产过程的环境影响。

## Review details
清单： 内部审查通过几个迭代步骤完成，涉及原始数据验证、原始数据记录、代表性、完整性、与 ISO 14040 和 14044 有关的建模的一致性。

## Data sources
- Yin, R., Hu, S. & Yang, Y. Life cycle inventories of the commonly used materials for lithium-ion batteries in China. Journal of Cleaner Production227, 960–971 (2019).
