# raw meal preparation|raw meal

Dataset: ILCD process, Unit process, single operation
Geography: CS-HUN-CN
Classification: Materials production / Other mineralic materials
Generated by: Siqi Yang
Amounts: no units in this file; such an amount is in the reference unit of its flow, which a separate flow dataset defines
copyright: false

## General comment
Raw Meal Preparation. The limestone, clay, and laterite are successively crushed by a hammer crusher and an impact crusher to obtain particles with a diameter particle size below 20 mm. Next, all the raw materials, except for the gypsum, are placed into the raw mill at corresponding ratios and are subsequently milled to a mixture, which is called “the raw meal”. The raw meal is dried in cyclone separators at an atmosphere filled with high-temperature gas from the kiln. Electricity is the primary energy source in this process.
Modified granulated copper slag (MGCS) preparation is a crucial phase. The original copper slag was procured from a smelter of Boliden Mineral AB, Stockholm, Sweden. This was ground in the raw mill to form granulated copper slag (GCS) with a particle size lower than 0.60 mm. The CaO (99.9% pure) was supplied by Changsha Danuo Building Materials Co., Ltd., Changsha, China. The procedure of MGCS production is as follows. The GCS and CaO (20 wt.%) were charged in the furnace while the heating temperature was raised to approximately 1550 ◦C, at which point the mixtures were completely molten. The water-quenching method was then adopted to form the MGCS. The entire process was carried out within a nitrogen atmosphere with a flow rate of 150 mL/min. This procedure was conducted in the Changsha Research Institute of Mining and Metallurgy Co., Ltd., Changsha, China. The produced MGCS was eventually transported by trucks to the cement plant, which uses electricity as the main energy source.

## Geography
A typical cement plant in Changsha, Hunan Province, China

## Model description
The functional unit (FU) is defined as 1 kg blended cement with a compressive strength of 42.9 MPa.

## Reference product
- raw meal: 1000
  Raw meal

## Inputs
All rows: measured
- limestone, crushed, for mill: 941.658
  Limestone
- clay: 13.5107
  Clay
- laterite, mineral: 44.8311
  Laterite
- crude oil; 42.3 MJ/kg: 0.00103378
  Crude oil
- electricity, medium voltage: 68.9048
  Electricity

## Outputs
- particles (> PM10): 2.90686; measured
  PM. The particle size is not specified. Here we treat it as PM>10.
- carbon dioxide: 0.00190379; measured
  CO2
- carbon monoxide: 1.0747e-5; measured
  CO
- Nitrogen oxides: 1.8833e-5; measured
  NOX

## Deviations from the LCI method approaches
Some data related to the background system were obtained from the Ecoinvent 3.1 database.

## Data selection and combination
The inventory data of the foreground system were directly collected in the studied cement plant located in Changsha, Hunan Province, China.

## Data sources
- Qinli Zhang, Bingyi Zhang, & Daolin Wang. (2022). Environmental Benefit Assessment of Blended Cement with Modified Granulated Copper Slag. MATERIALS, 15(15).
