# Sediment Remediation;In-situ Remediation;Activated Carbon Remediation;Activated carbon seeding

Dataset: ILCD process, Unit process, single operation
Geography: US
Classification: Other Services / Repair and maintenance
Generated by: Wang Ning, wang_ning@caep.org.cn
Owner: Tiangong LCI Data Working Group
Review: Dependent internal review by Tiangong LCI Data Working Group
Amounts: no units in this file; such an amount is in the reference unit of its flow, which a separate flow dataset defines
licenseType: Free of charge for all users and uses

## General comment
Spreading and mixing activated carbon into the substrate

## Technical purpose
This process describes the application of activated carbon remediation. It is specifically used for in-situ sediment remediation. Through seeding, spreading and mixing activated carbon into contaminated sediments, this method is applied to adsorb pollutants for environmental restoration purposes.

## Reference product
- Activated Carbon: 5500; input; article inperiodical

## Use advice
When utilizing this data set for life cycle assessment of in-situ sediment remediation, pay attention to sourcing of activated carbon and the specific conditions of the contaminated site, such as the type and concentration of pollutants. Consider the effective service life of the activated carbon and the regeneration or replacement frequency. Ensure that the assessment includes potential environmental impacts of the activated carbon production and transport to the remediation site.

## Review details
Inventory: The internal review was done by several iteration steps concerning raw data validation, raw data documentation, representativity, completeness and consistency of modelling with regard to ISO 14040 and 14044.
