# 土壤修复;异位修复;生物堆;工程实施;堆体养护

Dataset: ILCD process
Geography: KR
Classification: Other Services / Repair and maintenance
Generated by: Sang Chunhui, sangch@mail.bnu.edu.cn
Owner: Tiangong LCI Data Working Group
Review: Dependent internal review by Tiangong LCI Data Working Group
Amounts: no units in this file; such an amount is in the reference unit of its flow, which a separate flow dataset defines
licenseType: Free of charge for all users and uses

## General comment
This soil remediation process, involving ex-situ treatment using biopiles, is intended for the engineered implementation and maintenance of treatment systems that require continuous oxygen supply through forced ventilation for 514 days without interruption. It is applicable for environmental restoration projects focusing on bioremediation of contaminated soils.

## Reference product
- clean soil: 1000; article inperiodical

## Inputs
- Electricity: 229320; article inperiodical

## Use advice
Data set users must ensure that the referenced soil remediation process is applicable to the specific soil contamination scenario under assessment. Attention should be given to the biopile construction, maintenance, and oxygenation methods outlined for this duration of 514 days. Users should consider local environmental conditions, contaminant type, and concentration when applying this data. Exclusion or inclusion of subsequent soil recycling or disposal should be justified based on the study goals.

## Review details
Inventory: The internal review was done by several iteration steps concerning raw data validation, raw data documentation, representativity, completeness and consistency of modelling with regard to ISO 14040 and 14044.
