# cement milling|cement, alternative constituents 21-35%|shaft kiln

Dataset: ILCD process, Unit process, single operation
Geography: CN
Classification: Materials production / Other mineralic materials
Generated by: Siqi Yang
Amounts: no units in this file; such an amount is in the reference unit of its flow, which a separate flow dataset defines
copyright: false

## General comment
The clinker from the cement kiln, mixed together with gypsum and other additives, is milled into fine particles of a particular size in the cement milling sub-system, which are a final product of cement. This phase consists entirely of physical processes; no chemical processes are involved.

## Model description
The system boundary is the milling phase yielding cement.

## Reference product
- cement, alternative constituents 6-20%: 1000
  Cement

## Inputs
- clinker: 867.679; measured
  Cement clinker
- mixed materials, mineral: 91.829; measured
  Mixed materials
- gypsum (desulphurized): 46.276; measured
  Gypsum
- Water (fresh water): 15.184; measured
  Water (water content): water contained in the input materials.

## Outputs
- particles (> PM10): 5.785; measured
  Dust. The particle size is not specified. Here we treat it as PM>10.
- wastewater, unpolluted: 15.184; measured
  Water

## Sampling procedure
The annual output for the cement enterprise with a shaft kiln production system investigated was designed for 100,000 tons of clinker. The overall features of the shaft kiln production line include high energy consumption, limited production capacity, low labor productivity, and a large amount of dust emissions. The dynamic metabolic analysis of the shaft kiln production line is conducted for a unit of time of 1 h at a normal production level.

## Data sources
- Dan Hu, Zhen Guo, Zhen Wang, & Qiang Xiao. (2015). Metabolism analysis and eco-environmental impact assessment of two typical cement production systems in Chinese enterprises. Ecological Informatics 26, 70–77.
