# 生物质炭;花生壳生物质炭生产;花生壳研磨热解

Dataset: ILCD process, Unit process, black box
Geography: JS-CN
Reference year: 2024
Classification: Unit processes / Other Services / Repair and maintenance
Generated by: 杨欣桐, yangxt@caep.org.cn
Owner: 天工LCI数据工作小组
Review: Dependent internal review by 天工LCI数据工作小组
Amounts: no units in this file; such an amount is in the reference unit of its flow, which a separate flow dataset defines
copyright: false
licenseType: Free of charge for all users and uses

## General comment
以花生壳为原料，经过磨碎预处理后，货物转运100 km至热解装置解热，最终生成用于PRB墙体填充材料的生物质炭

## Time period
文献发表时间

## Technical purpose
通过花生壳研磨和热解工艺生产的生物质炭，其预期用途是作为渗透性反应栅（PRB）墙体的填充材料，PRB墙体用于地下水修复系统中去除污染物。

## Reference product
- Biochar: 29360

## Inputs
- Peanut shell: 82208
- Electricity: 108655
- transport in t*km: 8219.7

## Use advice
在使用此生物质炭生产过程的LCA数据集时，应将原料到热解单元的运输距离作为一个重要参数来考虑。必须对运输过程中的排放进行核算。此外，确保妥善模拟生物质炭的使用终生场景，以及由于在PRB墙体应用而可能避免的排放或使用肥料的潜在信用。用户还应验证数据集是否是最新的，并咨询文献发表时间，以确保其与当前技术标准的相关性。

## Review details
清单： 内部审查通过几个迭代步骤完成，涉及原始数据验证、原始数据记录、代表性、完整性、与 ISO 14040 和 14044 有关的建模的一致性。

## Data sources
- Ding, D. et al. Assessing the environmental impacts and costs of biochar and monitored natural attenuation for groundwater heavily contaminated with volatile organic compounds. Science of The Total Environment 846, 157316 (2022).
