# cement production|cement, ordinary portland cement, 42.5MPa|new dry process rotary kiln, incineration of municipal waste|fly ash

Dataset: ILCD process, Unit process, black box
Geography: CN
Reference year: 2008
Classification: Materials production / Other mineralic materials
Generated by: Siqi Yang
Amounts: no units in this file; such an amount is in the reference unit of its flow, which a separate flow dataset defines
copyright: false

## General comment
Laboratory data. Urban domestic waste produces cement as a secondary fuel.

## Model description
Using the usability of cement with a compressive strength of 42.5 MPa after 28 days, which corresponds to 1 kg, as the functional unit, i.e. 1FU = 42.5 kg MPa. The evaluation scope covers raw material preparation, clinker calcination, and cement production. The environmental impact caused by the consumption of clay resources is not considered. Iron powder is a correction material and its environmental impact is not considered. The waste mainly includes nitrogen oxides, sulfur dioxide, carbon dioxide, and dust in the output of the product system.

## Reference product
- cement, ordinary portland cement, 42.5MPa: 1000
  42.5 Ordinary silicate cement

## Inputs
- limestone, crushed, for mill: 1104.4
  Limestone
- gypsum (desulphurized): 58.7
  Gypsum
- ash: 362.4
  Fly ash
- hard coal: 70.731
  Standard coal. The original data is 0.065717kg standard coal, here converted to hard coal, the conversion formula is 1kg hard coal = 0.929kg standard coal.
- electricity, medium voltage: 343.8
  Electricity

## Outputs
- particles (> PM10): 0.324
  Dust, with an unspecified particle size, is treated as PM > 10 micrometers in diameter.
- sulfur dioxide: 0.3893
  Sulfur dioxide
- Nitrogen oxides: 1.557
- carbon dioxide: 747.22
  Carbon dioxide

## Data selection and combination
Based on the analysis of urban solid waste industry and calorific value in China, data of input and output for the determined product system were collected, calculated and quantified.

## Data sources
- 于淼. (2008). 黑龙江水泥工业可持续发展研究 [硕士, 哈尔滨工业大学].
