# 铝电解 ; 液态原铝 ; 预焙 ; 冶金用氧化铝 ; 2007年

Dataset: ILCD process, Unit process, single operation
Geography: CN
Reference year: 2021
Classification: Unit processes / Materials production / Metals and semimetals
Generated by: 蔡梓萌, caizm6178@163.com
Owner: 天工LCI数据工作小组
Review: Dependent internal review by 天工LCI数据工作小组
Amounts: no units in this file; such an amount is in the reference unit of its flow, which a separate flow dataset defines
copyright: false
licenseType: Free of charge for all users and uses

## General comment
所述工艺涉及使用预焙法生产冶金用氧化铝的液态原铝。这个工业过程通常用于生产应用于建筑、交通、电力系统和消费品制造等多个行业的铝材。2007年的数据反映了当时行业的技术状况，可用于指导历史分析选择技术或与新技术比较过程的评估。

## Time period
文献发表日期

## Reference product
- aluminium, primary, liquid: 1000; software or database

## Inputs
All rows: software or database
- Integrated AC power consumption: 50123.8
- aluminium oxide, metallurgical: 1929.63
- fluoride salt: 25.58
- anode, prebake, for aluminium electrolysis: 437.09
- Water, unspecified natural origin: 5.36

## Data selection and combination
本研究的数据参考了PA、SA、电力等背景数据的LCA数据。PA数据来自统计数据源，SA数据主要来自文献。背景数据主要来自中国科学院生态环境研究中心CASRCEES 2018建立的中国本地化LCA数据库，涵盖能源、材料、交通、废物管理等LCA数据。

## Use advice
此LCA数据集的使用应考虑其技术和时间相关性。用户必须注意，数据涉及2007年预焙电解铝生产过程，可能不反映当前技术或环境条件。在将此数据集应用于更广泛的环境影响研究时，用户应计入自2007年以来可能发生的技术进步和排放或能效变化。此外，研究人员应确保来自CAS RCEES 2018数据库的背景LCA数据与其研究目标兼容，并且应适当处理研究与数据来源之间可能存在的地理、技术或时间范围的显著差异。

## Review details
清单： 内部审查通过几个迭代步骤完成，涉及原始数据验证、原始数据记录、代表性、完整性、与 ISO 14040 和 14044 有关的建模的一致性。

## Data sources
- Ding, N., Liu, N., Lu, B. & Yang, J. Life cycle greenhouse gas emissions of aluminum based on regional industrial transfer in China. J. Ind. Ecol. 25, 1657–1672 (2021).
