# Groundwater remediation ; In-situ remediation ; Cement grout vertical barrier ; Construction preparation ; Material transportation

Dataset: ILCD process, Unit process, single operation
Geography: US
Classification: Other Services / Repair and maintenance
Generated by: Xiao Meng, xiaomeng@mail
Owner: Tiangong LCI Data Working Group
Review: Dependent internal review by Tiangong LCI Data Working Group
Amounts: no units in this file; such an amount is in the reference unit of its flow, which a separate flow dataset defines
licenseType: Free of charge for all users and uses

## General comment
Transport limestone, concrete, sand, and gypsum materials required for the construction of a cement grout vertical barrier to the site.

## Geography
For this project, a Superfund location at the Brookhaven National Laboratory (BNL) is studied. This particular case was chosen because it is representative of the scale and scenario where soil grouting would be used. It is also one of only a few sites where CS grouting has been used for full scale remediation. BNL has served as a production facility for research and development of radioisotopes for decades. The design of some of the facilities failed to provide adequate safety measures against the spread of radioactivity to the soils and groundwater beneath them and as a result, BNL was added to the Superfund National Priorities List in 1989.

## Technical purpose
The provided data set describes the in-situ remediation process specifically for the construction of a cement grout vertical barrier, which is used for the containment and isolation of contaminated soils and groundwater. This remediation technique is applicable in cases where soil grouting is necessary to prevent the spread of hazardous substances such as radioactivity from former industrial sites like the Brookhaven National Laboratory (BNL), which requires containment due to historical contamination.

## Reference product
- Equipment and Materials Arriving on Site: 37510; measured
  运输到场的相关材料（石灰石、混凝土、黏土和石膏）

## Inputs
- transport in t*km: 1139.31; software or database

## Use advice
When utilizing this data set for Life Cycle Assessment, users must consider the origin and transport distances of materials such as limestone, concrete, sand, and gypsum. For an accurate representation, the specific conditions of the Superfund site at Brookhaven National Laboratory should be accounted for, including the scale of the project and the remediation scenario. Users should include considerations for methodological differences in regional practices and ensure that the technological applicability of the data, including equipment and construction preparation processes, aligns with their specific project needs.

## Review details
Inventory: The internal review was done by several iteration steps concerning raw data validation, raw data documentation, representativity, completeness and consistency of modelling with regard to ISO 14040 and 14044.

## Data sources
- Gallagher, P. M., Spatari, S. & Cucura, J. Hybrid life cycle assessment comparison of colloidal silica and cement grouted soil barrier remediation technologies. Journal of Hazardous Materials 250–251, 421–430 (2013).
