# 废聚苯乙烯（PS）回收; 再生聚苯乙烯; 机械回收; 废聚苯乙烯

Dataset: ILCD process, Unit process, black box
Geography: TJ-CN
Reference year: 2016
Valid until: 2016
Classification: Unit processes / End-of-life treatment / Material recycling
Functional unit: 1 ton of waste Polystyrene
Generated by: 程晓宇, xiaoyucheng@email.ncu.edu.cn
Owner: 天工LCI数据工作小组
Review: Dependent internal review by 天工LCI数据工作小组
Amounts: no units in this file; such an amount is in the reference unit of its flow, which a separate flow dataset defines
copyright: false
licenseType: Free of charge for all users and uses

## General comment
校准后，选择2016年的相应工艺数据来评估废塑料机械回收的环境影响。

## Geography
ZEDA位于天津西南部，是中国最大的可再生资源加工产业园区。

## Time period
文献中只说明是2016年。

## Technical purpose
本数据集描述的再生聚苯乙烯用于作为原生聚苯乙烯的替代原料重新纳入生产循环。它主要用于生产各种塑料产品，如包装材料、绝缘材料和家居用品，前提是材料质量允许。

## Reference product
- Polystyrene wastes: 1000; input; measured

## Inputs
- Water for industrial use: 340; measured
- Electricity: 944.568; measured
- natural gas; 44.1 MJ/kg: 40.1; measured

## Outputs
All rows: measured
- particles (>PM10): 0.45
- non-methane volatile organic compounds: 0.55
- Suspended solids, unspecified,Suspended solids, unspecified: 0.00821
- chemical oxygen demand: 0.08033
- biological oxygen demand: 0.0108
- Ammonia Nitrogen: 0.00489
- Phosphorus: 0.0004
- Oils, unspecified: 0.0003
- waste water - untreated: 227
- General Solid Waste: 77.9
- Hazardous Solid Waste: 3.02
- Recycled Polystyrene granules: 918.1

## Data selection and combination
2016年，再生塑料产量为327千吨，涵盖了所有主要塑料类别。

## Data treatment and extrapolations
校准

## Use advice
使用此数据集时，用户应考虑数据的特定年份（2016年）和工艺的地理位置（中国天津的ZEDA）。确保回收过程数据与评估产品系统及其地理市场的相关性非常重要。对于不同的时间或地理背景，可能需要进行方法论上的调整。此外，用户必须考虑生命周期末期的包含，特别是与废弃或焚烧相比，废聚苯乙烯机械回收潜在的环境效益。

## Review details
清单： 内部审查通过几个迭代步骤完成，涉及原始数据验证、原始数据记录、代表性、完整性、与 ISO 14040 和 14044 有关的建模的一致性。

## Data sources
- Chen, Y. et al. Life cycle assessment of end-of-life treatments of waste plastics in China. Resources, Conservation and Recycling 146, 348–357 (2019).
