# Dry sand Production|Sand and gravel coarse crushing|Jaw Crushing Technology

Dataset: ILCD process, Unit process, single operation
Geography: HAIN-CN
Reference year: 2020
Classification: Materials production / Other mineralic materials
Generated by: Cui hang, Cuihang0716@163.com
Review: Dependent internal review by Tiangong LCI Data Working Group
Amounts: no units in this file; such an amount is in the reference unit of its flow, which a separate flow dataset defines
copyright: false

## General comment
Primary crushing (jaw crushing) and screening

## Technology and included processes
The material is fed first, then crushed by jaw crusher, after crushing, it goes into vibrating screen for screening, and the crushed stone obtained goes into the finished product yard through conveyor belt. Other parts after screening are sent to cone crusher (secondary crushing) through conveyor belt

## Reference product
- gravel: 41870; measured

## Inputs
- gravel: 51370; measured
- electricity mix: 396; measured

## Outputs
- sand: 8373; measured
  经粗碎后产生的碎石
- Sludge: 790; measured
- particles (> PM10): 4; measured

## Data selection and combination
The process and inventory data for dry sand are derived from empirical data provided by the project

## Review details
Inventory: The internal review was done by several iteration steps concerning raw data validation, raw data documentation, representativity, completeness and consistency of modelling with regard to ISO 14040 and 14044.; Documentation: The review of the documentation was performed by Ecobilan and is in compliance with ISO 14040 and 14044. The data set documentation is correct in view of the appropriateness of the information provided. It includes all relevant information in view of data quality and scope of application of the respective LCI result.

## Data sources
- 陵水海岛混凝土有限公司干法制砂项目
