# 畜禽养殖 ; 饲料作物种植阶段 ; 肉鸡散户

Dataset: ILCD process, Unit process, single operation
Geography: CN
Reference year: 2014
Classification: Unit processes / Materials production / Agricultural production means
Functional unit: 1kg chicken
Generated by: 杨瑞, 1632707028@qq.com
Owner: 天工LCI数据工作小组
Review: Dependent internal review by 天工LCI数据工作小组
Amounts: no units in this file; such an amount is in the reference unit of its flow, which a separate flow dataset defines
copyright: false
licenseType: Free of charge for all users and uses

## General comment
本文所讲的饲料主要为能量饲料，成分包括：玉米、小麦、大豆、高粱、稻 谷。实际上，在畜禽养殖过程中，畜禽饲料主要由玉米、小麦、大豆构成。饲料 作物种植阶段主要包括化肥生产阶段，玉米、大豆、小麦种植阶段。

## Geography
本研究于 2014~2015 年，针对畜禽饲养周期、肉料比、饲料配方、饲料消耗 量、煤和电的消耗量等，先后对山东省高密正大种猪场、莱西市知双奶牛场、即 墨市段泊岚镇姜家坡村养猪场、即墨市刘家庄镇畜禽养殖场、日照市莒县长岭镇 上官庄村、莒县寨里河镇东兴农牧公司、莒县峤山镇东辰奶牛场、莒县峤山镇刘 家义水养猪场、诸城市外贸有限责任公司凤凰父母代种鸭场，新疆阜康宏发养殖 专业合作社、九运街镇旭鸿蛋鸡合作社、九运街镇六运村自成养殖场、中澳控股 集团有限公司、德州市庆云县洼于村、山东省庆云县四柳社区肉牛养殖基地、德 州市庆云青年鸡养殖基地、庆云县永利禽业蛋鸡育成公司、庆云县兴晨青年鸡养 殖专业合作社、庆云县东泰肉鸡养殖专业合作社、河北省盐山县博远饲料有限公 司、盐山县大华人饲料有限公司、无棣县六和饲料有限公司、中澳东方希望饲料 公司等地进行了实地调研。

## Technology and included processes
本文将畜禽养殖生命周期 分为饲料作物种植、饲料加工、畜禽饲养、粪便处理、屠宰、运输等 6 个阶段。 畜禽养殖的生命周期具体流程如图 2-1 所示。由于部分数据的缺乏和基础条件的 限制，未对农药、地膜、饲料添加剂等生产、运输、使用进行分析，其他相关的 基础设施建设、运输工具生产、人力成本所引起的环境影响也不再考虑的范畴内。

## Technical purpose
本工业流程描述了肉鸡生产的生命周期，重点是畜禽养殖中的饲料作物种植阶段。作为主要饲料成分的能量饲料包括玉米、小麦、大豆、高粱和稻谷，它们被种植并应用于家禽养殖场、猪场、牛奶农场和饲料生产公司等设施。

## Reference product
- chicken: 1; measured
  作为参考定量，非实际输出

## Inputs
- Fertilizer: 0.0720647; calculated
- hard coal: 0.0122449; calculated

## Outputs
All rows: measured
- nitrous oxide: 0.0020596
  肉鸡散户
- nitrogen, total (excluding N2): 0.0059777
  肉鸡散户
- Nitrogen trioxide: 0.0021605
  肉鸡散户
- ammonia: 0.006665
  肉鸡散户
- hydrocarbons (unspecified): 3.77e-5
  肉鸡散户
- carbon monoxide (fossil): 0.0002802
  肉鸡散户
- sulfur dioxide: 0.0003397
  肉鸡散户
- carbon dioxide (fossil),carbon dioxide (fossil): 0.67723
  肉鸡散户

## Use advice
使用此数据集时，用户应考虑特定区域实践和数据收集期间（2014-2015年）。应注意包括饲料作物种植阶段内的所有环节，如化肥生产和种植作物（包括玉米、大豆、小麦）。建议数据用户考虑自数据收集以来可能发生的技术进步，并相应调整生命周期分析。

## Review details
清单： 内部审查通过几个迭代步骤完成，涉及原始数据验证、原始数据记录、代表性、完整性、与 ISO 14040 和 14044 有关的建模的一致性。

## Data sources
- 周景月. 基于生命周期评价的畜禽养殖环境影响分析. (青岛科技大学, 2017).
