# Milk production | Dairy breeding | Integrated maize silage planting and dairy cow breeding system (IPBS)

Dataset: ILCD process, Unit process, single operation
Geography: QD-SD-CN
Reference year: 2016
Classification: Materials production / Other mineralic materials
Functional unit: The 1t FPCM corrected for protein and fat content was selected as the evaluation unit
Generated by: Rui Yang, 1632707028@qq.com
Review: Dependent internal review by Tiangong LCI Data Working Group
Amounts: no units in this file; such an amount is in the reference unit of its flow, which a separate flow dataset defines
copyright: false

## General comment
In IPBS, part of the silage corn feed in the farms came from self-production, and the self-sufficiency rate of silage corn in 3 farms was 100%. In addition to silage rice, the feeding process of the two models is the same. The main inputs of production materials include feed, water, electricity, diesel, etc., and the products include milk, male calves, eliminated cows, beef cattle, etc. (Table 4). Specifically, dairy cattle feed mainly consists of concentrated feed (containing 30% soybean meal, 50% corn kernels, 10% wheat bran and 10% other substances), corn kernels, wheat bran, silage corn, cottonseed, oats, alfalfa and leveus chinensis. Some dairy farms also use wine grains and rapeseed meal, but the overall environmental impact can be ignored. The low amount of other substances in concentrated feed has negligible impact on the overall environment. Greenhouse gas emissions in dairy farming include emissions from the production of imported feed, emissions from farm energy consumption (e.g. on-farm feed processing, barn lighting and ventilation, water heating, milk refrigeration, etc.), intestinal gas emissions from dairy cows and barn gas emissions.

## Geography
A questionnaire survey was conducted on dairy farms in Qingdao, Shandong Province from July to August 2020.

## Time period
From 2016, Shandong began to implement the silage corn planting subsidy policy, is one of the earliest provinces to implement the subsidy policy, the subsidy standard is 20~50 yuan /t. In 2019, Shandong Province silage corn planting area reached 14,100 hm2, accounting for 7.3% of the country.

## Reference product
- milk: 1000
  FPCM (IPBS mode)

## Inputs
All rows: measured
- cow: 0.1111
  Lactating cows (IPBS mode)
- cow: 0.025
  Dry lactating cows (IPBS mode)
- cow: 0.072
  Breeding cattle (IPBS model)
- cow: 0.032
  Calf (IPBS mode)
- feed: 228
  Concentrated feed (IPBS mode)
- maize: 111
  Corn kernels (IPBS mode)
- bean pulp: 51
  Soybean meal (IPBS model)
- wheat bran: 43
  Wheat bran (IPBS mode)
- maize: 682
  Purchased silage corn (IPBS model)
- maize: 318
  Self-produced silage corn (IPBS model)
- alfalfa: 108
  Alfalfa (IPBS model)
- oat: 115
  Oats (IPBS mode)
- chinese wildrye: 290
  Leymus chinensis (IPBS mode)
- cottonseed: 38
  Cottonseed (IPBS mode)
- Electricity: 397.595
  IPBS mode
- Diesel: 0.002183
  IPBS mode
- water: 10.2
  IPBS mode
- Land Occupation: 13.975
  Land occupation (IPBS model)

## Outputs
- cow: 0.798; measured
  Selling male calves (IPBS model)
- cow: 11.445; measured
  Sale of Culled Cows (IPBS Model)
- beef: 2.209; measured
  Selling beef cattle (IPBS model)

## Review details
Inventory: The internal review was done by several iteration steps concerning raw data validation, raw data documentation, representativity, completeness and consistency of modelling with regard to ISO 14040 and 14044.; Documentation: The review of the documentation was performed by Ecobilan and is in compliance with ISO 14040 and 14044. The data set documentation is correct in view of the appropriateness of the information provided. It includes all relevant information in view of data quality and scope of application of the respective LCI result.

## Data sources
- 黄显雷, 师博扬, 张英楠, 龙昭宇, & 尹昌斌. 基于生命周期视角的种养一体化奶牛场环境经济效益评估. 中国环境科学 41, 3944–3955 (2021).
