# cement production|cement, portland cement|new suspension preheater kiln

Dataset: ILCD process, Unit process, single operation
Geography: CN
Classification: Materials production / Other mineralic materials
Generated by: Siqi Yang
Amounts: no units in this file; such an amount is in the reference unit of its flow, which a separate flow dataset defines
copyright: false

## General comment
In the cement-milling phase for the new suspension preheater (NSP) kiln, clinker, gypsum, and other mixed materials are milled together into particles of a certain size, and the final product as cement is formed. In contrast with the shaft kiln, the clinker in the NSP kiln stems mainly from the “continuous baking and grinding” phase (100 tons/h), with only a very small part originating from the clinker storage of the previous production phase (2 tons/h). The total clinker thus amounts to 102 tons/h. The input in the NSP kiln contains no water.
The NSP kiln is a production system of high efficiency, good production continuity, high output, and low overall energy consumption. In addition, with better dust collection and noise elimination equipment, the production system of the NSP kiln can greatly reduce the consumption of resources and pollutant emissions.

## Model description
The system boundary is the milling phase yielding cement.

## Reference product
- cement, common portland cement: 1000
  Cement

## Inputs
- clinker: 850.78; measured
  Cement clinker
- mixed materials, mineral: 100.092; measured
  Mixed materials
- gypsum (desulphurized): 50.046; measured
  Gypsum

## Outputs
- particles (> PM10): 1.001; measured
  Dust. The particle size is not specified. Here we treat it as PM>10.

## Data sources
- Dan Hu, Zhen Guo, Zhen Wang, & Qiang Xiao. (2015). Metabolism analysis and eco-environmental impact assessment of two typical cement production systems in Chinese enterprises. Ecological Informatics 26, 70–77.
