# 修复后土壤;土壤修复;原位固化稳定化;水泥为固化剂

Dataset: ILCD process, Unit process, single operation
Geography: GB
Reference year: 2006
Classification: Unit processes / Other Services / Repair and maintenance
Functional unit: The functional unit employed in this study was the amount of soil remediated.
Generated by: 杨欣桐, yangxt@caep.org.cn
Owner: 天工LCI数据工作小组
Review: Dependent internal review by 天工LCI数据工作小组
Amounts: no units in this file; such an amount is in the reference unit of its flow, which a separate flow dataset defines
copyright: false
licenseType: Free of charge for all users and uses

## General comment
采用水泥和混凝土实现土壤固化稳定化，修复结果为地下水中污染物浓度达标。

## Geography
案例研究场地是英格兰一个工业/商业/住宅混合区的河流旁的一个前工业场地，已开发用于住房。

## Time period
文献发表时间

## Technology and included processes
添加比例分别为：Cement:bentonite—2.5:1, water:dry grout—3.8:1, soil:grout—3.5:1

## Technical purpose
本修复后土壤数据集代表了使用水泥作为固化剂的原位土壤固化和稳定化技术的应用，目的是将地下水中的污染物浓度降至可接受水平。这个过程通常用于土壤污染对环境和公共健康构成重大风险的地区，例如正在重新开发为住宅用途的前工业场地。

## Reference product
- Remediated soil: 4400; measured
  Assumed bulk density of 1.6 t/m3.

## Inputs
All rows: measured
- contaminated soil: 4400
  Assumed bulk density of 1.6 t/m3.
- Concrete: 1.43673e6
  soil:grout—3.5:1, and so the mass of grout is 7040/3.5=2011.43 ton; Cement : bentonite—2.5:1, and so the mass of cement is 1436.73 ton, and the mass of bentonite is 574.69 ton
- bentonite: 574690
  (same comment as for Concrete)
- transport in t*km: 50573.1
  Distance from bentonite supply is 88 km
- transport in t*km: 34481.6
  Distance from cement supply is 24 km
- Tap Water: 7.64343e6
  soil:grout—3.5:1, and so the mass of grout is 7040/3.5=2011.43 ton; water:dry grout—3.8:1

## Use advice
使用此数据集时，用户应注意功能单位是修复的土壤量。准确再现该过程需要考虑数据中提供的水泥：膨润土、水：干浆和土壤：浆料的特定添加比例。数据研究承认了用于改善吸附能力的添加剂的使用，但并未包含在研究范围内，仅关注材料消耗和运输。虽然数据集中提到了机械设备的使用，但用户需要根据机械设备的功率独立计算操作时间并将其纳入评估中。此数据集适用于土壤修复过程的生命周期评估，并应与其他LCA数据集一起使用，以评价整体环境影响。

## Review details
清单： 内部审查通过几个迭代步骤完成，涉及原始数据验证、原始数据记录、代表性、完整性、与 ISO 14040 和 14044 有关的建模的一致性。

## Data sources
- Harbottle, M. et al. A comparison of the technical sustainability of in situ stabilisation solidification with disposal to landfill. Journal of Hazardous Materials 141 (2007) 430–440
