# 铝电缆生产 ; 铝电缆 ; 铝带

Dataset: ILCD process, Unit process, single operation
Geography: CN
Reference year: 2017
Classification: Unit processes / Materials production / Metals and semimetals
Generated by: 徐常青, xcq@bit.edu.cn
Owner: 天工LCI数据工作小组
Review: Dependent internal review by 天工LCI数据工作小组
Amounts: no units in this file; such an amount is in the reference unit of its flow, which a separate flow dataset defines
copyright: false
licenseType: Free of charge for all users and uses

## General comment
此工艺生产的铝电缆适用于各种电力基础设施应用，如输电和配电系统。铝的高导电性和轻质性使其适合于架空电力线路、住宅布线，以及可能的电气设备连接中。

## Time period
论文发表年

## Reference product
- Aluminium Cable: 1000; measured
  aluminium cable-无条目

## Inputs
All rows: measured
- electricity, high voltage, aluminium industry: 6300
- cladding, crossbar-pole, aluminium: 1994.9
  aluminium pole
- Silane Cross-linked Polyethylene: 362
  Silane XLPE-无条目 flow可能有点问题
- textile, nonwoven polyester: 16.5
  non-woven fabric-无条目
- Aluminium strip: 591.4
  Aluminium strip-无条目
- polyvinylchloride, bulk polymerised: 896
  PVC sheath material
- natural gas, high pressure: 175
- freshwater: 3500
  river water
- transport, freight, lorry 7.5-16 metric ton, EURO4: 600000
  文中是Transportation distance

## Use advice
使用铝电缆生产过程的LCA数据时，如果评估生产阶段的环境影响，请确保考虑区域电力组合。考虑铝电缆特有的使用阶段效率和产品寿命终点的回收率。该数据集代表了发表之日可获得的技术，并且可能不反映铝电缆制造业中的最新进展或效率提升。

## Review details
清单： 内部审查通过几个迭代步骤完成，涉及原始数据验证、原始数据记录、代表性、完整性、与 ISO 14040 和 14044 有关的建模的一致性。

## Data sources
- Bao, W. et al. Comparative study on life cycle environmental impact assessment of copper and aluminium cables. in IOP Conf. Ser. Earth Environ. Sci. vol. 94 (2017)
