# 煤炭露天开采|开采煤炭

Dataset: ILCD process, Unit process, black box
Geography: CN
Reference year: 2005
Classification: Materials production / Other mineralic materials
Generated by: 尹琳琳, yinlinlin0623@163.com
Review: Dependent internal review by Tiangong LCI Data Working Group
Amounts: no units in this file; such an amount is in the reference unit of its flow, which a separate flow dataset defines

## Geography
露天煤矿无瓦斯灾害,无甲烷排放的实测数据。 考虑到该类煤矿开采深度小,煤层瓦斯含量也较低, 在估算其甲烷排放系数时,取为全国国有重点煤矿 低瓦斯矿井甲烷排放系数的二分之一。

## Technology and included processes
露天煤矿无瓦斯灾害,在估算其甲烷排放系数时,取为全国国有重点煤矿低瓦斯矿井甲烷排放系数的二分之一。

## Outputs
- methane (fossil): 0.00159; uniform; article inperiodical
  排放因子,1994年估测露天煤矿甲烷排放系数,取为全国国有重点煤矿低瓦斯矿井甲烷排放系数的二分之一,即每开采1kg的煤炭释放的甲烷体积—甲烷排放因子。
- methane (fossil): 0.00165; uniform; article inperiodical
  排放因子,2000年估测露天煤矿甲烷排放系数,取为全国国有重点煤矿低瓦斯矿井甲烷排放系数的二分之一,即每开采1kg的煤炭释放的甲烷体积—甲烷排放因子。

## Review details
Inventory: The internal review was done by several iteration steps concerning raw data validation, raw data documentation, representativity, completeness and consistency of modelling with regard to ISO 14040 and 14044.; Documentation: The review of the documentation was performed by Ecobilan and is in compliance with ISO 14040 and 14044. The data set documentation is correct in view of the appropriateness of the information provided. It includes all relevant information in view of data quality and scope of application of the respective LCI result.
