# Concentratedlatex|Freshlatex|Pretreatment - centrifugal concentration - skim recovery (coagulation - crepe pressing - granulation - drying)|All sizes / 浓缩乳胶|鲜胶乳|预处理-离心浓缩-胶清回收（凝固-压绉-造粒-干燥）|所有规模

Dataset: ILCD process, Unit process, single operation
Geography: CN
Reference year: 2019
Classification: Materials production / Other materials
Generated by: The data was created by the Office of the Second National Pollution Source Census of the Ministry of Ecology and Environment, and the data was organized by the TianGong Plan team for ILCD format / 生态环境部第二次全国污染源普查工作办公室创建数据，天工计划团队常慧敏整理数据为ILCD格式
Owner: Tiangong LCI Data Working Group / 天工LCI数据工作小组
Review: Dependent internal review by Tiangong LCI Data Working Group / 天工LCI数据工作小组
Amounts: no units in this file; such an amount is in the reference unit of its flow, which a separate flow dataset defines
copyright: false
licenseType: Free of charge for all users and uses

## General comment
the Technical of end-of-pipe management technology for pollution ammoniaisSpray tower，Its Technical efficiency of end-of-pipe management60

## Reference product
- Concentrated Latex: 1000, 1000 (2 entries); calculated
  源文件中描述为为浓缩乳胶，此处对其进行了匹配工作，将其匹配到LCAflow库里面相最符合的流，污染物指标备注为工业废水量

## Outputs
All rows: calculated
- Waste water: 7700
  污染物指标工业废水量的末端治理技术是/，其效率为0。原文件中描述污染物类别为废水，污染物指标为工业废水量，此处对其进行了匹配工作，将其匹配到LCAflow库里面相最符合的流，污染物指标备注为工业废水量
- chemical oxygen demand: 1.232
  污染物指标化学需氧量的末端治理技术是化学处理法+厌氧生物处理法+好氧生物处理法，其效率为98，末端治理设施实际运行率（k值）计算公式为K=污水处理设施耗电量（千瓦时/年）/(总额定功率（千瓦）×年运行时间（小时/年）)。原文件中描述污染物类别为废水，污染物指标为化学需氧量，此处对其进行了匹配工作，将其匹配到LCAflow库里面相最符合的流，污染物指标备注为化学需氧量
- Ammonia Nitrogen: 0.77
  污染物指标氨氮的末端治理技术是化学处理法+厌氧生物处理法+好氧生物处理法，其效率为90，末端治理设施实际运行率（k值）计算公式为K=污水处理设施耗电量（千瓦时/年）/(总额定功率（千瓦）×年运行时间（小时/年）)。原文件中描述污染物类别为废水，污染物指标为氨氮，此处对其进行了匹配工作，将其匹配到LCAflow库里面相最符合的流，污染物指标备注为氨氮
- Nitrogen, organic bound: 2.139
  污染物指标总氮的末端治理技术是化学处理法+厌氧生物处理法+好氧生物处理法，其效率为85，末端治理设施实际运行率（k值）计算公式为K=污水处理设施耗电量（千瓦时/年）/(总额定功率（千瓦）×年运行时间（小时/年）)。原文件中描述污染物类别为废水，污染物指标为总氮，此处对其进行了匹配工作，将其匹配到LCAflow库里面相最符合的流，污染物指标备注为总氮
- phosphorus, total: 0.077
  污染物指标总磷的末端治理技术是化学处理法+厌氧生物处理法+好氧生物处理法，其效率为95，末端治理设施实际运行率（k值）计算公式为K=污水处理设施耗电量（千瓦时/年）/(总额定功率（千瓦）×年运行时间（小时/年）)。原文件中描述污染物类别为废水，污染物指标为总磷，此处对其进行了匹配工作，将其匹配到LCAflow库里面相最符合的流，污染物指标备注为总磷
- Exhaust gas: 1000
  污染物指标工业废气量的末端治理技术是/，其效率为0。原文件中描述污染物类别为废气，污染物指标为工业废气量，此处对其进行了匹配工作，将其匹配到LCAflow库里面相最符合的流，污染物指标备注为工业废气量
- ammonia: 0.0082
  污染物指标氨的末端治理技术是/，其效率为0。原文件中描述污染物类别为废气，污染物指标为氨，此处对其进行了匹配工作，将其匹配到LCAflow库里面相最符合的流，污染物指标备注为氨
- ammonia: 0.00328
  污染物指标氨的末端治理技术是喷淋塔，其效率为60，末端治理设施实际运行率（k值）计算公式为k=喷淋设施年运行时间（小时）/干燥系统年运行时间（小时）。原文件中描述污染物类别为废气，污染物指标为氨，此处对其进行了匹配工作，将其匹配到LCAflow库里面相最符合的流，污染物指标备注为氨

## Use advice
This dataset is derived from the Pollution Source Census Report and contains information on pollution emissions and related products. However, it does not include data on energy or chemical consumption, nor does it provide information on waste or co-product generation. When utilizing this dataset, please supplement the missing data based on actual conditions before use
该数据集来源于污染源普查报告，包含污染物排放及相关产品信息，但不包含能源或化学品消耗数据，也不提供废弃物或共生产物产生信息。在使用该数据集时，请根据实际情况补充缺失数据后再使用。

## Review details
Inventory: The internal review was done by several iteration steps concerning raw data validation, raw data documentation, representativity, completeness and consistency of modelling with regard to ISO 14040 and 14044.
清单： 内部审查通过几个迭代步骤完成，涉及原始数据验证、原始数据记录、代表性、完整性、与 ISO 14040 和 14044 有关的建模的一致性。

## Data sources
- 第二次全国污染源普查产排污核算系数手册（试用版）,二级代码05,四级代码0514文件，在完整版文件中第3413页
