# 玻璃生产 ;有机玻璃单体MMA生产;人工分拣过程

Dataset: ILCD process, Unit process, single operation
Geography: JX-CN
Classification: Unit processes / Materials production / Glass and ceramics
Generated by: 和夏夏, 18616148319@163.com
Owner: 天工LCI数据工作小组
Review: Dependent internal review by 天工LCI数据工作小组
Amounts: no units in this file; such an amount is in the reference unit of its flow, which a separate flow dataset defines
copyright: false
licenseType: Free of charge for all users and uses

## General comment
此数据集描述了玻璃生产过程，包括制造作为玻璃抗碎替代品广泛使用的聚甲基丙烯酸甲酯(PMMA)单体的过程。该过程包括对确保生产的PMMA的纯度和质量至关重要的分拣操作。这种PMMA通常用于建筑材料、汽车零件和光学设备等应用，因为它具有清晰度、强度和抗冲击性。

## Reference product
- polymethyl methacrylate (PMMA) beads: 1043.73; measured

## Inputs
- polymethyl methacrylate (PMMA) beads: 1109.76; measured

## Outputs
- freshwater: 21.9735; measured
- organic waste (unspecified): 32.96; measured
- Waste (unspecified): 11.0975; measured

## Use advice
用户应注意，此数据集专门涉及包括手动分拣过程在内的PMMA单体生产，这可能并不代表所有玻璃生产方法。在使用这些数据进行生命周期评估时，用户必须考虑方法论兼容性，尤其是在与其他类型玻璃的数据集进行比较或考虑回收过程时。必须在研究范围内清楚地定义后续阶段（例如聚合和生命周期终点处理）的排除或包含。

## Review details
清单： 内部审查通过几个迭代步骤完成，涉及原始数据验证、原始数据记录、代表性、完整性、与 ISO 14040 和 14044 有关的建模的一致性。

## Data sources
- 江西旺达新材料有限公司年产20000吨有机玻璃原料生产项目
