# Primary copper production|Refined copper|flash smelting and flash converting|copper ore

Dataset: ILCD process, Unit process, single operation
Geography: AH-CN
Reference year: 2022
Classification: Materials production / Other mineralic materials
Functional unit: the production of 1 ton of refined copper is taken as the functional unit.
LCI method principle: Attributional
LCI method approaches: Allocation - market value
Generated by: Peng Wang, 2867919560@qq.com
Review: Dependent internal review by Tiangong LCI Data Working Group
Amounts: no units in this file; such an amount is in the reference unit of its flow, which a separate flow dataset defines
copyright: false

## Geography
Life Cycle Inventory (LCI) data of refined copper were derived from on-site surveys and annual monitoring report of several copper production enterprises located in Anhui province and Jiangxi province of China.

## Technology and included processes
Primary copper production includes both ore mining process and copper smelting process. The critical steps of this ore mining process include crushing and ball milling of copper ore so that copper concentrate can be obtained by beneficiation. As such, the critical steps of this copper smelting process include pyrometallurgical refining of copper concentrate and electrolysis so that refined copper can be obtained.

## Reference product
- Refined copper: 1000; measured
  Refined copper needs to be supplemented

## Inputs
- Copper concentrates: 6260; measured
  Copper concentrate needs to be replenished
- quartz sand: 520; software or database
  Quartz sand
- Quicklime: 38.3; software or database
  Quick lime needs to be replenished
- water: 8.56; software or database
  Fresh water needs to be replenished
- Sodium silicate: 1.31; software or database
  Need to add
- Sodium sulfide: 13.3; software or database
  Sodium sulfide needs supplementation
- Sodium hydroxide: 22.6; software or database
- Limestone: 72.3; software or database
- Ferrous sulfate: 4.43; software or database
  Ferrous sulfate needs supplementation
- hydrated lime dry slaked: 12.2; software or database
  Hydrated lime
- hydrogen chloride: 0.151; software or database
- Sulfuric acid(98%): 0; software or database
  Sulfuric acid needs to be supplemented with resourse
- Gelatin: 0.045; software or database
  Gelatin needs supplementation
- Thiourea: 0.075; software or database
  Thiourea needs to replenish the resource
- barium sulfate: 0; software or database
  Barium sulfate
- Diesel: 1.15; software or database
- Natural gas, at consumer EU-27: 57.3; software or database
  Natural gas
- Electricity: 4860; measured

## Outputs
All rows: software or database
- chemical oxygen demand: 0
  COD needs to be supplemented
- ammonium: 0
- sulfur dioxide: 0.265
  Sulfur dioxide
- nitrous oxide: 0.249
  Nitrogen oxide
- particles (PM2.5 - PM10): 0.022
- lead: 0.000895
  Lead
- mercury: 4.25e-5
  Mercury
- arsenic: 0.00103
  Arsenic
- cadmium: 0
  Cadmium
- chromium: 0
  Chromium
- fluorine: 0.0029
  Fluoride

## Deviations from the LCI method approaches
This study selects the ReCiPe model for LCIA since it is widely applied.

## Data selection and combination
data of refined copper were derived from on-site surveys and annual monitoring report of several copper production enterprises located in Anhui province and Jiangxi province of China.Other material production data for this LCA analysis were derived from Eco-invent database.

## Review details
Inventory: The internal review was done by several iteration steps concerning raw data validation, raw data documentation, representativity, completeness and consistency of modelling with regard to ISO 14040 and 14044.

## Data sources
- Zhang, J., Tian, X., Chen, W., Geng, Y. & Wilson, J. Measuring environmental impacts from primary and secondary copper production under the upgraded technologies in key Chinese enterprises. Environmental Impact Assessment Review 96, 106855 (2022).
