# 注入井;建井;井深20m，井管内径46 mm;地下水原位修复;PRB系统

Dataset: ILCD process, Unit process, single operation
Geography: JS-CN
Reference year: 2024
Classification: Unit processes / Other Services / Repair and maintenance
Generated by: 杨欣桐, yangxt@caep.org.cn
Owner: 天工LCI数据工作小组
Review: Dependent internal review by 天工LCI数据工作小组
Amounts: no units in this file; such an amount is in the reference unit of its flow, which a separate flow dataset defines
copyright: false
licenseType: Free of charge for all users and uses

## General comment
新建用于污染地下水渗透性反应墙所用BC悬浮液注入井，钻孔直径0.22 m，井管外径0.053m，井管内径0.046m，井深24 m，筛管长度20m，膨润土填充厚度4 m

## Time period
文献发表时间

## Technical purpose
所述工业过程描述了新井的建设和运营，该井用于注入BC（生物碳）悬浮液作为原位修复受污染地下水的渗透性反应墙（PRB）系统的一部分。具有指定深度24米和钻孔及井管直径的井，专门为处理通过PRB系统的受污染含水层所需的渗透和反应性而建造。

## Reference product
- injection well: 48; measured

## Inputs
All rows: measured
- Polyvinyl chloride: 915.92
- bentonite: 10310
- Polyethylene,Polyethylene: 598.8
- silica sand: 51560
- Steel: 240
- Diesel,Diesel: 0.18432
- transport in t*km: 6827.47

## Use advice
该数据集的用户应确保井的特定尺寸和规格被适当地并入他们的环境影响模型中，特别是在评估PRB系统对地下水修复性能和影响时。应考虑当地地质条件、地下水中的具体污染物，以及PRB系统的整体设计和效能。在计算长期环境效应时，应注意井的生命周期，包括维护和潜在的退役。

## Review details
清单： 内部审查通过几个迭代步骤完成，涉及原始数据验证、原始数据记录、代表性、完整性、与 ISO 14040 和 14044 有关的建模的一致性。

## Data sources
- Ding, D. et al. Assessing the environmental impacts and costs of biochar and monitored natural attenuation for groundwater heavily contaminated with volatile organic compounds. Science of The Total Environment 846, 157316 (2022).
