# 页岩气开发 ;页岩地层; 水力压裂

Dataset: ILCD process, Unit process, single operation
Geography: IO
Reference year: 2017
Classification: Unit processes / Energy carriers and technologies / Natural gas based fuels
LCI method principle: Attributional
LCI method approaches: Consequential
Generated by: Shikang Kang, 908798159@qq.com
Owner: 天工LCI数据工作小组
Review: Dependent internal review by 天工LCI数据工作小组
Amounts: no units in this file; such an amount is in the reference unit of its flow, which a separate flow dataset defines
copyright: false
licenseType: Free of charge for all users and uses

## General comment
随着美国页岩气产量的繁荣和美国天然气价格的下跌，许多拥有页岩储量的国家对页岩气的兴趣正在增加，包括英国在内的一些欧盟国家已经在进行勘探。欧洲页岩气的任何商业开发都需要广泛的环境评估，认识到欧洲不同的条件和立法

## Geography
英国页岩气

## Time period
文献发表时间

## Technology and included processes
本研究重点关注英国的情况，并使用生命周期评估（LCA）估计页岩气对环境的影响;将英国页岩气生产的负担与当前英国天然气混合的负担进行了比较。主要重点是对水影响的分析，但也考虑了广泛的其他影响类别。

## Technical purpose
通过页岩地层的水力压裂进行的页岩气开发，主要用于生产用于加热、发电以及作为化学工业原料的天然气。该工业过程涉及提取困在页岩地层中的天然气，将其带到地面进行处理和分配。

## Reference product
- water: 5.46e-6; input; log-normal; missing unimportant
  水力压裂用水

## Inputs
- sand: 0.000725; log-normal; missing unimportant
  压裂用砂（二氧化硅、夸脱砂）

## Outputs
- carbon monoxide (fossil): 2.18e-7; log-normal; missing unimportant
  原文未区分bio和fossil，根据专家判断此处为fossil。一氧化碳输出
- methane (fossil): 5.46e-6; log-normal; missing unimportant
  文献中没有天然气开采量，假设天然气开采过程中投入量：输出量=1:1

## Data selection and combination
LCA 模型基于对 60 多个公开来源的文献数据的分析。通过对关键参数的敏感性分析来检验模型的鲁棒性。系统边界不包括天然气的使用，因为无论使用页岩气还是常规天然气，天然气都是相同的。

## Data treatment and extrapolations
根据ISO 14046标准（ISO 14046 2014）分别分析了与淡水使用、降解和消耗有关的影响。

## Use advice
在使用本研究中关注的英国页岩气生产的生命周期评估（LCA）数据时，用户必须注意，环境影响评估是基于与当前英国天然气混合物的比较进行的。重要的是要考虑这些数据具体排除了天然气使用阶段的技术适用性。数据用户在进行评估时应与ISO 14046标准保持一致，确保考虑到与这个工业过程相关的淡水使用、降解和消耗。

## Review details
清单： 内部审查通过几个迭代步骤完成，涉及原始数据验证、原始数据记录、代表性、完整性、与 ISO 14040 和 14044 有关的建模的一致性。

## Data sources
- Tagliaferri, C., Clift, R., Lettieri, P. & Chapman, C. Shale gas: a life-cycle perspective for UK production. Int J Life Cycle Assess 22, 919–937 (2017).
