# 刀磨机切割层压件;层压件;刀磨机切割

Dataset: ILCD process, Unit process, single operation
Geography: CN
Classification: Unit processes / Systems / Other machines
Generated by: 王楠, 1209824595@qq.com
Owner: 天工LCI数据工作小组
Review: Dependent internal review by 天工LCI数据工作小组
Amounts: no units in this file; such an amount is in the reference unit of its flow, which a separate flow dataset defines
copyright: false
licenseType: Free of charge for all users and uses

## General comment
该刀磨机切割过程用于层压件的精密成型和切割。这些层压件可用于各种工业应用，例如在生产电气绝缘材料、装饰表面或用于建筑的结构复合材料中。

## Reference product
- Laminate,Laminate: 745.833; input; software or database
  层压件

## Inputs
- Electricity: 172.8; software or database
- water: 20; software or database

## Outputs
All rows: software or database
- Mixture,Mixture: 641.63
  fragment mixture
- Ethylene-vinyl acetate copolymer,Ethylene-vinyl acetate copolymer,Ethylene-vinyl acetate copolymer: 41
  EVA
- Waste (unspecified): 56
  general waste
- hazardous waste (unspecified),hazardous waste (unspecified): 7.2
- Medium and low radioactive liquid waste: 18.6
  液体废弃物
- Nitrogen oxides: 108
- sulfur dioxide: 71.4
- carbon dioxide: 144.5

## Use advice
使用刀磨机切割层压件的数据集时，确保考虑与精密切割相关的特定能源消耗和材料浪费。考虑层压件的生命周期末期阶段，尤其是如果它们涉及专门的回收或处置过程。始终验证数据是否与您应用的技术水平和地理区域相关。

## Review details
清单： 内部审查通过几个迭代步骤完成，涉及原始数据验证、原始数据记录、代表性、完整性、与 ISO 14040 和 14044 有关的建模的一致性。

## Data sources
- Li, J. et al. Life cycle analysis of the economic costs and environmental benefits of photovoltaic module waste recycling in China. (2023).
