# Soil remediation ; In-situ remediation ; Enhanced bioremediation ; Equipment operation ; Monitoring

Dataset: ILCD process, Unit process, single operation
Geography: SH-CN
Classification: Other Services / Repair and maintenance
Generated by: Xiao Meng, xiaomeng@mail
Owner: Tiangong LCI Data Working Group
Review: Dependent internal review by Tiangong LCI Data Working Group
Amounts: no units in this file; such an amount is in the reference unit of its flow, which a separate flow dataset defines
licenseType: Free of charge for all users and uses

## General comment
CHC+ISB is used for site remediation, and during the equipment operation phase, monitoring takes place.

## Geography
The aquifer in a certain area in Shanghai, China, is uniformly contaminated with chlorinated volatile organic compounds (CVOCs), with a surface area of 20,000 m2 and a depth of 50 m, with the water table located at a depth of 30 m.

## Technical purpose
This data set represents the use of in-situ enhanced bioremediation (ISB) for soil remediation, specifically aimed at treating chlorinated volatile organic compounds (CVOCs) contamination in an aquifer. It covers the operation of specialized equipment and site monitoring during the remediation process. This process is particularly relevant for environmental remediation projects dealing with CVOCs within larger surface areas and significant soil depths.

## Reference product
- Monitored groundwater: 600000; measured
  监测完成的地下水

## Inputs
- Electricity: 18617; software or database

## Use advice
When utilizing this data set, ensure that the parameters are consistent with the specific site conditions such as the scale of contamination and the depth of the aquifer. Considerations should include local regulatory requirements for equipment operation and monitoring protocols. Users should account for potential variations in geology and hydrogeology between the dataset's origin location (Shanghai, China) and the application site. Water table depth, CVOCs distribution uniformity, and site-specific environmental factors may affect the applicability of the data.

## Review details
Inventory: The internal review was done by several iteration steps concerning raw data validation, raw data documentation, representativity, completeness and consistency of modelling with regard to ISO 14040 and 14044.

## Data sources
- Ni, Z. et al. Comparative Life-Cycle Assessment of Aquifer Thermal Energy Storage Integrated with in Situ Bioremediation of Chlorinated Volatile Organic Compounds. Environ. Sci. Technol. 54, 3039–3049 (2020).
