# 水泥生产;水泥, 硅酸盐水泥, 42.5MPa;新型干法窑;粉煤灰

Dataset: ILCD process, Unit process, black box
Geography: HLJ-CN
Reference year: 2008
Classification: Materials production / Other mineralic materials
Generated by: 杨思琪, ysqsophia@gmail.com
Owner: 天工LCI数据工作小组
Review: Dependent internal review by 天工LCI数据工作小组
Amounts: no units in this file; such an amount is in the reference unit of its flow, which a separate flow dataset defines
copyright: false
licenseType: Free of charge for all users and uses

## General comment
新型干法窑生产硅酸盐水泥。对黑龙江省水泥工业目前所具备的新型干法工艺的工艺流程和工业运行参数进行研究，收集了所确定产品系统的输入、输出数据，并对数据进行了计算、量化。

## Technical purpose
新型干法窑技术生产的硅酸盐水泥主要用于建筑行业。适用于建设需要高耐久性和强度的基础设施，如建筑物、高速公路和桥梁。该水泥具有指定的28天抗压强度为42.5MPa，适合结构混凝土和其他需要42.5MPa强度的应用。

## Model description
以1kg28天抗压强度为42.5MPa的水泥所具有的使用性能作为功能单位，即1Fu=42.5kgMPa。评价范围为生料准备、熟料煅烧和水泥制备。粘土类资源消耗造成的环境负荷暂不考虑。铁粉属于铁质校正材料，其引发的环境影响不予考虑。产品系统输出端考虑排放的废弃物主要包括氮氧化物、二氧化硫、二氧化碳及粉尘。

## Reference product
- cement, portland cement, 42.5MPa: 1000
  42.5强度等级的硅酸盐水泥

## Inputs
- limestone, crushed, for mill: 1104.4
  石灰石
- gypsum stone (CaSO4-dihydrate): 58.7
  石膏
- ash: 319.4
  粉煤灰
- hard coal: 100.526
  标准煤。原始数据为0.0934kg标准煤，这里换算为硬煤，换算公式为1kg硬煤=0.929kg标准煤。
- electricity, medium voltage: 343.8
  电力

## Outputs
- particles (> PM10): 0.324
  粉尘，未标明粒径，按PM>10处理。
- sulfur dioxide: 0.3893
  二氧化硫
- Nitrogen oxides: 1.557
  氮氧化物
- carbon dioxide: 813.1
  二氧化碳

## Use advice
在使用此水泥生产过程的LCA数据时，确保数据准确对应新型干法窑技术。建模水泥生产生命周期时，排除粘土资源消耗造成的环境负荷和作为校正材料的铁粉使用引起的环境影响。在影响评估中考虑氮氧化物、二氧化硫、二氧化碳及粉尘的排放，因为这些是水泥生产中排放的重要污染物。数据集的功能单位基于1kg28天抗压强度为42.5MPa的水泥。

## Review details
清单： 内部审查通过几个迭代步骤完成，涉及原始数据验证、原始数据记录、代表性、完整性、与 ISO 14040 和 14044 有关的建模的一致性。

## Data sources
- 于淼. (2008). 黑龙江水泥工业可持续发展研究 [硕士, 哈尔滨工业大学].
