# Fullaccountinglink(forwastewater)|Printedmatter(substrateispaper),printedmatter(othersubstrates)|Paper,othersubstrates|Lithographic printing, gravure printing, letterpress printing (flexographic printing), stencil printing (screen printing), digital printing|All sizes / 全部核算环节（废水用）|印刷品（承印物为纸）、印刷品（其他承印物）|纸、其他承印物|平版印刷、凹版印刷、凸版印刷（柔性版印刷）、孔版印刷（丝网印刷）、数字印刷|所有规模

Dataset: ILCD process, Unit process, single operation
Geography: CN
Reference year: 2019
Classification: Materials production / Paper and cardboards
Generated by: The data was created by the Office of the Second National Pollution Source Census of the Ministry of Ecology and Environment, and the data was organized by the TianGong Plan team for ILCD format / 生态环境部第二次全国污染源普查工作办公室创建数据，天工计划团队常慧敏整理数据为ILCD格式
Owner: Tiangong LCI Data Working Group / 天工LCI数据工作小组
Amounts: no units in this file; such an amount is in the reference unit of its flow, which a separate flow dataset defines
copyright: false
licenseType: Free of charge for all users and uses

## Technology and included processes
the Technical of end-of-pipe management technology for pollution chemical oxygen demandisPhysical treatment + chemical treatment + aerobic biological treatment，The formula for calculating the actual operation rate (k-value) of the end-of-pipe treatment facility is /

## Reference product
- Printed Matter: 1000; calculated
  源文件中描述为为印刷品（承印物为纸）、印刷品（其他承印物），此处对其进行了匹配工作，将其匹配到LCAflow库里面相最符合的流

## Outputs
All rows: calculated
- Petroleum-related waste: 0
  污染物指标石油类的末端治理技术是物理处理法+化学处理法+好氧生物处理法，其效率为100，末端治理设施实际运行率（k值）计算公式为k=废水处理设施耗电量（千瓦时/年）/(废水处理设备额定功率（千瓦）×废水处理设备运行时间（小时）)。原文件中描述污染物类别为废水，污染物指标为石油类，此处对其进行了匹配工作，将其匹配到LCAflow库里面相最符合的流
- Ammonia Nitrogen: 0.000789
  污染物指标氨氮的末端治理技术是物理化学处理法，其效率为97，末端治理设施实际运行率（k值）计算公式为k=废水处理设施耗电量（千瓦时/年）/(废水处理设备额定功率（千瓦）×废水处理设备运行时间（小时）)。原文件中描述污染物类别为废水，污染物指标为氨氮，此处对其进行了匹配工作，将其匹配到LCAflow库里面相最符合的流
- Waste water: 1860
  污染物指标工业废水量的末端治理技术未说明。原文件中描述污染物类别为废水，污染物指标为工业废水量，此处对其进行了匹配工作，将其匹配到LCAflow库里面相最符合的流
- Petroleum-related waste: 0.008791
  污染物指标石油类的末端治理技术是物理化学处理法，其效率为41，末端治理设施实际运行率（k值）计算公式为k=废水处理设施耗电量（千瓦时/年）/(废水处理设备额定功率（千瓦）×废水处理设备运行时间（小时）)。原文件中描述污染物类别为废水，污染物指标为石油类，此处对其进行了匹配工作，将其匹配到LCAflow库里面相最符合的流
- Ammonia Nitrogen: 0.008942
  污染物指标氨氮的末端治理技术是物理处理法+化学处理法+好氧生物处理法，其效率为66，末端治理设施实际运行率（k值）计算公式为k=废水处理设施耗电量（千瓦时/年）/(废水处理设备额定功率（千瓦）×废水处理设备运行时间（小时）)。原文件中描述污染物类别为废水，污染物指标为氨氮，此处对其进行了匹配工作，将其匹配到LCAflow库里面相最符合的流
- chemical oxygen demand: 0.243
  污染物指标化学需氧量的末端治理技术是物理处理法+化学处理法+好氧生物处理法，末端治理设施实际运行率（k值）计算公式为k=废水处理设施耗电量（千瓦时/年）/(废水处理设备额定功率（千瓦）×废水处理设备运行时间（小时）)。原文件中描述污染物类别为废水，污染物指标为化学需氧量，此处对其进行了匹配工作，将其匹配到LCAflow库里面相最符合的流

## Data sources
- 第二次全国污染源普查产排污核算系数手册（试用版）,二级代码23,三级代码231.0文件，在完整版文件中第521页
