# Propylene Production | Propylene | Catalytic Cracking Route | Naphtha

Dataset: ILCD process, Unit process, black box
Geography: ZJ-GD-CN
Reference year: 2018
Classification: Materials production / Other mineralic materials
Functional unit: A functional unit is defined as 1 ton of propylene product
LCI method principle: Attributional
LCI method approaches: Allocation - mass
Generated by: Yanan Ren, renyn15@tsinghua.org.cn
Review: Dependent internal review by Tiangong LCI Data Working Group
Amounts: no units in this file; such an amount is in the reference unit of its flow, which a separate flow dataset defines
copyright: false

## General comment
The catalytic cracking process route mainly includes two processes of catalytic cracking and gas fractionation. The former includes sub-processes such as reaction-regeneration, energy recovery, fractionation, absorption stabilization, denitrification, desulfurization, and dust removal, while the latter includes depropanization, deethanization, and propylene refining. The main inputs of the catalytic cracking route include raw materials (ie heavy oil and hydrogenated diesel oil), energy sources (ie electricity, fresh water and steam), and auxiliary materials such as catalyst alumina. Propylene accounts for 33% of production by weight, with by-products being ethane and propane, C4 and C5 fractions, and LPG. It is worth noting that the steam by-products generated by coke combustion are transported outside the target plant for use. This process compensates for the environmental impact caused by raw material production and energy consumption, and reduces the environmental burden.

## Geography
The case plant of the catalytic cracking route comes from Sinopec Zhanjiang Dongxing Petrochemical Co., Ltd. The company is located in Zhanjiang City, Guangdong Province. Its catalytic cracking olefins process was built in 2018, with an annual production capacity of 116,000 tons of propylene.

## Time period
Craft built in 2018

## Technology and included processes
The factory is an integrated refining and chemical system, so raw materials (heavy oil, hydrogenated diesel) are used as intermediate products, regardless of the transportation stage.

## Reference product
- propene (propylene): 1000; measured
  丙烯

## Inputs
All rows: measured
- heavy fuel oil: 12940
  重油
- diesel: 4310
  加氢柴油
- Aluminum oxide (alumina): 20
  催化剂
- Trisodium Phosphate: 0.02226
  磷酸三钠
- nitrogen: 20.67
  氮气
- compressed air: 0.43488
  压缩空气
- process steam: -6380
  蒸汽
- Water (fresh water): 9710
  新鲜水
- electricity mix: 348.768
  电

## Outputs
All rows: measured
- Refinery Gas: 530
  炼厂干气
- gasoline (regular): 7520
  汽油
- diesel: 4310
  催化柴油
- Slurry oil: 600
  油浆
- Ethane: 370
  乙烷
- C4 Hydrocarbon Mixture: 1650
  C4+
- carbon dioxide: 4160
  CO2
- sulfur dioxide: 0.20294
  SO2
- nitrous oxide: 0.28992
  NOx
- Dust (unspecified, from stack): 0.1837
  颗粒物
- volatile organic compound: 0.53704
  VOCs
- ammonia: 0.00081
  氨氮
- chemical oxygen demand: 0.02954
  COD

## Deviations from the LCI method approaches
Quantification of environmental load between product propylene and by-products using mass distribution method

## Data selection and combination
The detailed input-output data of the propylene production process comes from the company's public environmental impact assessment report, including the input of raw materials and auxiliary materials, energy and resource consumption, and discharge of waste gas, wastewater and solid waste.

## Review details
Inventory: The internal review was done by several iteration steps concerning raw data validation, raw data documentation, representativity, completeness and consistency of modelling with regard to ISO 14040 and 14044.; Documentation: The review of the documentation was performed by Ecobilan and is in compliance with ISO 14040 and 14044. The data set documentation is correct in view of the appropriateness of the information provided. It includes all relevant information in view of data quality and scope of application of the respective LCI result.

## Data sources
- 吕琳. 丙烯产品环境负荷及温室气体减排的碳税政策. (大连理工大学, 2022).
