# Cement ; cement production ; Soil Risk Control ; Vertical Barrier ; Cement slurry barrier

Dataset: ILCD process, Unit process, single operation
Geography: US
Reference year: 2013
Classification: Unit processes / Other Services / Repair and maintenance
Generated by: Xiao Meng, xiaomeng@mail
Owner: Tiangong LCI Data Working Group
Review: Dependent internal review by Tiangong LCI Data Working Group
Amounts: no units in this file; such an amount is in the reference unit of its flow, which a separate flow dataset defines
copyright: false
licenseType: Free of charge for all users and uses

## General comment
Prepare cement through processes such as calcination and clinker grinding.

## Geography
For this project, a Superfund location at the Brookhaven National Laboratory (BNL) is studied. This particular case was chosen because it is representative of the scale and scenario where soil grouting would be used. It is also one of only a few sites where CS grouting has been used for full scale remediation. BNL has served as a production facility for research and development of radioisotopes for decades. The design of some of the facilities failed to provide adequate safety measures against the spread of radioactivity to the soils and groundwater beneath them and as a result, BNL was added to the Superfund National Priorities List in 1989.

## Technical purpose
The data set describes a process used to manufacture cement with application in soil risk control via construction of vertical cement slurry barriers. This process includes the steps of calcination and clinker grinding. The specific use case provided is the soil grouting at the Brookhaven National Laboratory (BNL) which serves as a remediation technique to prevent the spread of contaminants from facilities producing radioisotopes.

## Reference product
- cement, unspecified: 22970; measured

## Inputs
All rows: measured
- Limestone: 32388
- clay: 3192.8
- sand: 780.98
- Gypsum: 1148.5
- Iron ore (Domestic): 344.55
  Iron ore（铁矿石）
- Coal,Coal,Coal: 2917.2
- Light fuel oil: 390.49
- natural gas,natural gas: 436.34
- Electricity: 9344.16

## Use advice
Users of this data set should apply the information within the context of large-scale soil remediation projects where cement slurry barriers are appropriate. The example provided represents scenarios with soil contamination, particularly in areas with radioactive substances. Users must consider the scale of the application as this data is representative of full-scale remediation at a Superfund site. Methodological attention is required on the cement's properties and its effectiveness in creating an impermeable barrier to protect soils and groundwater.

## Review details
Inventory: The internal review was done by several iteration steps concerning raw data validation, raw data documentation, representativity, completeness and consistency of modelling with regard to ISO 14040 and 14044.

## Data sources
- Gallagher, P. M., Spatari, S. & Cucura, J. Hybrid life cycle assessment comparison of colloidal silica and cement grouted soil barrier remediation technologies. Journal of Hazardous Materials 250–251, 421–430 (2013).
