# 修复后土壤;土壤修复;原位热处理;电热提取

Dataset: ILCD process, Unit process, black box
Geography: DK
Reference year: 2013
Classification: Unit processes / Other Services / Repair and maintenance
Functional unit: Results are presented per unit volume (1 m3 ) of soil remediated in order to compare results for each site.
Generated by: 杨欣桐, yangxt@caep.org.cn
Owner: 天工LCI数据工作小组
Review: Dependent internal review by 天工LCI数据工作小组
Amounts: no units in this file; such an amount is in the reference unit of its flow, which a separate flow dataset defines
copyright: false
licenseType: Free of charge for all users and uses

## General comment
从数据来源文献 表1（作为数据收集基础的试验场地概述）中可以看出,所修复的小型场地的面积和方量分别为180 m2和1175 m3。污染物的质量为400千克PCE。

## Geography
LCA的数据收集是针对一个较小（180 m2）的场地进行的，该场地代表了使用ISTD进行修复的典型丹麦场地。

## Technology and included processes
ET-DSP™适用于低渗透性地层，安装多个井来加热土壤，ET-DSP™在加热井中放置钢电极。修复原理为将土壤加热到100°C左右，以增强PCE的挥发，使用真空在地表以下对热蒸汽进行提取，活性炭空气过滤装置安装在地表以上，冷凝水在单独的活性炭水过滤装置中处理。在加热区上方安装一个40 cm混凝土盖，以防止雨水侵入，并形成不透气的密封表面，减少对大气的热损失

## Technical purpose
电热动态剥离过程（ET-DSP）用于低渗透性污染区域的原位土壤修复。该技术主要用于提取和去除象四氯乙烯（PCE）这类挥发性污染物的高浓度，四氯乙烯是干洗和工业去脂操作中常见的溶剂。

## Reference product
- Remediated soil: 1175; measured

## Inputs
All rows: measured
- Road Transport,Road Transport: 1.4503e7, 5.76e7, 90000, 7.2e6, 4.2e6, 4.5e6 (6 entries)
- transport in t*km: 52245, 6.15168e6, 806008, 1.08e6, 8.568e7, 9.18e7 (6 entries)
- Electricity: 601200, 1.8108e6 (2 entries)
- Diesel,Diesel: 1.769
- sand: 5427
- Mortar: 1720
- Concrete: 41600
- Activated Carbon: 2484, 1620 (2 entries)
- Carbon Steel: 5239
- Stainless Steel: 688
- Copper and copper alloys: 473, 75 (2 entries)
- Aluminium and aluminium alloy products: 75
- Fiber glass: 220
- Polyethylene,Polyethylene: 799
- contaminated soil: 1175

## Use advice
该数据集应该在理解其是特定于丹麦标准小型场地（180平方米）使用ET-DSP进行ISTD修复的背景下使用。LCA数据收集涵盖能源和材料消耗，建设和运输活动中设备使用，建井材料建设，盖材料，空气和水处理系统以及电力消耗。请确保在更广泛的修复项目规划背景下正确应用此LCA数据，考虑地理、气候以及监管环境的变化。此外，将这些结果转化应用于其他场地时，应考虑场地大小、污染物浓度和地下条件的差异。

## Review details
清单： 内部审查通过几个迭代步骤完成，涉及原始数据验证、原始数据记录、代表性、完整性、与 ISO 14040 和 14044 有关的建模的一致性。

## Data sources
- Lemming G ,Nielsen G S ,Weber K , et al. Optimizing the Environmental Performance of In Situ Thermal Remediation Technologies Using Life Cycle Assessment [J]. Groundwater Monitoring & Remediation, 2013, 33 (3): 38-51.
