# 电力生产 ; 混合电力 ; 宁夏回族自治区

Dataset: ILCD process, Unit process, single operation
Geography: NX-CN
Reference year: 2019
Classification: Unit processes / Energy carriers and technologies / Electricity
Generated by: 熊若熙, xiongrx0126@163.com
Owner: 天工LCI数据工作小组
Review: Dependent internal review by 天工LCI数据工作小组
Amounts: no units in this file; such an amount is in the reference unit of its flow, which a separate flow dataset defines
copyright: false
licenseType: Free of charge for all users and uses

## General comment
混合电力产生形式包括火力发电、水力发电、风力发电、核能发电和太阳能发电

## Technical purpose
该数据集涉及宁夏回族自治区使用的电力混合，包括热电（可能是煤炭或天然气发电）、水力发电、风力发电、核能发电和太阳能发电。这种混合电力可用于代表各种工业过程中消耗的电力环境性能、居民和商业能源使用，或作为宁夏生命周期评估中的区域电网参考。

## Reference product
- Electricity: 3.6; missing unimportant
  [{'text': '3.6', 'type': 'text'}]

## Inputs
All rows: missing unimportant
- electricity for thermal power: 2.9176
  [{'text': '3.6', 'type': 'text'}]
- electricity from hydroelectric power plant: 0.0464796
  [{'text': '3.6', 'type': 'text'}]
- electricity for nuclear power: 0
  [{'text': '3.6', 'type': 'text'}]
- electricity from wind power: 0.392962
  [{'text': '3.6', 'type': 'text'}]
- electricity for solar power: 0.24296
  [{'text': '3.6', 'type': 'text'}]

## Use advice
在使用此数据集进行生命周期评估时，用户应确保所研究产品或系统的电力消费特征与宁夏电力发电混合相一致。应考虑数据的时效性；使用最新的数据或考虑随时间变化的发电混合。如果数据集中未计算能源传输和分配损耗，用户还应考虑包括这些损耗。此外，应根据评估的目标和范围，处理混合能源中不同能源的环境影响分配问题。

## Review details
清单： 内部审查通过几个迭代步骤完成，涉及原始数据验证、原始数据记录、代表性、完整性、与 ISO 14040 和 14044 有关的建模的一致性。

## Data sources
- 能源统计年鉴2020
