# 修复后地下水;地下水原位修复;植物修复;桉树种植;4.6 m × 4.6 m 网格;太阳能灌溉系统

Dataset: ILCD process, Unit process, black box
Geography: UM
Reference year: 2019
Classification: Unit processes / Other Services / Repair and maintenance
Functional unit: The functional unit was the treatment of a 9000 2 area of (= 9000 m3 volumn of) a PCE-contaminated aquifer. The timeframe for the LCA was 100 years.
Generated by: 杨欣桐, yangxt@caep.org.cn
Owner: 天工LCI数据工作小组
Review: Dependent internal review by 天工LCI数据工作小组
Amounts: no units in this file; such an amount is in the reference unit of its flow, which a separate flow dataset defines
copyright: false
licenseType: Free of charge for all users and uses

## General comment
植物修复是利用绿色植物来转移、容纳或转化污染物使其对环境无害。植物修复的对象是重金属、有机物或放射性元素污染的土壤及水体。

## Geography
这项研究是在旧金山湾区的背景下进行的，旧金山湾区是美国加利福尼亚州的一个主要都市区（约18000平方公里）。

## Technology and included processes
选择耐盐桉树作为植物修复系统。树木按照4.6 m×4.6 m的网格模式种植。利用太阳能灌溉系统抽取地下水灌溉新种植的树木。

## Technical purpose
该植物修复过程通过种植耐盐桉树种，用于原位地下水去污染，专注于被PCE（四氯乙烯）等重金属、有机污染物或放射性元素污染的土壤和含水层。该修复系统采用4.6米×4.6米网格模式的桉树种植方案，适用于旧金山湾区等都市区，整合了太阳能灌溉系统以支持可持续发展。

## Reference product
- Remediated groundwater: 9000; measured
  含水层厚度1m，体积9000m3

## Inputs
All rows: measured
- polyvinylchloride resin (S-PVC): 1043
  太阳能灌溉系统安装材料
- Polyethylene,Polyethylene: 405, 177 (2 entries)
  太阳能灌溉系统安装材料
- Steel: 365
  太阳能灌溉系统安装材料
- Copper sheet: 47
  太阳能灌溉系统安装材料
- Textile: 84
  太阳能灌溉系统安装材料
- Compound Fertilizer,Compound Fertilizer: 5373
- aluminium sheet: 59
  太阳能灌溉系统安装材料
- Diesel,Diesel: 2206
- transport in t*km: 13600
  Material transport – by truck (tkm)
- Road Transport,Road Transport: 4.2e6
  Passenger transport (km)
- contaminated groundwater: 9000
  含水层厚度1m，体积9000m3

## Use advice
使用此生命周期评价(LCA)数据集的用户需要在应用这些数据时考虑修复地点的具体环境背景。确保应用规模（9000平方米的区域）和气候条件（如旧金山湾区的条件）具有可比性非常重要。任何数据外推都应确认LCA的时间框架（100年）。数据用户需要在评估中包含从摇篮到坟墓的所有阶段 – 原料和能源的获取、设备的采购和使用、运输、建设及废物处理。特别应注意灌溉系统的可持续性方面以及选定的桉树种是否适应修复地点的当地条件。

## Review details
清单： 内部审查通过几个迭代步骤完成，涉及原始数据验证、原始数据记录、代表性、完整性、与 ISO 14040 和 14044 有关的建模的一致性。

## Data sources
- O'Connor D ,Zheng X ,Hou D , et al. Phytoremediation: Climate change resilience and sustainability assessment at a coastal brownfield redevelopment [J]. Environment International, 2019, 130 104945.
