# 铝合金生产 ; 整个风电场

Dataset: ILCD process, Unit process, single operation
Geography: SH-CN
Reference year: 2009
Classification: Unit processes / Materials production / Metals and semimetals
Functional unit: The functional unit is 1 kWh on-grid electricity provision.
LCI method principle: Attributional
LCI method approaches: Allocation
Generated by: 赵云志, ll10088@163.com
Owner: 天工LCI数据工作小组
Review: Dependent internal review by 天工LCI数据工作小组
Amounts: no units in this file; such an amount is in the reference unit of its flow, which a separate flow dataset defines
copyright: false
licenseType: Free of charge for all users and uses

## General comment
所描述的铝合金生产用于海上风电场的风力涡轮机结构部件，具体来说是东海大桥海上风电场（DBOWF）。该风电场使用铝合金建造所需的能源生成风力涡轮机、基础和电缆。

## Geography
所研究的风电场- -东海大桥海上风电场( DBOWF )是中国在上海管辖范围内的第一个海上风电场，也是欧洲以外的第一个海上风电场。工程分两期施工，分别位于东海大桥两侧(图1 )。

## Reference product
- aluminium: 85900; estimated

## Inputs
- Energy, geothermal, converted: 1.61e7; software or database

## Outputs
- carbon dioxide: 860000; software or database
- particles (PM2.5): 4290; software or database
- sulfur dioxide: 3290; software or database
- nitrous oxide: 1710; software or database

## Deviations from the LCI method approaches
本研究采用PLCA建模方法计算了中国某典型海上风电场的能源和环境排放。从摇篮到坟墓的过程包括材料和设备制造、运输和安装、操作和维护、拆解和回收4个阶段(图2 )。

## Data selection and combination
风机、基础和电缆的技术参数从DBOWF的设计文件中获得(表2)。能源和排放因子(即单位材料和构件生产的能源消耗和环境排放)来源于Ecoinvent 2.2数据集(生态发明中心, 2009)，优先参考中国实践的系数。对于关键材料和设备，其海上运输能量由运输负荷和海运能量强度计算得到。根据施工方案，对设施安装能耗和排放进行了估算。风电场的运行和维护数据，如维护的频率和工作时间，是通过与工程技术人员的现场调查获得的。与模型参数和输入数据相关的不确定性在本文的敏感性分析部分进行了说明。

## Use advice
在使用此数据集进行生命周期评价（LCA）时，用户应考虑原材料和组件的技术规格，如来自Ecoinvent 2.2数据集的能源和排放因子，并遵守与中国相关的实践。必须注意关于风力发电厂设备运输、安装、操作和维护数据的准确性和限制，承认敏感性分析中识别的不确定性。此数据应用于从制造到回收的摇篮到坟墓评估的背景下，功能单元定义为提供1 kWh的电网电力。

## Review details
清单： 内部审查通过几个迭代步骤完成，涉及原始数据验证、原始数据记录、代表性、完整性、与 ISO 14040 和 14044 有关的建模的一致性。

## Data sources
- Yang, J. et al. The life-cycle energy and environmental emissions of a typical offshore wind farm in China. Journal of Cleaner Production 180, 316–324 (2018).
