# Glass production ; tempered glass ; slicing process

Dataset: ILCD process, Unit process, single operation
Geography: KM-YN-CN
Reference year: 2015
Valid until: 2023
Classification: Materials production / Glass and ceramics
Generated by: He xiaxia, 18616148319@163.com
Owner: Tiangong LCI Data Working Group
Review: Dependent internal review by Tiangong LCI Data Working Group
Amounts: no units in this file; such an amount is in the reference unit of its flow, which a separate flow dataset defines
copyright: false
licenseType: Free of charge for all users and uses

## Technology and included processes
Wet grinding with water

## Reference product
- Glass (formed & finished): 302998; measured
  plate glass

## Inputs
- electricity mix: 905966; measured
- Glass (formed & finished): 303202; measured
  plate glass

## Outputs
- Waste (solid): 203.4; measured

## Review details
Inventory: The internal review was done by several iteration steps concerning raw data validation, raw data documentation, representativity, completeness and consistency of modelling with regard to ISO 14040 and 14044.

## Data sources
- 建设项目环境影响报告表（国环评证乙字 第 2501 号）
