# Soil and groundwater remediation;Ex-situ;groundwater pump and treat;Equipment and Materials Arriving on Site

Dataset: ILCD process, Unit process, single operation
Geography: DK
Reference year: 2021
Classification: Other Services / Engineering and consulting
Generated by: Wang Ning, wang_ning@caep.org.cn
Owner: Tiangong LCI Data Working Group
Review: Dependent internal review by Tiangong LCI Data Working Group
Amounts: no units in this file; such an amount is in the reference unit of its flow, which a separate flow dataset defines
copyright: false
licenseType: Free of charge for all users and uses

## General comment
Transportation of equipment and materials to the site

## Technology and included processes
Transportation of equipment and materials to the site after a 400km journey

## Technical purpose
This data set pertains to equipment and materials used for soil and groundwater remediation processes, specifically designed for ex-situ groundwater pump and treat interventions. The materials, transported over a distance of 400km to the site, are suited for environmental remediation projects that aim to remove pollutants from soil and groundwater to restore these environmental media to a safe and natural state.

## Reference product
- Equipment and Materials Arriving on Site: 1; estimated

## Inputs
- Equipment and Materials Arriving on Site: 400000; estimated

## Use advice
Users of this data set should consider the specific transportation distance of 400km when assessing the environmental impact of equipment and materials transported to the site. The data set reflects a single operational unit process transport event and should be integrated into the larger life cycle assessment of remediation projects accordingly. Users should also be aware of geographical and infrastructural variations that could alter transport emissions and resource use. Methodological consistency with the entire life cycle model is crucial, which may entail adjusting the data to align with different technological applicabilities or changing transportation scenarios.

## Review details
Inventory: The internal review was done by several iteration steps concerning raw data validation, raw data documentation, representativity, completeness and consistency of modelling with regard to ISO 14040 and 14044.

## Data sources
- Sustainable remediation assessment of a chlorinated ethene plume: method evelopment, application, and assessment
