# 育肥猪生产 ; 饲料加工与运输过程

Dataset: ILCD process, Unit process, single operation
Geography: LN-CN
Reference year: 2010
Classification: Unit processes / Materials production / Agricultural production means
Functional unit: The evaluation unit was 1000 fattening pigs
Generated by: 杨瑞, 1632707028@qq.com
Owner: 天工LCI数据工作小组
Review: Dependent internal review by 天工LCI数据工作小组
Amounts: no units in this file; such an amount is in the reference unit of its flow, which a separate flow dataset defines
copyright: false
licenseType: Free of charge for all users and uses

## General comment
饲料是养猪的主要投入品，即生产动物源食品猪 肉的原料。饲料加工和运输过程中都会形成污染物。 饲料加工主要分为 4 个阶段，粉碎、混合、膨化和压制 成颗粒。根据调查，粉碎 l t 猪饲料耗电 20 kWh；混合 1 t 猪饲料耗电 5 kWh；膨化 1 t 猪饲料耗电 45 kWh； 将 1 t 猪饲料压制成颗粒，需要耗电 20 kWh。经计算， 1 000 头育肥猪生长期间需食用饲料 308 t。

## Geography
辽宁省 2010 年玉米、大豆和小麦每公顷产量分 别为 ···

## Time period
辽宁省2010年玉米、大豆和小麦每公顷产量分别为······

## Technology and included processes
评价内容包括：饲料加工 过程中的气体排放和车辆在运输饲料行驶过程中的 尾气排放

## Technical purpose
本生命周期评估数据适用于育肥猪生产行业中的饲料加工与运输过程。指出饲料是猪肉生产的主要原料，饲料的加工和运输过程中会产生污染物。饲料加工过程分为粉碎、混合、膨化和压制成颗粒等步骤，每个阶段都需要消耗不同的能量。此数据对于从事动物饲料生产、畜牧管理和关注猪育种与饲料加工相关环境影响优化的农业产业参与者而言非常重要。

## Reference product
- feed: 308000; estimated
  假设运输过程无消耗

## Inputs
- feed: 308000; measured

## Outputs
All rows: measured
- carbon dioxide (fossil),carbon dioxide (fossil): 30802.7
- carbon monoxide (fossil): 43.36
- nitrogen, total (excluding N2): 181
  1氮氧化物
- sulfur oxides: 278.81
  1硫氧化物
- methane (fossil): 72.07

## Data selection and combination
本文数据来自辽宁省36家规模化育肥猪养殖场调查；并参照《辽宁统计年鉴》提供的相关数据计算出育 肥猪生产过程中全球变暖、环境酸化和富营养化的影 响潜力。

## Use advice
分析育肥猪生产过程环境影响的用户应考虑到每个饲料处理阶段（如数据所示的粉碎、混合、膨化和压制）的电耗。在模拟饲料供应链的输入输出场景时，重要的是要包括饲料加工气体排放和运输尾气排放。应使用辽宁省特定的区域数据，如玉米、大豆和小麦的产量来评估当地的环境影响。还应考虑方法论因素，如辽宁数据所计算的全球变暖潜能、酸化和富营养化，以进行全面的环境评价。

## Review details
清单： 内部审查通过几个迭代步骤完成，涉及原始数据验证、原始数据记录、代表性、完整性、与 ISO 14040 和 14044 有关的建模的一致性。

## Data sources
- 刘鸣达, 赵妍, 刘显军, & 王耀晶. 辽宁省育肥猪生产环境影响的生命周期评价. 农业环境科学学报 31, 1250–1255 (2012).
