# 铝电解 ; 液态原铝 ; 预焙 ; 冶金用氧化铝 ; 2017年

Dataset: ILCD process, Unit process, single operation
Geography: CN
Reference year: 2021
Classification: Unit processes / Materials production / Metals and semimetals
Generated by: 蔡梓萌, caizm6178@163.com
Owner: 天工LCI数据工作小组
Review: Dependent internal review by 天工LCI数据工作小组
Amounts: no units in this file; such an amount is in the reference unit of its flow, which a separate flow dataset defines
copyright: false
licenseType: Free of charge for all users and uses

## General comment
此工业过程描述涉及通过电解方式生产液态原铝。该过程包括预焙阶段，并使用专门为冶金应用设计的氧化铝。通过此过程生产的原铝可用于交通、建筑、电子和包装等多个行业，因其具有高导电性、低密度和耐腐蚀性。所示年份为2017年，表明数据对应于当时的技术标准和实践。

## Time period
文献发表日期

## Reference product
- aluminium, primary, liquid: 1000; software or database

## Inputs
All rows: software or database
- Integrated AC power consumption: 47726.9
- aluminium oxide, metallurgical: 1913.11
- fluoride salt: 18.02
- anode, prebake, for aluminium electrolysis: 401.32
- Water, unspecified natural origin: 1.22

## Data selection and combination
本研究的数据参考了PA、SA、电力等背景数据的LCA数据。PA数据来自统计数据源，SA数据主要来自文献。背景数据主要来自中国科学院生态环境研究中心CASRCEES 2018建立的中国本地化LCA数据库，涵盖能源、材料、交通、废物管理等LCA数据。

## Use advice
所提供的LCA数据应考虑2017年技术和实践的背景；因此，使用此数据时必须考虑自那时起技术或效率的变化。应使用当下的统计来源核实原铝(PA)和再生铝(SA)数据输入以确保相关性。用户应参考CAS RCEES 2018数据库以确保背景数据的相关性，并确保与中国的地理背景保持一致。应注意到生命周期中包括或排除回收过程的方法论考虑以及需要建模的特定使用阶段行为。此外，可能需要查阅更新的排放因子和环境影响数据以进行更当前的评估。

## Review details
清单： 内部审查通过几个迭代步骤完成，涉及原始数据验证、原始数据记录、代表性、完整性、与 ISO 14040 和 14044 有关的建模的一致性。

## Data sources
- Ding, N., Liu, N., Lu, B. & Yang, J. Life cycle greenhouse gas emissions of aluminum based on regional industrial transfer in China. J. Ind. Ecol. 25, 1657–1672 (2021).
