# 退役锂电池的湿法回收

Dataset: ILCD process, Unit process, single operation
Geography: AH-CN
Reference year: 2021
Classification: End-of-life treatment / Material recycling
Functional unit: 1t retired lithium iron phosphate battery and similar waste
Generated by: 陈利鹏, lpchen07@163.com
Owner: 天工LCI数据工作小组
Review: Dependent internal review by 天工LCI数据工作小组
Amounts: no units in this file; such an amount is in the reference unit of its flow, which a separate flow dataset defines
copyright: false
licenseType: Free of charge for all users and uses

## General comment
电池粉粗提工序、湿法提盐工序、电池材料合成工序

## Technical purpose
所描述的工业过程用于从退役锂离子电池中回收有价值的材料，如碳酸锂、磷酸铁和三元前体阴极材料。湿法回收过程包括电池粉粗提、湿法提盐和电池材料合成等操作。该过程是电池废物可持续管理不可或缺的一部分，通过为新电池生产提供输入材料，支持循环经济。

## Reference product
- EoL NCM battery: 1e7; input; article inperiodical
  三元废旧电池

## Inputs
All rows: article inperiodical
- EoL LFP battery: 1e7
  磷酸铁锂废旧电池
- 3C Lithium Battery: 1e6
  3C 废旧电池
- Ternary pole plate: 1.5e6
  三元极片
- Nickel Scrap: 1e6
  含镍废料
- Calcium oxide: 512000
  氧化钙
- Water: 9.32339e7
  清洗用自来水
- Iron Lithium Pole Piece: 1.5e6
  铁锂极片
- Sulfuric acid(98%): 1.43505e7
- hydrogen peroxide: 1.05279e7
- Sodium hydroxide（30%）: 1.83249e6
- Sodium carbonate（95%）: 5.15153e6
- Calcium hydroxide: 4.67919e6
- iron: 69700
- Concentrated hydrochloric acid: 2.78228e6
- Ammonium bicarbonate: 220790
- Nickel sulfate hexahydrate: 191290
- Cobalt(II) sulfate heptahydrate: 52030
  七水硫酸钴
- Manganese Sulfate Monohydrate: 31130
- Sodium hydroxide: 301400
- Disooctyl Phosphate (P204): 15000
- 2-ethylhexyl hydrogen -2-ethylhexylphosphonate: 15000
- oxygen: 8240
- Ammonium hydroxide: 68260
- Lithium carbonate: 26410
- Lithium Hydroxide: 10240
  氢氧化锂
- Ternary precursor: 94660
  前驱体材料

## Outputs
All rows: article inperiodical
- Battery Separator: 362220
  隔膜
- Aluminum Shell: 3.78889e6
  壳体
- copper: 1.97252e6
  铜粒
- aluminium: 1.29301e6
  铝粒
- CaF2 (low radioactice): 1.62053e6
  氟化钙
- Sulfuric acid mist: 1150
- Phosphorus Ore: 7.48692e6
  磷铁石墨渣
- Lithium carbonate: 2.5764e6
- oxygen: 352080
- carbon: 3.20631e6
  碳黑渣
- copper: 79320
- Manganese Carbonate: 2.67034e6
  碳酸锰
- sodium sulfate: 5.92483e6, 2.56855e6 (2 entries)
- iron: 1.5267e6
- sodium chloride: 1.60866e6
- Cobalt Sulfate: 3.88131e6
- Nickel sulfate: 7.50139e6
- Gypsum: 1.0872e7
  硫酸钙
- Ammonium hydroxide: 278280
- ammonia: 5879
- Ternary precursor: 66630
  622 前驱体
- Ternary precursor: 33320
  811 前驱体
- waste water - untreated: 2.72276e7
- water vapour: 7.34918e7
- carbon dioxide: 27410
- particles (PM2.5 - PM10): 1728

## Use advice
在使用此数据集进行生命周期评估时，用户应确保其评估范围包括概述的完整回收过程：盐酸浸出、过氧化氢氧化和纯碱调节pH值。推荐计算这些处理步骤中使用的试剂和能源的环境影响。还应考虑包括材料的回收率以及过程中可能的环境释放量。功能单位是'1吨退役磷酸铁锂电池及类似废料'，任何比较或外推都应遵循此基线。

## Review details
清单： 内部审查通过几个迭代步骤完成，涉及原始数据验证、原始数据记录、代表性、完整性、与 ISO 14040 和 14044 有关的建模的一致性。

## Data sources
- 徐伟华. 基于三阶层体系我国锂电池回收产业的研究. (中国地质大学(北京), 2021).
