# 破碎和玻璃回收;废旧光伏组件、破碎混合物;热分解、机械切割、人工破碎、玻璃回收

Dataset: ILCD process, Unit process, black box
Geography: CN
Classification: Unit processes / End-of-life treatment / Material recycling
Generated by: 王楠, 1209824595@qq.com
Owner: 天工LCI数据工作小组
Review: Dependent internal review by 天工LCI数据工作小组
Amounts: no units in this file; such an amount is in the reference unit of its flow, which a separate flow dataset defines
copyright: false
licenseType: Free of charge for all users and uses

## General comment
以回收玻璃和铝框架为目的的玻璃回收，称为“玻璃回收”。通过热分解、机械切割或破碎等方法将玻璃从模组中分离出来并回收利用。下循环方法回收模块玻璃和铝框架，这在欧洲已经得到证实。这个过程首先手动去除铝框架，接线盒和铜电缆。然后该模块在玻璃回收线上被粉碎，然后破碎，再经过一系列人工和机械分拣和提取过程，回收大部分玻璃和铝。黑色金属被送到特定的回收商;剩下的包括无法进一步分离的硅、金属、塑料和玻璃的混合物，被送往垃圾填埋场。

## Technical purpose
所述工业流程用于回收和资源回收行业，特别是处理光伏（PV）组件废弃物。 它涉及从报废的光伏模块中分离和回收有价值的材料，如玻璃和铝框架。 回收的玻璃主要用于制造新的玻璃产品，而铝则用于生产铝框架和其他基于铝的商品。 该过程通过使能源部门的循环经济，促进了光伏技术的可持续性。

## Reference product
- PV Module Waste: 1000; input; min 1; max 1; uniform; software or database

## Outputs
All rows: uniform; software or database
- Hazardous waste (unspec.): 0.18; min 0.1; max 0.28
  Hazardous solid Waste
- aluminium: 180; min 180; max 180
- Glass for recovery (shards): 587; min 490; max 665
  Glass (crushed)
- Copper wire: 2.97; min 2.8; max 3.3
  Copper cable
- Junction Box: 50; min 50; max 50

## Use advice
该数据集的用户应确保玻璃和铝回收过程的方法包括提到的分离技术（热分解、机械切割、人工破碎）。 在应用此数据时，考虑光伏废物处理的具体背景和地理适用性至关重要，因为过程效率和环境法规可能因地区而异。 为了得到准确的生命周期评估(LCA)结果，用户还必须考虑最终生命周期阶段，其中不可回收的材料最终填埋。 数据应该更新，以反映技术进步和废物管理实践的变化。

## Review details
清单： 内部审查通过几个迭代步骤完成，涉及原始数据验证、原始数据记录、代表性、完整性、与 ISO 14040 和 14044 有关的建模的一致性。

## Data sources
- Deng, R., Chang, N. L., Ouyang, Z. & Chong, C. M. A techno-economic review of silicon photovoltaic module recycling. Renewable and Sustainable Energy Reviews 109, 532–550 (2019).
