# 再生纸生产|瓦楞原纸

Dataset: ILCD process, Unit process, single operation
Classification: Materials production / Other mineralic materials
LCI method principle: Attributional
Generated by: Yixiang Gao, 22210740040@m.fudan.edu.cn
Review: Dependent internal review by Tiangong LCI Data Working Group
Amounts: no units in this file; such an amount is in the reference unit of its flow, which a separate flow dataset defines
copyright: false

## Reference product
- Corrugated Cardboard: 1000; measured
  瓦楞原纸

## Inputs
All rows: measured
- Waste paper: 1099
  waste paper(pulping stage)
- water: 0.79
  water(pulping stage)
- Electricity: 335.16
  electricity(pulping stage)
- hard coal: 351.12
  coal(papermaking stage)
- water: 5.05
  water(papermaking stage)
- Electricity: 564.84
  electricity(papermaking stage)
- Diesel: 27.92
  diesel(Transportation stage)
- Polymeric ferric sulfate: 0.007
  Polymeric ferric sulfate(Sewage treatment stage)
- water: 0.79
  water(Sewage treatment stage)
- Electricity: 6.192
  electricity(Sewage treatment stage)

## Outputs
- carbon dioxide: 398.96; measured
  CO2(pulping stage)
- Nitrogen oxides: 0.06; measured
  NOx(pulping stage)
- sulfur dioxide: 0.04; measured
  SO2(pulping stage)
- methane: 0.05; measured
  CH4(pulping stage)
- carbon monoxide: 0.74; measured
  CO(pulping stage)
- non-methane volatile organic compounds: 0.19; measured
  NMVOC(pulping stage)
- Total Suspended Particulate: 0.7; measured
  TSP(pulping stage)
- chemical oxygen demand: 0.191; measured
  CODcr(pulping stage)
- biological oxygen demand: 0.037; measured
  BOD5(pulping stage)
- total suspended solids, unspecified: 0.12; measured
  TSS(pulping stage)
- Waste solid: 189.17; measured
  Solid Waste(pulping stage)
- hazardous waste (unspecified): 0.015; measured
  Hazardous Waste(pulping stage)
- carbon dioxide: 660.16; measured
  CO2(papermaking stage)
- Nitrogen oxides: 0.09; measured
  NOx(papermaking stage)
- sulfur dioxide: 0.037; measured
  SO2(papermaking stage)
- methane: 0.009; measured
  CH4(papermaking stage)
- carbon monoxide: 1.2; measured
  CO(papermaking stage)
- non-methane volatile organic compounds: 0.32; measured
  NMVOC(papermaking stage)
- Total Suspended Particulate: 0.64; measured
  TSP(papermaking stage)
- chemical oxygen demand: 0.008; measured
  CODcr(papermaking stage)
- biological oxygen demand: 0.002; measured
  BOD5(papermaking stage)
- total suspended solids, unspecified: 0.008; measured
  TSS(papermaking stage)
- hazardous waste (unspecified): 0.02; measured
  Hazardous Waste(papermaking stage)
- carbon dioxide: 55.93; software or database
  CO2(Transportation stage)
- sulfur dioxide: 0.003; software or database
  SO2(Transportation stage)
- methane: 0.15; software or database
  CH4(Transportation stage)
- carbon monoxide: 0.16; software or database
  CO(Transportation stage)
- water: 0.42; software or database
  water(Chemical production stage)
- Electricity: 30.42; software or database
  electricity(Chemical production stage)
- carbon dioxide: 90.78; software or database
  CO2(Chemical production stage)
- carbon dioxide: 7.39; measured
  CO2(Sewage treatment stage)
- sulfur dioxide: 0.001; measured
  NOx(Sewage treatment stage)
- methane: 0.001; measured
  SO2(Sewage treatment stage)
- carbon monoxide: 0.01; measured
  CH4(Sewage treatment stage)
- Total Suspended Particulate: 0.02; measured
  TSP(Sewage treatment stage)
- nitrogen, total (excluding N2): 0.024; measured
  TN(Sewage treatment stage)
- phosphorus, total: 0.006; measured
  TP(Sewage treatment stage)
- Waste solid: 68.79; measured
  waste(Sewage treatment stage)

## Other exchanges
- Nitrogen oxides: 0.01; software or database
  NOx(Transportation stage)
- non-methane volatile organic compounds: 0.02; software or database
  PM10(Transportation stage)
- Total Suspended Particulate: 0.06; software or database
  NMVOC(Transportation stage)
- Diesel: 15.08; software or database
  diesel(Chemical production stage)
- Nitrogen oxides: 0.01; software or database
  NOx(Chemical production stage)
- sulfur dioxide: 0.003; software or database
  SO2(Chemical production stage)
- methane: 0.13; software or database
  CH4(Chemical production stage)
- carbon monoxide: 0.04; software or database
  CO(Chemical production stage)
- particles (PM10): 0.01; software or database
  PM10(Chemical production stage)
- non-methane volatile organic compounds: 0.08; software or database
  NMVOC(Chemical production stage)
- Total Suspended Particulate: 0.01; software or database
  TSP(Chemical production stage)
- chemical oxygen demand: 0.053; software or database
  CODcr(Chemical production stage)
- biological oxygen demand: 0.12; software or database
  BOD5(Chemical production stage)
- nitrogen, total (excluding N2): 0.09; software or database
  TN(Chemical production stage)
- nitrate; software or database
  nitrate root(Chemical production stage)
- phosphate; software or database
  Phosphate(Chemical production stage)
- total suspended solids, unspecified; software or database
  TSS(Chemical production stage)
- non-methane volatile organic compounds: 0.01
  NMVOC(Sewage treatment stage)

## Review details
Inventory: The internal review was done by several iteration steps concerning raw data validation, raw data documentation, representativity, completeness and consistency of modelling with regard to ISO 14040 and 14044.

## Data sources
- 赵国杰, 游亚杰, & 黄起帅. 基于生命周期评价的瓦楞原纸产品碳足迹评价. 中国造纸 40, 40–44 (2021).
