# 铝土矿开采 ; 铝土矿 ; 摇篮 ; 2013年

Dataset: ILCD process, Unit process, single operation
Geography: CN
Reference year: 2021
Classification: Unit processes / Materials production / Non-energetic raw materials
Generated by: 蔡梓萌, caizm6178@163.com
Owner: 天工LCI数据工作小组
Review: Dependent internal review by 天工LCI数据工作小组
Amounts: no units in this file; such an amount is in the reference unit of its flow, which a separate flow dataset defines
copyright: false
licenseType: Free of charge for all users and uses

## General comment
氧化铝生产2017

## Time period
文献发表日期

## Technical purpose
铝土矿开采的生命周期评估数据集代表了铝土矿石的提取过程，该矿石是铝生产的主要原料。这种材料对铝工业中的各种应用至关重要，包括但不限于铝金属的制造、耐火材料、研磨材料以及用于陶瓷和化学处理的高级氧化铝的生产。

## Reference product
- bauxite: 5.06566e10; software or database

## Inputs
- Coal, brown, in ground: 3.3943e7; software or database
  coal
- Gasoline: 1.026e6; software or database
  gasoline
- Diesel oil: 2.3126e7; software or database
  diesel

## Data selection and combination
本研究的数据参考了PA、SA、电力等背景数据的LCA数据。PA数据来自统计数据源，SA数据主要来自文献。背景数据主要来自中国科学院生态环境研究中心CASRCEES 2018建立的中国本地化LCA数据库，涵盖能源、材料、交通、废物管理等LCA数据。

## Use advice
使用2013年铝土矿开采生命周期评估数据时，重要的是要考虑PA（初级铝）数据是来源于统计数据，SA（半自动）数据主要基于文献。背景生命周期评估数据来源于CAS RCEES 2018数据库，该数据库为能源、材料、运输和废物管理提供中国本土化。用户应确保他们评估的范围准确地包括了适当的技术适用性和系统边界，数据要与研究的地理和时间相关环境相一致。同时，也应该考虑数据库的更新或2013年之后采矿过程中的任何变化。

## Review details
清单： 内部审查通过几个迭代步骤完成，涉及原始数据验证、原始数据记录、代表性、完整性、与 ISO 14040 和 14044 有关的建模的一致性。

## Data sources
- Ding, N., Liu, N., Lu, B. & Yang, J. Life cycle greenhouse gas emissions of aluminum based on regional industrial transfer in China. J. Ind. Ecol. 25, 1657–1672 (2021).
