# Glass production | PMMA production | monomer receiving tank

Dataset: ILCD process, Unit process, single operation
Geography: JX-CN
Classification: Materials production / Other mineralic materials
Generated by: He xiaxia, 18616148319@163.com
Review: Dependent internal review by Tiangong LCI Data Working Group
Amounts: no units in this file; such an amount is in the reference unit of its flow, which a separate flow dataset defines
copyright: false

## Reference product
- methyl methacrylate: 896.478; measured

## Inputs
- polymethyl methacrylate (PMMA) beads: 998.097; measured

## Outputs
All rows: measured
- polymethyl methacrylate (PMMA) beads: 26.062
- Water (fresh water): 15.081
- organic waste (unspecified): 27.4685
- methanol: 8.88
- methacrylic acid: 11.9325
- methacrylate: 11.9325

## Review details
Inventory: The internal review was done by several iteration steps concerning raw data validation, raw data documentation, representativity, completeness and consistency of modelling with regard to ISO 14040 and 14044.; Documentation: The review of the documentation was performed by Ecobilan and is in compliance with ISO 14040 and 14044. The data set documentation is correct in view of the appropriateness of the information provided. It includes all relevant information in view of data quality and scope of application of the respective LCI result.

## Data sources
- 江西旺达新材料有限公司年产20000吨有机玻璃原料生产项目
