# 地下水修复;原位修复;吸附;吸附剂的制备;吸附剂的煅烧

Dataset: ILCD process, Unit process, single operation
Geography: ID
Reference year: 2022
Classification: Unit processes / Other Services / Repair and maintenance
Generated by: 肖萌, xiaomeng@mail.bnu.edu.cn
Owner: 天工LCI数据工作小组
Review: Dependent internal review by 天工LCI数据工作小组
Amounts: no units in this file; such an amount is in the reference unit of its flow, which a separate flow dataset defines
copyright: false
licenseType: Free of charge for all users and uses

## General comment
将吸附剂在700°C的电炉中煅烧1 h。

## Technical purpose
通过本工艺产出的吸附剂用于地下水的原位修复。它们通过吸附污染物来处理受污染的地下水。煅烧是制备这些吸附剂的关键步骤，通过提升它们的性能来有效地从地下水中移除污染物。

## Reference product
- Aluminium hydroxide/oxide nanoparticles adsorption (Calcined; final product): 3.06; measured
  Calcined Adsorbent

## Inputs
- Electricity: 9.9; measured
- Aluminium hydroxide/oxide nanoparticles adsorption (Drying): 3.06; measured
  Dry Adsorbent

## Use advice
在使用这份数据集进行生命周期评估时，请注意将700°C下进行1小时的煅烧过程考虑为吸附剂生产阶段的一部分。确保核算电炉运作过程中的所有能耗和排放。这份数据特定于所描述的单元过程，未经适当调整不应概化使用。除非有关回收过程的具体数据可用且相关，否则应排除吸附剂数的潜在回收。

## Review details
清单： 内部审查通过几个迭代步骤完成，涉及原始数据验证、原始数据记录、代表性、完整性、与 ISO 14040 和 14044 有关的建模的一致性。

## Data sources
- Goyal, H. & Mondal, P. Life cycle assessment (LCA) of the arsenic and fluoride removal from groundwater through adsorption and electrocoagulation: A comparative study. Chemosphere 304, 135243 (2022).
