# 选矿;铁精矿;选矿（D01）

Dataset: ILCD process, Unit process, single operation
Geography: CN
Reference year: 1998
Classification: Materials production / Metals and semimetals
Generated by: 付翔, 1162850692@qq.com
Owner: 天工LCI数据工作小组
Review: Dependent internal review by 天工LCI数据工作小组
Amounts: no units in this file; such an amount is in the reference unit of its flow, which a separate flow dataset defines
copyright: false
licenseType: Free of charge for all users and uses

## General comment
来自表 4-17 D01 钢厂生产吨材环境负荷编目表

## Time period
论文提到钢铁企业环境总体数据为1998年的吨钢环境基础数据。

## Technical purpose
通过选矿过程生产的铁精矿通常用于炼钢活动。它作为一种原材料，主要供高炉和直接还原过程中的铁钢工业使用。

## Reference product
- Refined Iron Ore: 955; measured
  精铁矿

## Inputs
- Energy, geothermal, converted: 574.341; measured
- water: 2770; measured
- Iron ore: 1873; measured
  铁矿石

## Outputs
- sulfur dioxide: 0.296; measured
- Suspended solids, unspecified: 0.01528; measured
- Spoil (deposited, hibernating in ground, non elementary flow): 894.835; measured

## Use advice
在使用该数据进行生命周期评估时，应考虑选矿过程中使用的具体技术，因为这些可能会影响铁精矿产品的环境特性。应当计入不同选矿方法之间的能耗、用水量和废物生成量的差异。该数据集基于1998年钢铁行业的环境基线数据，可能需要更新以反映技术进步或生产过程的变化。

## Review details
清单： 内部审查通过几个迭代步骤完成，涉及原始数据验证、原始数据记录、代表性、完整性、与 ISO 14040 和 14044 有关的建模的一致性。

## Data sources
- 周和敏. 钢铁材料生产过程环境协调性评价研究. (北京工业大学, 2001).
