# Treatment process of hazardous waste |Purchased diesel required for transportation,CN

Dataset: ILCD process
Geography: SH-CN
Classification: Materials production / Other mineralic materials
Generated by: Jiaqi Lu, wilsherelu@foxmail.com
Review: Dependent internal review by Tiangong LCI Data Working Group
Amounts: no units in this file; such an amount is in the reference unit of its flow, which a separate flow dataset defines
copyright: true

## Reference product
- Hazardous waste treatment: 1000; input; measured
  处理1t危险废物

## Inputs
- electricity mix: 226.8; measured
  电力
- natural gas: 4.17; measured
  天然气
- Diesel: 0.26; measured
  柴油

## Review details
Inventory: The internal review was done by several iteration steps concerning raw data validation, raw data documentation, representativity, completeness and consistency of modelling with regard to ISO 14040 and 14044.; Documentation: The review of the documentation was performed by Ecobilan and is in compliance with ISO 14040 and 14044. The data set documentation is correct in view of the appropriateness of the information provided. It includes all relevant information in view of data quality and scope of application of the respective LCI result.

## Data sources
- 上海市市政固废调研结果
