# Municipal wastewater treatment | Wastewater | Complete mixed activated-sludge technology

Dataset: ILCD process, Unit process, black box
Reference year: 2014
Valid until: 2014
Classification: Materials production / Other mineralic materials
Generated by: YU Chenyang, yuchenyang0506@foxmail.com
Review: Dependent internal review by Tiangong LCI Data Working Group
Amounts: no units in this file; such an amount is in the reference unit of its flow, which a separate flow dataset defines

## Geography
Dindaeng,Thailand

## Time period
2014年

## Reference product
- Wastewater: 1

## Inputs
- electricity: 0.936
- transport in t*km: 2.82e-14
  transport by lorry

## Outputs
- Polyaluminium Chloride: 4e-5
  polymer
- Sludge: 0.0849

## Review details
Inventory: The internal review was done by several iteration steps concerning raw data validation, raw data documentation, representativity, completeness and consistency of modelling with regard to ISO 14040 and 14044.

## Data sources
- A comparative life cycle assessment of municipal wastewater treatment plants in Thailand under variable power schemes and effluent management programs
