# 环氧树脂生产 ; 聚丙烯的生产

Dataset: ILCD process, Unit process, single operation
Geography: YL-GX-CN
Reference year: 2012
Classification: Materials production / Organic chemicals
Functional unit: The generation of 1 kW h (kW h) of electricity is adapted as the functional unit in this study, and the corresponding amounts of CO2 emissions and air pollutants (SO2,NOX and PM10)perkWh of electricity are chosen as the indicators for environmental performances, and the monetary value (US$) of per kW h of electricity is chosen as the indicator for cost-effectiveness evaluation.
LCI method principle: Attributional
LCI method approaches: Allocation
Generated by: 赵云志, ll10088@163.com
Owner: 天工LCI数据工作小组
Review: Dependent internal review by 天工LCI数据工作小组
Amounts: no units in this file; such an amount is in the reference unit of its flow, which a separate flow dataset defines
copyright: false
licenseType: Free of charge for all users and uses

## General comment
本数据集代表位于中国广西壮族自治区玉林市的典型风电场系统的生命周期。该系统用于评估风能与火力发电相比的环境和经济性能。环氧树脂和聚丙烯的生产过程作为风力涡轮机组件制造阶段的一部分涉及到。这些材料通常用于制造风力涡轮机的叶片和组件，因其强度、耐用性和抵抗环境因素的能力而广泛使用。

## Geography
本研究选取中国广西壮族自治区玉林市的典型风电场系统作为案例研究地点。开发商即中国华电股份有限公司，是一家国有企业，通过提供风力发电设备及相关服务，致力于在中国发展风力发电[ 37 ]。

## Reference product
- polyvinylchloride resin (E-PVC): 1; article inperiodical

## Outputs
- carbon dioxide: 3.94; article inperiodical
- nitrous oxide: 0.0147; article inperiodical
- sulfur dioxide: 0.0229; article inperiodical

## Deviations from the LCI method approaches
根据引入的生命周期评价方法[ 34、35 ]，首先确定了风能和火力发电的系统边界。然后，提出了评价环境和经济效益的方法，以量化共同利益，并从共同利益的角度介绍了环境和经济影响评价的方法。

## Data selection and combination
该风电场装有24台风电机组，每台机组的生产能力为1.25 MW，预计每台机组的运行寿命为20年。风电系统的生命周期可分为5个阶段： (1)生产制造、 (2)运输和安装、 (3)发电、 (4)维护和 (5)报废回收和处置。不可再生能源的投入在各个阶段都有所体现。在这项研究中，原材料、化石燃料的消耗和相应的排放都考虑了一个生命周期过程。同时，考虑风电场的成本效益，因为成本在风电场运营中扮演着非常重要的角色[38]。考虑到数据的可靠性和可获得性，该风电场的成本数据主要取自辽宁省康平县某风电场(设计容量为49.5 MW)的可行性报告[39]

## Use advice
使用此数据集时，用户应遵守研究中为风能和火力发电定义的系统边界。用户需要应用提供的生命周期评估方法来评价环境和经济影响。这包括在整个生命周期中考虑原材料消耗、能源使用和排放——以1kWh电力生成的功能单位。对于成本效益分析，应考虑每kWh电力的货币价值。考虑数据的可靠性和可获取性至关重要，特别是成本数据，该数据源自辽宁省康平县风电场的可行性报告。

## Review details
清单： 内部审查通过几个迭代步骤完成，涉及原始数据验证、原始数据记录、代表性、完整性、与 ISO 14040 和 14044 有关的建模的一致性。
