# cement milling|cement, ordinary portland cement

Dataset: ILCD process, Unit process, single operation
Geography: CS-HUN-CN
Classification: Materials production / Other mineralic materials
Generated by: Siqi Yang
Amounts: no units in this file; such an amount is in the reference unit of its flow, which a separate flow dataset defines
copyright: false

## General comment
Ordinary Portland cement (OPC)

## Geography
A typical cement plant in Changsha, Hunan Province, China

## Model description
The functional unit (FU) is defined as 1 kg blended cement with a compressive strength of 42.9 MPa.

## Reference product
- cement, ordinary portland cement: 1000
  OPC

## Inputs
- clinker: 938; measured
  Clinker
- gypsum (desulphurized): 67.6; measured
  Gypsum
- electricity, medium voltage: 245.88; measured
  Electricity. Electricity is generated from thermal power.

## Outputs
- particles (> PM10): 2.41e-5; measured
  PM. The particle size is not specified. Here we treat it as PM>10.

## Deviations from the LCI method approaches
Some data related to the background system were obtained from the Ecoinvent 3.1 database.

## Data selection and combination
The inventory data of the foreground system were directly collected in the studied cement plant located in Changsha, Hunan Province, China.

## Data sources
- Qinli Zhang, Bingyi Zhang, & Daolin Wang. (2022). Environmental Benefit Assessment of Blended Cement with Modified Granulated Copper Slag. MATERIALS, 15(15).
