# Shale gas production;Production

Dataset: ILCD process
Geography: SC-CN
Classification: Energy carriers and technologies / Natural gas based fuels
Generated by: Pu Hong, 15695258655@163.com
Owner: Tiangong LCI Data Working Group
Review: Dependent internal review by Tiangong LCI Data Working Group
Amounts: no units in this file; such an amount is in the reference unit of its flow, which a separate flow dataset defines
licenseType: Free of charge for all users and uses

## General comment
The dataset represents the process of shale gas production, which is predominantly carried out in the Sichuan and Chongqing regions of China. Shale gas, as a natural gas found trapped within shale formations, is utilized for several applications, including as a fuel for electricity generation, heating, and as a feedstock in the chemical industry for producing a wide range of chemical products.

## Geography
China's shale gas extraction work is currently concentrated in the Sichuan and Chongqing areas, and the data from Sichuan and Chongqing are selected for LCA calculations.

## Reference product
- Methane: 8.092e7; uniform; calculated
  页岩气井全生命周期产量（包含泄漏部分）

## Inputs
- Diesel: 1189; min 906; max 1479; uniform; estimated
  transport wastewater
- Shale gas well: 1; measured
  页岩气井的数目

## Outputs
- waste water - untreated: 268000; min 205000; max 268000; uniform; estimated
  Wastewater generated during the production phase of the entire life cycle

## Use advice
When using the dataset for Life Cycle Assessment (LCA) calculations of products or services involving shale gas, ensure that the geographical scope is consistent with the region from which the data was sourced, namely Sichuan and Chongqing. Attention should be paid to the impact assessment phase to consider the local environmental impact categories. Additionally, users should account for technological advancements in extraction techniques and potential variations in data due to policy changes or natural resource availability when applying this dataset.

## Review details
Inventory: The internal review was done by several iteration steps concerning raw data validation, raw data documentation, representativity, completeness and consistency of modelling with regard to ISO 14040 and 14044.

## Data sources
- Wang, J., Liu, M., McLellan, B. C., Tang, X. & Feng, L. Environmental impacts of shale gas development in China: A hybrid life cycle analysis. Resources, Conservation and Recycling 120, 38–45 (2017).
