# 生物淋滤法处理废旧镍钴锰电池

Dataset: ILCD process, Unit process, single operation
Geography: SD-CN
Reference year: 2016
Classification: Unit processes / End-of-life treatment / Material recycling
Functional unit: Functional unit is 1 kg of EoL zinc-manganese batteries treated by bioleaching method.
Generated by: 胡志康, hzk2503593129@163.com
Owner: 天工LCI数据工作小组
Review: Dependent internal review by 天工LCI数据工作小组
Amounts: no units in this file; such an amount is in the reference unit of its flow, which a separate flow dataset defines
copyright: false
licenseType: Free of charge for all users and uses

## General comment
该方法基本包括两个过程：生物淋滤过程和制备过程。在生物淋滤过程中，电池粉末中的金属被淋滤到溶液中，然后在制备过程中被回收。生物淋滤过程包括两个步骤，电池粉末的准备和菌培养。

## Technical purpose
所描述的生物淋滤法旨在回收利用废旧镍钴锰（NCM）电池，通过一种生物处理过程将电池粉末中的金属元素淋滤至溶液中以进行回收。该技术适用于涉及从用尽电池中回收有价值金属的应用，如在电池生产和专门从事EoL电池组分循环利用的物料回收设施中。

## Reference product
- EoL zinc-manganese battery: 1; input
  废旧锌锰电池

## Inputs
- Ammonium sulfate: 0.02703
  (NH4)2SO4
- Potassium Dihydrogen Phosphate: 0.01351
  KH2PO4（磷酸二氢钾）
- Magnesium Sulfate Heptahydrate: 0.01351
  MgSO4·7H2O（七水硫酸镁）
- calcium chloride: 0.00338
  CaCl2（氯化钙）
- sulfur: 0.10811
  硫
- Ferrous disulfide: 0.10811
  Fe2S（二硫化亚铁）
- Ferric Sulfate: 1.89189
  Fe2(SO4)3（硫酸铁）
- sodium hydroxide: 1.89189
  氢氧化钠
- Zinc sulfate: 0.30459
  ZnSO4（硫酸锌）
- Sulfuric acid: 0.00619
  硫酸
- freshwater: 0.052
  自来水
- Electricity: 77.076
  电力
- copper: 0.02
  Cu（循环物质）

## Outputs
- Manganese dioxide: 0.02474
  二氧化锰
- zinc oxide: 0.01939
  ZnO（氧化锌）
- lead: 2.17e-5
  铅
- cadmium: 6.94e-8
  Cd（镉）
- mercury: 1.12e-6
  Hg（汞）
- carbon-14: 0.00351
  C（碳）
- PVC: 0.015
  PVC（聚氯乙烯）
- waste paper (unspecified): 0.015
  纸
- Nylon: 0.015
  尼龙
- Sludge: 0.52213
  泥浆
- waste water - untreated: 0.05676
  废水
- Fe(Ni,2.06%): 0.194
  铁(镍，2.06%)
- copper: 0.02
  Cu（循环物质）
- Zn0.6Mn0.4Fe2O4: 1.0649

## Data selection and combination
数据主要来源于实验。本课题组合作者研发的生物淋滤法处理废旧锋铺电池技术发展迅速，并己在山东齐河进行了１００Ｌ的小试实验，结果良好。能源、水、物质消耗、固废和废水的产生数据通过小试实验的实际测量获得；气体排放的数据由实验测量并计算获得：循环物质铁、铜的量通过参考文献计算获得；火电的生产化、道路运输、氢氧化钠生产、废水处置等数据来自中国文献。其他化学品的生产、金属回收、固废填埋等取自欧洲数据库。

## Use advice
在应用这一数据集中的生物淋滤过程数据时，需要注意输入数据的实验性质，这些数据是通过小规模试验获得的。用户在将其应用于更大规模或工业级别的操作时，应考虑流程的可扩展性。能源和资源流动的数据应适当修改，以反映过程规模的变化。此外，在进行生命周期清单分析时，应根据研究的地理范围，适当参照中国或欧洲的数据集参考，包括间接过程，如电力生产、道路运输、氢氧化钠生产、废水处理和其他化学品生产。

## Review details
清单： 内部审查通过几个迭代步骤完成，涉及原始数据验证、原始数据记录、代表性、完整性、与 ISO 14040 和 14044 有关的建模的一致性。

## Data sources
- 孙明星. 中国废旧电池回收路径与管理体系研究. (山东大学, 2016).
