# Electricity production ; Electricity ; Thermal power (61.5%) + hydropower (4.9%) + nuclear power (28.1%) + wind power (1.4%) + solar power (4.1%)

Dataset: ILCD process, Partly terminated system
Geography: HAIN-CN
Reference year: 2019
Classification: Energy carriers and technologies / Electricity
LCI method principle: Other
Generated by: Ruoxi Xiong, xiongrx0126@163.com
Owner: Tiangong LCI Data Working Group
Review: Dependent internal review by Tiangong LCI Data Working Group
Amounts: no units in this file; such an amount is in the reference unit of its flow, which a separate flow dataset defines
copyright: false
licenseType: Free of charge for all users and uses

## General comment
Forms of electricity generation include thermal power generation, hydropower generation, nuclear power generation, wind power generation and solar power generation.

## Time period
Calculated based on data from the 2019 Energy Statistics Yearbook

## Technical purpose
The data represents the diversified electricity generation mix of an industrial process, encompassing thermal, hydropower, nuclear, wind, and solar power production. This electricity is utilized across various sectors and applications where such power sourcing is required, including residential, commercial, industrial, and transportation sectors. Specific usage is dependent on local infrastructure and availability of the respective power generation types.

## Reference product
- Electricity: 3.6; calculated

## Outputs
- carbon dioxide: 0.463; calculated
- sulfur dioxide: 7.8e-5; calculated
- Nitrogen oxides: 0.000122657; calculated
- Dust (unspecified, from stack): 1.4874e-5; calculated

## Data treatment and extrapolations
For the accounting method, please refer to the "Enterprise Greenhouse Gas Emissions Accounting Methods and Reporting Guidelines for Power Generation Facilities". Different forms of power generation and fuel consumption come from Chapter 3 (Energy Production) and Chapter 6 (Regional Energy Balance Sheet) in the "China Energy Statistical Yearbook 2020". The fuel parameters such as low calorific value and carbon content per unit calorific value used to calculate the carbon dioxide emission factor come from the "2019 China Regional Power Grid Carbon Dioxide Baseline Emission Factor Calculation Instructions OM" and the "Enterprise Greenhouse Gas Emission Accounting Method and Reporting Guide for Power Generation Facilities" 》

## Use advice
When using this data set for Life Cycle Assessment, careful consideration should be given to the specific energy mix and regional characteristics of electricity production. It is necessary to account for the variation in carbon intensity among different power sources. When modeling the use phase, the proportions of thermal, hydropower, nuclear, wind, and solar power in the electricity mix should be accurately represented as per the provided percentages. For accuracy in greenhouse gas emission reporting, adhere to the methodologies outlined in the 'Enterprise Greenhouse Gas Emissions Accounting Methods and Reporting Guidelines for Power Generation Facilities' and ensure the use of updated emission factors and fuel parameters as specified in the relevant Chinese yearbooks and guidelines.

## Review details
Inventory: The internal review was done by several iteration steps concerning raw data validation, raw data documentation, representativity, completeness and consistency of modelling with regard to ISO 14040 and 14044.

## Data sources
- 熊若熙. 中国电力生产和消费二氧化碳与污染物排放因子核算. (清华大学, 2023).
