# 土壤修复;异位修复;生物堆;工程实施;土壤清挖

Dataset: ILCD process
Geography: KR
Classification: Other Services / Repair and maintenance
Generated by: Sang Chunhui, sangch@mail.bnu.edu.cn
Owner: Tiangong LCI Data Working Group
Review: Dependent internal review by Tiangong LCI Data Working Group
Amounts: no units in this file; such an amount is in the reference unit of its flow, which a separate flow dataset defines
licenseType: Free of charge for all users and uses

## General comment
This soil remediation process is intended for the ex situ treatment of contaminated soil using a biopile engineering technique. It involves the excavation of soil from a polluted source area with a surface extent of 200 m2 and a contamination depth of 5 m, suitable for use on similar scales of land contamination.

## Reference product
- contaminated soil: 1000; article inperiodical

## Inputs
- Diesel: 0.803; article inperiodical

## Use advice
When using this data set for life cycle assessments, users should ensure the inclusion of all relevant stages of the biopile process, from excavation to treatment. It's essential to account for the geographical and technological context to maintain accuracy. Scale adaptions may be necessary for sites with different contamination levels or areas. Exclusion of recycling processes should be justified based on the specifics of the project.

## Review details
Inventory: The internal review was done by several iteration steps concerning raw data validation, raw data documentation, representativity, completeness and consistency of modelling with regard to ISO 14040 and 14044.
