# 底泥修复;异位修复;植物修复;建造;植物修复工厂

Dataset: ILCD process, Unit process, single operation
Geography: IT
Reference year: 2013
Classification: Unit processes / Other Services / Repair and maintenance
Generated by: 王宁, wang_ning@caep.org.cn
Owner: 天工LCI数据工作小组
Review: Dependent internal review by 天工LCI数据工作小组
Amounts: no units in this file; such an amount is in the reference unit of its flow, which a separate flow dataset defines
copyright: false
licenseType: Free of charge for all users and uses

## General comment
使用钢铁、混凝土等建造植物修复工厂

## Technical purpose
该描述过程适用于建设植物修复工厂，这些工厂旨在利用植物修复被污染的土壤、沉积物和水。这些植物修复工厂的构建使用了钢铁、混凝土等主要建筑材料以及其他必要的建筑组件。该建造过程适用于通过生物手段进行场地清理的环境工程项目，特别是在土地污染是关注焦点的工业或棕地场地。

## Reference product
- Phytoremediation plant: 1; measured

## Inputs
All rows: measured
- Concrete: 2.071e6
- Steel: 339900
- gravel: 5.0962e7
- sand: 2.4e7
- Waterproofing membrane: 577
- Chromium steel: 9200
- polyethylene high density granulate (PE-HD): 44100

## Use advice
在使用此数据集进行生命周期评估（LCA）时，请确保其在LCA研究的边界内适当划分，以包括与钢铁、混凝土以及其他输入相关的所有上游过程。仔细核算施工阶段的所有能耗，并评估整个植物修复工厂建立的环境影响。还应考虑维护和生命周期终点阶段，并且对于材料的回收处理等方法论选择应该进行透明记录。

## Review details
清单： 内部审查通过几个迭代步骤完成，涉及原始数据验证、原始数据记录、代表性、完整性、与 ISO 14040 和 14044 有关的建模的一致性。

## Data sources
- Puccini M., Seggiani M., Vitolo S., & Iannelli R. Life cycle assessment of remediation alternatives for dredged sediments. Chemical Engineering Transactions 35, 781–786 (2013).
