# Soil and groundwater remediation;Ex-situ;groundwater pump and treat;construction; Construction of Monitoring well

Dataset: ILCD process, Unit process, single operation
Geography: JS-CN
Reference year: 2022
Classification: Other Services / Repair and maintenance
Generated by: Wang Ning, wang_ning@caep.org.cn
Owner: Tiangong LCI Data Working Group
Review: Dependent internal review by Tiangong LCI Data Working Group
Amounts: no units in this file; such an amount is in the reference unit of its flow, which a separate flow dataset defines
licenseType: Free of charge for all users and uses

## General comment
Construction of three monitoring wells using polyvinyl chloride, bentonite, silica, diesel and steel

## Geography
a closed pesticide manufacturing plant located in Jiangsu Province, China.

## Technical purpose
The data set represents the construction of three monitoring wells as part of an ex-situ groundwater remediation process at a closed pesticide manufacturing plant. The monitoring wells, made from materials such as polyvinyl chloride (PVC), bentonite, silica, diesel, and steel, are intended for monitoring groundwater quality and evaluating the effectiveness of the remediation efforts in Jiangsu Province, China.

## Reference product
- Monitoring well: 3; article inperiodical

## Inputs
All rows: article inperiodical
- Polyvinyl chloride: 54.86
- bentonite: 644.53
- quartz sand: 3222.64
- Steel sections: 15
- diesel: 0.01152

## Use advice
Users should note that this data set is specific to the construction and use of monitoring wells in an ex-situ groundwater remediation project. When applying this data to other projects, consider the geographical, technological, and scale differences that may affect its relevance and accuracy. Additionally, issues such as the local availability of materials and environmental regulations may influence the applicability of the data. It is recommended to consult local guidelines for constructing monitoring wells and to ensure compliance with the environmental standards pertinent to the region in case adjustments to the methodology are necessary.

## Review details
Inventory: The internal review was done by several iteration steps concerning raw data validation, raw data documentation, representativity, completeness and consistency of modelling with regard to ISO 14040 and 14044.

## Data sources
- Ding, D. et al. Assessing the environmental impacts and costs of biochar and monitored natural attenuation for groundwater heavily contaminated with volatile organic compounds. Science of The Total Environment 846, 157316 (2022).
