# Recycled paper production|corrugated cardboard

Dataset: ILCD process, Unit process, black box
Geography: SD-CN
Classification: Materials production / Other mineralic materials
LCI method principle: Attributional
LCI method approaches: Allocation
Generated by: Yixiang Gao, 22210740040@m.fudan.edu.cn
Review: Dependent internal review by Tiangong LCI Data Working Group
Amounts: no units in this file; such an amount is in the reference unit of its flow, which a separate flow dataset defines
copyright: false

## General comment
在四种再生纸生产方案中，制浆、造纸、原材料运输、辅料化学品运输、废水处理以及固体废弃物处理等流程均包含在系统边界内。

## Geography
再生瓦楞纸板方案的清单数据来自于山东省某造纸企业的实地调研。

## Technology and included processes
在制浆工段，废纸经过链板输送机送到水力碎浆机，碎解后的浆料进入粗筛选系统(高浓除渣器和粗筛系统):粗筛后的浆料再通过分级筛系统，筛分为短纤维和长纤维，其中短纤维通过低浓除砂器除渣和浓缩机浓缩处理后进入抄前池;而长纤维通过低浓除砂器和精饰系统处理后再通过浓缩机、热分散系统和磨浆机后进入抄前池，抄前池的浆料再送往抄纸车间。此外，浆料浓缩过程中产生的白水部分回用于制浆工段。在造纸工段中，四种再生纸生产方案的流程基本相同分成打浆、抄纸、烘干三个工段。浆料经过调浆箱、浓白水塔及冲浆泵进入网前压力筛,后进入面层流浆箱上网。在废弃物处置环节，对再生纸生产制造中产生的一般固体废弃物、城市生活垃圾处理进行了安全填埋处置;而对浮选脱墨系统产生的工业危险废弃物脱墨渣收集后统一进行焚烧处置。再生瓦楞纸板方案中，对碎浆系统和除渣系统产生的废渣使用重力脱水机和污泥压榨机进行收集，后送至焚烧厂进行焚烧处理。

## Reference product
- Corrugated Cardboard: 885; measured
  Recycled corrugated cardboard

## Inputs
All rows: measured
- Oxidized starch: 1.75
- Inorganic Chemical Reagents: 4.51
  Inorganic chemical reagents
- Polyester Mesh Fabric: 0.02
  polyester mesh
- water: 5.8
- process steam: 1590
  steam
- Electricity: 1116
  electricity
- waste water - untreated: 3.98
  waste water disposal

## Outputs
All rows: measured
- Plastic Waste: 72.08
  Plastic and metal waste
- Waste Residue: 3.7
  Waste residue
- sludge (paper production): 43.8
  sludge
- Waste solid: 0.31
  General solid waste
- methane: 5.07
  biogas

## Deviations from the LCI method approaches
本研究中采用截断方法，不考虑可回收的固体废弃物（例如，煤渣、聚酯树脂和棉纤维）回收过程或再利用过程对研究目标产生的经济环境影响。

## Data selection and combination
再生瓦楞纸板方案的清单数据来自于山东省某造纸企业的实地调研。其次，本研究中涉及的绝大部分背景数据均来自中国本土化基于流程的生命周期清单数据库（CPLCID）。

## Review details
Inventory: The internal review was done by several iteration steps concerning raw data validation, raw data documentation, representativity, completeness and consistency of modelling with regard to ISO 14040 and 14044.

## Data sources
- 杨冬璐. 典型再生纸产品的生命周期环境与经济影响评价. (山东大学, 2019).
