# 印花布生产;印花布

Dataset: ILCD process, Unit process, black box
Geography: CN
Reference year: 2014
Classification: Unit processes / Systems / Textiles, furnitures and other interiors
Generated by: 段颖凡, 1300925579@qq.com
Owner: 天工LCI数据工作小组
Review: Dependent internal review by 天工LCI数据工作小组
Amounts: no units in this file; such an amount is in the reference unit of its flow, which a separate flow dataset defines
copyright: false
licenseType: Free of charge for all users and uses

## General comment
包括坯布检查、退卷缝头、染色、印花、印花后处理、成检六个环节。在照明灯条件下完成坯布检查。退卷缝头主要使用退卷机和缝纫机，仅消耗电力且时间较短。染色使用普通绳状染色机设备，消耗电力、工业用水、蒸汽以及染料。印花阶段使用大量的染料，同时消耗很多蒸汽。在照明灯条件下完成成检。

## Geography
中国是世界上最大的印染生产基地，但高速发展的同时也伴随着严重的环境问题。目前印染行业主要是通过企业的清洁生产审核，实施原辅材料低毒与低污染研究、废弃物的资源化、设备改造与更新、水与蒸汽的循环利用、生产工艺改进等针对某一特定环境问题的清洁生产方案来实现节能减排，而忽略了工业系统间的关联。

## Technical purpose
本印花布生产过程适用于纺织行业，特别是用于生产具有装饰性或图案的织物。这类织物通常用于服装、家居纺织品如窗帘和床上用品，有时也用于工业产品如横幅和标识。

## Reference product
- Printed Fabric: 1000; measured

## Inputs
All rows: measured
- Electricity: 3.7188
  坯布检查环节
- Electricity: 7.0416
  退卷缝头环节
- Electricity: 222.3
  染色环节
- Water for industrial use: 3
  染色环节
- Dye: 15.3
  染色环节
- Electricity: 206.449
  印花环节
- Water for industrial use: 11.558
  印花环节
- process steam: 1400
  印花环节
- Dye: 38.3
  印花环节
- Electricity: 140.994
  印花后处理环节
- Water for industrial use: 4.976
  印花后处理环节
- natural gas: 14.938
  印花后处理环节
- process steam: 395
  印花后处理环节
- Electricity: 3.7188
  成检环节

## Use advice
在利用本数据集进行生命周期评估时，应特别关注生产过程每个阶段的清单数据——特别是电力、水、蒸汽消耗和染料使用情况。确保这些投入根据产出的印花布重量或长度合理分配。此外，还应考虑所使用机械的技术效率和染料的环境影响。如果数据集用于评估产品在生命周期末期的回收，确保纳入回收过程的影响。

## Review details
清单： 内部审查通过几个迭代步骤完成，涉及原始数据验证、原始数据记录、代表性、完整性、与 ISO 14040 和 14044 有关的建模的一致性。

## Data sources
- 王赛赛, 吴雄英 & 丁雪梅. 三种LCA核算软件对印花布碳足迹核算的比较. 印染 40, 41–44 (2014).
