# 市政污泥处理与处置;湿污泥 含水率80%;750℃热解

Dataset: ILCD process, Unit process, single operation
Geography: CN
Classification: Unit processes / End-of-life treatment / Wastewater treatment
Functional unit: 1 t of sludge is selected as the functional unit, the moisture content of wet sludge is 80%.
Generated by: 金思甜, 2331276@tongji.edu.cn
Owner: 天工LCI数据工作小组
Review: Dependent internal review by 天工LCI数据工作小组
Amounts: no units in this file; such an amount is in the reference unit of its flow, which a separate flow dataset defines
copyright: ['opt4ROkqig']
licenseType: Free of charge for all users and uses

## General comment
通过实验对不同工况下的污泥热解处理工艺进行相关数据的收集和分配工作，对每一个过程的物质、能量的输入和输出，对环境污染物排放等进行量化。

## Technology and included processes
热解环节管式炉额定功率 4 kW，空载功率 1.4 kW，反应前通入 2~3 分钟氮气以保证无氧环境，氮气流量为 30 ml/min，管式炉升温速率 80 ℃/min，热解终温保持10min。

## Technical purpose
该数据集描述了市政污泥通过750℃的高温热解进行处理与处置的工艺流程。该处理包括将含水率为80%的湿污泥转化的过程，这通常用于废物管理设施。该工艺适用于将高含水量的污泥转化为可用的副产品，或者减少废物的质量与体积以便处置。

## Reference product
- Sludge: 1000; input; estimated
  1t湿污泥含水率 80%

## Inputs
- Electricity: 1879.99; calculated
- nitrogen: 5.63; calculated

## Outputs
All rows: calculated
- hydrogen: 1.09
- carbon monoxide (biogenic): 15.37
  原文未区分biogenic和fossil，根据专家判断此处为biogenic。
- methane (biogenic),methane (biogenic): 6.3
  原文未区分biogenic和fossil，根据专家判断此处为biogenic。
- non-methane volatile organic compounds: 1.11
- carbon dioxide (biogenic): 23.82
  原文未区分biogenic和fossil，根据专家判断此处为biogenic。
- Heat treatment oil: 74.86
- Semi-coke: 79.92

## Use advice
使用此数据的用户应将含水率为80%的1吨湿污泥作为功能单位。必须特别注意过程温度设定，这对于实现所需的热解结果至关重要。此数据最适合用于市政废物处理过程的生命周期评估。使用这些数据时，考虑任何可能影响整体环境性能的上游或下游过程。应考虑方法论考虑因素，如副产品的最终处理以及与热解过程相关的任何排放。

## Review details
清单： 内部审查通过几个迭代步骤完成，涉及原始数据验证、原始数据记录、代表性、完整性、与 ISO 14040 和 14044 有关的建模的一致性。

## Data sources
- 王久兵. 污泥热解反应机制及其能源化工艺的全生命周期评价研究[D].浙江工业大学,2017.
