# Soil and groundwater remediation;In-situ;groundwater In-situ Chemical Oxidation;Remediated groundwater

Dataset: ILCD process, Unit process, single operation
Geography: CA
Reference year: 2007
Classification: Other Services / Repair and maintenance
Generated by: Wang Ning, wang_ning@caep.org.cn
Owner: Tiangong LCI Data Working Group
Review: Dependent internal review by Tiangong LCI Data Working Group
Amounts: no units in this file; such an amount is in the reference unit of its flow, which a separate flow dataset defines
copyright: false
licenseType: Free of charge for all users and uses

## General comment
Pharmaceutical preparations, injection systems operational, groundwater remediated

## Geography
The contaminated area was located 600 m from a river shore in the northern part of the prov-ince of Quebec， Canada.

## Technology and included processes
Preparation of oxidizing chemicals using acetic acid, ferrous sulfate, and hydrogen peroxide, and remediation of groundwater using an electricity-driven in situ groundwater oxidation system

## Technical purpose
This in-situ chemical oxidation process is employed for environmental remediation, specifically for the treatment of soil and groundwater contamination. It is designed to degrade environmental pollutants to less hazardous compounds and is largely used in areas where contaminants threaten waterways, such as the site 600 meters from a river shore in Quebec, Canada.

## Reference product
- Remediated groundwater: 110067; estimated
  运行地下水原位氧化系统得到修复后的地下水

## Inputs
All rows: estimated
- Electricity: 166000
  消耗电力使地下水原位氧化系统运行
- acetic acid: 2280
  消耗醋酸使地下水原位氧化系统运行
- hydrogen peroxide: 4406
  消耗双氧水使地下水原位氧化系统运行
- iron sulphate: 9844
  消耗硫酸亚铁使地下水原位氧化系统运行
- Water (fresh water): 9844
  消耗水使地下水原位氧化系统运行

## Use advice
When utilizing this data set for LCA, it is essential to consider the specific characteristics of the contamination and the remediation site. Ensure the geographical relevance matches the LCA study's location. Take into account the potential environmental benefits and impacts during the operational phase of the in-situ oxidation system. Users should not extrapolate the results to dissimilar contamination scenarios or locations without proper adjustments.

## Review details
Inventory: The internal review was done by several iteration steps concerning raw data validation, raw data documentation, representativity, completeness and consistency of modelling with regard to ISO 14040 and 14044.
