# Dry sand Production|Sand and gravel dedusting|Bag Dedusting Technology

Dataset: ILCD process, Unit process, single operation
Geography: HAIN-CN
Reference year: 2020
Classification: Materials production / Other mineralic materials
Generated by: Cui hang, Cuihang0716@163.com
Review: Dependent internal review by Tiangong LCI Data Working Group
Amounts: no units in this file; such an amount is in the reference unit of its flow, which a separate flow dataset defines
copyright: false

## General comment
Dedusting of semi-finished sand with dedusting equipment

## Technology and included processes
Dedusting of semi-finished sand with pulse dusters

## Reference product
- sand: 38870

## Inputs
- electricity mix: 108; measured
- sand: 41870; measured

## Outputs
- Fly ash: 3000; measured

## Review details
Inventory: The internal review was done by several iteration steps concerning raw data validation, raw data documentation, representativity, completeness and consistency of modelling with regard to ISO 14040 and 14044.; Documentation: The review of the documentation was performed by Ecobilan and is in compliance with ISO 14040 and 14044. The data set documentation is correct in view of the appropriateness of the information provided. It includes all relevant information in view of data quality and scope of application of the respective LCI result.

## Data sources
- 陵水海岛混凝土有限公司干法制砂项目
