# 铝土矿开采 ; 铝土矿 ; 摇篮 ; 2009年

Dataset: ILCD process, Unit process, single operation
Geography: CN
Reference year: 2021
Classification: Unit processes / Materials production / Non-energetic raw materials
Generated by: 蔡梓萌, caizm6178@163.com
Owner: 天工LCI数据工作小组
Review: Dependent internal review by 天工LCI数据工作小组
Amounts: no units in this file; such an amount is in the reference unit of its flow, which a separate flow dataset defines
copyright: false
licenseType: Free of charge for all users and uses

## General comment
氧化铝生产2017

## Time period
文献发表日期

## Technical purpose
该生命周期评估（LCA）数据集涉及铝土矿开采和氧化铝生产过程。它旨在用于评估提取铝土矿（铝的主要来源）及其后续加工成氧化铝（铝生产的主要前体）的环境影响。该数据与铝行业的利益相关方相关，从原材料的提取到铝基产品的制造。

## Reference product
- bauxite: 3.51331e10; software or database

## Inputs
All rows: software or database
- electricity, high voltage, aluminium industry: 5.87027e7
  electricity
- other fuels: 1.70454e9
  electricity
- Coal, brown, in ground: 3.61625e7
  coal
- natural gas, high pressure: 399900
  coal
- Gasoline: 1.6545e6
  gasoline
- Diesel oil: 8.9586e6
  diesel

## Data selection and combination
本研究的数据参考了PA、SA、电力等背景数据的LCA数据。PA数据来自统计数据源，SA数据主要来自文献。背景数据主要来自中国科学院生态环境研究中心CASRCEES 2018建立的中国本地化LCA数据库，涵盖能源、材料、交通、废物管理等LCA数据。

## Use advice
使用此LCA数据集时，用户应注意铝的原铝（PA）数据基于统计来源，而铝的再生铝（SA）数据主要来自文献。用户还应注意，背景数据来源于中国本地化LCA数据库CAS RCEES 2018。任何外推或建模都应考虑数据特定于中国背景，未经调整以符合当地条件可能不直接适用于其他地区。在将此数据与来自其他地理区域或时间段的数据集集成时，应特别注意方法论的一致性。

## Review details
清单： 内部审查通过几个迭代步骤完成，涉及原始数据验证、原始数据记录、代表性、完整性、与 ISO 14040 和 14044 有关的建模的一致性。

## Data sources
- Ding, N., Liu, N., Lu, B. & Yang, J. Life cycle greenhouse gas emissions of aluminum based on regional industrial transfer in China. J. Ind. Ecol. 25, 1657–1672 (2021).
