# 铝电解电容器生产 ; 电容器，辅助剂和能源使用 ; 老化和检查 ; 电容器，辅助剂和能源使用

Dataset: ILCD process, Unit process, single operation
Geography: JS-CN
Reference year: 2020
Classification: Unit processes / Materials production / Metals and semimetals
Generated by: 常慧敏, huiminchang@tsinghua.edu.cn
Owner: 天工LCI数据工作小组
Review: Dependent internal review by 天工LCI数据工作小组
Amounts: no units in this file; such an amount is in the reference unit of its flow, which a separate flow dataset defines
copyright: false
licenseType: Free of charge for all users and uses

## General comment
老化和检查 ; 铝电解电容器（AEC）生产 ; 420V 680uf

## Time period
The investigated manufacturer produced about 1.183 billion AECs of all kinds in 2020.

## Technical purpose
所描述的铝电解电容器（AEC）生产适用于制造额定电压420V、电容量680uf的电容器，这些电容器适用于需要储能和滤波功能的各种电子设备，包括消费类电子、工业机械、汽车电子和电源供应。特定的生产过程旨在满足庞大的需求，如2020年调查的制造商生产的11.83亿个单位所示。

## Reference product
- capacitor, auxilliaries and energy use: 1728; measured
  Capacitors (qualified) [pcs]

## Inputs
- electricity, high voltage, aluminium industry: 255.73; measured
  Electricity [kWh]
- capacitor, auxilliaries and energy use: 1800; measured
  Capacitors (before aging)[pcs]

## Outputs
- capacitor, auxilliaries and energy use: 72; measured
  Capacitors (waste) [pcs]

## Data selection and combination
电容器生产的库存数据来自 AEC 位于中国江苏省的生产工厂。每道工序的 LCI 数据收集的截止标准是至少覆盖输入流和输出流 95% 的质量和能量。阳极箔生产和阴极箔生产的库存数据是根据生产工艺和相应工艺参数分析获得的。上游数据（即铝锭、分选纸、运输、电力和水）来自 Gabi 软件（版本：10.6.1.35）。具体而言，《中国电力年鉴》中的中国电网概况以 2016 年为基准年。铝锭生产的基准年为 2015 年。无法获取的柠檬酸铵、五硼酸铵、NH4H2PO4 和 HBO3 数据是根据 Gabi 软件中现有材料（反应物）的化学方程式估算的。使用和报废阶段的库存数据是通过分析和计算获得的。

## Use advice
在使用数据集进行生命周期评估时，请确保AEC生产的清单数据准确地代表了地理和技术环境，通过将过程与中国江苏省的相匹配。注意铝锭生产（2015年）和中国电网概况（2016年）的参考年份。考虑输入和输出流数据收集的截止标准，确保至少覆盖95％的质量和能量。上游数据来自Gabi软件，因此确认软件版本兼容性（v10.6.1.35），以保证一致性。使用阶段和生命周期末期的建模应纳入特定工厂的分析和计算。对于一些不可获取的数据，如某些化学品，使用基于Gabi软件中的反应物的化学方程式进行估算，并将其视为模拟数据而非原始数据。

## Review details
清单： 内部审查通过几个迭代步骤完成，涉及原始数据验证、原始数据记录、代表性、完整性、与 ISO 14040 和 14044 有关的建模的一致性。

## Data sources
- Zhang, C., Jing, J., Yun, L., Zheng, Y. & Huang, H. A cradle-to-grave life cycle assessment of high-voltage aluminum electrolytic capacitors in China. J. Clean. Prod. 370, (2022).
