# 青色氢技术制氢;天然气;TDM技术

Dataset: ILCD process
Geography: US
Reference year: 2022
Classification: Unit processes / Energy carriers and technologies / Natural gas based fuels
Functional unit: Production of 1kg hydrogen gas
Generated by: 刘晓华, lxh01311@163.com
Owner: 天工LCI数据工作小组
Review: Dependent internal review by 天工LCI数据工作小组
Amounts: no units in this file; such an amount is in the reference unit of its flow, which a separate flow dataset defines
copyright: false
licenseType: Free of charge for all users and uses

## General comment
该数据集描述的工业过程涉及使用蓝色氢技术制氢，具体采用TDM技术。该过程使用天然气作为原料。通过这种方法生产的氢气旨在用于需要低碳氢气的应用，如燃料电池电动车（FCEV）、化学合成、炼油过程、工业应用以及潜在的旨在减少碳足迹的电力生成系统。

## Reference product
- hydrogen: 1; measured
  氢气

## Inputs
- natural gas,natural gas: 6.7; measured
  天然气
- Electricity: 4.608; measured
  电

## Outputs
- carbon dioxide (fossil): 1.73; measured
  二氧化碳排放 原文未区分bio和fossil，根据专家判断此处为fossil
- Solid Carbon Source: 3; measured
  固体碳源

## Use advice
在将该数据集用于生命周期评估（LCA）时，用户必须考虑重要方面，如所使用天然气的来源和类型，以及与TDM技术相关的特定排放。必须记入蓝色氢生产不可或缺的碳捕捉、利用或储存（CCUS）方面，以准确评估环境影响。至关重要的是要包括天然气开采和处理的上游排放，以及氢气的下游潜在用途。用户应遵循区域特定的温室气体排放核算法规和标准，并评估技术应用的规模、位置和与现有基础设施的兼容性。

## Review details
清单： 内部审查通过几个迭代步骤完成，涉及原始数据验证、原始数据记录、代表性、完整性、与 ISO 14040 和 14044 有关的建模的一致性。

## Data sources
- Climate change performance of hydrogen production based on life cycle assess
