# 市政污泥处理与处置;湿污泥 含水率80%;550℃热解

Dataset: ILCD process, Unit process, single operation
Geography: CN
Classification: Unit processes / End-of-life treatment / Wastewater treatment
Functional unit: 1 t of sludge is selected as the functional unit, the moisture content of wet sludge is 80%.
Generated by: 金思甜, 2331276@tongji.edu.cn
Owner: 天工LCI数据工作小组
Review: Dependent internal review by 天工LCI数据工作小组
Amounts: no units in this file; such an amount is in the reference unit of its flow, which a separate flow dataset defines
copyright: ['opt4ROkqig']
licenseType: Free of charge for all users and uses

## General comment
通过实验对不同工况下的污泥热解处理工艺进行相关数据的收集和分配工作，对每一个过程的物质、能量的输入和输出，对环境污染物排放等进行量化。

## Technology and included processes
热解环节管式炉额定功率 4 kW，空载功率 1.4 kW，反应前通入 2~3 分钟氮气以保证无氧环境，氮气流量为 30 ml/min，管式炉升温速率 80 ℃/min，热解终温保持10min。

## Technical purpose
此数据集代表含水率为 80% 的市政污泥通过 550℃ 的热解工艺进行处理与处置。该过程用于管理并减少市政污水处理设施产生的湿污泥体积。这种处理将污泥中的有机组分转化为合成气，可以用于能量回收和生物炭，后者可用于土壤改良或作为固碳剂。

## Reference product
- Sludge: 1000; input; estimated
  1t湿污泥含水率 80%

## Inputs
- Electricity: 1480; calculated
- nitrogen: 5.63; calculated

## Outputs
All rows: calculated
- hydrogen: 0.11
- carbon monoxide (biogenic): 2.59
  原文未区分biogenic和fossil，根据专家判断此处为biogenic。
- methane (biogenic),methane (biogenic): 0.63
  原文未区分biogenic和fossil，根据专家判断此处为biogenic。
- non-methane volatile organic compounds: 0.49
- carbon dioxide (biogenic): 24.47
  原文未区分biogenic和fossil，根据专家判断此处为biogenic。
- Heat treatment oil: 85.28
- Semi-coke: 84.32

## Use advice
在使用此数据集进行生命周期评估时，请注意，功能单元是处理含水率为 80% 的 1 吨市政污泥。热解过程应考虑能量输入和输出、由于干燥和转化过程导致的质量损失以及潜在排放仔细建模。如果将此数据纳入更广泛的废物管理或能量回收系统生命周期评估中，请确保与其他生命周期阶段的一致性，并考虑像合成气和生物炭这样的副产品的下游使用或处置。

## Review details
清单： 内部审查通过几个迭代步骤完成，涉及原始数据验证、原始数据记录、代表性、完整性、与 ISO 14040 和 14044 有关的建模的一致性。

## Data sources
- 王久兵. 污泥热解反应机制及其能源化工艺的全生命周期评价研究[D].浙江工业大学,2017.
