# Northeast Rice Production | Raw Material Extraction

Dataset: ILCD process, Unit process, single operation
Geography: SY-LN-CN
Reference year: 2016
Valid until: 2017
Classification: Materials production / Other mineralic materials
Functional unit: 1t
LCI method principle: Attributional
LCI method approaches: Consequential
Generated by: Haoran Zhang, hrzhang@whu.edu.cn
Review: Dependent internal review by Tiangong LCI Data Working Group
Amounts: no units in this file; such an amount is in the reference unit of its flow, which a separate flow dataset defines
copyright: false

## Reference product
- rice: 1000

## Inputs
- Hard coal, at consumer EU-27: 10.85
- Diesel: 3.51, 0.41 (2 entries)
- Natural gas, at consumer EU-27: 1.63
- Electricity: 78.408
- water: 0.2
- crude oil; 42.3 MJ/kg: 7.66
- potassium chloride: 37.98
- phosphorus: 15.64

## Outputs
- carbon monoxide: 1.22
- carbon dioxide: 44.81
- nitrous oxide: 5.15
- sulfur dioxide: 0.72
- Nitrogen oxides: 0.28
- methane (fossil): 0.05
- chemical oxygen demand: 0.02
- cadmium: 0.0001
- nickel: 0.0013
- vanadium: 0.0005
- zinc: 0.0001
- arsenic: 0.0003

## Deviations from the LCI method approaches
The stipulated starting boundary is the mining of ores and fossil energy for the production of fertilizers and pesticides. The termination boundary is the emission of pollutants during the rice planting phase.

## Data selection and combination
A total of 62 households were surveyed, with the investigation covering various aspects such as the types and quantities of fertilizers used, types and amounts of pesticides used, machinery fuel consumption, production electricity consumption, and irrigation water volume, among other related information

## Data treatment and extrapolations
The equivalent coefficient method is used to convert similar pollutants into the environmental impact potential of reference objects [22], to assess the environmental impact of rice production."

## Review details
Inventory: The internal review was done by several iteration steps concerning raw data validation, raw data documentation, representativity, completeness and consistency of modelling with regard to ISO 14040 and 14044.; Documentation: The review of the documentation was performed by Ecobilan and is in compliance with ISO 14040 and 14044. The data set documentation is correct in view of the appropriateness of the information provided. It includes all relevant information in view of data quality and scope of application of the respective LCI result.

## Data sources
- 常俊彦,宋明阳,于晓曼等.沈阳地区水稻生产的生态环境影响研究[J].农业环境科学学报,2018,37(08):1793-1801.
