# Steam/hotwater/other|Biomassfuel|Layerburningfurnace|All sizes / 蒸汽/热水/其它|生物质燃料|层燃炉|所有规模

Dataset: ILCD process, Unit process, single operation
Geography: CN
Reference year: 2019
Classification: Energy carriers and technologies / Renewable fuels
Generated by: The data was created by the Office of the Second National Pollution Source Census of the Ministry of Ecology and Environment, and the data was organized by the TianGong Plan team for ILCD format / 生态环境部第二次全国污染源普查工作办公室创建数据，天工计划团队常慧敏整理数据为ILCD格式
Owner: Tiangong LCI Data Working Group / 天工LCI数据工作小组
Review: Dependent internal review by Tiangong LCI Data Working Group / 天工LCI数据工作小组
Amounts: no units in this file; such an amount is in the reference unit of its flow, which a separate flow dataset defines
copyright: false
licenseType: Free of charge for all users and uses

## General comment
the Technical of end-of-pipe management technology for pollution Nitrogen oxidesisSCR，Its Technical efficiency of end-of-pipe management70

## Reference product
- Biofuel: 1000; input; calculated
  源文件中描述为为生物质燃料，此处对其进行了匹配工作，将其匹配到LCAflow库里面相最符合的流，污染物指标备注为工业废气量

## Outputs
All rows: calculated
- Exhaust gas: 6240
  污染物指标工业废气量的末端治理技术是/，其效率为0。原文件中描述污染物类别为废气，污染物指标为工业废气量，此处对其进行了匹配工作，将其匹配到LCAflow库里面相最符合的流，污染物指标备注为工业废气量
- Exhaust gas: 6240
  污染物指标工业废气量的末端治理技术是有末端治理，其效率为0。原文件中描述污染物类别为废气，污染物指标为工业废气量，此处对其进行了匹配工作，将其匹配到LCAflow库里面相最符合的流，污染物指标备注为工业废气量
- sulfur dioxide: nan
  污染物指标二氧化硫的末端治理技术是/，其效率为0。原文件中描述污染物类别为废气，污染物指标为二氧化硫，此处对其进行了匹配工作，将其匹配到LCAflow库里面相最符合的流，污染物指标备注为二氧化硫，产污系数备注为产污系数表中二氧化硫的产污系数是以含硫量（S％）的形式表示的，其中含硫量（S％）是指燃油收到基硫分含量，以质量百分数的形式表示。例如燃料中含硫量（S％）为0.1％，则S=0.1。
- particles (PM2.5 - PM10): 0.5
  污染物指标颗粒物的末端治理技术是/，其效率为0。原文件中描述污染物类别为废气，污染物指标为颗粒物，此处对其进行了匹配工作，将其匹配到LCAflow库里面相最符合的流，污染物指标备注为颗粒物
- particles (PM2.5 - PM10): 0.2
  污染物指标颗粒物的末端治理技术是单筒（多筒并联）旋风，其效率为60，末端治理设施实际运行率（k值）计算公式为K=除尘设施年运行小时数/锅炉年运行小时数。原文件中描述污染物类别为废气，污染物指标为颗粒物，此处对其进行了匹配工作，将其匹配到LCAflow库里面相最符合的流，污染物指标备注为颗粒物
- particles (PM2.5 - PM10): 0.15
  污染物指标颗粒物的末端治理技术是多管旋风，其效率为70，末端治理设施实际运行率（k值）计算公式为K=除尘设施年运行小时数/锅炉年运行小时数。原文件中描述污染物类别为废气，污染物指标为颗粒物，此处对其进行了匹配工作，将其匹配到LCAflow库里面相最符合的流，污染物指标备注为颗粒物
- particles (PM2.5 - PM10): 0.065
  污染物指标颗粒物的末端治理技术是文丘里，其效率为87，末端治理设施实际运行率（k值）计算公式为K=除尘设施年运行小时数/锅炉年运行小时数。原文件中描述污染物类别为废气，污染物指标为颗粒物，此处对其进行了匹配工作，将其匹配到LCAflow库里面相最符合的流，污染物指标备注为颗粒物
- particles (PM2.5 - PM10): 0.065
  污染物指标颗粒物的末端治理技术是离心水膜，其效率为87，末端治理设施实际运行率（k值）计算公式为K=除尘设施年运行小时数/锅炉年运行小时数。原文件中描述污染物类别为废气，污染物指标为颗粒物，此处对其进行了匹配工作，将其匹配到LCAflow库里面相最符合的流，污染物指标备注为颗粒物
- particles (PM2.5 - PM10): 0.065
  污染物指标颗粒物的末端治理技术是喷淋塔/冲击水浴，其效率为87，末端治理设施实际运行率（k值）计算公式为K=除尘设施年运行小时数/锅炉年运行小时数。原文件中描述污染物类别为废气，污染物指标为颗粒物，此处对其进行了匹配工作，将其匹配到LCAflow库里面相最符合的流，污染物指标备注为颗粒物
- particles (PM2.5 - PM10): 0.015
  污染物指标颗粒物的末端治理技术是静电除尘，其效率为97，末端治理设施实际运行率（k值）计算公式为K=除尘设施年运行小时数/锅炉年运行小时数。原文件中描述污染物类别为废气，污染物指标为颗粒物，此处对其进行了匹配工作，将其匹配到LCAflow库里面相最符合的流，污染物指标备注为颗粒物
- particles (PM2.5 - PM10): 0.0015
  污染物指标颗粒物的末端治理技术是袋式除尘，其效率为99.7，末端治理设施实际运行率（k值）计算公式为K=除尘设施年运行小时数/锅炉年运行小时数。原文件中描述污染物类别为废气，污染物指标为颗粒物，此处对其进行了匹配工作，将其匹配到LCAflow库里面相最符合的流，污染物指标备注为颗粒物
- particles (PM2.5 - PM10): 0.0015
  污染物指标颗粒物的末端治理技术是电袋组合，其效率为99.7，末端治理设施实际运行率（k值）计算公式为K=除尘设施年运行小时数/锅炉年运行小时数。原文件中描述污染物类别为废气，污染物指标为颗粒物，此处对其进行了匹配工作，将其匹配到LCAflow库里面相最符合的流，污染物指标备注为颗粒物
- particles (PM2.5 - PM10): 0.065
  污染物指标颗粒物的末端治理技术是湿式喷雾，其效率为87，末端治理设施实际运行率（k值）计算公式为K=除尘设施年运行小时数/锅炉年运行小时数。原文件中描述污染物类别为废气，污染物指标为颗粒物，此处对其进行了匹配工作，将其匹配到LCAflow库里面相最符合的流，污染物指标备注为颗粒物
- Nitrogen oxides: 1.02
  污染物指标氮氧化物的末端治理技术是/，其效率为0。原文件中描述污染物类别为废气，污染物指标为氮氧化物，此处对其进行了匹配工作，将其匹配到LCAflow库里面相最符合的流，污染物指标备注为氮氧化物
- Nitrogen oxides: 0.714
  污染物指标氮氧化物的末端治理技术是低氮燃烧，其效率为30。原文件中描述污染物类别为废气，污染物指标为氮氧化物，此处对其进行了匹配工作，将其匹配到LCAflow库里面相最符合的流，污染物指标备注为氮氧化物
- Nitrogen oxides: 0.55692
  污染物指标氮氧化物的末端治理技术是低氮燃烧+选择性非催化还原法（SNCR），其效率为45.4。原文件中描述污染物类别为废气，污染物指标为氮氧化物，此处对其进行了匹配工作，将其匹配到LCAflow库里面相最符合的流，污染物指标备注为氮氧化物
- Nitrogen oxides: 0.2142
  污染物指标氮氧化物的末端治理技术是低氮燃烧+选择性催化还原法（SCR），其效率为79。原文件中描述污染物类别为废气，污染物指标为氮氧化物，此处对其进行了匹配工作，将其匹配到LCAflow库里面相最符合的流，污染物指标备注为氮氧化物
- Nitrogen oxides: 0.7956
  污染物指标氮氧化物的末端治理技术是选择性非催化还原法（SNCR），其效率为22，末端治理设施实际运行率（k值）计算公式为K=脱硝设施年运行小时数/锅炉年运行小时数。原文件中描述污染物类别为废气，污染物指标为氮氧化物，此处对其进行了匹配工作，将其匹配到LCAflow库里面相最符合的流，污染物指标备注为氮氧化物
- Nitrogen oxides: 0.306
  污染物指标氮氧化物的末端治理技术是选择性催化还原法（SCR），其效率为70，末端治理设施实际运行率（k值）计算公式为K=脱硝设施年运行小时数/锅炉年运行小时数。原文件中描述污染物类别为废气，污染物指标为氮氧化物，此处对其进行了匹配工作，将其匹配到LCAflow库里面相最符合的流，污染物指标备注为氮氧化物

## Use advice
This dataset is derived from the Pollution Source Census Report and contains information on pollution emissions and related products. However, it does not include data on energy or chemical consumption, nor does it provide information on waste or co-product generation. When utilizing this dataset, please supplement the missing data based on actual conditions before use
该数据集来源于污染源普查报告，包含污染物排放及相关产品信息，但不包含能源或化学品消耗数据，也不提供废弃物或共生产物产生信息。在使用该数据集时，请根据实际情况补充缺失数据后再使用。

## Review details
Inventory: The internal review was done by several iteration steps concerning raw data validation, raw data documentation, representativity, completeness and consistency of modelling with regard to ISO 14040 and 14044.
清单： 内部审查通过几个迭代步骤完成，涉及原始数据验证、原始数据记录、代表性、完整性、与 ISO 14040 和 14044 有关的建模的一致性。

## Data sources
- 第二次全国污染源普查产排污核算系数手册（试用版）,四级代码4430文件，在完整版文件中第5449页
