# Oil and gas reservoir evaluation | Three types of pre-exploration zones | Resource value calculation

Dataset: ILCD process, Unit process, single operation
Geography: SC-CN
Reference year: 2015
Classification: Materials production / Other mineralic materials
LCI method principle: Attributional
LCI method approaches: Consequential
Generated by: Shikang Kang, 908798159@qq.com
Review: Dependent internal review by Tiangong LCI Data Working Group
Amounts: no units in this file; such an amount is in the reference unit of its flow, which a separate flow dataset defines
copyright: false

## General comment
According to the templates and parameters of the pre-exploration zones, the strategic value of resources in five pre-exploration zones in Sichuan Basin is evaluated. In order to facilitate comparison and comparison, we normalized the evaluation index according to the exploration status of the pre-exploration zone in Sichuan Basin

## Geography
Pre-exploration zone of Sichuan basin

## Time period
Publication time of literature

## Technology and included processes
Based on the exploration risk analysis technology, the pre-exploration zone evaluation template of "oil and gas discovery probability-resource strategic value" is established, and the corresponding evaluation parameters, assignment standards, calculation formulas and result classification standards are put forward, thus realizing the evaluation and optimization of pre-exploration zones under a unified platform.

## Reference product
- natural gas: 1e12; input; min 1e12; max 3e13; normal; article inperiodical
  各个区带的资源量均值与其的比值

## Inputs
- natural gas: 3e11; max 3e11; uniform; article inperiodical
  潜在资源量
- natural gas: 0.34; log-normal; article inperiodical
  油气发现率

## Data selection and combination
The evaluation parameters of oil and gas discovery probability include the key factors of geological accumulation (source rock, trap, reservoir, preservation and oil and gas matching history) and the applicability of engineering technology, and the evaluation parameters of resource strategic value include resource potential, resource scale, exploration strategic significance and exploration well success rate

## Data treatment and extrapolations
In the evaluation, the factors such as the scale and potential of resources, the success rate of exploration wells and the strategic significance of exploration are taken into account. Four parameters, i.e. resource quantity index, potential resource quantity index, success rate index of exploration wells and strategic value of exploration, are used to comprehensively reflect the relative value of resources in the pre-exploration zone, and quantitatively express the potential and value of resources

## Review details
Inventory: The internal review was done by several iteration steps concerning raw data validation, raw data documentation, representativity, completeness and consistency of modelling with regard to ISO 14040 and 14044.; Documentation: The review of the documentation was performed by Ecobilan and is in compliance with ISO 14040 and 14044. The data set documentation is correct in view of the appropriateness of the information provided. It includes all relevant information in view of data quality and scope of application of the respective LCI result.

## Data sources
- 刘超英;闫相宾;高山林;闵斌; 油气预探区带评价优选方法及其应用. 石油与天然气地质 314-318+329 (2015).
