# 养猪生产 ; 适度规模专业户 ; 饲料原料生产

Dataset: ILCD process, Unit process, single operation
Geography: SC-CN
Reference year: 2006
Classification: Unit processes / Materials production / Agricultural production means
Functional unit: In this study, the functional unit (FU) was defined as "1kg pig carcass", which included skin, bone and fat. Foreign studies generally only considered lean meat, but in China's consumption mode, skin and viscera were also fully utilized as edible foods. The concept of carcass was adopted in this study. Although the bone included in this study is an inedible part, it can play a certain compensative role because it does not contain internal organs. In addition, the current data can be easily converted into carcass weight, so it is more in line with the actual situation.
Generated by: 杨瑞, 1632707028@qq.com
Owner: 天工LCI数据工作小组
Review: Dependent internal review by 天工LCI数据工作小组
Amounts: no units in this file; such an amount is in the reference unit of its flow, which a separate flow dataset defines
copyright: false
licenseType: Free of charge for all users and uses

## General comment
丘陵区和平原区专业户适度规模饲养。提供了大约19%的商品猪,在四川养猪业中起着主要的调节作用。这种养猪情景的主要情景状态和设定参数为 ①50%能量饲料为本省玉米为主的谷物，蛋白饲料以购买浓缩饲料为主；另外50%饲料购买全价配合饲料。饲养期160d左右，出栏平均重量为80kg； ② 专业户养猪数量随着市场变化波动很大，本研究假设平均出栏数为100头/年·户。品种70%为洋二杂猪（两品系外种猪间杂交后代），屠宰率75%，30%为洋三元（如DLY), 屠宰率76%,全程料肉比3.2:1 ;③饲养管理:比较注重饲料合理配制,但环境管理 较差;④粪便处理及利用:未进行处理,40%还田(长期存贮量占8%),60%排放到周边环境,排出水COD为400mg/L。

## Geography
由于本文按占用土地进行农资消耗分配，情景A中不再考虑具体的作物产量，各种情景下的浓缩饲料和全价饲料均按设定的两种情况按相应的全国或四川省内主要谷物平均产量折算成相当的土地面积。

## Time period
饲料原料生产的能量消耗和化肥、农药、地膜等使用量按《中国统计年鉴2006》计算四川平均水平。

## Technology and included processes
浓缩料中分析豆粕（70%）、菜籽粕（10%），其余成分没有考虑。全价饲料的成分主要是玉米为主的谷物（70%）和豆粕（25%），其余成分没有考虑。没有包括矿物质、消毒剂和各种小型设备设施。

## Technical purpose
该数据代表了中国四川省的养猪生产过程，特别是在丘陵和平原区域中等规模的专业户养猪。目的是生产商业猪肉，强调饲料中能量和蛋白的平衡，由本地玉米和购买的浓缩饲料为主，辅以全价配合饲料。涵盖了以洋杂交猪为主的典型养殖场景、具体的屠宰率和饲料转换肉的比例。该数据可用于农业和食品工业领域的环境影响评估，尤其是专注于可持续猪肉养殖实践。

## Reference product
- pig: 1; estimated
  作为参考定量，非实际输出

## Inputs
- nitrogen: 0.0949; measured
  情景B
- phosphorus: 0.0296; measured
  情景B
- polyvinylchloride resin (E-PVC): 0.0061; measured
  情景B
- hard coal: 1.57734; calculated
  情景B
- Gasoline (regular): 0.15536; calculated
  情景B
- Diesel: 1.25199; calculated
  情景B
- Electricity: 0.0733569; calculated
  情景B
- potassium: 0.0066; measured
  情景B

## Deviations from the LCI method approaches
本研究采用LCA方法学和情景分析法相结合的方式对四川三种典型的养猪生产 情景进行系统的环境影响评估，探索这种分析方法应用于当前养猪生产环境影响评估 时的具体算法，并揭示各种养猪生产系统中的环境友好和不利方面以及其不可更新能 源利用效率。研究结果有助于对养猪业环境影响态势的认识，并为养猪可持续发展模 式的建立提供参考。

## Data selection and combination
1）本研究中四川养猪业的基本情况和各种情景的设定，一方面征求了四川省多位养猪专家的意见，另一方面进行了实地调查。2）作物生产中的相关数据主要来自年年鉴中给出的2005年统计数据。四川的饲料原料生产数据和全国的平均数据用于区分原料来自省内和省外两种情况。

## Data treatment and extrapolations
四川的饲料原料生产数据和全国的平均数据用于区分原料来自省内和省外两种情况。农资消耗量按相应的原料消耗量和全国或四川省内主要谷物平均产量折算成相当的土地面积，再按面积求得。由于三种情景中所用的饲料配方差异大，故进行了主要原料消耗比例的假设，然后根据抽样调查资料进行了调整。

## Use advice
在应用该数据集进行生命周期评估（LCA）时，用户应注意它是在四川省养猪实践的具体背景下构建的。这些数据不是设计为普遍适用的，而是为了本地化的农业投入和产出而加以情景化。在LCA建模时，建议考虑数据中强调的饲料成分特性、区域资源消耗模式和废弃物处理实践的特定性。在没有适当调整的情况下，不应将这些发现外推到不同的农业环境中。在尝试将环境影响结果概括应用到其他地区或运营规模时应谨慎行事。

## Review details
清单： 内部审查通过几个迭代步骤完成，涉及原始数据验证、原始数据记录、代表性、完整性、与 ISO 14040 和 14044 有关的建模的一致性。

## Data sources
- 白林. 四川养猪业清洁生产系统LCA及猪粪资源化利用关键技术研究. (四川农业大学, 2007).
