# 生物质航空燃油热解气化烯烃齐聚

Dataset: ILCD process, Unit process, black box
Geography: CN
Classification: Unit processes / Energy carriers and technologies / Renewable fuels
Functional unit: 1 MJ aviation fuel
LCI method principle: Attributional
LCI method approaches: Allocation - gross calorific value
Generated by: 张艺璇, zhangyixuan0444@igsnrr.ac.cn
Owner: 天工LCI数据工作小组
Review: Dependent internal review by 天工LCI数据工作小组
Amounts: no units in this file; such an amount is in the reference unit of its flow, which a separate flow dataset defines
licenseType: Free of charge for all users and uses

## General comment
生物质热解气化低碳烯烃费托合成烯烃齐聚李勇水稻稻壳等生物质原材料，通过生物质热解，气化，烯烃齐聚反应，最终通过液相气相反应合成生物航油。这种替代航空燃料生产过程主要通过提供一种可再生燃料来源为航空工业服务，与传统基于化石燃料的航空燃料相比，潜在的温室气体排放更低。

## Model description
运用 Aspen Plus 软件搭建工艺完整流程的仿真模型并进行模拟计算，在质量平衡的基础上获得各项工艺的质量流、能量流、热力学参数和反应器的功耗

## Reference product
- water: 0.0018; input; calculated

## Inputs
- Electricity: 0.396, 0.396, 5.4, 0.396, 0.396 (5 entries); calculated
- Electricity: 3.276; calculated
  生产过程输入

## Outputs
All rows: calculated
- carbon dioxide (biogenic): 0.013, 0.27, 9.4, 0.97 (4 entries)
  原文未区分bio和fossil，根据专家判断此处为bio
- carbon monoxide (biogenic): 0.84, 0.0038 (2 entries)
  原文未区分bio和fossil，根据专家判断此处为bio
- nitrous oxide: 2.2e-15, 2e-5 (2 entries)
- methane (biogenic): 0.0026
- sulfur dioxide: 6.3e-6, 0.0045 (2 entries)
- methane (biogenic): 0.003
  原文未区分bio和fossil，根据专家判断此处为bio

## Deviations from the LCI method approaches
按照能量分配的方式分配环境影响值，即在排放分配的过程中，根据航油以及其他燃料的能量分配给每 MJ 的航油生产

## Use advice
使用此数据集进行生命周期评估时，必须考虑能量分配原则。环境影响值必须根据生物航空燃油及任何其他共生产燃料的能量含量来分配。分配应与每MJ生产的生物航空燃油所提供的能量成比例。必须确保与系统边界保持方法论的一致性，并且选择分配方法需与研究目标相符合，并有适当的理由。

## Review details
清单： 内部审查通过几个迭代步骤完成，涉及原始数据验证、原始数据记录、代表性、完整性、与 ISO 14040 和 14044 有关的建模的一致性。

## Data sources
- 于点. 生物质基航空燃料制备工艺系统仿真、㶲分析及全生命周期评价(东南大学, 2019).
