# 铝土矿开采 ; 铝土矿 ; 摇篮 ; 2008年

Dataset: ILCD process, Unit process, single operation
Geography: CN
Reference year: 2021
Classification: Unit processes / Materials production / Non-energetic raw materials
Generated by: 蔡梓萌, caizm6178@163.com
Owner: 天工LCI数据工作小组
Review: Dependent internal review by 天工LCI数据工作小组
Amounts: no units in this file; such an amount is in the reference unit of its flow, which a separate flow dataset defines
copyright: false
licenseType: Free of charge for all users and uses

## General comment
氧化铝生产2017

## Time period
文献发表日期

## Technical purpose
该数据集涉及铝土矿开采和氧化铝生产过程，这是铝生产的初级阶段。铝土矿是铝金属制造的主要原材料，通过开采从地面提取。开采后，铝土矿被提炼成氧化铝，然后用于通过冶炼过程生产铝。这份数据集适用于矿业、铝生产行业及任何需要铝土矿和氧化铝输入的相关领域的利益相关者。

## Reference product
- bauxite: 3.29266e10; software or database

## Inputs
All rows: software or database
- electricity, high voltage, aluminium industry: 5.50159e7
  electricity
- other fuels: 1.59749e9
  electricity
- Coal, brown, in ground: 3.38913e7
  coal
- natural gas, high pressure: 374800
  coal
- Gasoline: 1.5506e6
  gasoline
- Diesel oil: 8.396e6
  diesel

## Data selection and combination
本研究的数据参考了PA、SA、电力等背景数据的LCA数据。PA数据来自统计数据源，SA数据主要来自文献。背景数据主要来自中国科学院生态环境研究中心CASRCEES 2018建立的中国本地化LCA数据库，涵盖能源、材料、交通、废物管理等LCA数据。

## Use advice
在使用此数据集时，用户应注意出版年份（2008年对于铝土矿开采和2017年对于氧化铝生产），因为自那时起可能发生了技术和环境法规的变化。为了准确解读LCA数据，建议参考与数据时期相关的技术应用。用户应将此数据与当前和本地化的LCA数据整合，以确保评估的准确性。在模拟使用阶段行为时，应考虑铝生产过程的具体要求。注意在适用的情况下，对回收过程的包含或排除的方法论指导。

## Review details
清单： 内部审查通过几个迭代步骤完成，涉及原始数据验证、原始数据记录、代表性、完整性、与 ISO 14040 和 14044 有关的建模的一致性。

## Data sources
- Ding, N., Liu, N., Lu, B. & Yang, J. Life cycle greenhouse gas emissions of aluminum based on regional industrial transfer in China. J. Ind. Ecol. 25, 1657–1672 (2021).
