# Electricity production ; Electricity ; Thermal power (96.4%) + wind power (1.5%) + solar power (2%)

Dataset: ILCD process, Partly terminated system
Geography: TJ-CN
Reference year: 2019
Classification: Energy carriers and technologies / Electricity
LCI method principle: Other
Generated by: Ruoxi Xiong, xiongrx0126@163.com
Owner: Tiangong LCI Data Working Group
Review: Dependent internal review by Tiangong LCI Data Working Group
Amounts: no units in this file; such an amount is in the reference unit of its flow, which a separate flow dataset defines
copyright: false
licenseType: Free of charge for all users and uses

## General comment
Forms of electricity generation include thermal power, hydropower, wind power and solar power

## Time period
Calculated based on data from the 2019 Energy Statistics Yearbook

## Technical purpose
This dataset describes an industrial process of electricity generation, which primarily relies on thermal power generation (96.4%), with a small proportion of wind (1.5%) and solar power (2%) production. Such mixed electricity generation is typically employed to meet the energy demands of a grid supply, providing power for residential, commercial, industrial, and public users. Typically, thermal power relies on fossil fuels and is used for base load electricity supply due to its reliability and continuous availability, while wind and solar power are renewable energy sources used to supplement the base load and reduce environmental impact.

## Reference product
- Electricity: 3.6; calculated

## Outputs
- carbon dioxide: 0.7; calculated
- sulfur dioxide: 0.000112; calculated
- Nitrogen oxides: 0.000173325; calculated
- Dust (unspecified, from stack): 2.5396e-5; calculated

## Data treatment and extrapolations
For the accounting method, please refer to the "Enterprise Greenhouse Gas Emissions Accounting Methods and Reporting Guidelines for Power Generation Facilities". Different forms of power generation and fuel consumption come from Chapter 3 (Energy Production) and Chapter 6 (Regional Energy Balance Sheet) in the "China Energy Statistical Yearbook 2020". The fuel parameters such as low calorific value and carbon content per unit calorific value used to calculate the carbon dioxide emission factor come from the "2019 China Regional Power Grid Carbon Dioxide Baseline Emission Factor Calculation Instructions OM" and the "Enterprise Greenhouse Gas Emission Accounting Method and Reporting Guide for Power Generation Facilities" 》

## Use advice
Users of this data set should reference the 'Enterprise Greenhouse Gas Emissions Accounting Methods and Reporting Guidelines for Power Generation Facilities' for the methodological framework. Attention should be paid to the mix of different forms of electricity generation when applying this data, as well as to the specific carbon emission factors calculated from the 2019 Energy Statistics Yearbook. It is critical to ensure that the forms of generation and the associated fuel consumption are accurately represented, particularly when modelling the carbon footprint or environmental impact assessments of power generation. Methodological consistency with regional factors and guidelines is essential for accurate reporting and analysis.

## Review details
Inventory: The internal review was done by several iteration steps concerning raw data validation, raw data documentation, representativity, completeness and consistency of modelling with regard to ISO 14040 and 14044.

## Data sources
- 熊若熙. 中国电力生产和消费二氧化碳与污染物排放因子核算. (清华大学, 2023).
