# Molten steel production|Molten steel|BOF

Dataset: ILCD process, Unit process, single operation
Geography: CN
Classification: Materials production / Other mineralic materials
Generated by: Fuxiang, 1162850692@qq.com
Review: Dependent internal review by Tiangong LCI Data Working Group
Amounts: no units in this file; such an amount is in the reference unit of its flow, which a separate flow dataset defines
copyright: false

## Geography
The data of the BF-BOF pathway were obtained from the large-scale integrated steel plants in China with an attached coking plant and EAF plant.

## Reference product
- Molten Steel: 1023.4; measured
  Molten steel

## Inputs
All rows: measured
- Molten Iron: 924
  Molten iron
- Iron scrap: 124.2
  Scrap steel/iron
- dolomite: 2.6
- quicklime: 24.3
  Quicklime
- Circulating water: 7600
- Refractory: 9.8
- oxygen: 51.6
- Coke oven gas: 13.7
  COG
- Linz-Donawitz gas: 2.2
  LDG
- Silicomanganese: 17.8
- Electricity: 180.36

## Outputs
- Linz-Donawitz gas: 98.1; measured
  LDG
- BOF Slag: 157.1; measured

## Review details
Inventory: The internal review was done by several iteration steps concerning raw data validation, raw data documentation, representativity, completeness and consistency of modelling with regard to ISO 14040 and 14044.; Documentation: The review of the documentation was performed by Ecobilan and is in compliance with ISO 14040 and 14044. The data set documentation is correct in view of the appropriateness of the information provided. It includes all relevant information in view of data quality and scope of application of the respective LCI result.

## Data sources
- The carbon reduction potential of hydrogen in the low carbon transition of the iron and steel industry: The case of China
