# 灰水回用｜灰水｜带污泥焚烧的 MBR

Dataset: ILCD process, Unit process, black box
Geography: ES
Classification: Unit processes / End-of-life treatment / Waste water treatment
Generated by: 榕
Owner: 天工LCI数据工作小组
Review: Dependent internal review by 天工LCI数据工作小组
Amounts: no units in this file; such an amount is in the reference unit of its flow, which a separate flow dataset defines
copyright: ['opt4ROkqig']
licenseType: Free of charge for all users and uses

## General comment
带污泥焚烧的MBR灰水回用系统能够高效地处理灰水并最大程度地减少对环境的影响。然而，这种系统也需要适当的污泥处理设施，并且在污泥焚烧过程中需要考虑废气处理和能源利用等问题。

## Technology and included processes
所选的 MBR 采用浸没式配置，以降低能耗。膜为 50 nm 的平板超滤聚醚砜膜，渗透通量为 19.2 L m- 2 h- 1。水力停留时间（HRT）估计为 25.6 小时。假定污泥停留时间 (SRT) 为 35 天。生物量条件以平均混合液总悬浮固体 (MLTSS) 8.00 g L- 1 为参考。

## Technical purpose
带污泥焚烧的MBR灰水回用系统专为灰水的高效处理而设计，其目的是通过采用先进的污泥管理实践来最大限度地减少对环境的影响。该系统适用于具有高环保性能要求的污水处理设施，对空间要求苛刻、废弃物最小化至关重要的场景最为理想。注重可持续性，对于重视能效和废物减量的污水处理厂来说，是一个优秀的选择。

## Reference product
- greywater: 1; input; estimated

## Inputs
- Polyacrylamide: 0.00063
- air: 2072
- Electricity: 41.4
  Aeration
- Electricity: 20.3
  Pumping
- Electricity: 0.1
  Sludge treatment

## Outputs
- Sludge: 0.07; measured
- waste water - treated: 1; estimated

## Use advice
在使用这个带污泥焚烧的MBR灰水回用系统的数据时，用户应当纳入指示的特定操作参数，如膜孔径（50纳米）、渗透通量（19.2 L m-2 h-1）、水力停留时间（25.6小时）及污泥停留时间（35天），以便在生命周期评价模型中进行准确模拟和影响分析。用户还必须考虑额外的污泥处理基础设施以及污泥焚烧过程中潜在的废气处理需求，并遵守适用的排放规定。进一步地，量化污泥焚烧能源回收效益的方法应当是一致和透明的。在进行生命周期评价研究时整合此数据集与其他数据，应确保方法论的一致性。

## Review details
清单： 内部审查通过几个迭代步骤完成，涉及原始数据验证、原始数据记录、代表性、完整性、与 ISO 14040 和 14044 有关的建模的一致性。

## Data sources
- Dominguez, S. et al. LCA of greywater management within a water circular economy restorative thinking framework. SCIENCE OF THE TOTAL ENVIRONMENT 621, 1047–1056 (2018).
