# 聚合物杂化铝电解质电容器 (PHAEC) 生产 ; 聚合物杂化铝电解质电容器 (PHAEC) >2cm ; ; 原生铝锭

Dataset: ILCD process, Unit process, single operation
Geography: CN
Reference year: 2022
Classification: Unit processes / Materials production / Metals and semimetals
Generated by: 常慧敏, huiminchang@tsinghua.edu.cn
Owner: 天工LCI数据工作小组
Review: Dependent internal review by 天工LCI数据工作小组
Amounts: no units in this file; such an amount is in the reference unit of its flow, which a separate flow dataset defines
copyright: false
licenseType: Free of charge for all users and uses

## General comment
The manufacturing stage of the AECs is divided into several sub-stages in this study based on the actual fabrication segmentation in the AEC industry. First, the high-purity aluminum ingots will be smelt, cast, rolled, and annealed into the aluminum foil with a thickness of about 10–100 μm. Then, anode foil and cathode foil for the AECs will be fabricated, respectively. The same manufacturing processes are applied toward anode foil in three types of AECs. The aluminum blank foil will be etched by the weak acids to increase the superficial area of the foil, and the electrochemical reaction can further form the dielectric (Al2O3). But cathode foil of three types of AECs varies in structure and manufacturing processes due to the differences in electrolytes. The cathode foil of LAECs is made by the etched process, while the cathode foil of PAEC is made by the carbon coating process after the etched process. In PHAECs, when liquid-state electrolyte and solid-state polymer are used simultaneously, the carbon-coated cathode aluminum foil of the PAECs is also replaced by the aluminum foil with TiO2 film to overcome the potential problems on capacitor cycling life. After obtaining the anode and cathode foil, the AECs can be manufactured, assembled, and packed. Besides, there are some differences in the AEC fabrication sub-stage. The specific processes of the three types of AECs are shown in Fig. 2. In detail, the differences in manufacturing processes among the three types of AECs are mainly due to the change of repair conditions of the capacitor dielectric (Al2O3 film) and the introduction of conductive polymer. On the one hand, PAECs and PHAECs cannot use the electrolyte to repair the dielectric layer in the aging process like LAECs, so an additional forming solution is required to perform forming process, which adds extra manufacturing steps. On the other hand, the conductive polymer needs to be effectively introduced into the middle of anode and cathode foils. The conductive polymer (PEDOT) in PAECs is formed by the polymerization reaction of EDOT and oxidizing agents in the capacitor manufacturing process, while the conductive polymer (PEDOT:PSS) in PHAEC is introduced into the capacitors by the dispersive solution. The collected inventory data of LAECs, PAECs, and PHAECs by the FU are summarized in Table 2. The details of the inventory data are available in Sheets 5–7 of Supporting Info B.

## Time period
文献发表于2022-11-15，文献中 The reference year of the elementary data (alumminum ingots, separator paper, tansport, electricity, and water) is around 2016 and qcruired from the Gabi database (Version: 10.6.1.35)

## Technical purpose
聚合物杂化铝电解质电容器（PHAECs）旨在用于高性能电子应用，其中固态聚合物和液态电解质的结合为电容器组件提供了改进的使用寿命和稳定性。它们通常用于电源电路、能量储存系统和需要可靠和长寿命电容器的电子设备（电容器大于2厘米）。

## Reference product
- capacitor, electrolyte type, > 2cm height: 1e6; measured
  capacitors (product)

## Inputs
All rows: measured
- electricity, high voltage, aluminium industry: 23893.6
  Electricity grid mix (China)
- aluminium, primary, ingot: 292.7
  292.7=219.8(99.99% Al ingots)+72.9(99.9% Al ingots)
- water, deionised: 70856.9
- tap water: 31347.7
- section bar extrusion, aluminium: 486.8
  Aluminum profile (China)
- paper, woodfree, uncoated: 82.4
- rubber: 131.8
  Rubber from Gabi database ({401c53f8-0ace-410b-9cc7-9a586f8ac2e6})
- wire drawing, steel: 2.12
  substance flow is leads (Fe) but database from Gabi database is steel wire ({d3e4d4d7-66ee-4bea-b6eb-9704682a0b8a})
- section bar extrusion, aluminium: 15.94
  Tab (alluminium profile (China) )
- sealing tape, aluminium/PE, 50 mm wide: 4.2517
  Tape(PP film ,from Gabi {7d6d2565-aeb4-4f36-a049-f715a80fe954})
- phosphoric acid, industrial grade, without water, in 85% solution state: 60.6473
  H3PO4
- boric acid, anhydrous, powder: 10.7606
  HBO3
- hydrochloric acid, without water, in 30% solution state: 38.6649
  HCl (31%)
- sodium hydroxide, without water, in 50% solution state: 47.5771
  NaOH (30%)
- sulfuric acid: 230.443
  H2SO4 (98%)
- nitric acid, without water, in 50% solution state: 11.5995
  HNO3 (98%)
- Lubricating oil,Lubricating Oil: 7.5919
  Rolling oil
- Ammonium Citrate: 20.7249
  Ammonium citrate
- Ammonium Pentaborate: 5.6844
  Ammonium pentaborate
- Ammonium adipate: 28.8565
- ethylene glycol: 148.593
  Electrolyte (liquid) 2
- Ammonium dihydrogen phosphate: 0.9473
  NH4H2PO4
- Titanium coating: 30.901
  Titanium coating paste
- PEDOT solution (1.2 wt%): 642.857
  PEDOT:PPS solution (1%wt)

## Outputs
All rows: measured
- Aluminium Phosphate: 7.6267
  AlPO4 (by-product)4
- used capacitor: 62925.2
  Capacitors (waste)
- wastewater, average: 60169.2
  Waste water
- sewage sludge: 7.1776
  Sludge
- aluminium scrap, new: 20.1195
  Al scraps
- chemical oxygen demand: 2.3634
  COD

## Data selection and combination
三种 AEC 的材料信息和性能参数均来自被调查的制造商。此外，通过对 AEC 行业的几家工厂进行实地调研，获得了铝坯箔制造（由铝锭制成）、阳极/阴极箔制造（由铝坯箔制成）和电容器制造的原始数据。由于技术保密原因，无法直接从供应商处获得 PHAEC 阴极箔制造的 LCI 数据。因此，考虑到两者的相似性，根据 PAECs 阴极箔的涂层工艺数据调整 PHAECs 阴极铝箔的制造 LCI。在运输阶段，主要原材料从材料产地到电容器制造商的数据以及电容器制成品从制造商到客户的数据均来自制造商的供应链系统。使用阶段的能耗是根据 AEC 的物理方程和电气参数计算得出的。为确保分析的完整性，在分析和计算的基础上获得报废阶段的数据。基本数据的参考年份约为 2016 年。基本数据（即铝锭、分离纸、运输、电力和水）来自 Gabi 数据库（版本：10.6.1.35）。此外，一些背景数据，包括 3，4-乙烯二氧噻吩（EDOT）、己二酸铵、柠檬酸铵等，在 Gabi 数据库中无法获得。它们是根据 Gabi 数据库中现有原材料在材料制备过程中发生的化学反应估算出来的。用于制造 PHAECs 的分散溶液（PEDOT:PSS，1%wt）的制备过程数据是根据实验室数据按比例计算的。三种 AEC 的详细 LCI 数据和物质流的单位影响见辅助信息 B 的第 5-7 张和第 2 张。

## Use advice
使用PHAEC生产的LCA数据时，请考虑数据集的参考年份（2016年）和来源（Gabi数据库版本10.6.1.35），以确保环境影响评估的准确性。仅将详细的生命周期清单（LCI）数据整合应用于PHAEC制造，并考虑与LAECs相比在制造过程中使用的额外成型溶液。特别注意导电聚合物（PEDOT、PEDOT:PSS）的引入，并在PHAECs的阴极箔LCI数据不可用时，使用来自PAECs的类似工艺调整制造LCI。对于终生阶段的考虑，使用提供的分析和计算来全面评估环境影响。

## Review details
清单： 内部审查通过几个迭代步骤完成，涉及原始数据验证、原始数据记录、代表性、完整性、与 ISO 14040 和 14044 有关的建模的一致性。

## Data sources
- Zhang, C., Zheng, Y., Jing, J., Liu, Y. & Huang, H. A comparative LCA study on aluminum electrolytic capacitors: From liquid-state electrolyte, solid-state polymer to their hybrid. J. Clean. Prod. 375, (2022).
