# Emulsionpowder|Rawcow'smilk|Milk collection + cold storage + clean milk + homogenization + blending + homogenization + sterilization concentration + spray drying + packaging|All sizes / /|乳粉|生鲜牛乳|收奶—冷贮+净乳+均质+配料+均质+杀菌浓缩+喷雾干燥+包装|所有规模

Dataset: ILCD process, Partly terminated system
Geography: CN
Reference year: 2019
Classification: Materials production / Other mineralic materials
Generated by: The data was created by the Office of the Second National Pollution Source Census of the Ministry of Ecology and Environment, and the data was organized by the TianGong Plan team for ILCD format / 生态环境部第二次全国污染源普查工作办公室创建数据，天工计划团队常慧敏整理数据为ILCD格式
Amounts: no units in this file; such an amount is in the reference unit of its flow, which a separate flow dataset defines
copyright: false

## Technology and included processes
the Technical of end-of-pipe management technology for pollution Milk Powderis/，Its Technical efficiency of end-of-pipe management0
污染物指标废水排放量的末端治理技术是/，其效率为0

## Reference product
- Milk Powder: 1000; calculated
  原文件中描述污染物类别为Product，污染物指标为乳粉，此处对其进行了匹配工作，将其匹配到LCAflow库里面相最符合的流，污染物指标备注为废水排放量

## Outputs
- Waste water: 25150; calculated
  原文件中描述污染物类别为废水，污染物指标为废水排放量，此处对其进行了匹配工作，将其匹配到LCAflow库里面相最符合的流，污染物指标备注为废水排放量
- chemical oxygen demand: 0.595602; calculated
  原文件中描述污染物类别为废水，污染物指标为化学需氧量，此处对其进行了匹配工作，将其匹配到LCAflow库里面相最符合的流，污染物指标备注为化学需氧量
- Ammonia Nitrogen: 0.0333612; calculated
  原文件中描述污染物类别为废水，污染物指标为氨氮，此处对其进行了匹配工作，将其匹配到LCAflow库里面相最符合的流，污染物指标备注为氨氮
- Nitrogen, organic bound: 0.0784233; calculated
  原文件中描述污染物类别为废水，污染物指标为总氮，此处对其进行了匹配工作，将其匹配到LCAflow库里面相最符合的流，污染物指标备注为总氮

## Data sources
- 第二次全国污染源普查产排污核算系数手册（试用版）,二级代码14,四级代码1442文件，在完整版文件中第3413页
