# 铝锭铸造 ; 原生铝锭 ; 液态原铝 ; 2013年

Dataset: ILCD process, Unit process, single operation
Geography: CN
Reference year: 2021
Classification: Unit processes / Materials production / Metals and semimetals
Generated by: 蔡梓萌, caizm6178@163.com
Owner: 天工LCI数据工作小组
Review: Dependent internal review by 天工LCI数据工作小组
Amounts: no units in this file; such an amount is in the reference unit of its flow, which a separate flow dataset defines
copyright: false
licenseType: Free of charge for all users and uses

## General comment
初级铝锭铸造过程旨在从液态原级铝中产生原铝锭。这一过程在生产用途广泛的高纯度铝产品中至关重要，包括航空部件、电导体、建筑材料和交通工具等。通过这一工艺生产的铝锭还可用于需要使用初级铝的进一步制造和加工过程。

## Time period
文献发表日期

## Reference product
- aluminium, primary, ingot: 1000; software or database

## Inputs
- aluminium, primary, liquid: 1047.2; software or database

## Data selection and combination
本研究的数据参考了PA、SA、电力等背景数据的LCA数据。PA数据来自统计数据源，SA数据主要来自文献。背景数据主要来自中国科学院生态环境研究中心CASRCEES 2018建立的中国本地化LCA数据库，涵盖能源、材料、交通、废物管理等LCA数据。

## Use advice
本LCA数据集详细说明了2013年铸造初级铝锭的过程，并应考虑其时间和地域相关性。用户还应注意，原铝（PA）数据来自统计资料来源，而次级铝（SA）数据主要来自文献。对于背景数据，应当咨询CAS RCEES 2018数据库，该数据库涵盖了中国背景下与能源、材料、运输和废物管理相关的LCA信息。应用这些数据时，用户必须注意方法论的一致性，确保任何比较评估遵循适当的类别规则和边界。

## Review details
清单： 内部审查通过几个迭代步骤完成，涉及原始数据验证、原始数据记录、代表性、完整性、与 ISO 14040 和 14044 有关的建模的一致性。

## Data sources
- Ding, N., Liu, N., Lu, B. & Yang, J. Life cycle greenhouse gas emissions of aluminum based on regional industrial transfer in China. J. Ind. Ecol. 25, 1657–1672 (2021).
