# 土壤修复;异位修复;生物堆;工程实施;废气处置

Dataset: ILCD process
Geography: KR
Classification: Other Services / Repair and maintenance
Generated by: Sang Chunhui, sangch@mail.bnu.edu.cn
Owner: Tiangong LCI Data Working Group
Review: Dependent internal review by Tiangong LCI Data Working Group
Amounts: no units in this file; such an amount is in the reference unit of its flow, which a separate flow dataset defines
licenseType: Free of charge for all users and uses

## General comment
The described industrial process is used for ex-situ biopile soil remediation. It involves the engineered implementation of biodegradation methods to treat contaminated soil, which is excavated and placed into large biopiles. This process is specifically applied to decontaminate soil affected by organic pollutants. During the remediation cycle, off-gases are treated using activated carbon adsorption to manage any emissions released.

## Reference product
- Activated Carbon: 1368; article inperiodical

## Inputs
- Activated Carbon: 1368; article inperiodical

## Use advice
When utilizing this data for Life Cycle Assessment, ensure that the system boundaries include the ex-situ soil treatment as well as the management of emissions through activated carbon adsorption. Consider the transportation of soil to and from the remediation site, the energy consumed during the treatment process, and the eventual disposal or regeneration of spent activated carbon. Exclude any potential environmental benefits from the remediation itself, as the focus should be on the assessment of the remediation process impacts.

## Review details
Inventory: The internal review was done by several iteration steps concerning raw data validation, raw data documentation, representativity, completeness and consistency of modelling with regard to ISO 14040 and 14044.
