# Fat(scented)soap|Grease,causticsoda,acids,etc.|Oil saponification or oil hydrolysis①|All sizes / 肥（香）皂|油脂、烧碱、酸类等|油脂皂化或油脂水解①|所有规模

Dataset: ILCD process, Unit process, single operation
Geography: CN
Reference year: 2019
Classification: Materials production / Organic chemicals
Generated by: The data was created by the Office of the Second National Pollution Source Census of the Ministry of Ecology and Environment, and the data was organized by the TianGong Plan team for ILCD format / 生态环境部第二次全国污染源普查工作办公室创建数据，天工计划团队常慧敏整理数据为ILCD格式
Owner: Tiangong LCI Data Working Group / 天工LCI数据工作小组
Amounts: no units in this file; such an amount is in the reference unit of its flow, which a separate flow dataset defines
copyright: false
licenseType: Free of charge for all users and uses

## Technology and included processes
the Technical of end-of-pipe management technology for pollution phosphorus, totalisPhysical + chemical + biofilm process，Its Technical efficiency of end-of-pipe management87

## Reference product
- Soap: 1000; calculated
  源文件中描述为为肥（香）皂，此处对其进行了匹配工作，将其匹配到LCAflow库里面相最符合的流，污染物指标备注为工业废水量

## Outputs
All rows: calculated
- Waste water: 2000
  污染物指标工业废水量的末端治理技术是/，末端治理设施实际运行率（k值）计算公式为/。原文件中描述污染物类别为废水，污染物指标为工业废水量，此处对其进行了匹配工作，将其匹配到LCAflow库里面相最符合的流，污染物指标备注为工业废水量
- chemical oxygen demand: 0.27405
  污染物指标化学需氧量的末端治理技术是物理+化学+好氧生物处理法，其效率为95，末端治理设施实际运行率（k值）计算公式为k=污水处理设施年耗电量（千瓦时/年）/（污水处理设施的所有耗电设备额定功率（千瓦）×污水处理设施年运行时间（小时/年））。原文件中描述污染物类别为废水，污染物指标为化学需氧量，此处对其进行了匹配工作，将其匹配到LCAflow库里面相最符合的流，污染物指标备注为化学需氧量
- chemical oxygen demand: 0.27405
  污染物指标化学需氧量的末端治理技术是物理+化学+生物膜法，其效率为95，末端治理设施实际运行率（k值）计算公式为k=污水处理设施年耗电量（千瓦时/年）/（污水处理设施的所有耗电设备额定功率（千瓦）×污水处理设施年运行时间（小时/年））。原文件中描述污染物类别为废水，污染物指标为化学需氧量，此处对其进行了匹配工作，将其匹配到LCAflow库里面相最符合的流，污染物指标备注为化学需氧量
- Ammonia Nitrogen: 0.00384
  污染物指标氨氮的末端治理技术是物理+化学+好氧生物处理法，其效率为68，末端治理设施实际运行率（k值）计算公式为k=污水处理设施年耗电量（千瓦时/年）/（污水处理设施的所有耗电设备额定功率（千瓦）×污水处理设施年运行时间（小时/年））。原文件中描述污染物类别为废水，污染物指标为氨氮，此处对其进行了匹配工作，将其匹配到LCAflow库里面相最符合的流，污染物指标备注为氨氮
- Ammonia Nitrogen: 0.00108
  污染物指标氨氮的末端治理技术是物理+化学+生物膜法，其效率为91，末端治理设施实际运行率（k值）计算公式为k=污水处理设施年耗电量（千瓦时/年）/（污水处理设施的所有耗电设备额定功率（千瓦）×污水处理设施年运行时间（小时/年））。原文件中描述污染物类别为废水，污染物指标为氨氮，此处对其进行了匹配工作，将其匹配到LCAflow库里面相最符合的流，污染物指标备注为氨氮
- Petroleum-related waste: 0.0063
  污染物指标石油类的末端治理技术是物理+化学+好氧生物处理法，其效率为70，末端治理设施实际运行率（k值）计算公式为k=污水处理设施年耗电量（千瓦时/年）/（污水处理设施的所有耗电设备额定功率（千瓦）×污水处理设施年运行时间（小时/年））。原文件中描述污染物类别为废水，污染物指标为石油类，此处对其进行了匹配工作，将其匹配到LCAflow库里面相最符合的流，污染物指标备注为石油类
- Petroleum-related waste: 0.0021
  污染物指标石油类的末端治理技术是物理+化学+生物膜法，其效率为90，末端治理设施实际运行率（k值）计算公式为k=污水处理设施年耗电量（千瓦时/年）/（污水处理设施的所有耗电设备额定功率（千瓦）×污水处理设施年运行时间（小时/年））。原文件中描述污染物类别为废水，污染物指标为石油类，此处对其进行了匹配工作，将其匹配到LCAflow库里面相最符合的流，污染物指标备注为石油类
- Nitrogen, organic bound: 0.0045
  污染物指标总氮的末端治理技术是物理+化学+好氧生物处理法，其效率为70，末端治理设施实际运行率（k值）计算公式为k=污水处理设施年耗电量（千瓦时/年）/（污水处理设施的所有耗电设备额定功率（千瓦）×污水处理设施年运行时间（小时/年））。原文件中描述污染物类别为废水，污染物指标为总氮，此处对其进行了匹配工作，将其匹配到LCAflow库里面相最符合的流，污染物指标备注为总氮
- Nitrogen, organic bound: 0.00135
  污染物指标总氮的末端治理技术是物理+化学+生物膜法，其效率为91，末端治理设施实际运行率（k值）计算公式为k=污水处理设施年耗电量（千瓦时/年）/（污水处理设施的所有耗电设备额定功率（千瓦）×污水处理设施年运行时间（小时/年））。原文件中描述污染物类别为废水，污染物指标为总氮，此处对其进行了匹配工作，将其匹配到LCAflow库里面相最符合的流，污染物指标备注为总氮
- phosphorus, total: 0.000285
  污染物指标总磷的末端治理技术是物理+化学+好氧生物处理法，其效率为81，末端治理设施实际运行率（k值）计算公式为k=污水处理设施年耗电量（千瓦时/年）/（污水处理设施的所有耗电设备额定功率（千瓦）×污水处理设施年运行时间（小时/年））。原文件中描述污染物类别为废水，污染物指标为总磷，此处对其进行了匹配工作，将其匹配到LCAflow库里面相最符合的流，污染物指标备注为总磷
- phosphorus, total: 0.000195
  污染物指标总磷的末端治理技术是物理+化学+生物膜法，其效率为87，末端治理设施实际运行率（k值）计算公式为k=污水处理设施年耗电量（千瓦时/年）/（污水处理设施的所有耗电设备额定功率（千瓦）×污水处理设施年运行时间（小时/年））。原文件中描述污染物类别为废水，污染物指标为总磷，此处对其进行了匹配工作，将其匹配到LCAflow库里面相最符合的流，污染物指标备注为总磷

## Data sources
- 第二次全国污染源普查产排污核算系数手册（试用版）,二级代码26,四级代码2681文件，在完整版文件中第3004页
