# Pretreatment|Wetpre-processedparts|Degreasingagent|Degreasing|All sizes / 预处理|湿式预处理件|脱脂剂|脱脂|所有规模

Dataset: ILCD process, Unit process, single operation
Geography: CN
Reference year: 2019
Classification: End-of-life treatment / Other end-of-life services
Generated by: The data was created by the Office of the Second National Pollution Source Census of the Ministry of Ecology and Environment, and the data was organized by the TianGong Plan team for ILCD format / 生态环境部第二次全国污染源普查工作办公室创建数据，天工计划团队常慧敏整理数据为ILCD格式
Owner: Tiangong LCI Data Working Group / 天工LCI数据工作小组
Review: Dependent internal review by Tiangong LCI Data Working Group / 天工LCI数据工作小组
Amounts: no units in this file; such an amount is in the reference unit of its flow, which a separate flow dataset defines
copyright: false
licenseType: Free of charge for all users and uses

## General comment
the Technical of end-of-pipe management technology for pollution Petroleum-related wasteisAnaerobic hydrolysis + bio-contact oxidation process，Its Technical efficiency of end-of-pipe management80

## Reference product
- Degreasant: 1000; input; calculated
  源文件中描述为为脱脂剂，此处对其进行了匹配工作，将其匹配到LCAflow库里面相最符合的流

## Outputs
All rows: calculated
- chemical oxygen demand: 71.4
  污染物指标化学需氧量的末端治理技术是膜分离，其效率为90，末端治理设施实际运行率（k值）计算公式为k=污水治理设施运行时间（小时）/正常生产时间（小时）。原文件中描述污染物类别为废水，污染物指标为化学需氧量，此处对其进行了匹配工作，将其匹配到LCAflow库里面相最符合的流
- chemical oxygen demand: 214.2
  污染物指标化学需氧量的末端治理技术是好氧生物处理法，其效率为70，末端治理设施实际运行率（k值）计算公式为k=污水治理设施运行时间（小时）/正常生产时间（小时）。原文件中描述污染物类别为废水，污染物指标为化学需氧量，此处对其进行了匹配工作，将其匹配到LCAflow库里面相最符合的流
- Waste water: 289000
  污染物指标工业废水量的末端治理技术未说明。原文件中描述污染物类别为废水，污染物指标为工业废水量，此处对其进行了匹配工作，将其匹配到LCAflow库里面相最符合的流
- chemical oxygen demand: 428.4
  污染物指标化学需氧量的末端治理技术是物理化学处理法，其效率为40，末端治理设施实际运行率（k值）计算公式为k=污水治理设施运行时间（小时）/正常生产时间（小时）。原文件中描述污染物类别为废水，污染物指标为化学需氧量，此处对其进行了匹配工作，将其匹配到LCAflow库里面相最符合的流
- chemical oxygen demand: 428.4
  污染物指标化学需氧量的末端治理技术是化学混凝法，其效率为40，末端治理设施实际运行率（k值）计算公式为k=污水治理设施运行时间（小时）/正常生产时间（小时）。原文件中描述污染物类别为废水，污染物指标为化学需氧量，此处对其进行了匹配工作，将其匹配到LCAflow库里面相最符合的流
- chemical oxygen demand: 499.8
  污染物指标化学需氧量的末端治理技术是物理处理法，其效率为30，末端治理设施实际运行率（k值）计算公式为k=污水治理设施运行时间（小时）/正常生产时间（小时）。原文件中描述污染物类别为废水，污染物指标为化学需氧量，此处对其进行了匹配工作，将其匹配到LCAflow库里面相最符合的流
- chemical oxygen demand: 499.8
  污染物指标化学需氧量的末端治理技术是过滤分离，其效率为30，末端治理设施实际运行率（k值）计算公式为k=污水治理设施运行时间（小时）/正常生产时间（小时）。原文件中描述污染物类别为废水，污染物指标为化学需氧量，此处对其进行了匹配工作，将其匹配到LCAflow库里面相最符合的流
- chemical oxygen demand: 714
  污染物指标化学需氧量的末端治理技术是直排，末端治理设施实际运行率（k值）计算公式为k=污水治理设施运行时间（小时）/正常生产时间（小时）。原文件中描述污染物类别为废水，污染物指标为化学需氧量，此处对其进行了匹配工作，将其匹配到LCAflow库里面相最符合的流
- phosphorus, total: 0.765
  污染物指标总磷的末端治理技术是物理化学处理法，其效率为85，末端治理设施实际运行率（k值）计算公式为k=污水治理设施运行时间（小时）/正常生产时间（小时）。原文件中描述污染物类别为废水，污染物指标为总磷，此处对其进行了匹配工作，将其匹配到LCAflow库里面相最符合的流
- phosphorus, total: 0.765
  污染物指标总磷的末端治理技术是化学混凝法，其效率为85，末端治理设施实际运行率（k值）计算公式为k=污水治理设施运行时间（小时）/正常生产时间（小时）。原文件中描述污染物类别为废水，污染物指标为总磷，此处对其进行了匹配工作，将其匹配到LCAflow库里面相最符合的流
- phosphorus, total: 3.06
  污染物指标总磷的末端治理技术是好氧生物处理法，其效率为40，末端治理设施实际运行率（k值）计算公式为k=污水治理设施运行时间（小时）/正常生产时间（小时）。原文件中描述污染物类别为废水，污染物指标为总磷，此处对其进行了匹配工作，将其匹配到LCAflow库里面相最符合的流
- phosphorus, total: 5.1
  污染物指标总磷的末端治理技术是直排，末端治理设施实际运行率（k值）计算公式为k=污水治理设施运行时间（小时）/正常生产时间（小时）。原文件中描述污染物类别为废水，污染物指标为总磷，此处对其进行了匹配工作，将其匹配到LCAflow库里面相最符合的流
- chemical oxygen demand: 14.28
  污染物指标化学需氧量的末端治理技术是膜分离+厌氧水解类+SBR类，其效率为98，末端治理设施实际运行率（k值）计算公式为k=污水治理设施运行时间（小时）/正常生产时间（小时）。原文件中描述污染物类别为废水，污染物指标为化学需氧量，此处对其进行了匹配工作，将其匹配到LCAflow库里面相最符合的流
- chemical oxygen demand: 14.28
  污染物指标化学需氧量的末端治理技术是膜分离+厌氧水解类+MBR类，其效率为98，末端治理设施实际运行率（k值）计算公式为k=污水治理设施运行时间（小时）/正常生产时间（小时）。原文件中描述污染物类别为废水，污染物指标为化学需氧量，此处对其进行了匹配工作，将其匹配到LCAflow库里面相最符合的流
- chemical oxygen demand: 14.28
  污染物指标化学需氧量的末端治理技术是膜分离+厌氧水解类+生物接触氧化法，其效率为98，末端治理设施实际运行率（k值）计算公式为k=污水治理设施运行时间（小时）/正常生产时间（小时）。原文件中描述污染物类别为废水，污染物指标为化学需氧量，此处对其进行了匹配工作，将其匹配到LCAflow库里面相最符合的流
- chemical oxygen demand: 21.42
  污染物指标化学需氧量的末端治理技术是膜分离+SBR类，其效率为97，末端治理设施实际运行率（k值）计算公式为k=污水治理设施运行时间（小时）/正常生产时间（小时）。原文件中描述污染物类别为废水，污染物指标为化学需氧量，此处对其进行了匹配工作，将其匹配到LCAflow库里面相最符合的流
- chemical oxygen demand: 21.42
  污染物指标化学需氧量的末端治理技术是膜分离+MBR类，其效率为97，末端治理设施实际运行率（k值）计算公式为k=污水治理设施运行时间（小时）/正常生产时间（小时）。原文件中描述污染物类别为废水，污染物指标为化学需氧量，此处对其进行了匹配工作，将其匹配到LCAflow库里面相最符合的流
- chemical oxygen demand: 21.42
  污染物指标化学需氧量的末端治理技术是膜分离+生物接触氧化法，其效率为97，末端治理设施实际运行率（k值）计算公式为k=污水治理设施运行时间（小时）/正常生产时间（小时）。原文件中描述污染物类别为废水，污染物指标为化学需氧量，此处对其进行了匹配工作，将其匹配到LCAflow库里面相最符合的流
- chemical oxygen demand: 85.68
  污染物指标化学需氧量的末端治理技术是化学混凝法+厌氧水解类+SBR类，其效率为88，末端治理设施实际运行率（k值）计算公式为k=污水治理设施运行时间（小时）/正常生产时间（小时）。原文件中描述污染物类别为废水，污染物指标为化学需氧量，此处对其进行了匹配工作，将其匹配到LCAflow库里面相最符合的流
- chemical oxygen demand: 85.68
  污染物指标化学需氧量的末端治理技术是化学混凝法+厌氧水解类+MBR类，其效率为88，末端治理设施实际运行率（k值）计算公式为k=污水治理设施运行时间（小时）/正常生产时间（小时）。原文件中描述污染物类别为废水，污染物指标为化学需氧量，此处对其进行了匹配工作，将其匹配到LCAflow库里面相最符合的流
- chemical oxygen demand: 85.68
  污染物指标化学需氧量的末端治理技术是化学混凝法+厌氧水解类+生物接触氧化法，其效率为88，末端治理设施实际运行率（k值）计算公式为k=污水治理设施运行时间（小时）/正常生产时间（小时）。原文件中描述污染物类别为废水，污染物指标为化学需氧量，此处对其进行了匹配工作，将其匹配到LCAflow库里面相最符合的流
- chemical oxygen demand: 128.52
  污染物指标化学需氧量的末端治理技术是化学混凝法+SBR类，其效率为82，末端治理设施实际运行率（k值）计算公式为k=污水治理设施运行时间（小时）/正常生产时间（小时）。原文件中描述污染物类别为废水，污染物指标为化学需氧量，此处对其进行了匹配工作，将其匹配到LCAflow库里面相最符合的流
- chemical oxygen demand: 128.52
  污染物指标化学需氧量的末端治理技术是化学混凝法+MBR类，其效率为82，末端治理设施实际运行率（k值）计算公式为k=污水治理设施运行时间（小时）/正常生产时间（小时）。原文件中描述污染物类别为废水，污染物指标为化学需氧量，此处对其进行了匹配工作，将其匹配到LCAflow库里面相最符合的流
- chemical oxygen demand: 128.52
  污染物指标化学需氧量的末端治理技术是化学混凝法+生物接触氧化法，其效率为82，末端治理设施实际运行率（k值）计算公式为k=污水治理设施运行时间（小时）/正常生产时间（小时）。原文件中描述污染物类别为废水，污染物指标为化学需氧量，此处对其进行了匹配工作，将其匹配到LCAflow库里面相最符合的流
- chemical oxygen demand: 142.8
  污染物指标化学需氧量的末端治理技术是厌氧水解类+SBR类，其效率为80，末端治理设施实际运行率（k值）计算公式为k=污水治理设施运行时间（小时）/正常生产时间（小时）。原文件中描述污染物类别为废水，污染物指标为化学需氧量，此处对其进行了匹配工作，将其匹配到LCAflow库里面相最符合的流
- chemical oxygen demand: 142.8
  污染物指标化学需氧量的末端治理技术是厌氧水解类+MBR类，其效率为80，末端治理设施实际运行率（k值）计算公式为k=污水治理设施运行时间（小时）/正常生产时间（小时）。原文件中描述污染物类别为废水，污染物指标为化学需氧量，此处对其进行了匹配工作，将其匹配到LCAflow库里面相最符合的流
- chemical oxygen demand: 142.8
  污染物指标化学需氧量的末端治理技术是厌氧水解类+生物接触氧化法，其效率为80，末端治理设施实际运行率（k值）计算公式为k=污水治理设施运行时间（小时）/正常生产时间（小时）。原文件中描述污染物类别为废水，污染物指标为化学需氧量，此处对其进行了匹配工作，将其匹配到LCAflow库里面相最符合的流
- chemical oxygen demand: 214.2
  污染物指标化学需氧量的末端治理技术是SBR类，其效率为70，末端治理设施实际运行率（k值）计算公式为k=污水治理设施运行时间（小时）/正常生产时间（小时）。原文件中描述污染物类别为废水，污染物指标为化学需氧量，此处对其进行了匹配工作，将其匹配到LCAflow库里面相最符合的流
- chemical oxygen demand: 214.2
  污染物指标化学需氧量的末端治理技术是MBR类，其效率为70，末端治理设施实际运行率（k值）计算公式为k=污水治理设施运行时间（小时）/正常生产时间（小时）。原文件中描述污染物类别为废水，污染物指标为化学需氧量，此处对其进行了匹配工作，将其匹配到LCAflow库里面相最符合的流
- chemical oxygen demand: 214.2
  污染物指标化学需氧量的末端治理技术是生物接触氧化法，其效率为70，末端治理设施实际运行率（k值）计算公式为k=污水治理设施运行时间（小时）/正常生产时间（小时）。原文件中描述污染物类别为废水，污染物指标为化学需氧量，此处对其进行了匹配工作，将其匹配到LCAflow库里面相最符合的流
- chemical oxygen demand: 357
  污染物指标化学需氧量的末端治理技术是化学混凝法+上浮分离，其效率为50，末端治理设施实际运行率（k值）计算公式为k=污水治理设施运行时间（小时）/正常生产时间（小时）。原文件中描述污染物类别为废水，污染物指标为化学需氧量，此处对其进行了匹配工作，将其匹配到LCAflow库里面相最符合的流
- chemical oxygen demand: 464.1
  污染物指标化学需氧量的末端治理技术是厌氧生物处理法，其效率为35，末端治理设施实际运行率（k值）计算公式为k=污水治理设施运行时间（小时）/正常生产时间（小时）。原文件中描述污染物类别为废水，污染物指标为化学需氧量，此处对其进行了匹配工作，将其匹配到LCAflow库里面相最符合的流
- chemical oxygen demand: 464.1
  污染物指标化学需氧量的末端治理技术是厌氧水解类，其效率为35，末端治理设施实际运行率（k值）计算公式为k=污水治理设施运行时间（小时）/正常生产时间（小时）。原文件中描述污染物类别为废水，污染物指标为化学需氧量，此处对其进行了匹配工作，将其匹配到LCAflow库里面相最符合的流
- phosphorus, total: 0.459
  污染物指标总磷的末端治理技术是化学混凝法+SBR类，其效率为91，末端治理设施实际运行率（k值）计算公式为k=污水治理设施运行时间（小时）/正常生产时间（小时）。原文件中描述污染物类别为废水，污染物指标为总磷，此处对其进行了匹配工作，将其匹配到LCAflow库里面相最符合的流
- phosphorus, total: 0.459
  污染物指标总磷的末端治理技术是化学混凝法+MBR类，其效率为91，末端治理设施实际运行率（k值）计算公式为k=污水治理设施运行时间（小时）/正常生产时间（小时）。原文件中描述污染物类别为废水，污染物指标为总磷，此处对其进行了匹配工作，将其匹配到LCAflow库里面相最符合的流
- phosphorus, total: 0.459
  污染物指标总磷的末端治理技术是化学混凝法+生物接触氧化法，其效率为91，末端治理设施实际运行率（k值）计算公式为k=污水治理设施运行时间（小时）/正常生产时间（小时）。原文件中描述污染物类别为废水，污染物指标为总磷，此处对其进行了匹配工作，将其匹配到LCAflow库里面相最符合的流
- phosphorus, total: 0.765
  污染物指标总磷的末端治理技术是化学混凝法+上浮分离，其效率为85，末端治理设施实际运行率（k值）计算公式为k=污水治理设施运行时间（小时）/正常生产时间（小时）。原文件中描述污染物类别为废水，污染物指标为总磷，此处对其进行了匹配工作，将其匹配到LCAflow库里面相最符合的流
- Petroleum-related waste: 1.53
  污染物指标石油类的末端治理技术是膜分离+SBR类，其效率为97，末端治理设施实际运行率（k值）计算公式为k=污水治理设施运行时间（小时）/正常生产时间（小时）。原文件中描述污染物类别为废水，污染物指标为石油类，此处对其进行了匹配工作，将其匹配到LCAflow库里面相最符合的流
- Petroleum-related waste: 1.53
  污染物指标石油类的末端治理技术是膜分离+MBR类，其效率为97，末端治理设施实际运行率（k值）计算公式为k=污水治理设施运行时间（小时）/正常生产时间（小时）。原文件中描述污染物类别为废水，污染物指标为石油类，此处对其进行了匹配工作，将其匹配到LCAflow库里面相最符合的流
- Petroleum-related waste: 1.53
  污染物指标石油类的末端治理技术是膜分离+生物接触氧化法，其效率为97，末端治理设施实际运行率（k值）计算公式为k=污水治理设施运行时间（小时）/正常生产时间（小时）。原文件中描述污染物类别为废水，污染物指标为石油类，此处对其进行了匹配工作，将其匹配到LCAflow库里面相最符合的流
- phosphorus, total: 3.06
  污染物指标总磷的末端治理技术是SBR类，其效率为40，末端治理设施实际运行率（k值）计算公式为k=污水治理设施运行时间（小时）/正常生产时间（小时）。原文件中描述污染物类别为废水，污染物指标为总磷，此处对其进行了匹配工作，将其匹配到LCAflow库里面相最符合的流
- phosphorus, total: 3.06
  污染物指标总磷的末端治理技术是MBR类，其效率为40，末端治理设施实际运行率（k值）计算公式为k=污水治理设施运行时间（小时）/正常生产时间（小时）。原文件中描述污染物类别为废水，污染物指标为总磷，此处对其进行了匹配工作，将其匹配到LCAflow库里面相最符合的流
- phosphorus, total: 3.06
  污染物指标总磷的末端治理技术是生物接触氧化法，其效率为40，末端治理设施实际运行率（k值）计算公式为k=污水治理设施运行时间（小时）/正常生产时间（小时）。原文件中描述污染物类别为废水，污染物指标为总磷，此处对其进行了匹配工作，将其匹配到LCAflow库里面相最符合的流
- Petroleum-related waste: 5.1
  污染物指标石油类的末端治理技术是膜分离，其效率为90，末端治理设施实际运行率（k值）计算公式为k=污水治理设施运行时间（小时）/正常生产时间（小时）。原文件中描述污染物类别为废水，污染物指标为石油类，此处对其进行了匹配工作，将其匹配到LCAflow库里面相最符合的流
- Petroleum-related waste: 7.65
  污染物指标石油类的末端治理技术是化学混凝法+SBR类，其效率为85，末端治理设施实际运行率（k值）计算公式为k=污水治理设施运行时间（小时）/正常生产时间（小时）。原文件中描述污染物类别为废水，污染物指标为石油类，此处对其进行了匹配工作，将其匹配到LCAflow库里面相最符合的流
- Petroleum-related waste: 7.65
  污染物指标石油类的末端治理技术是化学混凝法+MBR类，其效率为85，末端治理设施实际运行率（k值）计算公式为k=污水治理设施运行时间（小时）/正常生产时间（小时）。原文件中描述污染物类别为废水，污染物指标为石油类，此处对其进行了匹配工作，将其匹配到LCAflow库里面相最符合的流
- Petroleum-related waste: 7.65
  污染物指标石油类的末端治理技术是化学混凝法+生物接触氧化法，其效率为85，末端治理设施实际运行率（k值）计算公式为k=污水治理设施运行时间（小时）/正常生产时间（小时）。原文件中描述污染物类别为废水，污染物指标为石油类，此处对其进行了匹配工作，将其匹配到LCAflow库里面相最符合的流
- Petroleum-related waste: 10.2
  污染物指标石油类的末端治理技术是厌氧水解类+SBR类，其效率为80，末端治理设施实际运行率（k值）计算公式为k=污水治理设施运行时间（小时）/正常生产时间（小时）。原文件中描述污染物类别为废水，污染物指标为石油类，此处对其进行了匹配工作，将其匹配到LCAflow库里面相最符合的流
- Petroleum-related waste: 10.2
  污染物指标石油类的末端治理技术是厌氧水解类+MBR类，其效率为80，末端治理设施实际运行率（k值）计算公式为k=污水治理设施运行时间（小时）/正常生产时间（小时）。原文件中描述污染物类别为废水，污染物指标为石油类，此处对其进行了匹配工作，将其匹配到LCAflow库里面相最符合的流
- Petroleum-related waste: 15.3
  污染物指标石油类的末端治理技术是好氧生物处理法，其效率为70，末端治理设施实际运行率（k值）计算公式为k=污水治理设施运行时间（小时）/正常生产时间（小时）。原文件中描述污染物类别为废水，污染物指标为石油类，此处对其进行了匹配工作，将其匹配到LCAflow库里面相最符合的流
- Petroleum-related waste: 15.3
  污染物指标石油类的末端治理技术是SBR类，其效率为70，末端治理设施实际运行率（k值）计算公式为k=污水治理设施运行时间（小时）/正常生产时间（小时）。原文件中描述污染物类别为废水，污染物指标为石油类，此处对其进行了匹配工作，将其匹配到LCAflow库里面相最符合的流
- Petroleum-related waste: 15.3
  污染物指标石油类的末端治理技术是MBR类，其效率为70，末端治理设施实际运行率（k值）计算公式为k=污水治理设施运行时间（小时）/正常生产时间（小时）。原文件中描述污染物类别为废水，污染物指标为石油类，此处对其进行了匹配工作，将其匹配到LCAflow库里面相最符合的流
- Petroleum-related waste: 15.3
  污染物指标石油类的末端治理技术是生物接触氧化法，其效率为70，末端治理设施实际运行率（k值）计算公式为k=污水治理设施运行时间（小时）/正常生产时间（小时）。原文件中描述污染物类别为废水，污染物指标为石油类，此处对其进行了匹配工作，将其匹配到LCAflow库里面相最符合的流
- Petroleum-related waste: 15.3
  污染物指标石油类的末端治理技术是化学混凝法+上浮分离，其效率为70，末端治理设施实际运行率（k值）计算公式为k=污水治理设施运行时间（小时）/正常生产时间（小时）。原文件中描述污染物类别为废水，污染物指标为石油类，此处对其进行了匹配工作，将其匹配到LCAflow库里面相最符合的流
- Petroleum-related waste: 25.5
  污染物指标石油类的末端治理技术是物理化学处理法，其效率为50，末端治理设施实际运行率（k值）计算公式为k=污水治理设施运行时间（小时）/正常生产时间（小时）。原文件中描述污染物类别为废水，污染物指标为石油类，此处对其进行了匹配工作，将其匹配到LCAflow库里面相最符合的流
- Petroleum-related waste: 25.5
  污染物指标石油类的末端治理技术是化学混凝法，其效率为50，末端治理设施实际运行率（k值）计算公式为k=污水治理设施运行时间（小时）/正常生产时间（小时）。原文件中描述污染物类别为废水，污染物指标为石油类，此处对其进行了匹配工作，将其匹配到LCAflow库里面相最符合的流
- Petroleum-related waste: 30.6
  污染物指标石油类的末端治理技术是上浮处理，其效率为40，末端治理设施实际运行率（k值）计算公式为k=污水治理设施运行时间（小时）/正常生产时间（小时）。原文件中描述污染物类别为废水，污染物指标为石油类，此处对其进行了匹配工作，将其匹配到LCAflow库里面相最符合的流
- Petroleum-related waste: 33.15
  污染物指标石油类的末端治理技术是厌氧生物处理法，其效率为35，末端治理设施实际运行率（k值）计算公式为k=污水治理设施运行时间（小时）/正常生产时间（小时）。原文件中描述污染物类别为废水，污染物指标为石油类，此处对其进行了匹配工作，将其匹配到LCAflow库里面相最符合的流
- Petroleum-related waste: 33.15
  污染物指标石油类的末端治理技术是厌氧水解类，其效率为35，末端治理设施实际运行率（k值）计算公式为k=污水治理设施运行时间（小时）/正常生产时间（小时）。原文件中描述污染物类别为废水，污染物指标为石油类，此处对其进行了匹配工作，将其匹配到LCAflow库里面相最符合的流
- Petroleum-related waste: 35.7
  污染物指标石油类的末端治理技术是物理处理法，其效率为30，末端治理设施实际运行率（k值）计算公式为k=污水治理设施运行时间（小时）/正常生产时间（小时）。原文件中描述污染物类别为废水，污染物指标为石油类，此处对其进行了匹配工作，将其匹配到LCAflow库里面相最符合的流
- Petroleum-related waste: 35.7
  污染物指标石油类的末端治理技术是过滤分离，其效率为30，末端治理设施实际运行率（k值）计算公式为k=污水治理设施运行时间（小时）/正常生产时间（小时）。原文件中描述污染物类别为废水，污染物指标为石油类，此处对其进行了匹配工作，将其匹配到LCAflow库里面相最符合的流
- Petroleum-related waste: 51
  污染物指标石油类的末端治理技术是直排，末端治理设施实际运行率（k值）计算公式为k=污水治理设施运行时间（小时）/正常生产时间（小时）。原文件中描述污染物类别为废水，污染物指标为石油类，此处对其进行了匹配工作，将其匹配到LCAflow库里面相最符合的流
- Petroleum-related waste: 1.02
  污染物指标石油类的末端治理技术是膜分离+厌氧水解类+SBR类，其效率为98，末端治理设施实际运行率（k值）计算公式为k=污水治理设施运行时间（小时）/正常生产时间（小时）。原文件中描述污染物类别为废水，污染物指标为石油类，此处对其进行了匹配工作，将其匹配到LCAflow库里面相最符合的流
- Petroleum-related waste: 1.02
  污染物指标石油类的末端治理技术是膜分离+厌氧水解类+MBR类，其效率为98，末端治理设施实际运行率（k值）计算公式为k=污水治理设施运行时间（小时）/正常生产时间（小时）。原文件中描述污染物类别为废水，污染物指标为石油类，此处对其进行了匹配工作，将其匹配到LCAflow库里面相最符合的流
- Petroleum-related waste: 1.02
  污染物指标石油类的末端治理技术是膜分离+厌氧水解类+生物接触氧化法，其效率为98，末端治理设施实际运行率（k值）计算公式为k=污水治理设施运行时间（小时）/正常生产时间（小时）。原文件中描述污染物类别为废水，污染物指标为石油类，此处对其进行了匹配工作，将其匹配到LCAflow库里面相最符合的流
- Petroleum-related waste: 5.1
  污染物指标石油类的末端治理技术是化学混凝法+厌氧水解类+SBR类，其效率为90，末端治理设施实际运行率（k值）计算公式为k=污水治理设施运行时间（小时）/正常生产时间（小时）。原文件中描述污染物类别为废水，污染物指标为石油类，此处对其进行了匹配工作，将其匹配到LCAflow库里面相最符合的流
- Petroleum-related waste: 5.1
  污染物指标石油类的末端治理技术是化学混凝法+厌氧水解类+MBR类，其效率为90，末端治理设施实际运行率（k值）计算公式为k=污水治理设施运行时间（小时）/正常生产时间（小时）。原文件中描述污染物类别为废水，污染物指标为石油类，此处对其进行了匹配工作，将其匹配到LCAflow库里面相最符合的流
- Petroleum-related waste: 5.1
  污染物指标石油类的末端治理技术是化学混凝法+厌氧水解类+生物接触氧化法，其效率为90，末端治理设施实际运行率（k值）计算公式为k=污水治理设施运行时间（小时）/正常生产时间（小时）。原文件中描述污染物类别为废水，污染物指标为石油类，此处对其进行了匹配工作，将其匹配到LCAflow库里面相最符合的流
- Petroleum-related waste: 10.2
  污染物指标石油类的末端治理技术是厌氧水解类+生物接触氧化法，其效率为80，末端治理设施实际运行率（k值）计算公式为k=污水治理设施运行时间（小时）/正常生产时间（小时）。原文件中描述污染物类别为废水，污染物指标为石油类，此处对其进行了匹配工作，将其匹配到LCAflow库里面相最符合的流

## Use advice
This dataset is derived from the Pollution Source Census Report and contains information on pollution emissions and related products. However, it does not include data on energy or chemical consumption, nor does it provide information on waste or co-product generation. When utilizing this dataset, please supplement the missing data based on actual conditions before use
该数据集来源于污染源普查报告，包含污染物排放及相关产品信息，但不包含能源或化学品消耗数据，也不提供废弃物或共生产物产生信息。在使用该数据集时，请根据实际情况补充缺失数据后再使用。

## Review details
Inventory: The internal review was done by several iteration steps concerning raw data validation, raw data documentation, representativity, completeness and consistency of modelling with regard to ISO 14040 and 14044.
清单： 内部审查通过几个迭代步骤完成，涉及原始数据验证、原始数据记录、代表性、完整性、与 ISO 14040 和 14044 有关的建模的一致性。

## Data sources
- 第二次全国污染源普查产排污核算系数手册（试用版）,二级代码33-37文件，在完整版文件中第967页
