# Painting|Woodendoorsandwindows,woodenstairs,solidwoodflooring,solidwoodlaminateflooring,otherwoodproducts(woodencontainers,corkproducts)|Coating(water-based)|Spray painting|All sizes / 涂饰|木门窗、木楼梯、实木地板、实木复合地板、其他木制品（木制容器、软木制品）|涂料（水性）|喷漆|所有规模

Dataset: ILCD process, Unit process, single operation
Geography: CN
Reference year: 2019
Classification: Systems / Paints and chemical preparations
Generated by: The data was created by the Office of the Second National Pollution Source Census of the Ministry of Ecology and Environment, and the data was organized by the TianGong Plan team for ILCD format / 生态环境部第二次全国污染源普查工作办公室创建数据，天工计划团队常慧敏整理数据为ILCD格式
Owner: Tiangong LCI Data Working Group / 天工LCI数据工作小组
Amounts: no units in this file; such an amount is in the reference unit of its flow, which a separate flow dataset defines
copyright: false
licenseType: Free of charge for all users and uses

## Technology and included processes
the treatment technology for the pollution of Exhaust gasdidn't offered，The formula for calculating the actual operation rate (k-value) of the end-of-pipe treatment facility is k = operating time of wastewater treatment facilities (hours) / normal production time (hours)

## Reference product
- Wood Doors & Windows: 1; calculated
  源文件中描述为为木门窗、木楼梯、实木地板、实木复合地板、其他木制品（木制容器、软木制品），此处对其进行了匹配工作，将其匹配到LCAflow库里面相最符合的流

## Outputs
All rows: calculated
- particles (PM2.5 - PM10): 0.00205
  污染物指标颗粒物的末端治理技术是其他（蜂窝纸+粗过滤棉+细过滤棉+布袋），其效率为95，末端治理设施实际运行率（k值）计算公式为k=处理设施耗电量（千瓦时/年）/[设备额定功率（千瓦）×运行时间（小时/年）]。原文件中描述污染物类别为废气，污染物指标为颗粒物，此处对其进行了匹配工作，将其匹配到LCAflow库里面相最符合的流
- particles (PM2.5 - PM10): 0.0041
  污染物指标颗粒物的末端治理技术是其他（干式纸壳箱+过滤棉），其效率为90，末端治理设施实际运行率（k值）计算公式为k=处理设施耗电量（千瓦时/年）/[设备额定功率（千瓦）×运行时间（小时/年）]。原文件中描述污染物类别为废气，污染物指标为颗粒物，此处对其进行了匹配工作，将其匹配到LCAflow库里面相最符合的流
- particles (PM2.5 - PM10): 0.0041
  污染物指标颗粒物的末端治理技术是袋式除尘，其效率为90，末端治理设施实际运行率（k值）计算公式为k=处理设施耗电量（千瓦时/年）/[设备额定功率（千瓦）×运行时间（小时/年）]。原文件中描述污染物类别为废气，污染物指标为颗粒物，此处对其进行了匹配工作，将其匹配到LCAflow库里面相最符合的流
- particles (PM2.5 - PM10): 0.0082
  污染物指标颗粒物的末端治理技术是单筒（多筒并联）旋风，其效率为80，末端治理设施实际运行率（k值）计算公式为k=处理设施耗电量（千瓦时/年）/[设备额定功率（千瓦）×运行时间（小时/年）]。原文件中描述污染物类别为废气，污染物指标为颗粒物，此处对其进行了匹配工作，将其匹配到LCAflow库里面相最符合的流
- particles (PM2.5 - PM10): 0.0082
  污染物指标颗粒物的末端治理技术是其他（水帘湿式喷雾净化），其效率为80，末端治理设施实际运行率（k值）计算公式为k=处理设施耗电量（千瓦时/年）/[设备额定功率（千瓦）×运行时间（小时/年）]。原文件中描述污染物类别为废气，污染物指标为颗粒物，此处对其进行了匹配工作，将其匹配到LCAflow库里面相最符合的流
- particles (PM2.5 - PM10): 0.041
  污染物指标颗粒物的末端治理技术是直接排放，末端治理设施实际运行率（k值）计算公式为k=处理设施耗电量（千瓦时/年）/[设备额定功率（千瓦）×运行时间（小时/年）]。原文件中描述污染物类别为废气，污染物指标为颗粒物，此处对其进行了匹配工作，将其匹配到LCAflow库里面相最符合的流
- volatile organic compound: 0.012765
  污染物指标挥发性有机物的末端治理技术是其他（活性炭纤维或沸石吸附/脱附/催化氧化），其效率为85，末端治理设施实际运行率（k值）计算公式为k=处理设施耗电量（千瓦时/年）/[设备额定功率（千瓦）×运行时间（小时/年）]。原文件中描述污染物类别为废气，污染物指标为挥发性有机物，此处对其进行了匹配工作，将其匹配到LCAflow库里面相最符合的流
- volatile organic compound: 0.01702
  污染物指标挥发性有机物的末端治理技术是活性炭吸附/脱附催化燃烧法，其效率为80，末端治理设施实际运行率（k值）计算公式为k=处理设施耗电量（千瓦时/年）/[设备额定功率（千瓦）×运行时间（小时/年）]。原文件中描述污染物类别为废气，污染物指标为挥发性有机物，此处对其进行了匹配工作，将其匹配到LCAflow库里面相最符合的流
- volatile organic compound: 0.04255
  污染物指标挥发性有机物的末端治理技术是吸附/蒸汽解吸，其效率为50，末端治理设施实际运行率（k值）计算公式为k=处理设施耗电量（千瓦时/年）/[设备额定功率（千瓦）×运行时间（小时/年）]。原文件中描述污染物类别为废气，污染物指标为挥发性有机物，此处对其进行了匹配工作，将其匹配到LCAflow库里面相最符合的流
- volatile organic compound: 0.05957
  污染物指标挥发性有机物的末端治理技术是低温等离子体，其效率为30，末端治理设施实际运行率（k值）计算公式为k=处理设施耗电量（千瓦时/年）/[设备额定功率（千瓦）×运行时间（小时/年）]。原文件中描述污染物类别为废气，污染物指标为挥发性有机物，此处对其进行了匹配工作，将其匹配到LCAflow库里面相最符合的流
- volatile organic compound: 0.06808
  污染物指标挥发性有机物的末端治理技术是光解，其效率为20，末端治理设施实际运行率（k值）计算公式为k=处理设施耗电量（千瓦时/年）/[设备额定功率（千瓦）×运行时间（小时/年）]。原文件中描述污染物类别为废气，污染物指标为挥发性有机物，此处对其进行了匹配工作，将其匹配到LCAflow库里面相最符合的流
- volatile organic compound: 0.079994
  污染物指标挥发性有机物的末端治理技术是其他（抛弃式活性炭吸附），其效率为6，末端治理设施实际运行率（k值）计算公式为k=处理设施耗电量（千瓦时/年）/[设备额定功率（千瓦）×运行时间（小时/年）]。原文件中描述污染物类别为废气，污染物指标为挥发性有机物，此处对其进行了匹配工作，将其匹配到LCAflow库里面相最符合的流
- volatile organic compound: 0.0851
  污染物指标挥发性有机物的末端治理技术是直接排放，末端治理设施实际运行率（k值）计算公式为k=处理设施耗电量（千瓦时/年）/[设备额定功率（千瓦）×运行时间（小时/年）]。原文件中描述污染物类别为废气，污染物指标为挥发性有机物，此处对其进行了匹配工作，将其匹配到LCAflow库里面相最符合的流
- Exhaust gas: 562
  污染物指标工业废气量的末端治理技术未说明。原文件中描述污染物类别为废气，污染物指标为工业废气量，此处对其进行了匹配工作，将其匹配到LCAflow库里面相最符合的流

## Data sources
- 第二次全国污染源普查产排污核算系数手册（试用版）,二级代码20,三级代码203.0文件，在完整版文件中第367页
