# Groundwater remediation

Dataset: ILCD process, Unit process, single operation
Geography: CN
Classification: Other Services / Repair and maintenance
Generated by: Cao Jiameng, 2979480760@qq.com
Owner: Tiangong LCI Data Working Group
Review: Dependent internal review by Tiangong LCI Data Working Group
Amounts: no units in this file; such an amount is in the reference unit of its flow, which a separate flow dataset defines
licenseType: Free of charge for all users and uses

## General comment
This industrial process is utilized for soil remediation purposes through off-site treatment in cement kilns during the operating phase, encompassing cement grinding. The cement plant operates a modern dry-process production line with a capacity of 4,000 tons per day, yielding an annual output of 1.9 million tons of cement and 1.5 million tons of clinker. With a mining area of 0.448 km2, the plant has an annual limestone production capacity of 2 million tons. Advanced RSP five-stage pre-decomposition technology is employed in the production process. Hazardous waste is transported by designated trucks over a route exclusive to freight vehicles. The mining area is approximately 1.5 km from the plant, while the distance for waste transport is about 50 km. The conventional cement manufacturing process includes raw and auxiliary material mining and transport, raw meal preparation, coal powder preparation, clinker calcination, and cement grinding. By incorporating waste disposal, waste materials such as contaminated soil, digested sludge, and waste oil sludge can be utilized as alternative raw materials and fuels, conserving limestone and coal. During the cement kiln co-processing, the operation phase mainly involves the crushing and grinding of limestone and gypsum for cement production.

## Reference product
- Cement: 1000; article inperiodical

## Inputs
All rows: article inperiodical
- calcium carbonate: 51.62
- gypsum: 52.15
- fly ash: 124.24
- Slag: 203.78
- cement clinker: 1000
- Electricity: 116.856

## Use advice
When using this dataset for Life Cycle Assessment, attention should be paid to the sourcing of alternative materials and fuels, ensuring they align with actual waste inputs in terms of composition and availability. Methodologies regarding the inclusion of transportation impacts, raw material extraction, and the end-of-life phase of materials should be consistently applied. Co-processing in cement kilns has specific emissions profiles that must be considered, and this dataset should not be used interchangeably with traditional cement manufacturing without accounting for the differences in environmental impacts. Modellers should also account for the system boundaries and geographical scope of the data provided, to ensure relevance and accuracy in their assessments.

## Review details
Inventory: The internal review was done by several iteration steps concerning raw data validation, raw data documentation, representativity, completeness and consistency of modelling with regard to ISO 14040 and 14044.
