# 碳酸锂生产 ; 电池级碳酸锂 ; 离子交换法 ; 阿根廷奥拉罗兹盐湖卤水

Dataset: ILCD process, Unit process, single operation
Geography: AR
Reference year: 2022
Classification: Unit processes / Materials production / Inorganic chemicals
Generated by: 孙鑫, xs389@cornell.edu
Owner: 天工LCI数据工作小组
Review: Dependent internal review by 天工LCI数据工作小组
Amounts: no units in this file; such an amount is in the reference unit of its flow, which a separate flow dataset defines
licenseType: Free of charge for all users and uses

## General comment
目标是量化盐水作业生产 Li2CO3（电池级）对环境的影响。通过这种量化，可以对各生产基地的相关环境影响进行比较。此外，还可以对锂离子电池生产的生命周期评估（LCA）进行高分辨率评估。采用 ecoinvent（Wernet 等人，2016 年）中的截止分配法进行了归因式生命周期评估。功能单位为 1 千克 Li2CO3（电池级）。我们采用了 "从摇篮到大门 "的方法。从将卤水抽到地表到最终产品（电池级 Li2CO3）离开南美盐湖加工厂的系统边界。在茶尔汗盐湖，卤水首先被送往一家 K 肥料厂，锂-2CO3 的生产则使用排出的废水，这些废水被视为废物流，因此在截流分配法中没有负担。由于只生产 Li2CO3（工业级）（甘肃联合检测服务有限公司（2018 年）、兰科锂业有限公司（2018 年）、兰科锂业有限公司（2018 年(2018), Lanke Lithium (2018)），我们增加了生产 Li2CO3（电池级）所需的工序（稀释和重新加热含锂溶液）。

## Technology and included processes
泵送的盐水首先与生石灰反应，然后在蒸发池中从 0.06 重量百分比的锂富集到 1.2 重量百分比的锂。在加工厂，盐水与纯碱反应，让不纯的 Li2CO3 沉淀出来。然后，Li2CO3 在低温下溶解在去离子水中，溶液通过离子交换器去除残留的 Mg、Ca 和 B。为了沉淀出 Li2CO3（电池级），最后一步是重新加热矿浆（Ehren 和 De Castro Alem，2018 年）。

## Technical purpose
通过阿根廷奥拉罗兹盐湖卤水离子交换法生产的电池级碳酸锂主要用于锂离子电池，这类电池广泛应用于便携式电子设备、电动汽车和电网储能解决方案中。

## Reference product
- Lithium carbonate,Lithium carbonate: 1; measured

## Inputs
All rows: measured
- Brine (0.06% Li): 340
- Electricity: 5.4
- natural gas,natural gas: 19
- freshwater,freshwater: 219
- Calcium Oxide: 4.1
- sodium carbonate: 1.6

## Use advice
在使用本数据集进行生命周期评估时，请注意，原材料的生产过程以及少于1%的能源流量不包括在系统边界范围内。在评估的完整性以及与系统边界不同的其他数据集比较时，应注意这一点。用户还应考虑数据的地理特定性，因为它涉及来自芬兰的锂辉石源。

## Review details
清单： 内部审查通过几个迭代步骤完成，涉及原始数据验证、原始数据记录、代表性、完整性、与 ISO 14040 和 14044 有关的建模的一致性。

## Data sources
- Schenker, V., Oberschelp, C. & Pfister, S. Regionalized life cycle assessment of present and future lithium production for Li-ion batteries. Resources, Conservation and Recycling 187, 106611 (2022).
