# Soil remediation ; In-situ remediation ; Multi-phase extraction ; Construction preparation ; Site foundation

Dataset: ILCD process, Unit process, single operation
Geography: KR
Reference year: 2011
Classification: Other Services / Repair and maintenance
Generated by: Zhang Jianbin, zhangjb@caep.org.cn
Owner: Tiangong LCI Data Working Group
Review: Dependent internal review by Tiangong LCI Data Working Group
Amounts: no units in this file; such an amount is in the reference unit of its flow, which a separate flow dataset defines
copyright: false
licenseType: Free of charge for all users and uses

## General comment
Office, storage, and SVE system foundation

## Technology and included processes
Gravel 9.6 m3 , Concrete 19 m3 , wire mesh 96 m2 ) Bakhoe diesel 21 L

## Technical purpose
This industrial process is utilized for the remediation of contaminated soil within the spatial confines of the original contamination site without transport of the contaminated soil to another location (in-situ). Multi-phase extraction is a technique that aims to remove various phases of contaminants such as solid, liquid or gas through physical extraction, thus mitigating environmental risks and preparing the site for future use. This process primarily supports environmental management industries, particularly in the construction preparation phase for projects requiring decontamination of polluted sites. The infrastructure development includes constructing foundations for offices, storage facilities, and Soil Vapor Extraction (SVE) systems, which are essential components for ensuring proper workspace, storage of materials and efficiency of remediation operations.

## Reference product
- Multiphase extraction facilities: 1; measured

## Inputs
- gravel: 9.6; measured
- cement: 19; measured
- Wire Mesh: 96; measured
- diesel: 0.021; measured

## Use advice
When utilizing this data set for LCA assessments, take into account the specific requirements for the environmental impact of in-situ remediation processes. Ensure the inclusion of all infrastructure and material inputs, such as gravel, concrete, and wire mesh, as well as fuel consumption in the form of diesel usage for machinery operations. Special attention must be given to modeling the use phase behavior of multi-phase extraction equipment and ensure that the SVE system's operation and efficiency are accurately represented. This data should be integrated within the context of the complete life-cycle of the site, from the construction of foundations through to the remediation process.

## Review details
Inventory: The internal review was done by several iteration steps concerning raw data validation, raw data documentation, representativity, completeness and consistency of modelling with regard to ISO 14040 and 14044.

## Data sources
- Seung-Woo Jeong, Sangwon Suh. Assessment of Environmental Impacts and CO2 Emissions from Soil Remediation Technologies using Life Cycle Assessment - Case Studies on SVE and Biopile Systems -. 大韓環境工學會誌
