# 小规模集约化生猪生产;屠宰

Dataset: ILCD process, Unit process, single operation
Geography: JS-CN
Reference year: 2010
Classification: Materials production / Food and renewable raw materials
Functional unit: The functional unit (FU) is defined to be 1000 kg of pig carcass weight (CW) after the process in slaughterhouse.
Generated by: 杨瑞, 1632707028@qq.com
Owner: 天工LCI数据工作小组
Review: Dependent internal review by 天工LCI数据工作小组
Amounts: no units in this file; such an amount is in the reference unit of its flow, which a separate flow dataset defines
copyright: false
licenseType: Free of charge for all users and uses

## General comment
当猪长到典型的活重约115公斤时，大约67个月大，就可以屠宰和销售了。首先，猪在屠宰前在屠宰场禁食24小时，减少了胃和肠道内容物，并在屠宰场产生少量的粪便、CH4和NH3。然后，猪在常规程序下被屠宰，包括电击、放血、冲洗、脱毛和内脏，最终胴体重量约为83公斤。

## Geography
在本研究中，关于猪生产不同阶段的材料和能源消耗、饲料组成以及与其他成分混合的主要数据来自对中国江苏省几家养猪场的采访。

## Time period
实地调查(Guo and Wang, 2010)

## Technology and included processes
系统边界从非现场作物种植、饲料加工到现场生猪生产。功能单位(FU)定义为在屠宰场处理后的1000公斤猪胴体重(CW)。

## Technical purpose
该数据集描述了小规模集约化生猪生产和屠宰过程，主要用于肉类生产。产品猪胴体重量通常作为各种猪肉产品的原材料在食品行业内使用。

## Reference product
- pig: 1000; measured
  Carcass pig

## Inputs
- Electricity: 292.32; measured
- transport in t*km: 517.29; measured
- water: 4200; measured
- pig: 1398.6; measured
  Market pig

## Outputs
- methane: 22.08; measured
- ammonia: 26.67; measured
- offal: 398.6; measured
  Offal
- Water (groundwater from technosphere, waste water): 7.25; measured

## Deviations from the LCI method approaches
基于LCI结果，使用ReCiPe midpoint (H) 2016方法(Huijbregts et al.， 2016)进行生命周期影响评估(LCIA)，该方法是ReCiPe 2008的更新版本，现在提供具有全球范围代表性的表征因子。六个影响类别主要用于评估主要生命周期环境影响潜力，即全球变暖(GWP)、淡水富营养化(FEP)、陆地酸化(TAP)、淡水生态毒性(FETP)、人类致癌毒性(HTP)和陆地生态毒性(TETP) (Cherubini et al.， 2015;Noyaet al.， 2017)。其中，GWP、FEP和TAP是以往研究中最受关注的影响类别(de Vries和de Boer, 2010;Reckmann et al.， 2013)。

## Use advice
使用此生命周期评估(LCA)数据集时，应注意功能单位定义为屠宰场处理后的1000公斤猪胴体重。用户应确保该功能单位与其研究边界保持一致。在未考虑江苏省养猪场作为主要数据来源的特定情境下，不应使用数据。同时，请注意，此数据集不适用于循环利用情境。确保生命周期影响评估(LCIA)的方法与ReCiPe midpoint (H) 2016一致，以便与本数据集中提供的结果具有可比性。

## Review details
清单： 内部审查通过几个迭代步骤完成，涉及原始数据验证、原始数据记录、代表性、完整性、与 ISO 14040 和 14044 有关的建模的一致性。

## Data sources
- Liu, X., Cai, Z. & Yuan, Z. Environmental burdens of small-scale intensive pig production in China. Science of The Total Environment 770, 144720 (2021).
