# 土壤修复;异位修复;土壤淋洗;案例1;污染土挖掘;挖掘出的土壤

Dataset: ILCD process, Unit process, single operation
Geography: BJ-CN
Reference year: 2017
Classification: Unit processes / Other Services / Repair and maintenance
Generated by: 王宁, wang_ning@caep.org.cn
Owner: 天工LCI数据工作小组
Review: Dependent internal review by 天工LCI数据工作小组
Amounts: no units in this file; such an amount is in the reference unit of its flow, which a separate flow dataset defines
copyright: false
licenseType: Free of charge for all users and uses

## General comment
使用挖掘机将污染土壤挖掘出来

## Technology and included processes
场地污染无土壤方量为350000m3，挖掘机效率为44.6 m3/ h，耗油量为22l/h

## Technical purpose
使用挖掘机挖掘污染土壤是环境工程中的一项工业过程，特别是在原位土壤修复项目中。该过程包括物理去除污染土壤以减少环境危害。这些操作通常是更大规模土地复垦或工业清理工作的一部分，挖掘出的土壤随后经过处理以去除污染物或按照环境法规进行处理。

## Reference product
- Excavated soil,Excavated soil: 350000; measured

## Inputs
- Diesel,Diesel: 172.646; measured

## Use advice
使用此数据集的用户在进行生命周期评估（LCA）时，应确保包括与挖掘过程相关的所有输入和输出。这包括计算与挖掘机操作相关的所有主要原材料和能源消耗，如燃料使用。数据集提供了挖掘过程的效率和被挖掘的土壤体积，这必须在LCA建模中考虑。这些数据是特定案例（案例1）的，并且在未进行适当调整和考虑其他情景的技术适用性之前，不应概括使用。

## Review details
清单： 内部审查通过几个迭代步骤完成，涉及原始数据验证、原始数据记录、代表性、完整性、与 ISO 14040 和 14044 有关的建模的一致性。

## Data sources
- Song, Y. et al. Environmental and socio-economic sustainability appraisal of contaminated land remediation strategies: A case study at a mega-site in China. Science of The Total Environment 610–611, 391–401 (2018).
