# Bioethanol ; Solvent-based

Dataset: ILCD process
Classification: Energy carriers and technologies / Renewable fuels
Generated by: Jiayi Yuan, jiayi_y@mail.bnu.edu.cn
Owner: Tiangong LCI Data Working Group
Review: Dependent internal review by Tiangong LCI Data Working Group
Amounts: no units in this file; such an amount is in the reference unit of its flow, which a separate flow dataset defines
licenseType: Free of charge for all users and uses

## Inputs
All rows: uniform; article inperiodical
- Electricity: 13.716; max 189
- heat: 1290; max 6550
- Electricity: 374.4; min 4.176; max 2415.6
- heat: 4770; min 417; max 14800
- Electricity: 417.6; min 227.52; max 597.6

## Outputs
- heat: 603; max 3280; uniform; article inperiodical

## Review details
Inventory: The internal review was done by several iteration steps concerning raw data validation, raw data documentation, representativity, completeness and consistency of modelling with regard to ISO 14040 and 14044.
