# 牛奶生产 ; 青贮饲料种植

Dataset: ILCD process, Unit process, single operation
Geography: QD-SD-CN
Reference year: 2016
Classification: Unit processes / Materials production / Agricultural production means
Functional unit: The 1t FPCM corrected for protein and fat content was selected as the evaluation unit
Generated by: 杨瑞, 1632707028@qq.com
Owner: 天工LCI数据工作小组
Review: Dependent internal review by 天工LCI数据工作小组
Amounts: no units in this file; such an amount is in the reference unit of its flow, which a separate flow dataset defines
copyright: false
licenseType: Free of charge for all users and uses

## General comment
在 IPBS 小 麦-青贮玉米轮作种植中,生产资料投入主要有化 肥、有机肥、农药、种 子等,产品为小麦、麦秸和玉 米青贮.产品中,小麦全部出售,麦秸全量还田,青贮 玉米用于饲养奶牛;而在 non-IPBS 中无青贮饲料种植 环节

## Geography
于 2020 年 7 月~8 月在山东省青岛市进行奶牛 场问卷调查.

## Time period
从 2016 年,山东开始实施青贮玉米种植补贴 政策,是国内最早实施该补贴政策的省份之一,补贴 标准为 20~50 元/t.2019 年,山东省青贮玉米种植面 积达 1.41 万 hm2,占全国的 7.3%.

## Technology and included processes
研究地区主要有 2 种牛奶生产模式:IPBS 和 non-IPBS.non-IPBS 中,养殖场只有饲养 环节和粪污处理环节,饲料全部来源于购买,粪便堆 肥制成有机肥后全销售给果农和菜农.IPBS 中,养殖 场增加青贮玉米种植环节,有机肥、液体肥主要施用 于场内农田,剩余部分销售给果农和菜农等.2 种模 式的区别:1)养殖场青贮玉米的来源不同,导致饲料 运输距离和饲料成本不同;2)有机肥、液体肥的利用 途径不同,运输距离不同.本研究共调研奶牛场 109 家,剔除不符合研究问卷后,得 83 份有效问卷,其中 non-IPBS 为 38 家,IPBS 为 45 家.

## Technical purpose
IPBS（集成种植与养殖系统）产出的青贮玉米和小麦主要用于种植饲料以支持奶牛养殖，其中青贮玉米直接作为奶牛的饲料。所生产的小麦被销售，而麦秸被作为可持续农业实践返回田间。该过程还将奶牛的粪肥作为有机肥使用，施用于田地以促进作物健康，多余的粪肥被卖给水果和蔬菜农民。

## Reference product
- milk: 1000; estimated
  作为参考定量，非实际输出

## Inputs
All rows: measured
- Nitrogenous Matter (unspecified, as N): 2.37
  化肥(N)
- phosphorus, total: 0.677
  化肥(P2O5)
- potassium oxide: 0.507
  化肥(K2O)
- Nitrogenous Matter (unspecified, as N): 3.718
  有机肥(N)
- Electricity: 38.6208
- Diesel: 0.000895
- water: 21.457
  灌溉水

## Outputs
- wheat: 56.555; measured
  小麦
- maize grain: 318.667; measured
  青贮玉米

## Data treatment and extrapolations
表中数值为养殖场各项总投入、总产出均摊到每吨FPCM上,再取 各养殖场均值,所有投入产出清单数据均按此方法计算;“()”中的 数值为每公顷平均投入,为方便与相关研究比较;“a”由于养殖场耕 地的机械作业主要是代耕作业,养殖场主对该环节的柴油消耗不 清楚,该数据借鉴相关研究[20];“b”此数值为过程产出,最终全部用 于系统内部.

## Sampling procedure
研究地区主要有 2 种牛奶生产模式:IPBS 和 non-IPBS,具体见图 1.non-IPBS 中,养殖场只有饲养 环节和粪污处理环节,饲料全部来源于购买,粪便堆 肥制成有机肥后全销售给果农和菜农.IPBS 中,养殖 场增加青贮玉米种植环节,有机肥、液体肥主要施用 于场内农田,剩余部分销售给果农和菜农等.2 种模 式的区别:1)养殖场青贮玉米的来源不同,导致饲料 运输距离和饲料成本不同;2)有机肥、液体肥的利用 途径不同,运输距离不同.本研究共调研奶牛场 109 家,剔除不符合研究问卷后,得 83 份有效问卷,其中 non-IPBS 为 38 家,IPBS 为 45 家.

## Use advice
在使用此LCA数据以分析牛奶生产过程的环境影响时，请注意数据特定于中国山东省的IPBS种植系统，重点是小麦和青贮玉米的轮作种植。数据包括每吨根据脂肪和蛋白质校正的牛奶（FPCM）所消耗和产生的资源的输入输出清单。在机械作业中的柴油消耗数据不可用时，应根据相关研究[20]的替代数字准确核算。轮作系统的好处，包括减少饲料运输成本和有机肥使用途径的差异，应在比较研究中反映出来。

## Review details
清单： 内部审查通过几个迭代步骤完成，涉及原始数据验证、原始数据记录、代表性、完整性、与 ISO 14040 和 14044 有关的建模的一致性。

## Data sources
- 黄显雷, 师博扬, 张英楠, 龙昭宇, & 尹昌斌. 基于生命周期视角的种养一体化奶牛场环境经济效益评估. 中国环境科学 41, 3944–3955 (2021).
