# 六氟磷酸锂生产;六氟磷酸锂;石灰、氟化氢、五氯化磷、氟化锂

Dataset: ILCD process, Unit process, single operation
Classification: Materials production / Inorganic chemicals
Functional unit: Produce 1kg of lithium hexafluorophosphate
LCI method principle: Attributional
Generated by: 陈鑫, xinchen@mail.nankai.edu.cn
Owner: 天工LCI数据工作小组
Review: Dependent internal review by 天工LCI数据工作小组
Amounts: no units in this file; such an amount is in the reference unit of its flow, which a separate flow dataset defines
copyright: false
licenseType: Free of charge for all users and uses

## General comment
通过萤石矿粉（氟化钙）与五氯化磷的直接反应，产生五氟化磷，进而与氟化锂继续反应，合成六氟磷酸锂。

## Reference product
- Lithium hexafluorophosphate: 1; article inperiodical
  数据来源于文献，没有输入交通运输数据，没有污染物输出

## Inputs
- Lithium fluoride: 0.197; article inperiodical
  数据来源于文献，没有输入交通运输数据，没有污染物输出
- Hydrogen fluoride: 4.04; article inperiodical
  数据来源于文献，没有输入交通运输数据，没有污染物输出
- lime: 7.44; article inperiodical
  数据来源于文献，没有输入交通运输数据，没有污染物输出
- electricity: 1.9476; article inperiodical
  数据来源于文献，没有输入交通运输数据，没有污染物输出

## Data selection and combination
数据来源于文献

## Review details
清单： 内部审查通过几个迭代步骤完成，涉及原始数据验证、原始数据记录、代表性、完整性、与 ISO 14040 和 14044 有关的建模的一致性。

## Data sources
- Yin, R., Hu, S. & Yang, Y. Life cycle inventories of the commonly used materials for lithium-ion batteries in China. Journal of Cleaner Production227, 960–971 (2019).
