# 丙烯生产;通用丙烯;催化裂化

Dataset: ILCD process
Geography: CN
Reference year: 2010
Classification: Unit processes / Materials production / Organic chemicals
Functional unit: 1kg propylene production
Generated by: 刘晓华, lxh01311@163.com
Owner: 天工LCI数据工作小组
Review: Dependent internal review by 天工LCI数据工作小组
Amounts: no units in this file; such an amount is in the reference unit of its flow, which a separate flow dataset defines
copyright: false
licenseType: Free of charge for all users and uses

## General comment
通过催化裂化生产的丙烯是一种通用化学品，常用于包括聚丙烯在内的各种产品的制造，以及用于产生化学品如丙烯醚和丙烯腈。

## Inputs
- Raw coal: 382; measured
  原煤
- Fuel Oil: 1810; measured
  原油
- natural gas,natural gas: 16.6; measured
  天然气
- water: 6230; measured
  水

## Outputs
All rows: measured
- carbon dioxide (fossil): 1870
  CO2 原文未区分bio和fossil，根据专家判断此处为fossil
- sulfur dioxide: 9.07
  SO2
- Nitrogen oxides: 5.42
  NOx
- carbon monoxide (fossil): 4.2
  CO 原文未区分bio和fossil，根据专家判断此处为fossil
- methane (fossil): 0.234
  CH4 原文未区分bio和fossil，根据专家判断此处为fossil
- fume: 12.2
  烟尘
- Non-methane volatile organic compounds: 0.0176
  NMVOC
- Wastewater: 1140
  废水
- Solid Waste: 7.87
  废渣

## Use advice
使用丙烯生产LCA数据时，请确保考虑原材料提取和运输的上游影响。如果丙烯打算成为将被回收的产品的一部分，请包括对生命周期终端阶段的考量，特别是回收过程。该数据最适合应用于摇篮到门的评估，并且可能需要针对摇篮到坟墓的分析进行调整，具体取决于最终产品的使用阶段和终身情况。

## Review details
清单： 内部审查通过几个迭代步骤完成，涉及原始数据验证、原始数据记录、代表性、完整性、与 ISO 14040 和 14044 有关的建模的一致性。

## Data sources
- 聚碳酸酯和聚乳酸的生命周期评价
