# 熟料生产|熟料|燃煤预干燥|混合固废

Dataset: ILCD process, LCI结果
Geography: SD-CN
Classification: Materials production / Other mineralic materials
LCI method principle: Other
Generated by: 杨思琪
Amounts: no units in this file; such an amount is in the reference unit of its flow, which a separate flow dataset defines
copyright: false

## General comment
电石渣是化工行业从电石中产生乙炔的副产品，其主要化学成分是钙水合物。在运往水泥行业之前，从乙炔发生器产生的电石渣的含水量约为35%。然而，它仍无法满足水泥生产的要求，因此需要进一步预干燥，以确保电石渣的含水量降至15%。
煤炭预干燥工艺。许多水泥行业在生产水泥熟料时使用5级预热器，炉尾废气温度约为320°C。他们使用带煤炉的旋转干燥机来预干燥电石渣，即在电石渣的含水量约为35%时，将煤炭燃烧产生的气体与电石渣表面接触，交换热量，直至含水量降至15%。

## Model description
该功能单元的设置为1吨抗压强度高达42.5MPa的水泥熟料。
水泥熟料生产的生命周期可以分为六个阶段：采矿、运输、能源生产、生产电石渣、处理电石渣和生产水泥熟料。

## Reference product
- clinker: 1000
  熟料

## Inputs
All rows: measured
- calcium carbonate: 1200
  石灰石
- Carbide slag: 291
  电石渣
- clay: 148
  黏土
- sandstone: 99
  砂岩
- Sulfate slag: 29.2
  硫酸渣
- hard coal, run-of-mine: 440
  原煤
- crude oil; 42.3 MJ/kg: 3.07
  原油
- natural gas; 44.1 MJ/kg: 0.674
  天然气

## Outputs
All rows: measured
- carbon dioxide: 561
  二氧化碳
- nitrogen dioxide: 2.26
  NOX
- sulfur dioxide: 1.64
  SO2
- methane: 2.06
  CH4
- non-methane volatile organic compounds: 0.149
  NMVOC
- particles (> PM10): 5.27
  PM，未标明粒径，按PM>10处理。

## Data selection and combination
利用电石渣替代石灰石的生产过程数据来自山东某水泥厂，该厂采用燃煤预干工艺，预干阶段的煤耗为50.4kg。
发电过程。发电生命周期清单包括资源/能源消耗和污染物排放，其数据取自Sinocenter数据库。
矿物开采过程。石灰石生命周期清单数据来自北京工业大学Sinocenter的材料生命周期数据，而粘土、砂岩的清单清单则来自Ecoinvent数据库。
公路运输过程。从石灰石矿或电石渣到水泥厂的平均距离为2公里。此外，根据中国原煤和商品的平均运输距离，原煤和其他原材料的运输距离分别假设为179公里和177公里。运输过程生命周期清单数据也是来自Sinocenter数据库。
电石渣生产过程。一般来说，每吨电石水解可以产生1.2吨电石渣（干基）和300升乙炔。因此，需要将这个过程中的环境影响分配给这两种产品，即电石渣和乙炔。根据经济价值的分配规则，电石渣应承担总环境负荷的0.74%。电石渣生产清单数据来自于参考文献。

## Data sources
- Jia Ping Cui et al. (2014). Life Cycle Assessment of Silicate Cementitious Material Production Using Calcium Carbide Sludge. Key Engineering Materials 599, 324–327.
