# 华东(恒台)玉米生产 ; 玉米种植（N0）

Dataset: ILCD process, Partly terminated system
Geography: ZB-SD-CN
Reference year: 2003
Valid until: 2004
Classification: Unit processes / Materials production / Food and renewable raw materials
Functional unit: 1t
Generated by: Haoran Zhang, hrzhang@whu.edu.cn
Owner: 天工LCI数据工作小组
Review: Dependent internal review by 天工LCI数据工作小组
Amounts: no units in this file; such an amount is in the reference unit of its flow, which a separate flow dataset defines
copyright: false
licenseType: Free of charge for all users and uses

## General comment
本文把研究对象分为3个阶段即原料开采与 运输阶段、农用化学品生产与运输阶段和夏玉米田 间种植阶段分别简称原料阶段、农资阶段和种植 阶段．原料阶段的影响包括矿石和化石能源开采等 引起的能源与资源消耗及污染排放；农资阶段的影 响有农用化学品生产所导致的大量能源消耗和废 水、废气及污染物排放；种植阶段的影响包括整地、 灌溉、施肥、病虫害防治等管理措施引起的燃料、电 力、水资源消耗及径流、淋溶、挥发等过程的污染物 排放；各阶段中运输过程的影响主要是燃料消耗及 由此产生的尾气排放．

## Geography
恒台县

## Technology and included processes
依据ＩＳＯ（2006）提出的ＬＣＡ原则与框架ＬＣＡ 由4个相互关联的阶段组成即：目标定义与范围界 定（ｇｏａｌａｎｄｓｃｏｐｅｄｅｆｉｎｉｔｉｏｎ）、清单分析（ｉｎｖｅｎｔｏｒｙ）、 影响评价（ｉｍｐａｃｔａｓｓｅｓｓｍｅｎｔ）和生命周期解释 （ｉｎｔｅｒｐｒ

## Technical purpose
该数据集代表了华东恒台县玉米种植的生命周期评估。它关注玉米生产中不同氮肥施用量（N0, N1, N2, N3）的生产过程和环境影响。所产玉米可用于包括食品、动物饲料在内的多种应用，以及作为生物燃料和生物塑料等工业产品的原材料。

## Reference product
- maize grain: 1000; measured

## Outputs
All rows: measured
- water: 186
  N0
- carbon monoxide (fossil): 0.16
  N0
- Nitrogen oxides: 0.11, 0.53 (2 entries)
  N0
- carbon dioxide (fossil),carbon dioxide (fossil): 994.64
  N0
- methane (fossil),methane (fossil): 0.47
  N0
- sulfur dioxide: 0.59
  N0
- ammonia: 1.13
  N0
- nitrate: 0.02
  N0
- phosphorus, total: 0.03
  N0

## Deviations from the LCI method approaches
研究的起始边界从与夏玉米生命周期有关的 矿石和能源开采开始终止边界为作物种植管理输 出农产品和污染物

## Data selection and combination
原料阶段和农资阶段的能耗、水耗等技术经济 指标来自《中国统计年鉴》（2005～2008）、《中国环 境年鉴》（2004～2006）、《中国能源统计年鉴》（2004 ～2006）、《中国化学工业年鉴》（2006）和《中国电力 年鉴》（2005～2006）等种植阶段的相关数据来自 田间记录．各阶段主要的大气污染物和水污染物包 括ＳＯ2、ＣＨ4、ＣＯ2、ＣＯ、Ｎ2Ｏ、ＣＯＤ、ＮＨ3和ＮＯｘ等其 排放系数来自国内公开发表文献（狄向华等2005； 胡志远等2006；段宁2007）．种植阶段与碳、氮有 关的各种排污系数来自中国农业大学山东桓台实 验站及其它研究机构在华北平原开展的研究报道

## Data treatment and extrapolations
分为特 征化、标准化和加权评估3个步骤

## Sampling procedure
中国农业大学山东桓台实验站2003～ 2004年夏玉米肥料实验的4个施氮处理为典型研 究对象4个氮肥处理用量分别是0、100、200、300 ｋｇ·ｈｍ—2·ａ—1分别以Ｎ0、Ｎ1、Ｎ2、Ｎ3表示

## Use advice
用户应在关注农业实践及其环境影响的生命周期评估研究的背景下应用此数据集。数据集应用于了解玉米生产生命周期各阶段（包括原材料、农业投入和种植阶段）的能源和资源使用情况以及排放情况。应用数据时，用户必须考虑研究的具体条件，这些条件与中国华东地区的夏季玉米相关，且可能不适用于所有地区或作物。方法论考虑应包括会计系统边界、特征化、标准化和加权评估阶段，以及为SO2、CH4、CO2、CO、N2O、COD、NH3和NOx等污染物提供的具体排放系数。

## Review details
清单： 内部审查通过几个迭代步骤完成，涉及原始数据验证、原始数据记录、代表性、完整性、与 ISO 14040 和 14044 有关的建模的一致性。

## Data sources
- 王明新,吴文良,夏训峰. 2010. 华北高产粮区夏玉米生命周期环境影响评价 [J]. 环境科学学报 30(6): 1339—1344
