# 作物生产｜作物｜无工艺流程参数

Dataset: ILCD process, Unit process, single operation
Geography: CN
Reference year: 2010
Classification: Unit processes / Materials production / Agricultural production means
Functional unit: 1 ton of straw as a functional unit (0% moisture content).
LCI method principle: Consequential
Generated by: 刘超硕, liucs22@mails.jlu.edu.cn
Owner: 天工LCI数据工作小组
Review: Dependent internal review by 天工LCI数据工作小组
Amounts: no units in this file; such an amount is in the reference unit of its flow, which a separate flow dataset defines
copyright: false
licenseType: Free of charge for all users and uses

## General comment
本文献系统边界包括作物的生长阶段、农业废弃物（秸秆）的获取阶段、农业废弃物（秸秆）的预处理阶段和燃烧发电阶段（最终使用电力阶段也包含在内只是过程中没有排放）。此工艺过程为作物的生长阶段。

## Technical purpose
本数据集代表农作物生长阶段，专门用于后续获取和预处理农业废弃物（秸秆）以进行燃烧发电。此过程的功能单位是产量为1吨的秸秆（含水量为0％）。它可以适用于旨在双重利用农业模式的农业部门，不仅收获作物，还利用剩余秸秆进行能源生成。

## Reference product
- Crop straw: 1000; measured

## Outputs
All rows: measured
- sulfur dioxide: 0.258
- carbon monoxide,carbon monoxide (fossil): 0.146
  原文未区分排放源为生物源或化石源，根据专家判断此处为化石源。
- nitrous oxide: 0.254
- hydrocarbons (unspecified): 0.046
- particles (> PM10),particles (> PM10): 0.054
- carbon dioxide (fossil): 206
  原文未区分排放源为生物源或化石源，根据专家判断此处为化石源。
- methane (fossil): 0.44
  原文献数据为二氧化碳排放当量11kg，此排放数据经转换计算而得（转换因子25）。
- nitrous oxide: 0.584
  原文献数据为二氧化碳排放当量174kg，此排放数据经转换计算而得（转换因子298）。

## Use advice
使用此数据的用户应确保按照文档中概述的系统边界每个阶段，包括生长、获取、预处理和燃烧用于能量生成，特别注意在最终使用电力时没有排放。本数据不应用于秸秆含水量高于0％的过程，或者秸秆不被用作能源的情况。由于数据针对没有工艺流程参数，用户可能需要调整以匹配他们的具体过程条件。

## Review details
清单： 内部审查通过几个迭代步骤完成，涉及原始数据验证、原始数据记录、代表性、完整性、与 ISO 14040 和 14044 有关的建模的一致性。

## Data sources
- Lu, W. & Zhang, T. Life-Cycle Implications of Using Crop Residues for Various Energy Demands in China. Environ. Sci. Technol. 44, 4026–4032 (2010).
