# 市政污水处理;污水;缺氧-好氧（A/O）

Dataset: ILCD process, Unit process, single operation
Geography: CN
Classification: Unit processes / End-of-life treatment / Waste water treatment
Generated by: 于晨阳, yuchenyang0506@foxmail.com
Owner: 天工LCI数据工作小组
Review: Dependent internal review by 天工LCI数据工作小组
Amounts: no units in this file; such an amount is in the reference unit of its flow, which a separate flow dataset defines
copyright: ['opt4ROkqig']
licenseType: Free of charge for all users and uses

## General comment
缺氧-好氧（A/O）工艺是一种常见的废水处理技术，通过交替的缺氧和好氧环境来降解污水中的有机物和氮。在缺氧阶段，有机物被部分氧化并释放出氮气，而在好氧阶段，微生物进一步氧化有机物，并将氨氮转化为硝态氮。A/O工艺通常被应用于城市污水处理厂，能够高效地去除污水中的有机物和氮，净化水质，降低污水对环境的影响。

## Geography
17 WWTPs in China

## Technology and included processes
缺氧-好氧（A/O）工艺首先通过缺氧阶段实现氮的硝化和脱氮，然后在好氧条件下进行有机物的氧化和污水的处理，最终通过沉淀将污泥与水分离。这一过程通过适时切换不同的处理阶段，有效地去除废水中的氮和有机物，实现废水的净化和处理。

## Technical purpose
本数据集描述的缺氧-好氧（A/O）处理过程用于市政污水处理。它是一种常用的生物处理方法，在市政污水处理厂（WWTPs）中用于去除有机污染物、氮和磷。该过程适用于数据集中提到的中国的17个污水处理厂。

## Reference product
- Wastewater: 1; input; measured

## Inputs
- Electricity: 1.728; measured
- sodium: 0.22; measured
  Sodium acetate
- Polyacrylamide: 0.00264; measured
- Polyferric chloride: 0.13; measured

## Outputs
All rows: measured
- chemical oxygen demand: 0.02052
- biological oxygen demand: 0.00612
- ammonia: 0.00047
- nitrogen, total (excluding N2): 0.01095
- phosphorus, total: 0.0003
- Suspended solids, unspecified,Suspended solids, unspecified,Suspended solids, unspecified: 0.00425
- methane (biogenic),methane (biogenic): 0.00248
  原文未区分biogenic和fossil，根据专家判断此处为biogenic。
- nitrous oxide: 0.00054

## Use advice
在使用此数据集进行生命周期评估（LCA）时，确保系统边界包括A/O过程的缺氧和好氧阶段。仔细考虑中国17个WWTP的运营特性，因为它们的具体技术和效率可能有所不同。通过整合提供的特定于现场的数据来准确模拟使用阶段。核实数据是否是当前的，并且代表了中国目前使用的技术。除非它们是LCA系统边界的一部分，否则排除此数据集未描述的外部污水治理过程。

## Review details
清单： 内部审查通过几个迭代步骤完成，涉及原始数据验证、原始数据记录、代表性、完整性、与 ISO 14040 和 14044 有关的建模的一致性。

## Data sources
- Chen, W., Zhang, Q., Hu, L., Geng, Y. & Liu, C. Understanding the greenhouse gas emissions from China’s wastewater treatment plants: Based on life cycle assessment coupled with statistical data. Ecotoxicology and environmental safety 259, 115007 (2023).
