# 碳酸二甲酯生产;碳酸二甲酯;氧化羰基化法;氧气、甲醇、焦炭

Dataset: ILCD process, Unit process, single operation
Geography: QZ-FJ-CN
Classification: Materials production / Organic chemicals
Functional unit: Produce 1kg dimethyl carbonate
LCI method principle: Attributional
Generated by: 陈鑫, xinchen@mail.nankai.edu.cn
Owner: 天工LCI数据工作小组
Review: Dependent internal review by 天工LCI数据工作小组
Amounts: no units in this file; such an amount is in the reference unit of its flow, which a separate flow dataset defines
copyright: false
licenseType: Free of charge for all users and uses

## General comment
焦炭和氧气不完全反应生成一氧化碳，同时未反应部分焦炭可以作为催化剂，在气相条件下氧气、一氧化碳和甲醇反应生成碳酸二甲酯；因为没有找到使用焦炭、氧气、甲醇生产碳酸二甲酯的具体工艺，故此过程为现有工艺的推测

## Geography
泉州恒河化工有限公司

## Technology and included processes
直接气相法/氧化羰基化法，在气态条件下氧气、一氧化碳和甲醇反应合成碳酸二甲酯

## Technical purpose
通过焦炭、氧气和甲醇的氧化羰基化方法生产的碳酸二甲酯主要用于合成聚碳酸酯、溶剂，作为甲基化剂。它在塑料制造、制药行业中应用，并作为有机合成中的环保溶剂或中间体。

## Reference product
- Dimethyl carbonate: 1
  数据来源于泉州恒河化工有限公司环境影响评价报告

## Inputs
- Methanol: 0.75
  数据来源于泉州恒河化工有限公司环境影响评价报告
- Coke: 0.24
  数据来源于泉州恒河化工有限公司环境影响评价报告
- oxygen: 0.529
  数据来源于泉州恒河化工有限公司环境影响评价报告
- electricity: 0.8604
  数据来源于泉州恒河化工有限公司环境影响评价报告
- process steam: 0.0055
  数据来源于泉州恒河化工有限公司环境影响评价报告

## Outputs
- non-methane volatile organic compounds: 1.63e-5
  数据来源于泉州恒河化工有限公司环境影响评价报告
- carbon monoxide: 1.03e-6
  数据来源于泉州恒河化工有限公司环境影响评价报告
- chemical oxygen demand: 9.25e-6
  数据来源于泉州恒河化工有限公司环境影响评价报告
- biological oxygen demand: 1.83e-6
  数据来源于泉州恒河化工有限公司环境影响评价报告
- Suspended solids, unspecified: 6.46e-6
  数据来源于泉州恒河化工有限公司环境影响评价报告

## Data selection and combination
数据来源于泉州恒河化工有限公司的环境影响评价报告

## Data treatment and extrapolations
可能有对数据做简单的乘除处理

## Use advice
使用这个关于通过焦炭、氧气和甲醇推测性的氧化羰基化方法生产的碳酸二甲酯的生命周期评估数据集时，确保对1公斤产品的功能单元输入和输出进行正确分配。仔细考虑技术适用性；信息基于尚未商业实践的理论过程。有实验研究数据时进行验证，并根据需要调整系统边界以反映真实情况。

## Review details
清单： 内部审查通过几个迭代步骤完成，涉及原始数据验证、原始数据记录、代表性、完整性、与 ISO 14040 和 14044 有关的建模的一致性。

## Data sources
- Yin, R., Hu, S. & Yang, Y. Life cycle inventories of the commonly used materials for lithium-ion batteries in China. Journal of Cleaner Production227, 960–971 (2019).
