# Soil remediation;in-situ;electrokinetic remediation;remedialaction operation;Water;

Dataset: ILCD process, Unit process, single operation
Geography: KR
Reference year: 2014
Classification: Other Services / Repair and maintenance
Generated by: Wang Yipeng, wangyp@caep.org.cn
Owner: Tiangong LCI Data Working Group
Review: Dependent internal review by Tiangong LCI Data Working Group
Amounts: no units in this file; such an amount is in the reference unit of its flow, which a separate flow dataset defines
copyright: false
licenseType: Free of charge for all users and uses

## General comment
System operation and maintenance

## Technical purpose
The soil remediation process described is employed for in-situ electrokinetic remediation, which is a technique used to remove contaminants from soil by applying an electric current. This particular process involves system operation and the maintenance aspect of the remediation process, which includes the transportation of personnel for maintenance purposes. This process is suitable for treating contaminated land where traditional excavation and disposal methods are not feasible or cost-effective, such as in urban areas, near infrastructure, or where contamination is dispersed.

## Reference product
- Water for industrial use: 50; input; measured
  Vehicle (onetime/week, 19.3 km, 10 km/1 L)

## Inputs
- Sodium hydroxide: 10; measured
  Chemical (0.01 M)
- Electricity: 21600; measured
  Pump, power supply, etc
- EDTA: 36.5; measured
- Diesel: 0.0927; measured
  Vehicle (onetime/week, 19.3 km, 10 km/1 L)

## Outputs
- Greenhouse Gases: 4340; measured
- Nitrogen oxides: 10.1; measured
- SOx: 11.2; measured
- particles (> PM10): 0.037; measured

## Use advice
When using the data set for the in-situ electrokinetic soil remediation process, attention should be given to the scope of the remediation area, as the effectiveness of this method may vary depending on soil type, contaminant properties, and local geological conditions. The user should also consider the energy consumption and the environmental impact of the electricity used for the remediation process. Additionally, the transportation of personnel for maintenance should be accounted for in the assessment of the process's overall environmental impact.

## Review details
Inventory: The internal review was done by several iteration steps concerning raw data validation, raw data documentation, representativity, completeness and consistency of modelling with regard to ISO 14040 and 14044.

## Data sources
- Environmental assessment on electrokinetic remediation of multimetal-contaminated site: a case study
