# 海水产盐;电渗析，螺旋缠绕

Dataset: ILCD process, Unit process, single operation
Geography: CN
Reference year: 2023
Classification: Materials production / Inorganic chemicals
Functional unit: 1 t sodium chloride
Generated by: 陆嘉麒, wilsherelu@foxmail.com
Owner: 天工LCI数据工作小组
Review: Dependent internal review by 天工LCI数据工作小组
Amounts: no units in this file; such an amount is in the reference unit of its flow, which a separate flow dataset defines
copyright: false
licenseType: Free of charge for all users and uses

## General comment
该数据集描述了使用螺旋缠绕电渗析从海水中生产盐的过程。最终产品氯化钠通常用于食品保鲜、增强风味、融雪以及作为化工行业的原料。

## Reference product
- sodium chloride: 1000; article inperiodical
  产品盐

## Inputs
- Electrodialysis Component: 0.0054; article inperiodical
  ED 组件
- electricity mix: 639.72; article inperiodical
  过程电耗
- Water (fresh water): 4085; article inperiodical
  原水

## Outputs
- High-concentration saline wastewater: 817; article inperiodical
  浓水（高含盐废水）
- Deionized Water: 3268; article inperiodical
  淡水(去离子水)

## Use advice
使用此数据集时，必须确保其适用于地理环境上下文，因为不同地区的海水组成可能存在变异。此外，如果LCA的范围包括下游过程，则应包括与运输和进一步处理氯化钠相关的潜在环境影响。通常，初级盐生产的数据集不涉及回收和产品寿命终端情景，但应为衍生产品考虑这些情景。

## Review details
清单： 内部审查通过几个迭代步骤完成，涉及原始数据验证、原始数据记录、代表性、完整性、与 ISO 14040 和 14044 有关的建模的一致性。

## Data sources
- Xue, N. et al. Carbon footprint analysis and carbon neutrality potential of desalination by electrodialysis for different applications. Water Res. 232, 119716 (2023).
