# Steel products | steel | Steel production

Dataset: ILCD process, Unit process, single operation
Geography: CN
Reference year: 2006
Classification: Materials production / Other mineralic materials
Generated by: Wanghuanyu, wanghuanyu00@126.com
Review: Dependent internal review by Tiangong LCI Data Working Group
Amounts: no units in this file; such an amount is in the reference unit of its flow, which a separate flow dataset defines

## Reference product
- iron: 1, 1 (2 entries); measured

## Inputs
- iron: 729
- primary energy from solar energy: 560.2, 357.8 (2 entries); measured
- freshwater: 16000, 15450 (2 entries); measured
- iron: 0; measured

## Outputs
All rows: measured
- carbon monoxide: 21.27, 2.73 (2 entries)
- carbon dioxide: 1336.28, 1432.49 (2 entries)
- phenol,Sulphur oxides (as SO2): 4.66, 6.22 (2 entries)
- nitrous oxide: 2.85, 3.73 (2 entries)
- Flue dust: 15.64, 10.55 (2 entries)

## Review details
Inventory: The internal review was done by several iteration steps concerning raw data validation, raw data documentation, representativity, completeness and consistency of modelling with regard to ISO 14040 and 14044.; Documentation: The review of the documentation was performed by Ecobilan and is in compliance with ISO 14040 and 14044. The data set documentation is correct in view of the appropriateness of the information provided. It includes all relevant information in view of data quality and scope of application of the respective LCI result.

## Data sources
- 1.杜涛 & 蔡九菊. 典型钢铁生产流程的环境负荷分析. 中国冶金 38–41 (2006) doi:
