# Production stage | crude oil | seismic exploration, drilling, and well repair

Dataset: ILCD process, Unit process, single operation
Geography: BJ-CN
Reference year: 2004
Classification: Materials production / Other mineralic materials
LCI method principle: Attributional
LCI method approaches: Consequential
Generated by: RuiXi Zhu, z2958242159@163.com
Review: Dependent internal review by Tiangong LCI Data Working Group
Amounts: no units in this file; such an amount is in the reference unit of its flow, which a separate flow dataset defines
copyright: false

## General comment
The main engineering categories to be carried out in the exploration and exploitation stage of petroleum include seismic exploration, drilling, workover, oil and gas accumulation and storage, etc. . According to the different regions are divided into onshore oil mining and offshore oil mining. In these processes, the main impact on the environment are noise, waste water, waste gas, and solid waste, but the most important is waste water, solid waste, these two parts. The following analysis of their impact and energy consumption

## Geography
Jianghan Oilfield

## Inputs
- LPG - liquefied petroleum gas: 2500; uniform; article inperiodical
  原油生产耗水量

## Deviations from the LCI method approaches
(1) from the energy consumption table, it can be seen that the oil loss rate is high in the stage of exploitation and refining, so it is necessary to take measures to reduce the loss in this process. (2) because of the large amount of wastewater in the process of oil exploitation and use, it is necessary to recycle the wastewater to reduce pollution and save water. (3) from the view of the whole life cycle, the use of oil is more polluting. But it has a wide range of applications and so many products that there are no alternatives in the short term.

## Review details
Inventory: The internal review was done by several iteration steps concerning raw data validation, raw data documentation, representativity, completeness and consistency of modelling with regard to ISO 14040 and 14044.; Documentation: The review of the documentation was performed by Ecobilan and is in compliance with ISO 14040 and 14044. The data set documentation is correct in view of the appropriateness of the information provided. It includes all relevant information in view of data quality and scope of application of the respective LCI result.

## Data sources
- 董志强,马晓茜,张凌 石油利用对环境影响的生命周期分析
