# clinker production|clinker|shaft kiln

Dataset: ILCD process, Unit process, single operation
Geography: CN
Classification: Materials production / Other mineralic materials
Generated by: Siqi Yang
Amounts: no units in this file; such an amount is in the reference unit of its flow, which a separate flow dataset defines
copyright: false

## General comment
In the calcinating phase for clinker, the raw meal (mainly CaCO3) is mixed with fuels as coal. Adding air into the kiln for calcinating causes the raw meal to decompose into clinker (mainly CaO) at a high temperature. Various pollutants are generated in the process.

## Model description
The system boundary is the calcinating phase yielding clinker.

## Reference product
- clinker: 1000
  Clinker

## Inputs
All rows: measured
- raw meal: 2042.5
  Raw ball
- limestone, crushed, for mill: 1165.83
  Limestone
- clay: 242.5
  Clay
- hard coal, run-of-mine: 195
  Coal. Coal 1.94; Adding coal 0.4.
- iron, powder: 56.667
  Iron powder
- Water (fresh water): 416.667
  Water
- oxygen: 373.333
  O2

## Outputs
All rows: measured
- particles (> PM10): 27.5
  Dust. The particle size is not specified. Here we treat it as PM>10.
- carbon dioxide: 914.167
  CO2
- sulfur dioxide: 2.5
  SO2
- Nitrogen oxides: 4.167
  NOX
- wastewater, unpolluted: 416.667
  Water
- Waste, solid, from cement production: 73.753
  Others. The original text did not specify what substance it is, so let's assume it is the soild waste.

## Sampling procedure
The annual output for the cement enterprise with a shaft kiln production system investigated was designed for 100,000 tons of clinker. The overall features of the shaft kiln production line include high energy consumption, limited production capacity, low labor productivity, and a large amount of dust emissions. The dynamic metabolic analysis of the shaft kiln production line is conducted for a unit of time of 1 h at a normal production level.

## Data sources
- Dan Hu, Zhen Guo, Zhen Wang, & Qiang Xiao. (2015). Metabolism analysis and eco-environmental impact assessment of two typical cement production systems in Chinese enterprises. Ecological Informatics 26, 70–77.
