# Electricity production ; Electricity ; Thermal power (88.4%) + hydropower (5.0%) + wind power (3.0%) + solar power (3.5%)

Dataset: ILCD process, Partly terminated system
Geography: HEN-CN
Reference year: 2019
Classification: Energy carriers and technologies / Electricity
LCI method principle: Other
Generated by: Ruoxi Xiong, xiongrx0126@163.com
Owner: Tiangong LCI Data Working Group
Review: Dependent internal review by Tiangong LCI Data Working Group
Amounts: no units in this file; such an amount is in the reference unit of its flow, which a separate flow dataset defines
copyright: false
licenseType: Free of charge for all users and uses

## General comment
Forms of electricity generation include thermal power, hydropower, wind power and solar power

## Time period
Calculated based on data from the 2019 Energy Statistics Yearbook

## Technical purpose
This dataset describes the mixture of electricity generation sources including thermal power, hydropower, wind power, and solar power with respective shares of 88.4%, 5.0%, 3.0%, and 3.5%. The data represent the typical energy production mix for the provision of electricity within a grid and is applicable for assessments where regional or specific electricity consumption profiles are relevant, such as in environmental product declarations, energy audits, greenhouse gas inventories, and other industrial energy analyses.

## Reference product
- Electricity: 3.6; calculated

## Outputs
- carbon dioxide: 0.681; calculated
- sulfur dioxide: 0.000118; calculated
- Nitrogen oxides: 0.000187784; calculated
- Dust (unspecified, from stack): 2.3338e-5; calculated

## Data treatment and extrapolations
For the accounting method, please refer to the "Enterprise Greenhouse Gas Emissions Accounting Methods and Reporting Guidelines for Power Generation Facilities". Different forms of power generation and fuel consumption come from Chapter 3 (Energy Production) and Chapter 6 (Regional Energy Balance Sheet) in the "China Energy Statistical Yearbook 2020". The fuel parameters such as low calorific value and carbon content per unit calorific value used to calculate the carbon dioxide emission factor come from the "2019 China Regional Power Grid Carbon Dioxide Baseline Emission Factor Calculation Instructions OM" and the "Enterprise Greenhouse Gas Emission Accounting Method and Reporting Guide for Power Generation Facilities" 》

## Use advice
Users of this dataset must reference the 'Enterprise Greenhouse Gas Emissions Accounting Methods and Reporting Guidelines for Power Generation Facilities' for the methodology regarding emissions accounting. The details of varying electricity generation forms and their fuel usage are sourced from the 'China Energy Statistical Yearbook 2020', specifically chapters 3 and 6. The parameters such as the low calorific value and the carbon content per unit calorific value that are necessary for calculating carbon dioxide emission factors are taken from documents including the '2019 China Regional Power Grid Carbon Dioxide Baseline Emission Factor Calculation Instructions OM' and related enterprise guidelines. It is crucial to apply appropriate conversion factors when assessing environmental impacts and energy consumption to ensure accuracy in reporting and compliance with regulatory frameworks.

## Review details
Inventory: The internal review was done by several iteration steps concerning raw data validation, raw data documentation, representativity, completeness and consistency of modelling with regard to ISO 14040 and 14044.

## Data sources
- 熊若熙. 中国电力生产和消费二氧化碳与污染物排放因子核算. (清华大学, 2023).
