# 锂电池生产 ; 磷酸铁锂电池 1GWh ; 锂电池生产组装

Dataset: ILCD process, Unit process, black box
Geography: YB-SC-CN
Reference year: 2022
Classification: Energy carriers and technologies / Electricity
Functional unit: 1 GWh Lithium Iron Phosphate Battery
LCI method principle: Attributional
LCI method approaches: Allocation - mass
Generated by: 张冰倩, zhangbq22@mails.tsinghua.edu.cn
Owner: 天工LCI数据工作小组
Review: Dependent internal review by 天工LCI数据工作小组
Amounts: no units in this file; such an amount is in the reference unit of its flow, which a separate flow dataset defines
copyright: false
licenseType: Free of charge for all users and uses

## General comment
使用传统锂电池工艺

## Time period
2022年四川宜宾江安工业园区锂电池生产数据

## Technical purpose
该数据集描述了使用传统锂离子技术生产1 GWh磷酸铁锂（LiFePO4）电池的过程。它适用于电动汽车行业、大型能源储存系统和其他需要高功率、长寿命及与传统锂离子电池相比环境更安全的电池选项的锂电池组装应用。

## Reference product
- Battery: 3.6e6; normal; measured

## Inputs
All rows: normal; measured
- Ammonium phosphate dibasic: 1.73e6
- Graphite Anode: 1.5e6
- Lithium Hydroxide: 25000
- Nitric acid: 3.06e6
- Manganese Iron Powder: 211000
- Butane-1,4-diol: 1.67e6
- POLYACRYLATE-2: 8100
- Carboxymethyl cellulose: 1260
- N,N-Dimethylacetamide: 387
- Polyvinylidene fluoride: 6960
- Alumina: 78300
- Tributyl phosphate: 329
- Polyvinyl pyrrolidone: 360
- Polyolefin: 163000
- Vinylene Carbonate: 21200
- Ethyl methyl carbonate: 317000
- Dimethyl carbonate: 353000
- 1,3-Propane sultone: 28300
- Propyl acetate: 70500
- Diethyl carbonate: 3950
- Propylene carbonate: 55000
- Ethylene carbonate: 283000
- 2,2-Difluoroethanol: 43600
- Lithium fluoride: 34000
- Anhydrous Hydrogen Fluoride: 132000
- Sodium carbonate: 1.31e6

## Outputs
All rows: normal; measured
- Ammonia Nitrogen: 300
- Chemical Oxygen Demand: 6160
- nitrogen: 469
- sodium hydroxide: 267000
- calcium carbonate: 390000
- carbon dioxide: 167000
- freshwater: 4.66e7
- hydrated lime dry slaked: 270000
- phosphorus trichloride: 179000
- chlorine: 92300
- Iron scrap: 633000
- process steam: 163000
- electricity mix: 5.94e7
- natural gas: 2.51e6
- dichloromethane: 331
- sulfur dioxide: 1410
- nitrous oxide: 11300
- ammonia: 113
- phosphorus, total: 90.6
- sulfate: 397
- hydrogen chloride: 59.6

## Deviations from the LCI method approaches
通过工业园区物质流分析计算得到单元过程数据

## Data selection and combination
数据为四川宜宾江安工业园区锂电池生产物质流数据

## Data treatment and extrapolations
数据均采用平均值

## Sampling procedure
实景数据来自于四川宜宾江安锂电池生产

## Use advice
数据使用者应注意，所提供的信息代表的是2022年四川宜宾江安工业园区磷酸铁锂电池生产过程的物质流平均数据。该数据集应当仅用于专注于生产阶段的生命周期分析（LCA），不考虑使用阶段或者产品寿命终结处理。它适合与其他电池生产数据集进行基准对比，但如果使用于2022年数据集所代表范围之外，特别是如果生产技术或区域能源组合发生变化时，必须进行更新和验证。

## Review details
清单： 内部审查通过几个迭代步骤完成，涉及原始数据验证、原始数据记录、代表性、完整性、与 ISO 14040 和 14044 有关的建模的一致性。

## Data sources
- 四川宜宾项目数据
