# 市政污泥处理与处置;干污泥;共同焚烧

Dataset: ILCD process, Unit process, single operation
Geography: CN
Classification: Unit processes / End-of-life treatment / Waste water treatment
Functional unit: The functional unit used for GHGs in this LCA is one dry ton (DT) of sludge.
Generated by: 金思甜, 2331276@tongji.edu.cn
Owner: 天工LCI数据工作小组
Review: Dependent internal review by 天工LCI数据工作小组
Amounts: no units in this file; such an amount is in the reference unit of its flow, which a separate flow dataset defines
copyright: ['opt4ROkqig']
licenseType: Free of charge for all users and uses

## General comment
本文研究的主要数据来源如下:1)能源消耗和物质投入来源于对太湖流域的调查;2)能源利用排放因子来源于我们自己的计算、IPCC和文献。3)填埋过程中的CH4排放由文献获得，填埋、焚烧和堆肥过程中的无组织排放主要由文献研究中给出的模型和IPCC因子(2006)决定。4)理论计算数据(焚烧部分)。

## Geography
太湖流域

## Technology and included processes
假定S2、S3和S4燃烧时的窑温为1000°C, S5燃烧时的窑温为1400°C。窑炉效率假定为75%。

## Technical purpose
本数据集中描述的市政污泥处理与处置工艺是为太湖流域内的市政污泥管理专门设计的。干污泥的共同焚烧在单元过程中进行，这表示该工艺是更大处理设施的一部分。该工业过程主要用于减少污泥体积和减缓其环境影响，特别是专注于每一干吨（DT）污泥的温室气体排放。

## Reference product
- Sludge: 1000; input; estimated
  一干吨 （DT） 污泥

## Inputs
- Electricity: 399.6; measured
- hard coal: 8049; measured
  燃煤

## Use advice
在使用此数据集进行生命周期评估时，用户必须考虑太湖流域市政应用中污泥处理与处置的具体情况。评估温室气体排放的功能单位是一干吨污泥。用户应考虑区域参数并包括与共同焚烧相关的适当排放因子。必须小心确保数据反映了具体地点特定的技术和实践，并遵循温室气体排放核算的方法论一致性。

## Review details
清单： 内部审查通过几个迭代步骤完成，涉及原始数据验证、原始数据记录、代表性、完整性、与 ISO 14040 和 14044 有关的建模的一致性。

## Data sources
- Liu, B., Wei, Q., Zhang, B. & Bi, J. Life cycle GHG emissions of sewage sludge treatment and disposal options in Tai Lake Watershed, China. Science of The Total Environment 447, 361–369 (2013).
