# 土壤修复;异位修复;土壤淋洗;土柱淋洗;黄腐酸泡沫淋洗;得到修复的土柱

Dataset: ILCD process, Unit process, single operation
Geography: CN
Reference year: 2023
Classification: Other Services / Repair and maintenance
Generated by: 黄悦, huangyue@caep.org.cn
Owner: 天工LCI数据工作小组
Review: Dependent internal review by 天工LCI数据工作小组
Amounts: no units in this file; such an amount is in the reference unit of its flow, which a separate flow dataset defines
copyright: false
licenseType: Free of charge for all users and uses

## General comment
使用鼠黄腐酸泡沫淋洗受污染土柱，得到修复后的土柱

## Technical purpose
该工业过程用于异位土壤修复，通常采用土壱淋洗技术。使用所谓的鼠黄腐酸泡沫（应为腐植酸泡沫，而鼠黄酸通常指盐酸）处理受污染的土壱，得到可以用于环境恢复或建设用途的净化土士。

## Reference product
- Remediated soil columns: 0.0008

## Inputs
- Humic Acid: 0.00146
- Nitrogen: 0.0144
- Activated Carbon: 0.03484
- Methanol: 0.0002
- Water (evapotranspiration): 0.00545
- Electricity: 0.36
- Contaminated soil columns: 0.0008

## Outputs
- quartz sand: 0.08
- polycyclic aromatic hydrocarbons: 0.0344, 0.00036 (2 entries)

## Use advice
该数据集的用户应注意准确识别用于淋洗的化学物质，因为'鼠黄腐酸泡沫'似乎是误译或误标。通常，用于此类工艺的是腐植酸，而不是鼠黄酸（盐酸）。确保数据集中列出的输入和输出准确反映了实际过程中使用的材料和能量。应根据运营条件的变化，如土壤成分、污染水平和处理效能的差异，进行调整。

## Review details
清单： 内部审查通过几个迭代步骤完成，涉及原始数据验证、原始数据记录、代表性、完整性、与 ISO 14040 和 14044 有关的建模的一致性。

## Data sources
- 张雅鑫 et al. 基于生命周期评价的焦化污染土壤 淋洗技术环境影响研究. 安全、健康和环境 23, (2023).
