# 电池组件生产 ; 电池组件 效率13.2% ; 导线焊接串并联、模压封装

Dataset: ILCD process, Unit process, single operation
Geography: CN
Reference year: 2014
Classification: Systems / Other machines
Functional unit: The functional unit selected for this paper is a 1 kWp
LCI method principle: Attributional
LCI method approaches: Allocation
Generated by: 杨锦锋, yjfzfshn@163.com
Owner: 天工LCI数据工作小组
Review: Dependent internal review by 天工LCI数据工作小组
Amounts: no units in this file; such an amount is in the reference unit of its flow, which a separate flow dataset defines
copyright: false
licenseType: Free of charge for all users and uses

## General comment
多晶硅

## Geography
对中国生产的单晶硅和多晶硅光伏系统进行生命周期评价

## Time period
文章发表

## Technology and included processes
单片焊接 － 串焊 － 层叠 －层压 －装框 － 清洗 － 电性能测试 － 包装入库

## Technical purpose
所描述的工业过程涉及生产效率为13.2％的光伏系统用电池组件。此过程包括导线焊接、串焊、层叠、层压、装框、清洗、电性能测试和包装入库等多个阶段。生成的单晶硅或多晶硅太阳能面板适用于能够将阳光转换为电力的太阳能系统，适合在住宅、商业和大规模太阳能项目中广泛部署。

## Reference product
- Solar Module: 1; article inperiodical
  电池板

## Inputs
All rows: article inperiodical
- Multi-Si solar cell: 60
  电池片
- aluminium: 4.2
  铝
- Glass: 18
  玻璃
- Ethylene-vinyl acetate copolymer: 1.6
  EVA
- TPT film: 0.78
  背板
- Cardboard: 1.75
  纸板
- electricity: 68.4
  电耗

## Outputs
All rows: article inperiodical
- carbon dioxide: 56
  CO2
- carbon monoxide: 0.1
  一氧化碳
- methane: 0.12
  甲烷
- Nitrogen oxides: 0.24
  氮氧化物
- sulfur dioxide: 0.3
  二氧化硫
- Dust (unspecified, from stack): 0.31
  粉尘
- Biochemical Oxygen Demand: 0.08
  生物需氧量
- chemical oxygen demand: 0.1
  化学需氧量
- dissolved organic carbon: 0.03
  DOC
- total organic carbon: 0.03
  TOC

## Deviations from the LCI method approaches
本文的研究目的是对中国生产的单晶硅和多晶硅光伏系统进行生命周期评价，分析废弃处理的方法和不同废弃处理方法对环境的影响

## Use advice
在使用所述中国生产的单晶硅和多晶硅光伏系统的生命周期评价（LCA）数据时，必须确保选择适当的功能单位（本例中为1 kWp）。用户在模拟环境影响时，应侧重于特定效率和模块生产的各个阶段。应注意终生阶段的场景，包括废弃和回收方面，以完整捕捉生态足迹。建议根据相关地区法规和标准应用此LCA数据，以保持准确性和相关性。

## Review details
清单： 内部审查通过几个迭代步骤完成，涉及原始数据验证、原始数据记录、代表性、完整性、与 ISO 14040 和 14044 有关的建模的一致性。

## Data sources
- 李鹞 & 于随然. 中国光伏系统的生命周期评价. 环境工程 32, 119–124 (2014).
