# 太阳能级多晶硅生产 ; 高纯太阳能级多晶硅 ; 改良西门子法

Dataset: ILCD process, Unit process, single operation
Geography: CN
Reference year: 2013
Classification: Unit processes / Energy carriers and technologies / Other non-renewable fuels
Functional unit: 1 kg solar grade multi-Si
LCI method principle: Attributional
LCI method approaches: Allocation
Generated by: 杨锦锋, yjfzfshn@163.com
Owner: 天工LCI数据工作小组
Review: Dependent internal review by 天工LCI数据工作小组
Amounts: no units in this file; such an amount is in the reference unit of its flow, which a separate flow dataset defines
copyright: false
licenseType: Free of charge for all users and uses

## General comment
多晶硅

## Time period
文章发表

## Technology and included processes
改良西门子法

## Technical purpose
采用改良西门子法生产的高纯多晶硅纯度达到99.9999%，专门用于太阳能行业。它是制造太阳能光伏电池和组件的主要材料。

## Reference product
- Solar grade multi-Si: 1; measured
  太阳能级多晶硅

## Inputs
All rows: measured
- Metallurgical silicon: 1.5
  工业硅
- Electricity: 684
  电量
- Cooling water: 454.2
  冷却水
- Process Water: 17
  工艺水
- process steam: 150
  蒸汽
- Hydrogen: 0.131
  氢气
- chlorine: 2.24
  氯气
- Sodium hydroxide: 44
  NaOH

## Outputs
All rows: measured
- hydrogen chloride: 0.09
  HCl
- Silicon tetrachloride: 0.8
  四氯化硅
- chemical oxygen demand: 0.00461
  COD
- chloride: 2.44
  氯化物
- fluoride: 5e-5
  氟化物
- Suspended solids, unspecified: 0.00518
  悬浮固体
- industrial waste (unspecified): 0.23
  固体废弃物

## Deviations from the LCI method approaches
以太阳能级多晶硅为研究对象，运用 LCA的评价方法，定量计算国内普遍生产水平下，太阳能级多晶硅生命周期过程的资源、能源投入和环境排放值

## Data selection and combination
直接引用具有代表性的文献数据

## Use advice
使用此LCA数据集时，用户应考虑多晶硅的具体等级及其相关的生产工艺，以便将其与其他类型的多晶硅或替代材料进行比较。应注意数据代表国内普通生产水平的地理范围。如果将此数据应用于全球场景，则可能需要进行调整。在评估太阳能光伏材料的完整生命周期时，应考虑回收和生命周期末期的情况。

## Review details
清单： 内部审查通过几个迭代步骤完成，涉及原始数据验证、原始数据记录、代表性、完整性、与 ISO 14040 和 14044 有关的建模的一致性。

## Data sources
- 何洋. 太阳能级多晶硅的生命周期评价. (西南交通大学, 2013).
