# 市政污泥处理与处置;湿污泥 含水率80%;450℃热解

Dataset: ILCD process, Unit process, single operation
Geography: CN
Classification: Unit processes / End-of-life treatment / Wastewater treatment
Functional unit: 1 t of sludge is selected as the functional unit, the moisture content of wet sludge is 80%.
Generated by: 金思甜, 2331276@tongji.edu.cn
Owner: 天工LCI数据工作小组
Review: Dependent internal review by 天工LCI数据工作小组
Amounts: no units in this file; such an amount is in the reference unit of its flow, which a separate flow dataset defines
copyright: ['opt4ROkqig']
licenseType: Free of charge for all users and uses

## General comment
通过实验对不同工况下的污泥热解处理工艺进行相关数据的收集和分配工作，对每一个过程的物质、能量的输入和输出，对环境污染物排放等进行量化。

## Technology and included processes
热解环节管式炉额定功率 4 kW，空载功率 1.4 kW，反应前通入 2~3 分钟氮气以保证无氧环境，氮气流量为 30 ml/min，管式炉升温速率 80 ℃/min，热解终温保持10min。

## Technical purpose
此数据集描述了含水率为80%的市政污泥处理与处置过程。该过程涉及在450°C下进行污泥热解，以稳定并减少体积，通常用于废物管理设施。它代表了处理1吨市政污泥的单元过程。

## Reference product
- Sludge: 1000; input; estimated
  1t湿污泥含水率 80%

## Inputs
- Electricity: 1280.02; calculated
- nitrogen: 5.63; calculated

## Outputs
- carbon monoxide (biogenic): 13.72; calculated
  原文未区分biogenic和fossil，根据专家判断此处为biogenic。
- carbon dioxide (biogenic): 7.84; calculated
  原文未区分biogenic和fossil，根据专家判断此处为biogenic。
- Heat treatment oil: 90.22; calculated
- Semi-coke: 88.1; calculated

## Use advice
使用此数据集的用户应考虑此过程与含水率80%的市政污泥的具体应用相关性。在模拟生命周期影响时，需要考虑450°C热解过程中的能耗和排放。此数据代表了给定条件下的情况，不应将其外推到具有不同特性或处理过程的污泥，而没有做出适当的调整。

## Review details
清单： 内部审查通过几个迭代步骤完成，涉及原始数据验证、原始数据记录、代表性、完整性、与 ISO 14040 和 14044 有关的建模的一致性。

## Data sources
- 王久兵. 污泥热解反应机制及其能源化工艺的全生命周期评价研究[D].浙江工业大学,2017.
