# Advanced hydrometallurgy process for lithium iron phosphate batteries

Dataset: ILCD process, Unit process, single operation
Geography: CN
Reference year: 2020
Classification: Materials production / Metals and semimetals
Functional unit: using 1 kWh as the functionalunit
Generated by: Pengfei, pengfei24@email.ncu.edu.cn
Owner: Tiangong LCI Data Working Group
Review: Dependent internal review by Tiangong LCI Data Working Group
Amounts: no units in this file; such an amount is in the reference unit of its flow, which a separate flow dataset defines
copyright: false
licenseType: Free of charge for all users and uses

## General comment
Before adopting wet process for material recovery, the waste lithium iron phosphate batteries are safely discharged, disassembled, pyrolyzed, mechanically crushed, and sorted to get powdered lithium-containing waste. Lithium-containing material is added to leaching solvent for leaching, filtered and separated to get lithium-containing solution, added to the purification agent for reaction, filtered, concentrated, and under certain reaction conditions, added to the precipitation agent fully reacted to crystallization and precipitation, filtered, washed and dried to get battery-grade lithium carbonate.

## Technical purpose
The advanced hydrometallurgy process described is specifically used for the recovery of materials from waste lithium iron phosphate (LFP) batteries. The end product is battery-grade lithium carbonate, which is a critical raw material for the manufacturing of new lithium iron phosphate batteries, as well as other lithium-based chemical products.

## Reference product
- EoL LFP battery: 3.6; input; article inperiodical

## Inputs
- sodium hydroxide: 2.04; article inperiodical
  Sodium hydroxide, production mix/EU-28
- Hydrogen peroxide (30%): 0.29; article inperiodical
  Hydrogen peroxide production mix/DE
- Citric Acid: 14.38; software or database
  Citric acid，New process based on GREET/CN
- Sodium carbonate（95%）: 0.9; article inperiodical
  Soda (Na2CO3)
- Electricity: 4.58; article inperiodical
- natural gas: 11.79, 11.79 (2 entries); article inperiodical

## Outputs
- carbon dioxide: 0.16; article inperiodical
- aluminium: 0.8; measured
- copper: 1.01; measured
- iron: 0.92; measured
- Lithium carbonate: 0.63; measured
  Li2CO3

## Data selection and combination
The data come from multiple papers and are difficult to distinguish.

## Use advice
The life cycle assessment data pertaining to the advanced hydrometallurgy process for LFP batteries should be used carefully, considering the unique aspects of the recycling process. The functional unit for this data set is 1 kWh of battery capacity. Users need to ensure that comparisons or assessments are made on a similar basis and scale. Attention should be given to methodological choices, such as the allocation of environmental impacts between the recycled product and the original waste stream. It is important to note that the data come from multiple papers and may contain variability that could affect the outcome of the analysis.

## Review details
Inventory: The internal review was done by several iteration steps concerning raw data validation, raw data documentation, representativity, completeness and consistency of modelling with regard to ISO 14040 and 14044.

## Data sources
- Wang, Y. et al. Environmental impact assessment of second life and recycling for LiFePO4 power batteries in China. Journal of Environmental Management 314, 115083 (2022).
