# Electricity production ; Electricity ; Thermal power (68.3%) + hydropower (29.9%) + wind power (1.4%) + solar power (0.4%)

Dataset: ILCD process, Partly terminated system
Geography: CQ-CN
Reference year: 2019
Classification: Energy carriers and technologies / Electricity
LCI method principle: Other
Generated by: Ruoxi Xiong, xiongrx0126@163.com
Owner: Tiangong LCI Data Working Group
Review: Dependent internal review by Tiangong LCI Data Working Group
Amounts: no units in this file; such an amount is in the reference unit of its flow, which a separate flow dataset defines
copyright: false
licenseType: Free of charge for all users and uses

## General comment
Forms of electricity generation include thermal power, hydropower, wind power and solar power

## Time period
Calculated based on data from the 2019 Energy Statistics Yearbook

## Technical purpose
The data set represents the mix of electricity production in a specific region, which includes thermal power (predominantly from coal), hydropower, wind power, and solar power. This mixed source electric energy is typically provided for public and industrial sectors for various applications, ranging from residential energy supply to powering manufacturing processes.

## Reference product
- Electricity: 3.6; calculated

## Outputs
- carbon dioxide: 0.544; calculated
- sulfur dioxide: 9.1e-5; calculated
- Nitrogen oxides: 0.000146851; calculated
- Dust (unspecified, from stack): 1.8834e-5; calculated

## Data treatment and extrapolations
For the accounting method, please refer to the "Enterprise Greenhouse Gas Emissions Accounting Methods and Reporting Guidelines for Power Generation Facilities". Different forms of power generation and fuel consumption come from Chapter 3 (Energy Production) and Chapter 6 (Regional Energy Balance Sheet) in the "China Energy Statistical Yearbook 2020". The fuel parameters such as low calorific value and carbon content per unit calorific value used to calculate the carbon dioxide emission factor come from the "2019 China Regional Power Grid Carbon Dioxide Baseline Emission Factor Calculation Instructions OM" and the "Enterprise Greenhouse Gas Emission Accounting Method and Reporting Guide for Power Generation Facilities" 》

## Use advice
Users utilizing this data set for Life Cycle Assessment (LCA) should pay particular attention to the methodological choice concerning the regional energy mix and associated greenhouse gas emissions. It is imperative to reference the proper baseline year (according to the provided 2019 data) and standards ('Enterprise Greenhouse Gas Emissions Accounting Methods and Reporting Guidelines for Power Generation Facilities') while calculating carbon footprint. Consideration should be given to potential changes in energy mix proportions over time, and updates from latest annual statistical yearbooks should be incorporated when available for more accurate LCA results.

## Review details
Inventory: The internal review was done by several iteration steps concerning raw data validation, raw data documentation, representativity, completeness and consistency of modelling with regard to ISO 14040 and 14044.

## Data sources
- 熊若熙. 中国电力生产和消费二氧化碳与污染物排放因子核算. (清华大学, 2023).
