# 铝锭铸造 ; 原生铝锭 ; 液态原铝 ; 2007年

Dataset: ILCD process, Unit process, single operation
Geography: CN
Reference year: 2021
Classification: Unit processes / Materials production / Metals and semimetals
Generated by: 蔡梓萌, caizm6178@163.com
Owner: 天工LCI数据工作小组
Review: Dependent internal review by 天工LCI数据工作小组
Amounts: no units in this file; such an amount is in the reference unit of its flow, which a separate flow dataset defines
copyright: false
licenseType: Free of charge for all users and uses

## General comment
本数据集描述的原生铝锭铸造工艺用于从液态原生铝制造铝锭。这些铝锭通常作为高质量的原材料用于生产各种铝基产品，包括用于汽车工业的零部件、航空航天应用、建筑材料和电导体。

## Time period
文献发表日期

## Reference product
- aluminium, primary, ingot: 1000; missing unimportant

## Inputs
- aluminium, primary, liquid: 1024.9; missing unimportant

## Data selection and combination
本研究的数据参考了PA、SA、电力等背景数据的LCA数据。PA数据来自统计数据源，SA数据主要来自文献。背景数据主要来自中国科学院生态环境研究中心CASRCEES 2018建立的中国本地化LCA数据库，涵盖能源、材料、交通、废物管理等LCA数据。

## Use advice
在使用该数据集进行生命周期评估（LCA）时，请确保您考虑到数据发布的特定年份（2007年），因为自那时以来技术和效率可能已有所发展。用户还应注意，PA数据来自统计数据源，而SA数据主要来自文献。背景数据来自中国本土化的LCA数据库——中科院生态环境研究中心2018年的CAS RCEES。建议与其他数据源核对一致性，并根据所研究区域或系统的特定特征考虑数据的技术适应性。

## Review details
清单： 内部审查通过几个迭代步骤完成，涉及原始数据验证、原始数据记录、代表性、完整性、与 ISO 14040 和 14044 有关的建模的一致性。

## Data sources
- Ding, N., Liu, N., Lu, B. & Yang, J. Life cycle greenhouse gas emissions of aluminum based on regional industrial transfer in China. J. Ind. Ecol. 25, 1657–1672 (2021).
