# 铝电解碳阳极生产 ; 碳阳极 ; 石油焦 ; 2015年

Dataset: ILCD process, Unit process, single operation
Geography: CN
Reference year: 2021
Classification: Unit processes / Materials production / Non-energetic raw materials
Generated by: 蔡梓萌, caizm6178@163.com
Owner: 天工LCI数据工作小组
Review: Dependent internal review by 天工LCI数据工作小组
Amounts: no units in this file; such an amount is in the reference unit of its flow, which a separate flow dataset defines
copyright: false
licenseType: Free of charge for all users and uses

## General comment
提供的生命周期评估（LCA）数据关乎采用石油焦制成的碳阳极的生产，这些碳阳极专门用于铝电解过程中。在制造过程中，这些碳阳极是传导电流和促进从氧化铝中提取铝的关键组件。此过程适用于需要这些阳极进行电解还原的原铝生产行业。

## Time period
文献发表日期

## Reference product
- anode, for metal electrolysis: 1000; software or database
  anode

## Inputs
All rows: software or database
- electricity, high voltage, aluminium industry: 748.8
  electricty
- heavy fuel oil: 65
  fuel oil
- coal tar: 214
  coal tar pitch
- Petroleum Coke: 1089
  petroleum coak
- coal gas: 1277

## Data selection and combination
本研究的数据参考了PA、SA、电力等背景数据的LCA数据。PA数据来自统计数据源，SA数据主要来自文献。背景数据主要来自中国科学院生态环境研究中心CASRCEES 2018建立的中国本地化LCA数据库，涵盖能源、材料、交通、废物管理等LCA数据。

## Use advice
使用此LCA数据的用户应考虑，碳阳极的生产数据来自统计来源和文献，并确保与指示的特定年份（2015年）相关。背景数据来源于本地化的中文环境下的CAS RCEES 2018数据库。在应用这些数据进行生命周期评估或环境影响分析时，用户必须考虑该时间框架内能源、材料、交通和废物管理数据的技术进步和区域特性，并针对随后年份技术和实践的发展或变化进行调整。

## Review details
清单： 内部审查通过几个迭代步骤完成，涉及原始数据验证、原始数据记录、代表性、完整性、与 ISO 14040 和 14044 有关的建模的一致性。

## Data sources
- Ding, N., Liu, N., Lu, B. & Yang, J. Life cycle greenhouse gas emissions of aluminum based on regional industrial transfer in China. J. Ind. Ecol. 25, 1657–1672 (2021).
