# Exploration potential analysis | Marine source rock | Organic geochemical analysis

Dataset: ILCD process, Unit process, single operation
Geography: SC-CN
Reference year: 1940
Classification: Materials production / Other mineralic materials
LCI method principle: Attributional
LCI method approaches: Consequential
Generated by: Shikang Kang, 908798159@qq.com
Review: Dependent internal review by Tiangong LCI Data Working Group
Amounts: no units in this file; such an amount is in the reference unit of its flow, which a separate flow dataset defines
copyright: false

## General comment
Eight outcrop sections are selected to systematically analyze the organic geochemistry of 8 sets of marine source rocks in northwestern Sichuan, including Doushantuo Formation of Lower Sinian, Dengsan Formation of Upper Sinian, Qiongzhusi Formation of Lower Cambrian, Longmaxi Formation of Lower Silurian, Middle Devonian, Maokou Formation of Middle Permian, Longtan Formation/Wujiaping Formation of Upper Permian and Dalong Formation, and discuss the natural gas exploration potential in this area.

## Geography
Sichuan Basin in Northwest Sichuan

## Time period
Since the 1940s, natural gas exploration in northwest Sichuan has continued

## Technology and included processes
Based on the analysis data of the thickness and organic carbon of the source rocks, the total gas generation intensity of 8 sets of source rocks in Northwest Sichuan is evaluated

## Reference product
- natural gas: 6.5e9; input; min 1.3e10; max 4e9; uniform; article inperiodical
  总生气强度

## Inputs
- natural gas: 20; min 10; max 30; uniform; article inperiodical
  总体厚度
- natural gas: 0.0108; min 0.0104; max 0.0112; uniform; article inperiodical
  等效镜质体反射率，范围取均值

## Data selection and combination
Abundance, type and maturity of organic matter in source rocks

## Data treatment and extrapolations
According to the analysis of geochemistry and vertical and horizontal thickness distribution of each set of source rocks in Northwest Sichuan, high-quality source rocks with high organic matter abundance are developed in the Lower Cambrian Qiongzhusi Formation, Upper Permian Longtan Formation and Dalong Formation, which are characterized by large thickness and wide distribution.

## Review details
Inventory: The internal review was done by several iteration steps concerning raw data validation, raw data documentation, representativity, completeness and consistency of modelling with regard to ISO 14040 and 14044.; Documentation: The review of the documentation was performed by Ecobilan and is in compliance with ISO 14040 and 14044. The data set documentation is correct in view of the appropriateness of the information provided. It includes all relevant information in view of data quality and scope of application of the respective LCI result.

## Data sources
- 胡国艺;贺飞;米敬奎;袁懿琳;郭谨豪; 川西北地区海相烃源岩地球化学特征、分布规律及天然气勘探潜力. 天然气地球科学 319–333 (2021).
