# 煤炭回采;开采煤炭

Dataset: ILCD process, Unit process, single operation
Geography: LF-SX-CN
Reference year: 2022
Classification: Energy carriers and technologies / Energetic raw materials
Generated by: 尹琳琳, yinlinlin0623@163.com
Owner: 天工LCI数据工作小组
Review: Dependent internal review by 天工LCI数据工作小组
Amounts: no units in this file; such an amount is in the reference unit of its flow, which a separate flow dataset defines
licenseType: Free of charge for all users and uses

## General comment
该数据集代表了M煤矿的煤炭开采过程，年产量为120万吨。该数据集适用于描述煤炭供应链中的环境影响和能源消耗，特别适用于依赖煤炭作为主要能源或原材料的行业。煤炭的最终用途包括发电、钢铁生产的冶金过程或作为化学合成的原料。

## Geography
M 煤矿的年产量为120万t，每年实际工作时间按360d计，则该工作面共需 499d开采完成。M煤矿一个工作面的开采过程中，设备的安装与撤回的时间各为半个月，在一年的生产中，掘进的时间为11个月，回采的时间为10个月。

## Technology and included processes
煤炭回采

## Reference product
- carbon dioxide (fossil): 7.21474e7; uniform; article inperiodical
  根据M煤矿煤炭开采全生 命周期内各个阶段的时间进度安排以及整个工作面的开采时间,计算得出这一工作面开采的全生命周期中煤炭回采中消耗97509.62mw·h的电量产生的CO2排放量。

## Inputs
- Electricity: 3.51035e8; uniform; article inperiodical
  根据M煤矿煤炭开采全生 命周期内各个阶段的时间进度安排以及整个工作面的开采时间,计算得出这一工作面开采的全生命周期中煤炭回采的电力消耗量。

## Use advice
使用M煤矿开采过程的LCA数据时，如果适用于不同的地理位置，重要的是要考虑采矿实践的地域差异进行调整。还应包括重型机械使用寿命的预期功能以及与矿山相关的环境负担（如土地使用和水消耗）的处理。方法论建议包括对包含排放的方法学界限的仔细考虑，以及如果适用，则对共产品之间负担的准确分配。

## Review details
清单： 内部审查通过几个迭代步骤完成，涉及原始数据验证、原始数据记录、代表性、完整性、与 ISO 14040 和 14044 有关的建模的一致性。
