# 小麦;规模化生产

Dataset: ILCD process, Partly terminated system
Geography: SD-CN
Reference year: 2015
Valid until: 2016
Classification: Materials production / Agricultural production means
LCI method principle: Other
Generated by: 熊欣, xiongxin@swjtu.edu.cn
Owner: 天工LCI数据工作小组
Review: Dependent internal review by 天工LCI数据工作小组
Amounts: no units in this file; such an amount is in the reference unit of its flow, which a separate flow dataset defines
licenseType: Free of charge for all users and uses

## General comment
小麦生产的碳足迹

## Geography
研究地点位于山东省，该省是中国的研究中心之一。我国粮食主产区，约占全国的7.6%全国粮食总产量

## Time period
一项调查于2015年8月至2016年8月期间进行采用问卷调查的方法

## Technical purpose
山东省的规模化小麦生产主要用于生产中国的重要粮食供应。它是农业部门的重要组成部分，在粮食安全中发挥着关键作用，为各种食品产品提供原料，如面粉、面包、面条和其他基于小麦的食品。

## Reference product
- carbon dioxide: 0.49; normal; article inperiodical

## Inputs
All rows: normal; article inperiodical
- nitrogen, total (excluding N2): 237.1
- phosphorus, total: 143.3
- potassium: 114.1
- Oils (unspecified): 209
- Electricity: 1100.16

## Data treatment and extrapolations
采用 2006 年 IPCC 国家温室气体清单指南中推荐的方法 2 来估算图 2 所列活动的温室气体排放量和清除量（IPCC，2006 年）。根据温室气体净排放量和农作物产量计算单位面积碳足迹（CFarea）和单位粮食产量（CFyield）。

## Use advice
在利用该数据集对山东省规模化小麦生产进行生命周期评估时，应特别注意所采用的方法论框架。温室气体(GHG)排放和清除率，以及碳足迹(CFarea和CFyield)的估算，使用了2006年IPCC指南中的Tier 2方法。这些估算是指示特定时间框架(2015年8月至2016年8月)和地理位置(山东省)。用户应注意，此数据可能不准确代表其他时间段或不同的农业实践。在其他情境中外推或应用时可能需要适当的调整。

## Review details
清单： 内部审查通过几个迭代步骤完成，涉及原始数据验证、原始数据记录、代表性、完整性、与 ISO 14040 和 14044 有关的建模的一致性。

## Data sources
- Zhu, Y. et al. Large-scale farming operations are win-win for grain production, soil carbon storage and mitigation of greenhouse gases. JOURNAL OF CLEANER PRODUCTION vol. 172 2143–2152 (2018).
