# clinker production|clinker

Dataset: ILCD process, Unit process, black box
Geography: ZZ-SD-CN
Classification: Materials production / Other mineralic materials
Generated by: Siqi Yang
Amounts: no units in this file; such an amount is in the reference unit of its flow, which a separate flow dataset defines
copyright: false

## General comment
Conventional clinker production.

## Geography
Shandong Shenfeng Cement Group Co., Ltd

## Model description
Two functional units were defined as 1 t of clinker, and the amount of food waste (FW) and residual waste (RW) applied in producing 1 t of clinker.
The system boundary includes coal powder preparation, raw meal preparation and clinker calcination.

## Reference product
- clinker: 1000
  Clinker

## Inputs
- limestone, crushed, for mill: 1353.4; estimated
  Limestone
- sandstone: 101.905; estimated
  Sandstone
- shale: 75.555; estimated
  Shale
- iron, powder: 26.941; estimated
  Iron powder
- hard coal, run-of-mine: 125; estimated
  Coal
- electricity, medium voltage: 219.02; article inperiodical
  Electricity. The power consumption at each stage was calculated according to the electricity consumption index for cement production (Wang, 2013). The background processes data from GaBi databases: electricity production, “CN: Electricity grid mix PE”.

## Outputs
- carbon dioxide: 760.538; calculated
  CO2.
  E_(CO_2 )=E_"coal" +E_(CaCO_3 ), E_coal=NCV×FC×CC×OF×44/10, E_(C"a" CO_3 )=(FR_1-FR_10)×44/56+(FR_2-FR_20)×44/40. Where E_(CO_2 ) represents CO2 emissions from the cement kiln (t), E_"coal" represents CO2 emissions from coal combustion (t), E_(CaCO_3 ) represents CO2 emissions from the carbonate decomposition of raw materials (t), NCV is the lower heat value of coal (19.570 GJ/t), FC is the consumption of coal (t), CC is the carbon content per unit heat value of coal (0.0261 t C/GJ), OF is the carbon oxidation rate of coal (98%), FR1 is the content of CaO in clinker (%), FR10 is the content of CaO in clinker that is not derived from carbonate decomposition (%), FR2 is the content of MgO in clinker (%), FR20 is the content of MgO in clinker that is not derived from carbonate decomposition (%), and 44/56 and 44/40 are the molecular weight conversion between CO2 and CaO, MgO respectively.
  FR_10=(FS_10)/((1-L)×F_"c" ), FR_20=(FS_20)/((1-L)×F_"c" ). Where Fc is the conversion factor of coal ash content in clinker (1.04), FS10 is the content of CaO in raw meal that is not in the form of carbonate (%), and FS20 is the content of MgO in the raw meal that is not in the form of carbonate (%).
  FS_10=(∑_"n" ▒〖(m_n×r_10n)〗)/m, FS_20=(∑_"n" ▒〖(m_n×r_20n)〗)/m.
  Where mn is the mass of the nth raw material except limestone (kg), r10n is the content of CaO in the nth raw material except limestone (%), r20n is the content of MgO in the nth raw material except limestone (%), and m is clinker consumption (kg).
- sulfur oxides: 0.411575; calculated
  SOx. P_(SO_2 )=64/80×"m"×SO_3 (1-X)×〖10〗^3, where P_(SO_2 ) is the SO2 emission from the cement kiln (kg), 64/80 is the molecular weight ratio of SO2 to SO3, m is clinker consumption (t), SO3 is the SO3 content in the raw meal (%), and X is the SO3 absorption rate of the raw meal (88%).
- Nitrogen oxides: 1.325; calculated
  NOx. P_(NO_x )=(R_Y×16+R_L×7)×m_coal×〖10〗^(-3), Where P_(NO_x ) is the NOx emission from the cement kiln (kg), R_L and R_Y are the ratios of fuel used in the rotary kiln and precalciner (0.6 and 0.4, respectively), and m_coal is the coal consumption of clinker generation (kg).

## Cut-off and completeness
The wastewater of cement enterprises came from the circulating cooling water and spray water, the main pollutantscontained only a small amount of water scale, and almost no wastewater was discharged from the plants. Therefore, wastewater in the clinker production process was not considered.

## Data selection and combination
The clinker was produced by calcining limestone, sandstone, shale, and iron powder in a cement kiln with the heat provided by coal. Coal ash, the combustionproduct of coal, was also used as a raw material. The chemical composition and moisture content of the materials are listed. Bituminouscoal with a calorificvalue of 24,000 kJ/kg and ash content of 12.5% was selected. The heat consumption of clinker generationwas 3000 kJ/kg. First, the ratio of raw material consumption was assumed, and then the coal consumption, coal ash incorporation rate, raw meal composition, raw meal composition after ignition, clinker composition, and clinker quality parameters, including the lime saturation factor (KH), silica modulus (SM), and alumina modulus (IM), were calculated based on Equations. The clinker quality parameters were as follows: KH = 0.89 ± 0.02, SM = 2.5 ± 0.1, IM = 1.5 ± 0.1. The amount of wet material was calculated using Equation. The power consumption at each stage was calculated according to the electricity consumption index for cement production.

## Data sources
- Xuemin Liang, Wenling Dang, Guangling Yang, & Yueling Zhang. (2023). Environmental feasibility evaluation of cement co-production using classified domestic waste as alternative raw material and fuel: A life cycle perspective. Journal of Environmental Management 326, 116726.
