# Soil remediation ; In-situ remediation ; In Situ Thermal Desorption ; Engineering implementation;Remediated soil

Dataset: ILCD process, Unit process, single operation
Geography: HEN-CN
Reference year: 2022
Classification: Other Services / Repair and maintenance
Generated by: Zhang Jinying, zhangjy@caep.org.cn
Owner: Tiangong LCI Data Working Group
Review: Dependent internal review by Tiangong LCI Data Working Group
Amounts: no units in this file; such an amount is in the reference unit of its flow, which a separate flow dataset defines
copyright: false
licenseType: Free of charge for all users and uses

## General comment
The construction operation period in high-risk areas is about 200 days, divided into two parts: ① thermal desorption, including heating, extraction well construction, installation of thermal desorption equipment, and heating desorption work;

## Technical purpose
This soil remediation process, specifically in-situ thermal desorption, is intended for cleaning contaminated soil in high risk areas. The process, spanning approximately 200 days, is divided into two main parts: (1) Thermal desorption, which includes heating, construction of extraction wells, installation of thermal desorption equipment, and the heating and desorption operations as a unit process (single operation).

## Reference product
- Remediated soil: 30413; measured

## Inputs
All rows: measured
- Natural gas, at consumer EU-27: 766514
- Electricity: 1.296e6
- Diesel: 38.806
- water: 115
- iron: 310265
- Concrete: 2270
- cement: 1513
- heavy fuel oil: 6.162

## Use advice
When using this LCA data set, users should take into consideration the specific conditions of the remediation site, such as soil composition and contamination level. It is essential to understand that the effectiveness and environmental impact of the thermal desorption process may vary based on these conditions. Furthermore, the boundary conditions for the data should include the entire operational cycle and assume that the end-of-life stage includes a restoration phase to return the site to a natural or pre-determined state post-remediation.

## Review details
Inventory: The internal review was done by several iteration steps concerning raw data validation, raw data documentation, representativity, completeness and consistency of modelling with regard to ISO 14040 and 14044.

## Data sources
- 刘文晓等.基于修复效果的污染土壤修复工程环境足迹分析[J].环境科学研究 35,2367-2377（2022）.
