# 修复后土壤;农药污染土壤;原地异位热脱附;不含土壤挖掘过程

Dataset: ILCD process, Unit process, single operation
Geography: JS-CN
Reference year: 2022
Classification: Unit processes / Other Services / Repair and maintenance
Functional unit: we defined the functional unit as the remediation of 1 ton of organically contaminated soil
Generated by: 杨欣桐, yangxt@caep.org.cn
Owner: 天工LCI数据工作小组
Review: Dependent internal review by 天工LCI数据工作小组
Amounts: no units in this file; such an amount is in the reference unit of its flow, which a separate flow dataset defines
copyright: false
licenseType: Free of charge for all users and uses

## General comment
原地异位热脱附方案将热脱附设备运输到受污染的场地。

## Geography
研究场地是中国东部江苏省的一个废弃橡胶厂。需要修复的受污染土壤的现场总体积为29313 m3

## Technology and included processes
受污染的土壤在一个可移动的棚中破碎和筛分，以清除大块碎片和岩石，然后将其送入窑中。为了达到修复目标，受污染土壤需要在回转窑中保持30分钟。热处理后的土壤喷水冷却，然后堆放在现场待检，最终用作回填土。通常，热处理系统需要尾气处置以去除有害气体、颗粒和其他副产品。尾气处置模块由活性炭吸附罐组成。活性炭必须定期更新，用过的活性炭必须作为危险废物处理。

## Technical purpose
此描述的处理过程旨在使用原地异位热脱附技术处理受农药污染的土壤。这一特定过程适用于如废弃橡胶厂等大规模土壤净化项目。处理后的土壤可用作回填土，展示了修复后的可能用途。

## Reference product
- Remediated soil: 1000; missing unimportant

## Inputs
- Tap Water: 0.44; missing unimportant
- Activated Carbon: 1.1; missing unimportant
- Electricity: 87.336; missing unimportant
- Excavated soil,Excavated soil: 1000; missing unimportant
  与大多数从污染土壤挖掘开始的污染土壤修复LCA不同，我们将系统边界设置为在污染土壤被挖掘和筛分后，但仍留在场地内后开始。

## Outputs
- hazardous waste (unspecified): 1.26; missing unimportant
  尾气处置模块由活性炭吸附罐组成。活性炭必须定期更新，用过的活性炭必须作为危险废物处理。

## Use advice
使用此生命周期评估(LCA)数据时，请确保评估与排除了土壤挖掘的设定系统边界一致。重点关注包括阶段，如材料获取、处理期间的能耗、运输到场地、废气排放以及使用过的活性炭的处置。注意功能单元定义为1吨有机污染土壤的修复，并相应地缩放数据以匹配项目特定的体积要求。

## Review details
清单： 内部审查通过几个迭代步骤完成，涉及原始数据验证、原始数据记录、代表性、完整性、与 ISO 14040 和 14044 有关的建模的一致性。

## Data sources
- Tian L ,Mingchao H ,Lu Y , et al. Life cycle assessment-based decision-making for thermal remediation of contaminated soil in a regional perspective [J]. Journal of Cleaner Production, 2023, 392
