# cement production|cement, portland-composite cement, 42.5MPa|high-volume fly ash dry process|mixed solid wastes

Dataset: ILCD process, Unit process, black box
Geography: WH-HUB-CN
Reference year: 2005
Classification: Materials production / Other mineralic materials
Generated by: Siqi Yang
Amounts: no units in this file; such an amount is in the reference unit of its flow, which a separate flow dataset defines
copyright: false

## General comment
The production process of high-volume fly ash dry process is mainly referring to the technical reform indicators of Huaxin Cement Yidu Co., Ltd., which produces 42.5 grade silicate composite cement with various industrial waste slag admixture of more than 50% (including slag and fly ash admixture of not less than 40%).

## Geography
Wuhan Huaxin Cement Yidu Co., Ltd.

## Model description
Taking the usage performance of cement with a compressive strength of 42.5 MPa at 28 days per 1 kg as the functional unit, that is IFu=42.5 kgMPa. The research scope is defined as: raw material pretreatment, raw material grinding, clinker calcination, clinker grinding, cement homogenization, and cement storage.

## Reference product
- cement, portland-composite cement, 42.5MPa: 1000
  42.5 grade composite portland cement

## Inputs
All rows: measured
- limestone, crushed, for mill: 786.4
  Limestone
- gypsum (desulphurized): 45.1
  Gupsum
- ash: 200
  Fly ash
- blast furnace slag: 200
  The original document is labeled as "slag" (i.e. blast furnace slag).
- hard coal: 88.472
  Standard coal. The original data is 0.0822kg standard coal, here converted to hard coal, the conversion formula is 1kg hard coal = 0.929kg standard coal.
- electricity, medium voltage: 370.8
  Electricity

## Outputs
- particles (> PM10): 0.15; measured
  Dust, with an unspecified particle size, is treated as PM > 10 micrometers in diameter.
- sulfur dioxide: 0.000562; measured
  Sulfur dioxide. Considering the actual operating conditions of domestic cement plants and the development trend for the foreseeable future, the statistical average of measured data is adopted for this evaluation.
- Nitrogen oxides: 0.004627; measured
  Nitrogen oxides. Considering the actual operating conditions of domestic cement plants and the development trend for the foreseeable future, the statistical average of measured data is adopted for this evaluation.
- carbon dioxide: 559.1; measured
  Carbon dioxide. Considering the actual operating conditions of domestic cement plants and the development trend for the foreseeable future, the statistical average of measured data is adopted for this evaluation.

## Data sources
- 曹晓润. (2005). 低环境负荷型水泥的生态环境评价 [硕士, 武汉理工大学].
