# Rawmaterialfiring|Firingintohighalumina,clayandsilicabricks|Bauxite,clay,silica+coal|Refractory kiln (intermittent kiln, inverted flame kiln, shuttle kiln)|All sizes / 原料烧制|烧成高铝、粘土、硅砖|矾土、粘土、硅石+煤|耐火窑炉（间歇窑、倒焰窑、梭式窑）|所有规模

Dataset: ILCD process, Partly terminated system
Geography: CN
Reference year: 2019
Classification: Materials production / Other mineralic materials
Generated by: The data was created by the Office of the Second National Pollution Source Census of the Ministry of Ecology and Environment, and the data was organized by the TianGong Plan team for ILCD format / 生态环境部第二次全国污染源普查工作办公室创建数据，天工计划团队常慧敏整理数据为ILCD格式
Amounts: no units in this file; such an amount is in the reference unit of its flow, which a separate flow dataset defines
copyright: false

## Technology and included processes
the Technical of end-of-pipe management technology for pollution Nitrogen oxidesisDirect discharge
污染物指标氮氧化物的末端治理技术是直排

## Reference product
- Blast Furnace: 1000; calculated
  原文件中描述污染物类别为Product，污染物指标为烧成高铝、粘土、硅砖，此处对其进行了匹配工作，将其匹配到LCAflow库里面相最符合的流

## Outputs
- Exhaust gas: 8566; calculated
  原文件中描述污染物类别为废气，污染物指标为废气量，此处对其进行了匹配工作，将其匹配到LCAflow库里面相最符合的流
- particles (PM2.5 - PM10): 1.972, 4.93 (2 entries); calculated
  原文件中描述污染物类别为废气，污染物指标为颗粒物，此处对其进行了匹配工作，将其匹配到LCAflow库里面相最符合的流
- sulfur dioxide: 2.896, 7.24 (2 entries); calculated
  原文件中描述污染物类别为废气，污染物指标为二氧化硫，此处对其进行了匹配工作，将其匹配到LCAflow库里面相最符合的流
- Nitrogen oxides: 2.085, 4.17 (2 entries); calculated
  原文件中描述污染物类别为废气，污染物指标为氮氧化物，此处对其进行了匹配工作，将其匹配到LCAflow库里面相最符合的流

## Data sources
- 第二次全国污染源普查产排污核算系数手册（试用版）,二级代码30,三级代码308.0,四级代码3089文件，在完整版文件中第884页
