# 铜生产 ;火法炼铜; 整个风电场

Dataset: ILCD process, Unit process, single operation
Geography: NMG-CN
Reference year: 2017
Classification: Unit processes / Materials production / Metals and semimetals
Functional unit: The functional unit is 1.5 MW wind turbine
LCI method principle: Attributional
LCI method approaches: Allocation
Generated by: 赵云志, ll10088@163.com
Owner: 天工LCI数据工作小组
Review: Dependent internal review by 天工LCI数据工作小组
Amounts: no units in this file; such an amount is in the reference unit of its flow, which a separate flow dataset defines
copyright: false
licenseType: Free of charge for all users and uses

## General comment
该数据集代表风力发电生产阶段中使用的材料和工艺。它包括1.5兆瓦风力涡轮机、变电站和风电场电缆的制造。这些基础设施专门用于风电场的可再生能源发电，在这个数据集中，它侧重于位于中国装机容量最大的风电省份—内蒙古东北部的风电场案例研究。

## Geography
风电功率参数的数据来自Wang ( 2012 )。以装有33台国产1.5兆瓦( MW )风电机组的风电场为案例，分析其环境影响及其替代效应。该风电场位于我国风电装机最多的省份- -内蒙古东北部。

## Reference product
- copper: 1000; measured

## Inputs
- Energy, gross calorific value, in biomass, primary forest: 107.492; calculated

## Outputs
- carbon dioxide (fossil): 10909.3; calculated
- sulfur dioxide: 31.87; calculated
- nitrous oxide: 27.69; calculated

## Deviations from the LCI method approaches
风电的生命周期清单如下所示。生产制造阶段包括风电机组、变电站、电缆的生产，这些设备消耗大量能源，排放污染物( Xue et al . , 2015)。

## Use advice
此数据集应用于理解1.5兆瓦风力涡轮机基础设施生产和制造阶段的环境影响。用户应注意，数据反映了内蒙古风力发电的具体情况，可能不代表其他地区或国家。能源消耗和污染物排放的影响应该在区域能源基础设施的背景下进行考虑，以及风力发电替代传统能源中的作用。此外，在使用数据进行生命周期评估或环境影响分析时，可能需要考虑能源组合、生产实践和环境法规在区域间的差异。

## Review details
清单： 内部审查通过几个迭代步骤完成，涉及原始数据验证、原始数据记录、代表性、完整性、与 ISO 14040 和 14044 有关的建模的一致性。

## Data sources
- Li, H., Jiang, H.-D., Dong, K.-Y., Wei, Y.-M. & Liao, H. A comparative analysis of the life cycle environmental emissions from wind and coal power: Evidence from China. Journal of Cleaner Production 248, 119192 (2020).
