# 土壤修复;异位修复;土壤填埋;土壤挖掘;污染土壤

Dataset: ILCD process, Unit process, single operation
Geography: ES
Reference year: 2022
Classification: Other Services / Repair and maintenance
Generated by: 桑春晖, sangch@mail.bnu.edu.cn
Owner: 天工LCI数据工作小组
Review: Dependent internal review by 天工LCI数据工作小组
Amounts: no units in this file; such an amount is in the reference unit of its flow, which a separate flow dataset defines
copyright: false
licenseType: Free of charge for all users and uses

## General comment
污染源区面积1000 m2，污染深0.20 m，土壤容重1.5，污染土壤清挖

## Technical purpose
此数据集表示一个异位土壤修复过程，特别是从1000平方米的污染源区域挖掘污染土壤，污染深度为0.20米。土壤容重为1.5。该数据与土壤去污和填埋项目中涉及的清挖单元过程（单一操作）有关。

## Reference product
- contaminated soil: 3e6; software or database

## Inputs
- Diesel: 112000; software or database

## Use advice
使用此数据集的用户应确保其环境影响评估的范围与指定的土壤挖掘面积和深度相匹配。在将这些数据推广到其他土壤类型、污染水平或修复技术时应谨慎行事。此数据集特定于异位土壤去污，只应应用于类似的土壤修复场景。在应用此数据时，应特别注意处理和处置挖掘土壤的方法论途径。

## Review details
清单： 内部审查通过几个迭代步骤完成，涉及原始数据验证、原始数据记录、代表性、完整性、与 ISO 14040 和 14044 有关的建模的一致性。

## Data sources
- Espada et al. Coupling phytoremediation of Pb-contaminated soil and biomass energy production: A comparative Life Cycle Assessment. Science of the Total Environment 840 (2022) 156675
