# 铝电解碳阳极生产 ; 碳阳极 ; 石油焦

Dataset: ILCD process, Unit process, single operation
Geography: CN
Reference year: 2017
Classification: Unit processes / Materials production / Non-energetic raw materials
Generated by: 常慧敏, huiminchang@tsinghua.edu.cn
Owner: 天工LCI数据工作小组
Review: Dependent internal review by 天工LCI数据工作小组
Amounts: no units in this file; such an amount is in the reference unit of its flow, which a separate flow dataset defines
copyright: false
licenseType: Free of charge for all users and uses

## General comment
阳极产量 ; 原生铝产量

## Time period
IAI 2017 （GLO）

## Technical purpose
这个数据集代表了从石油焦中生产碳阳极的过程，专门用于铝电解。碳阳极是初级铝生产工业的重要组成部分，在电解过程中用作电极，将氧化铝熔炼成铝。

## Reference product
- anode, prebake, for aluminium electrolysis: 1000; software or database
  Anode (C carrier) [kg]

## Inputs
- natural gas, high pressure: 6721.06; software or database
  Natural gas [MJ] ; 1m3 ~ 11kWh (Bund der Energieverbraucher e.V. 2007)
- electricity, high voltage, aluminium industry: 400.18; software or database
  Electricity [kWh]
- Petroleum Coke: 674.884
  Petrol coke [kg] ; US used for CN as no data for CN available
- steel, low-alloyed: 5.81673; software or database
  Steel [kg] ; Steel billet (16MnCr5)
- heavy fuel oil: 691.006; software or database
  Heavy oil [kg] ; 1L ~ 1kg, 1kg ~ 41.5MJ (Käser 2014)
- Diesel oil: 5.53137; software or database
  Diesel oil [kg] ; 1L ~ 0.84 kg, 1kg ~ 42.5MJ (Paschotta 2010)
- freshwater: 1.9548; software or database
  fresh water [m3]
- Water, salt, ocean: 1.57295; estimated
  Sea water [m3]

## Outputs
All rows: software or database
- particles (> PM10): 0.19537
  Particulates [kg] ; Dust (> PM10) [Particles to air]
- particles (PM2.5): 0.07794
  Particulates <2.5 [kg] ; Particulates, < 2.5 um [ecoinvent long-term to air]
- particles (PM2.5 - PM10): 0.23598
  Particulates 2.5-10 [kg] ; Particulates, > 2.5 um, and < 10um [ecoinvent long-term to air]
- sulfur dioxide: 4.28417
  Sulfur dioxide [kg]
- Nitrogen oxides: 0.49506
  Nitrous oxides (as NO2)
- hydrogen fluoride: 0.02378
  Fluoride (as F) (to air) [kg]
- polycyclic aromatic hydrocarbons: 0.05317
  Total polycyclic aromatic hydrocarbons (to air) [kg]
- Benzo(a)pyrene: 5e-5
- Suspended solids, unspecified: 0.08804
  Suspended solids [kg]
- Oils, unspecified: 0.02032
  Oil and grease/total hydrocarbons [kg]
- Fluoride: 0.00879
  Fluoride (as F) (to fresh water) [kg]
- PAH, polycyclic aromatic hydrocarbons: 1e-5
  Polycyclic aromatic hydrocarbons (to water) [kg]
- freshwater: 1.69515
  Fresh water [m3] CN: sum of sea water and fresh water
- Water, salt, ocean: 1.56993
  Sea water [m3] CN: sum of sea water and fresh water

## Data selection and combination
为了获得可靠的研究结果，我们考虑了最新的和有代表性的数据。如果 GaBi©"专业和推广 "数据库（SP 39）或文献中提供了特定地区或国家的数据，则使用这些数据。如果找不到特定地区的数据，则使用该国的可比数据或全球数据。为保持一致性，如果有相同来源和年份的数据，则使用相同来源和年份的数据。由于数据的可获得性，如果某些输入和背景过程对总输入质量的贡献小于 1%，则本研究不考虑这些输入和背景过程。对于原铝生产，本研究使用了国际铝业协会（IAI）提供的 2015 年最新 LCI 数据（国际铝业协会，2017b）。之所以使用 IAI 的数据，是因为 IAI 是一个考虑全球原铝生产的成熟机构，其数据已在铝业协会和欧洲铝业协会等研究中使用（铝业协会，2013 年；欧洲铝业协会，2018 年）。就标准化原铝生产的生命周期评估数据而言，不确定因素很少。一般来说，这些数据的组成可以完全解释和重建。

## Use advice
在使用这个数据集进行生命周期评估时，重要的是要注意它基于2015年可获得的最新和最具代表性的数据。国际铝业协会提供的数据是可信的，并在行业研究中广泛接受。用户应注意，数据集没有计算贡献小于总投入质量1%的输入和背景过程。该数据集最适用于全球或国家特定的评估，特别是在数据与国际铝业协会、铝业协会或欧洲铝业协会的来源相符的地区。

## Review details
清单： 内部审查通过几个迭代步骤完成，涉及原始数据验证、原始数据记录、代表性、完整性、与 ISO 14040 和 14044 有关的建模的一致性。

## Data sources
- Luthin, A., Backes, J. G. & Traverso, M. A framework to identify environmental-economic trade-offs by combining life cycle assessment and life cycle costing – A case study of aluminium production. Journal of Cleaner Production 321, 128902 (2021).
