# 牛奶生产 ; 奶牛饲养 ; 非种养一体化奶牛场(non-IPBS)

Dataset: ILCD process, Unit process, single operation
Geography: QD-SD-CN
Reference year: 2016
Classification: Unit processes / Materials production / Food and renewable raw materials
Functional unit: The 1t FPCM corrected for protein and fat content was selected as the evaluation unit
Generated by: 杨瑞, 1632707028@qq.com
Owner: 天工LCI数据工作小组
Review: Dependent internal review by 天工LCI数据工作小组
Amounts: no units in this file; such an amount is in the reference unit of its flow, which a separate flow dataset defines
copyright: false
licenseType: Free of charge for all users and uses

## General comment
在奶牛饲养中,2 种模式的 区别在于青贮玉米饲料的来源不同.

## Geography
于 2020 年 7 月~8 月在山东省青岛市进行奶牛 场问卷调查.

## Time period
从 2016 年,山东开始实施青贮玉米种植补贴 政策,是国内最早实施该补贴政策的省份之一,补贴 标准为 20~50 元/t.2019 年,山东省青贮玉米种植面 积达 1.41 万 hm2,占全国的 7.3%.

## Technology and included processes
研究地区主要有 2 种牛奶生产模式:IPBS 和 non-IPBS.non-IPBS 中,养殖场只有饲养 环节和粪污处理环节,饲料全部来源于购买,粪便堆 肥制成有机肥后全销售给果农和菜农.IPBS 中,养殖 场增加青贮玉米种植环节,有机肥、液体肥主要施用 于场内农田,剩余部分销售给果农和菜农等.2 种模 式的区别:1)养殖场青贮玉米的来源不同,导致饲料 运输距离和饲料成本不同;2)有机肥、液体肥的利用 途径不同,运输距离不同.本研究共调研奶牛场 109 家,剔除不符合研究问卷后,得 83 份有效问卷,其中 non-IPBS 为 38 家,IPBS 为 45 家.

## Technical purpose
所描述的牛奶生产过程在非种养一体化奶牛场（non-IPBS）的奶牛饲养中被采用。该方法侧重于奶牛的养殖和粪污的处理，其特点是通过购买获取所有饲料，并将堆肥化的粪便全部销售给果农和菜农。这与IPBS模式形成对比，在IPBS模式下，农场会种植自己的青贮玉米，并主要在自己的农田上使用生产的有机肥和液体肥料，只将剩余部分卖给当地农民。

## Reference product
- milk: 1000; measured
  FPCM

## Inputs
All rows: measured
- cow: 0.113
  泌乳牛（non-IPBS模式）
- cow: 0.03
  干泌乳牛
- cow: 0.072
  育成牛（non-IPBS模式）
- cow: 0.033
  犊牛（non-IPBS模式）
- feed: 235
  浓缩饲料（non-IPBS模式）
- maize grain: 115
  玉米粒（non-IPBS模式）
- bean pulp: 53
  豆粕（non-IPBS模式）
- wheat bran: 44
  麦麸（non-IPBS模式）
- maize grain: 1030
  外购青贮玉米（non-IPBS模式）（缺少flow）
- alfalfa: 113
  苜蓿（non-IPBS模式）
- oat: 124
  燕麦（non-IPBS模式）
- chinese wildrye: 305
  羊草（non-IPBS模式）
- cottonseed: 39
  棉籽（non-IPBS模式）
- Electricity: 372.456
  non-IPBS模式
- Diesel: 0.002265
  non-IPBS模式
- water: 10.647
  non-IPBS模式
- unspecified: 15.695
  土地占用（non-IPBS模式）

## Outputs
- cow: 0.92; measured
  销售公犊牛（non-IPBS模式）
- cow: 13.977; measured
  销售淘汰母牛（non-IPBS模式）
- cow: 1.185; measured
  销售肉用牛（non-IPBS模式）

## Data treatment and extrapolations
表中数值为养殖场各项总投入、总产出均摊到每吨FPCM上,再取 各养殖场均值,所有投入产出清单数据均按此方法计算;“()”中的 数值为每公顷平均投入,为方便与相关研究比较;“a”由于养殖场耕 地的机械作业主要是代耕作业,养殖场主对该环节的柴油消耗不 清楚,该数据借鉴相关研究[20];“b”此数值为过程产出,最终全部用 于系统内部.

## Sampling procedure
研究地区主要有 2 种牛奶生产模式:IPBS 和 non-IPBS,具体见图 1.non-IPBS 中,养殖场只有饲养 环节和粪污处理环节,饲料全部来源于购买,粪便堆 肥制成有机肥后全销售给果农和菜农.IPBS 中,养殖 场增加青贮玉米种植环节,有机肥、液体肥主要施用 于场内农田,剩余部分销售给果农和菜农等.2 种模 式的区别:1)养殖场青贮玉米的来源不同,导致饲料 运输距离和饲料成本不同;2)有机肥、液体肥的利用 途径不同,运输距离不同.本研究共调研奶牛场 109 家,剔除不符合研究问卷后,得 83 份有效问卷,其中 non-IPBS 为 38 家,IPBS 为 45 家.

## Use advice
使用这些生命周期评估（LCA）数据的用户应当注意到non-IPBS奶牛养殖系统的特点。区分non-IPBS和IPBS模式至关重要，特别是关于青贮玉米饲料来源、饲料运输距离、饲料成本以及有机肥和液体肥的利用途径。使用提供的数值时，必须考虑根据每吨FPCM及为了与相关研究比较的每公顷平均投入的方式进行了所有输入输出的计算。在处理不确定领域，如代耕作业的柴油消耗时，须参考特定研究（由[20]表示）。

## Review details
清单： 内部审查通过几个迭代步骤完成，涉及原始数据验证、原始数据记录、代表性、完整性、与 ISO 14040 和 14044 有关的建模的一致性。

## Data sources
- 黄显雷, 师博扬, 张英楠, 龙昭宇, & 尹昌斌. 基于生命周期视角的种养一体化奶牛场环境经济效益评估. 中国环境科学 41, 3944–3955 (2021).
