# 生物乙醇 ; 水热法处理 ; 收集与运输

Dataset: ILCD process
Geography: GLO
Classification: Unit processes / Energy carriers and technologies / Renewable fuels
Generated by: Jiayi Yuan, jiayi_y@mail.bnu.edu.cn
Owner: 天工LCI数据工作小组
Review: Dependent internal review by 天工LCI数据工作小组
Amounts: no units in this file; such an amount is in the reference unit of its flow, which a separate flow dataset defines
copyright: false
licenseType: Free of charge for all users and uses

## General comment
所述工业过程涉及使用液态热水预处理技术生产生物乙醇，该生物乙醇可作为可再生燃料来源，主要用于汽车应用，代替汽油。具体使用案例是在汽车中燃烧生物乙醇以降低碳排放。

## Technology and included processes
通过数据质量评估，从474篇已发表论文的561个数据集中选择了141个具有高完整性和一致性的数据集，并将其分类为由预处理技术确定的8种技术配置。预处理后的技术步骤都是相同的，尽管实际流量和参数值在文献中观察到不同

## Inputs
- Diesel: 0.0006
  L/kg

## Data selection and combination
在可能的情况下使用了全球数据集，因为该研究不适用于任何特定地区。一种名为“汽车中生物乙醇燃烧”的外部过程的LCI数据来自GREET数据库

## Data treatment and extrapolations
我们通过不确定性传播（蒙特卡罗）、可辨别性分析、全局敏感性分析和场景变化评估了建模结果的鲁棒性。

## Use advice
所提供的生命周期评估(LCA)数据集对于液态热水预处理生产和使用生物乙醇非常具体，并分为八种技术配置，以便进行适当比较。当区域特有性不是必需时，应用全球数据集。用户应特别注意方法论建议，比如包括来源于GREET数据库的汽车燃烧生物乙醇的分析，以研究排放。此外，鼓励用户考虑提供的稳健性评估，如蒙特卡洛模拟、可辨识性分析、全球敏感性分析和情景变化，以了解数据的不确定性和敏感性。

## Review details
清单： 内部审查通过几个迭代步骤完成，涉及原始数据验证、原始数据记录、代表性、完整性、与 ISO 14040 和 14044 有关的建模的一致性。
