# 水泥生产;水泥, 硅酸盐水泥;新型干法预分解窑, 4000 t/d

Dataset: ILCD process, Unit process, black box
Geography: CN
Classification: Unit processes / Materials production / Other mineralic materials
Generated by: #REF!, ysqsophia@gmail.com
Owner: 天工LCI数据工作小组
Review: Dependent internal review by 天工LCI数据工作小组
Amounts: no units in this file; such an amount is in the reference unit of its flow, which a separate flow dataset defines
copyright: false
licenseType: Free of charge for all users and uses

## General comment
选用了预分解窑干法水泥生产模型。

## Technology and included processes
本文选用预分解窑干法水泥生产模型。新型干法预分解水泥生产技术以悬浮预热和预分解技术为核心，是一种比较符合环保要求、符合高生产率要求的生产技术，成为中国水泥行业未来的发展趋势。故选用新型干法预分解水泥生产技术作为水泥模型生产技术具有先进性和环保性需求。

## Technical purpose
所描述的工艺涉及使用新型干法预分解窑技术生产硅酸盐水泥，这一技术以悬浮预热和预分解为特点。该技术符合环境保护标准和高生产率需求，成为中国水泥行业首选技术。生产的硅酸盐水泥通常用于建筑业，是混凝土、砂浆、灰泥和非专用灌浆材料中的主要成分。

## Model description
选用生命周期功能单位为 1t 水泥来构建生命周期模型。水泥工业系统边界包括水泥的生产、原材料的生产与运输、电力的生产，不包括水泥的使用和处理。

## Reference product
- cement, common portland cement: 1000
  硅酸盐水泥

## Inputs
- limestone, crushed, for mill: 1264.08
  石灰石
- clay: 227.28
  粘土
- iron, powder: 35.8
  铁粉
- gypsum stone (CaSO4-dihydrate): 50
  石膏。各通用水泥组分使用中国GB-175-2007通用硅酸盐水泥标准值。
- hard coal; 26.3 MJ/kg: 108.3
  煤。采用中国生产线中统计值，大中型预分解窑的标煤耗为114kg/t熟料，同时根据煤灰的化学成分以及煤的工业分析值，可对煤的消耗量进行计算。
- Electricity: 459.36
  电耗。中国国内电力消耗平均水平。对于干法水泥生产线，粉磨作业消耗的电力占全部电力消耗的60%以上，其中生料粉磨约占30%，水泥粉磨约占40%。由于原料开采数据有限，对各种原料合并进行简化处理，采用电力消耗数据13.89kwh/t原料。对于不同品种的混合水泥，出于原材料形状、性质的差异，粉磨不同原料所消耗的电力不同，根据美国粉磨原料消耗电力百分比进行估计计算。

## Outputs
- carbon dioxide (fossil): 920
  CO2。水泥生产阶段二氧化碳排放来自两个部分，一部分为煅烧时原料中碳酸钙和碳酸镁的分解释放，另一部分为燃料煤燃烧释放。原料中排放二氧化碳公式： CaCO3→Cao+CO2；MgCO3→Mgo+CO2。煤燃烧的二氧化碳释放量采用中国工程院的碳排放系数，CO2排放系数为2.4933kgCO2/(kg标准煤)。
- sulfur dioxide: 0.497
  SO2。SO2排放量来自第一次中国水泥制造业污染源普查结果（SO20.066kg/t熟料）。
- Nitrogen oxides: 2.67
  NOx。NOx排放量来自第一次中国水泥制造业污染源普查结果（NOx1.584kg/t熟料）。
- particles (> PM10): 0.345
  粉尘，未标明粒径，按PM>10处理。水泥生产过程中粉尘的排放数据采用中国水泥工业大气污染物排放标准的上限值。根据水泥生产不同设备的粉尘排放浓度计算水泥生产过程中各个生产阶段的粉尘排放量，其中生料粉磨排放粉尘浓度约占55%，水泥粉磨约占 20%，煤粉制备阶段占 13%，煅烧过程占12%。
- chemical oxygen demand: 0.0125
  COD。COD排放量来自第一次中国水泥制造业污染源普查结果（COD0.06g/t熟料）。
- Oils, unspecified: 0.373
  油
- methane (fossil): 1.04
  甲烷
- mercury: 0.0126
  汞

## Data selection and combination
石灰石、石膏开采中污染物排放数据来自于中国生命周期参考数据库（CLCD）。由于缺乏粘土和铁矿石的开采数据，且其开采量较少，故采用石灰石的开采污染物排放数据作为估算。煤炭开采的污染物排放数据采用中国生命周期参考数据库（CLCD）中的原煤开采数据。电力生产污染物排放数据采用中国生命周期参考数据库（CLCD）中的全国平均电网电力混合与传输数据。运输阶段考虑水泥生产所需要所有原材料的运输，包括石灰石、粘上、铁粉、石膏、煤以及工业废弃物，为计算方便以载重10t的柴油货车高速公路运输为例，假定所有原材料的运输平均距离为100km。采用中国生命周期参考数据（CLCD）中载重10t的柴油货车污染物排放清单数据。

## Use advice
为正确应用提供的生命周期评价（LCA）数据，用户必须遵守系统边界定义的范围，该范围包括水泥生产、原材料生产与运输以及电力生产。建模运输阶段时，必须基于所有原材料平均运输距离100公里使用10吨柴油卡车的参考排放数据。由于只有石灰石排放数据可用，因此使用这些数据来估算粘土和铁矿石等较少量开采材料的排放。用户应应用来自国家平均电网电力混合的电力生产排放数据。在建模系统时，请确保只包括提及的阶段，而不包括水泥的使用和处理。

## Review details
清单： 内部审查通过几个迭代步骤完成，涉及原始数据验证、原始数据记录、代表性、完整性、与 ISO 14040 和 14044 有关的建模的一致性。

## Data sources
- 徐小宁. (2013). 中国水泥工业的生命周期评价 [硕士, 大连理工大学].
