# 活性铝成分失活 ; 铝土矿 ; 球磨 ; 二次铝渣

Dataset: ILCD process, Unit process, single operation
Geography: CN
Reference year: 2021
Classification: Unit processes / Materials production / Non-energetic raw materials
Generated by: 谢金良, jinliang.research@gmail.com
Owner: 天工LCI数据工作小组
Review: Dependent internal review by 天工LCI数据工作小组
Amounts: no units in this file; such an amount is in the reference unit of its flow, which a separate flow dataset defines
copyright: false
licenseType: Free of charge for all users and uses

## General comment
The parameters such as temperature and yield of these three processes were based on experimental results. Life cycle inventory data were from the average data of aluminum industries in China and calculation based on material balance. The electricity type in this study was coal based, which is in line with the actual situation of China’s aluminum industry. The metal aluminum in secondary aluminum dross (SAD) can be recovered until 1 wt % is left through grinding and sieving. Chlorides in the solution were recovered through concentration and crystallization. Calcium chloride was used to remove fluoride. Ammonia was absorbed by sulfuric acid and used to produce ammonium sulfate. Ball milling was used to promote the direct reaction between active aluminum components and water. Therefore, the ball milling scenario avoided the use of acid or alkali and achieved the deactivation of SAD, except for the use of sulfuric acid to absorb the ammonia generated during the ball milling process. Alumina and other metal oxide (mainly basic oxide) remained in the dross, making the composition and content close to bauxite-like. Therefore, all remaining dross were reused as bauxite-like in the aluminum industry, without any solid waste generated in the ball milling scenario. In this scenario, the deactivation effect of the active aluminum component was about 95%.

## Time period
文献发表于2021年9月

## Technical purpose
该工业过程旨在铝行业中二次铝渣（SAD）的处理和再利用。该过程涉及通过球磨工艺从SAD中回收金属铝并失活活性铝成分，球磨促进活性铝成分与水的直接反应。生成的产品具有类似铝土矿的成分，可以用作铝生产过程中的替代原材料，有效循环利用宝贵资源并减少废物。

## Reference product
- Secondary Aluminum Dross: 1000; input; measured
  secondary aluminium dross (SAD)

## Inputs
- electricity, high voltage, aluminium industry: 1015.52; measured
- sulfuric acid: 237.67; measured
- calcium chloride: 43.82; measured
- Water, unspecified natural origin: 738; measured
  water

## Outputs
All rows: measured
- Ammonia: 0.41
- Dust from Grinding and Sieving: 0.01
  dust from grinding and sieving
- aluminium: 45.9
  aluminium (recycled resources)
- ammonium sulfate: 320.2
- carbon dioxide (fossil),carbon dioxide (fossil): 43.11
- sodium chloride, powder: 81.73
  sodium chloride
- potassium chloride: 22.49
- fluorspar: 30.82
  calcium fluoride
- bauxite: 1088.77
  bauxite (recycled resources)

## Use advice
当使用该过程的生命周期评估数据时，用户必须遵守特定的方法论指导原则，包括：1) 应用截止规则，仅关注铝生命周期内SAD回收的影响；2) 设置系统边界，采用从摇篮到坟墓的观点，专注于SAD的回收，忽略运输的环境影响；3) 确保正确应用物质平衡计算，以获得准确的清单数据，同时考虑使用符合中国铝工业实际情况的以煤为基础的电力。

## Review details
清单： 内部审查通过几个迭代步骤完成，涉及原始数据验证、原始数据记录、代表性、完整性、与 ISO 14040 和 14044 有关的建模的一致性。

## Data sources
- Zhu, X. & Jin, Q. Comparison of Three Emerging Dross Recovery Processes in China’s Aluminum Industry from the Perspective of Life Cycle Assessment. ACS Sustainable Chem. Eng. 9, 6776–6787 (2021).
