# Rare Earth production|Nd metal production|In-situ leaching|neodymium iron boron (NdFeB) magnet

Dataset: ILCD process, Unit process, single operation
Geography: NMG-CN
Reference year: 2014
Classification: Materials production / Other mineralic materials
Functional unit: The functional unit is a 1 kg NdFeB magnet
LCI method principle: Attributional
LCI method approaches: Allocation - market value; Allocation - mass
Generated by: Tao Wang, twang@iue.ac.cn
Review: Dependent internal review by Tiangong LCI Data Working Group
Amounts: no units in this file; such an amount is in the reference unit of its flow, which a separate flow dataset defines
copyright: false

## Geography
Bayan Obo (China)

## Technology and included processes
The basic process for Nd and Pr production is the same at all three deposits. It is identical for Nd and Pr except for the last solvent extraction step (SX5) where both are separated.

## Reference product
- neodymium: 1; article inperiodical
  Bayan Obo

## Inputs
- Electricity: 37.44; article inperiodical
  Bayan Obo: energy demand, amounts of electrolyte, anodes and cathodes are estimated from literature
- Neodymium fluoride: 0.048, 0.0003 (2 entries); article inperiodical
  Neodymium fluoride. Bayan Obo: energy demand, amounts of electrolyte, anodes and cathodes are estimated from literature
- lithium fluoride: 0.0044; article inperiodical
  lithium fluoride. Bayan Obo: energy demand, amounts of electrolyte, anodes and cathodes are estimated from literature
- Dust (unspecified, from stack): 0.00037; article inperiodical
  (same comment as for Electricity)
- Neodymium oxide: 1.13; article inperiodical
  Neodymium oxide. Bayan Obo: energy demand, amounts of electrolyte, anodes and cathodes are estimated from literature
- tungsten: 0.0027; article inperiodical
  (same comment as for Electricity)
- Graphite (anode and melting pot): 0.17; article inperiodical
  Graphite (anode and melting pot). Bayan Obo: energy demand, amounts of electrolyte, anodes and cathodes are estimated from literature
- Fire proof bricks: 0.09; article inperiodical
  Fire proof bricks. Bayan Obo: energy demand, amounts of electrolyte, anodes and cathodes are estimated from literature
- transport in t*km,transport in t*km: 0.19; software or database
  Bayan Obo: calculated by www.google.de/maps

## Outputs
- Waste (solid): 0.217; article inperiodical
  Bayan Obo: melting pot, tungsten cathode, graphite anode
- carbon dioxide: 0.055; article inperiodical
  Bayan Obo
- carbon monoxide: 0.211; article inperiodical
  Bayan Obo
- HFC-116: 1.2e-5; article inperiodical
  Bayan Obo: assumption: 10 % of the CF4 value were emitted as C2F6
- Dust (unspecified, from stack): 0.052; article inperiodical
  Bayan Obo
- FC-14: 0.00012; article inperiodical
  Bayan Obo: based on PCF emissions of aluminum electrolysis
- hydrogen fluoride: 4e-5; calculated
  Bayan Obo: based on mass balance

## Deviations from the LCI method approaches
In this study, an allocation method based on the market prices of REOs28 is considered. To estimate uncertainties that refer to the allocation method, a mass-based allocation is undertaken as a sensitivity analysis

## Review details
Inventory: The internal review was done by several iteration steps concerning raw data validation, raw data documentation, representativity, completeness and consistency of modelling with regard to ISO 14040 and 14044.; Documentation: The review of the documentation was performed by Ecobilan and is in compliance with ISO 14040 and 14044. The data set documentation is correct in view of the appropriateness of the information provided. It includes all relevant information in view of data quality and scope of application of the respective LCI result.

## Data sources
- Marx, J., Schreiber, A., Zapp, P. & Walachowicz, F. Comparative Life Cycle Assessment of NdFeB Permanent Magnet Production from Different Rare Earth Deposits. ACS Sustainable Chem. Eng. 6, 5858–5867 (2018).
