# Liquidelectrolysis|ManganeseMetal|ManganeseOrePowder|Electrolyticmethod-Passivationbychromium-freepassivation|greater than or equal to30000 t / 制液电解|金属锰|锰矿粉|电解法-无铬钝化剂钝化|大于等于3万吨

Dataset: ILCD process, Unit process, single operation
Geography: CN
Reference year: 2019
Classification: Materials production / Metals and semimetals
Generated by: The data was created by the Office of the Second National Pollution Source Census of the Ministry of Ecology and Environment, and the data was organized by the TianGong Plan team for ILCD format / 生态环境部第二次全国污染源普查工作办公室创建数据，天工计划团队常慧敏整理数据为ILCD格式
Owner: Tiangong LCI Data Working Group / 天工LCI数据工作小组
Review: Dependent internal review by Tiangong LCI Data Working Group / 天工LCI数据工作小组
Amounts: no units in this file; such an amount is in the reference unit of its flow, which a separate flow dataset defines
copyright: false
licenseType: Free of charge for all users and uses

## General comment
the Technical of end-of-pipe management technology for pollution ammoniaisUnorganized

## Reference product
- Manganese ore: 1000; calculated
  源文件中描述为为金属锰，此处对其进行了匹配工作，将其匹配到LCAflow库里面相最符合的流，污染物指标备注为工业废水量

## Outputs
All rows: calculated
- Waste water: 1610
  污染物指标工业废水量的末端治理技术是/，末端治理设施实际运行率（k值）计算公式为/。原文件中描述污染物类别为废水，污染物指标为工业废水量，此处对其进行了匹配工作，将其匹配到LCAflow库里面相最符合的流，污染物指标备注为工业废水量
- chemical oxygen demand: 0.13568
  污染物指标化学需氧量的末端治理技术是氧化还原法+化学沉淀法，其效率为47，末端治理设施实际运行率（k值）计算公式为k=1-T废水铬锰治理设施非正常运行时间（小时）/T废水铬锰治理设施运行时间（小时）。原文件中描述污染物类别为废水，污染物指标为化学需氧量，此处对其进行了匹配工作，将其匹配到LCAflow库里面相最符合的流，污染物指标备注为化学需氧量
- chemical oxygen demand: 0.05888
  污染物指标化学需氧量的末端治理技术是氧化还原法+化学沉淀法+物理处理法(吹脱法)，其效率为77，末端治理设施实际运行率（k值）计算公式为k=1-T废水铬锰治理设施非正常运行时间（小时）/T废水铬锰治理设施运行时间（小时）。原文件中描述污染物类别为废水，污染物指标为化学需氧量，此处对其进行了匹配工作，将其匹配到LCAflow库里面相最符合的流，污染物指标备注为化学需氧量
- chemical oxygen demand: 0.00256
  污染物指标化学需氧量的末端治理技术是氧化还原法+膜分离，其效率为99，末端治理设施实际运行率（k值）计算公式为k=1-T废水铬锰治理设施非正常运行时间（小时）/T废水铬锰治理设施运行时间（小时）。原文件中描述污染物类别为废水，污染物指标为化学需氧量，此处对其进行了匹配工作，将其匹配到LCAflow库里面相最符合的流，污染物指标备注为化学需氧量
- Ammonia Nitrogen: 0.4675
  污染物指标氨氮的末端治理技术是氧化还原法+化学沉淀法，其效率为75，末端治理设施实际运行率（k值）计算公式为k=1-T废水氨氮治理设施非正常运行时间（小时）/T废水氨氮治理设施运行时间（小时）。原文件中描述污染物类别为废水，污染物指标为氨氮，此处对其进行了匹配工作，将其匹配到LCAflow库里面相最符合的流，污染物指标备注为氨氮
- Ammonia Nitrogen: 0.03927
  污染物指标氨氮的末端治理技术是氧化还原法+化学沉淀法+物理处理法(吹脱法)，其效率为97.9，末端治理设施实际运行率（k值）计算公式为k=1-T废水氨氮治理设施非正常运行时间（小时）/T废水氨氮治理设施运行时间（小时）。原文件中描述污染物类别为废水，污染物指标为氨氮，此处对其进行了匹配工作，将其匹配到LCAflow库里面相最符合的流，污染物指标备注为氨氮
- Ammonia Nitrogen: 0.00748
  污染物指标氨氮的末端治理技术是氧化还原法+膜分离，其效率为99.6，末端治理设施实际运行率（k值）计算公式为k=1-T废水氨氮治理设施非正常运行时间（小时）/T废水氨氮治理设施运行时间（小时）。原文件中描述污染物类别为废水，污染物指标为氨氮，此处对其进行了匹配工作，将其匹配到LCAflow库里面相最符合的流，污染物指标备注为氨氮
- Nitrogen, organic bound: 0.1628
  污染物指标总氮的末端治理技术是氧化还原法+化学沉淀法，其效率为95.6，末端治理设施实际运行率（k值）计算公式为k=1-T废水铬锰治理设施非正常运行时间（小时）/T废水铬锰治理设施运行时间（小时）。原文件中描述污染物类别为废水，污染物指标为总氮，此处对其进行了匹配工作，将其匹配到LCAflow库里面相最符合的流，污染物指标备注为总氮
- Nitrogen, organic bound: 0.1295
  污染物指标总氮的末端治理技术是氧化还原法+化学沉淀法+物理处理法(吹脱法)，其效率为96.5，末端治理设施实际运行率（k值）计算公式为k=1-T废水铬锰治理设施非正常运行时间（小时）/T废水铬锰治理设施运行时间（小时）。原文件中描述污染物类别为废水，污染物指标为总氮，此处对其进行了匹配工作，将其匹配到LCAflow库里面相最符合的流，污染物指标备注为总氮
- Nitrogen, organic bound: 0.0037
  污染物指标总氮的末端治理技术是氧化还原法+膜分离，其效率为99.9，末端治理设施实际运行率（k值）计算公式为k=1-T废水铬锰治理设施非正常运行时间（小时）/T废水铬锰治理设施运行时间（小时）。原文件中描述污染物类别为废水，污染物指标为总氮，此处对其进行了匹配工作，将其匹配到LCAflow库里面相最符合的流，污染物指标备注为总氮
- phosphorus, total: 0.001802
  污染物指标总磷的末端治理技术是氧化还原法+化学沉淀法，其效率为83，末端治理设施实际运行率（k值）计算公式为k=1-T废水铬锰治理设施非正常运行时间（小时）/T废水铬锰治理设施运行时间（小时）。原文件中描述污染物类别为废水，污染物指标为总磷，此处对其进行了匹配工作，将其匹配到LCAflow库里面相最符合的流，污染物指标备注为总磷
- phosphorus, total: 0.000159
  污染物指标总磷的末端治理技术是氧化还原法+化学沉淀法+物理处理法(吹脱法)，其效率为98.5，末端治理设施实际运行率（k值）计算公式为k=1-T废水铬锰治理设施非正常运行时间（小时）/T废水铬锰治理设施运行时间（小时）。原文件中描述污染物类别为废水，污染物指标为总磷，此处对其进行了匹配工作，将其匹配到LCAflow库里面相最符合的流，污染物指标备注为总磷
- phosphorus, total: 6.36e-5
  污染物指标总磷的末端治理技术是氧化还原法+膜分离，其效率为99.4，末端治理设施实际运行率（k值）计算公式为k=1-T废水铬锰治理设施非正常运行时间（小时）/T废水铬锰治理设施运行时间（小时）。原文件中描述污染物类别为废水，污染物指标为总磷，此处对其进行了匹配工作，将其匹配到LCAflow库里面相最符合的流，污染物指标备注为总磷
- Chromium: 0.000322
  污染物指标总铬的末端治理技术是氧化还原法+化学沉淀法，其效率为77，末端治理设施实际运行率（k值）计算公式为k=1-T废水铬锰治理设施非正常运行时间（小时）/T废水铬锰治理设施运行时间（小时）。原文件中描述污染物类别为废水，污染物指标为总铬，此处对其进行了匹配工作，将其匹配到LCAflow库里面相最符合的流，污染物指标备注为总铬
- Chromium: 0.000308
  污染物指标总铬的末端治理技术是氧化还原法+化学沉淀法+物理处理法(吹脱法)，其效率为78，末端治理设施实际运行率（k值）计算公式为k=1-T废水铬锰治理设施非正常运行时间（小时）/T废水铬锰治理设施运行时间（小时）。原文件中描述污染物类别为废水，污染物指标为总铬，此处对其进行了匹配工作，将其匹配到LCAflow库里面相最符合的流，污染物指标备注为总铬
- Chromium: 8.4e-6
  污染物指标总铬的末端治理技术是氧化还原法+膜分离，其效率为99.4，末端治理设施实际运行率（k值）计算公式为k=1-T废水铬锰治理设施非正常运行时间（小时）/T废水铬锰治理设施运行时间（小时）。原文件中描述污染物类别为废气，污染物指标为总铬，此处对其进行了匹配工作，将其匹配到LCAflow库里面相最符合的流，污染物指标备注为总铬
- Chromium: 1.21e-5
  污染物指标六价铬的末端治理技术是氧化还原法+化学沉淀法，其效率为89，末端治理设施实际运行率（k值）计算公式为k=1-T废水氨氮治理设施非正常运行时间（小时）/T废水氨氮治理设施运行时间（小时）。原文件中描述污染物类别为废气，污染物指标为六价铬，此处对其进行了匹配工作，将其匹配到LCAflow库里面相最符合的流，污染物指标备注为六价铬
- Chromium: 1.21e-5
  污染物指标六价铬的末端治理技术是氧化还原法+化学沉淀法+物理处理法(吹脱法)，其效率为89，末端治理设施实际运行率（k值）计算公式为k=1-T废水氨氮治理设施非正常运行时间（小时）/T废水氨氮治理设施运行时间（小时）。原文件中描述污染物类别为废气，污染物指标为六价铬，此处对其进行了匹配工作，将其匹配到LCAflow库里面相最符合的流，污染物指标备注为六价铬
- Chromium: 2.2e-7
  污染物指标六价铬的末端治理技术是氧化还原法+膜分离，其效率为99.8，末端治理设施实际运行率（k值）计算公式为k=1-T废水氨氮治理设施非正常运行时间（小时）/T废水氨氮治理设施运行时间（小时）。原文件中描述污染物类别为废气，污染物指标为六价铬，此处对其进行了匹配工作，将其匹配到LCAflow库里面相最符合的流，污染物指标备注为六价铬
- Exhaust gas: 3477
  污染物指标工业废气量的末端治理技术是氧化还原法+化学沉淀法，末端治理设施实际运行率（k值）计算公式为/。原文件中描述污染物类别为废气，污染物指标为工业废气量，此处对其进行了匹配工作，将其匹配到LCAflow库里面相最符合的流，污染物指标备注为工业废气量
- ammonia: 0.0473
  污染物指标氨的末端治理技术是无组织，末端治理设施实际运行率（k值）计算公式为/。原文件中描述污染物类别为废气，污染物指标为氨，此处对其进行了匹配工作，将其匹配到LCAflow库里面相最符合的流，污染物指标备注为氨

## Use advice
This dataset is derived from the Pollution Source Census Report and contains information on pollution emissions and related products. However, it does not include data on energy or chemical consumption, nor does it provide information on waste or co-product generation. When utilizing this dataset, please supplement the missing data based on actual conditions before use
该数据集来源于污染源普查报告，包含污染物排放及相关产品信息，但不包含能源或化学品消耗数据，也不提供废弃物或共生产物产生信息。在使用该数据集时，请根据实际情况补充缺失数据后再使用。

## Review details
Inventory: The internal review was done by several iteration steps concerning raw data validation, raw data documentation, representativity, completeness and consistency of modelling with regard to ISO 14040 and 14044.
清单： 内部审查通过几个迭代步骤完成，涉及原始数据验证、原始数据记录、代表性、完整性、与 ISO 14040 和 14044 有关的建模的一致性。

## Data sources
- 第二次全国污染源普查产排污核算系数手册（试用版）,四级代码3140文件，在完整版文件中第4111页
