# cement production|cement, portland cement|solid waste

Dataset: ILCD process, Unit process, black box
Geography: CN
Reference year: 1998
Classification: Materials production / Other mineralic materials
Generated by: Siqi Yang
Amounts: no units in this file; such an amount is in the reference unit of its flow, which a separate flow dataset defines
copyright: false

## General comment
The research objects are portland cement. The raw materials use limestone, clay and gypsum. The 1 ton of cement materials consumption: limestone 1.3t, 0.3t of clay, and 50kg of gypsum. Without considering the use of industrial waste.

## Model description
The functional unit is the weight of cement used for 1 cubic meter of standard concrete. The mix ratio for 1 cubic meter of standard concrete is 270kg of cement, 60kg of fly ash, and 1850kg of aggregate. The scope of the study is cement manufacturing.

## Reference product
- cement, common portland cement: 1000
  Silicate cement

## Inputs
- limestone, crushed, for mill: 1300; missing unimportant
  Limestone
- clay: 300; missing unimportant
  Clay
- gypsum (desulphurized): 50; missing unimportant
  Gupsum
- electricity, medium voltage: 443.867; article inperiodical
  Electricity consumption. Cement production energy consumption data comes from literature, and coal heating value is calculated based on 5500 kcal/kg and fixed carbon content is assumed to be 50%. Pollutant data for electricity production is calculated based on the average energy consumption of China's power generation, which is 0.424 kg standard coal/kWh or 24244 kJ/kg of coal heating value.
- hard coal, run-of-mine: 204.407; article inperiodical
  Coal consumption (i.e. raw coal consumption). Cement production energy consumption data comes from literature, and coal heating value is calculated based on 5500 kcal/kg and fixed carbon content is assumed to be 50%.

## Outputs
- carbon dioxide: 885.185; calculated
  CO2. Coal-fired CO2 emissions are calculated based on the fixed carbon content, while CO2 emissions from raw materials are calculated based on the CaO content of calcium carbonate, assuming it is 50%.
- carbon monoxide: 0.0114815; calculated
  CO. Due to lack of source, other pollutant data is calculated based on coal-fired power plants and converted based on energy consumption.
- hydrocarbons (unspecified): 0.0274074; calculated
  CxHy. Due to lack of source, other pollutant data is calculated based on coal-fired power plants and converted based on energy consumption.
- Nitrogen oxides: 1.53333; calculated
  NOx. NOx and SO2 emissions are calculated based on the average emission factor of the building materials industry.
- sulfur dioxide: 0.355556; calculated
  SO2. NOx and SO2 emissions are calculated based on the average emission factor of the building materials industry.
- particles (> PM10): 40; estimated
  Solid waste (i.e. dust), with an unspecified particle size, is treated as PM > 10 micrometers in diameter. Solid waste produced during cement production is calculated as 4% of the cement yield.

## Data sources
- 刘顺妮. (2003). 水泥-混凝土体系环境影响评价及其应用研究 [博士, 武汉理工大学].
