# 电弧炉炼钢;生铁;粗钢

Dataset: ILCD process, Unit process, single operation
Geography: CN
Reference year: 2020
Classification: Unit processes / Materials production / Metals and semimetals
Generated by: 纪伟, 1299801467@qq.com
Owner: 天工LCI数据工作小组
Review: Dependent internal review by 天工LCI数据工作小组
Amounts: no units in this file; such an amount is in the reference unit of its flow, which a separate flow dataset defines
copyright: false
licenseType: Free of charge for all users and uses

## General comment
该工艺数据涉及使用电弧炉（EAF）炼制钢铁，包括将生铁熔炼成粗钢的过程。这是一个单元过程（单一操作），在钢铁工业普遍使用，EAF技术主要应用于从回收的废旧金属生产钢铁，并且也用于直接还原铁。该工艺适用于小规模和模块化生产，使其可以灵活应对不同钢铁生产能力，并且通常用于小型轧钢厂。

## Time period
论文提到钢铁企业环境总体数据为1998年的吨钢环境基础数据。

## Reference product
- Molten Iron: 316.7; calculated

## Inputs
All rows: calculated
- Molten Iron: 87
- dolomite: 1.6
- quicklime: 27.9
- freshwater,freshwater: 200
- compressed air: 0.4
- Steel scrap (external supply): 230
- Cooling water: 5.7
- Electricity: 470.88

## Outputs
- Slag: 26; calculated
- carbon dioxide (fossil): 69.5; calculated
  原文未区分bio和fossil，根据专家判断此处为carbon dioxide (fossil)
- Sinter / Pellet Dust: 0.02; calculated

## Use advice
当使用这个数据集进行生命周期评估时，必须确保电弧炉过程与评估场景相关。该数据集代表1998年吨钢的环境基础数据。因此，它可能无法准确反映当前的技术效率或环境影响。用户应该考虑自1998年以来电弧炉运行的技术进步和地区差异。如果有更近期的数据可用，应使用以确保评估的准确性。此外，还应将电力来源和与电弧炉操作地理位置相关的特定排放因子的考量纳入生命周期评估模型中。

## Review details
清单： 内部审查通过几个迭代步骤完成，涉及原始数据验证、原始数据记录、代表性、完整性、与 ISO 14040 和 14044 有关的建模的一致性。

## Data sources
- 梁田. 基于生命周期评价的典型钢铁企业环境影响评估及绿色发展研究. (郑州大学, 2020).
