# Glass production | laminated glass | heating and pressurizing

Dataset: ILCD process, Unit process, single operation
Geography: SX-ZJ-CN
Reference year: 2004
Classification: Materials production / Other mineralic materials
Generated by: He xiaxia, 18616148319@163.com
Review: Dependent internal review by Tiangong LCI Data Working Group
Amounts: no units in this file; such an amount is in the reference unit of its flow, which a separate flow dataset defines
copyright: false

## Reference product
- Glass (formed & finished): 250000; measured

## Inputs
- Glass (formed & finished): 250160; measured
  夹层玻璃粗成品

## Outputs
- cullet float glass: 160; measured

## Review details
Inventory: The internal review was done by several iteration steps concerning raw data validation, raw data documentation, representativity, completeness and consistency of modelling with regard to ISO 14040 and 14044.; Documentation: The review of the documentation was performed by Ecobilan and is in compliance with ISO 14040 and 14044. The data set documentation is correct in view of the appropriateness of the information provided. It includes all relevant information in view of data quality and scope of application of the respective LCI result.

## Data sources
- 年产5600吨钢化玻璃及250吨夹层玻璃生产线建设项目环境影响报告
