# 湿蒸法棉布染整加工|印染棉布|冷堆

Dataset: ILCD process, Unit process, single operation
Geography: SZ-JS-CN
Reference year: 2012
Classification: Materials production / Other mineralic materials
Generated by: Yingfan Duan, 1300925579@qq.com
Review: Dependent internal review by Tiangong LCI Data Working Group
Amounts: no units in this file; such an amount is in the reference unit of its flow, which a separate flow dataset defines
copyright: false

## Geography
本研究选取江苏省某印染企业为重点调研对象，该企业位于长三角经济圈中的常熟。

## Inputs
- Electricity: 82.9; measured
- Crude coal: 27.1; calculated
- Fuel Oil: 0.579
- heavy fuel oil: 0.174
- Diesel: 0.796
- Coke Oven Gas: 1.06
- natural gas: 0.0136
- Cotton: 167; measured
- hydrogen peroxide: 50
  双氧水（输入
- Amylase: 83.3
- Stabilizer: 54.2
- river water: 5160
- Water (fresh water): 1.29; measured

## Outputs
- carbon dioxide: 28; calculated
- carbon monoxide: 0.0678
- sulfur dioxide: 0.0238; estimated
- methane: 3.53e-5; calculated
- Nitrogen oxides: 0.138
- nitrous oxide: 3.3e-5; calculated
- Dust (unspecified, from stack): 0.221; estimated
- ammonia: 1.27e-5
- non-methane volatile organic compounds: 0.00144
- waste water - untreated: 3830
- chemical oxygen demand: 4.36; measured
- Suspended solids, unspecified: 0.471; measured
- lead: 2.13e-6
- mercury: 4.48e-8
- fluorine: 4.03e-7
- cadmium: 7.9e-8
- arsenic: 1.82e-6

## Review details
Inventory: The internal review was done by several iteration steps concerning raw data validation, raw data documentation, representativity, completeness and consistency of modelling with regard to ISO 14040 and 14044.; Documentation: The review of the documentation was performed by Ecobilan and is in compliance with ISO 14040 and 14044. The data set documentation is correct in view of the appropriateness of the information provided. It includes all relevant information in view of data quality and scope of application of the respective LCI result.

## Data sources
- 朱亚楠. 棉布连续轧染工艺生命周期环境影响评价. (南京大学, 2012).
