# CLT ;交叉层压材（CLT）;1 m3 CLT的生产包括：软木：428 odkg（462 kg@8%M.C.）；树脂：2.7千克；总质量：464.7 kg

Dataset: ILCD process, Unit process, single operation
Geography: CA
Reference year: 2021
Valid until: 2022
Classification: Unit processes / Materials production / Wood
Functional unit: The purpose of the functional unit is to quantify the service delivered by the product system and provide a reference to which the inputs and outputs can be related. For EPDs covering the complete life cycle (based on a “cradle-to-grave” LCA study), a functional unit is defined. For EPDs not covering the complete life cycle (e.g. “cradle-to gate” LCA study -leaving out the use and/or the end of life), a declared unit is defined. The declared unit is defined as “the production of one cubic meter (1 m3) of CLT produced in British Columbia.”
LCI method principle: Attributional
LCI method approaches: Allocation - mass
Generated by: 谭惋月, wytan9@student.ubc.ca
Owner: 天工LCI数据工作小组
Review: Dependent internal review by 天工LCI数据工作小组
Amounts: no units in this file; such an amount is in the reference unit of its flow, which a separate flow dataset defines
copyright: false
licenseType: Free of charge for all users and uses

## General comment
Athena可持续材料研究所受林业创新投资公司委托，对不列颠哥伦比亚省CLT生产进行从摇篮到大门的LCA。CLT是一类框架样式，其特点是在墙壁、地板和屋顶结构中使用实木面板。

## Geography
调查数据代表加拿大不列颠哥伦比亚省CLT行业，因为3家调查工厂代表不列颠哥伦比亚目前所有运营的CLT制造工厂。

## Time period
根据报告的二手数据来源部分，窑干软木木材的数据质量可以在一年内保持良好。

## Technology and included processes
CLT的整个生产过程可分为三部分——A1、A2和A3：A1包括CLT制造中使用的木材和树脂的从摇篮到大门的生产。上游资源开采包括原材料的去除和加工，以及在越过以前产品系统的系统边界后对二次材料输入的处理（例如回收过程）。A1还包括包括苗圃作业在内的重新造林过程（包括肥料、灌溉、温室能源（如适用）等）、场地准备以及种植、施肥、间伐和其他管理操作。对于A2运输到工厂：原材料（包括二次材料和燃料）从提取现场或来源到制造现场的平均或特定运输（包括在过程中回收的任何来源的材料）；就A3而言，CLT产品的制造，包括包装。

## Technical purpose
交叉层压材（CLT）被用作建筑施工中的结构材料，适用于墙体、地板和屋顶。它以实木面板的组成而著称，为现代建筑提供了一种可持续且坚固的替代品，适用于住宅、商业和公共机构建筑。

## Reference product
- Cross-Laminated Timber (CLT): 1; measured

## Inputs
All rows: measured
- lumber: 1.09
  这里从数据库中选择“木材”，该数据库替代了报告中的“BC软木木材”。
- Polyether Polyol: 2.36
  “聚醚多元醇”是从数据库中选择的，该数据库替代了报告中的“聚氨酯”。
- primer: 0.17
- Melamine Formaldehyde: 0.02
- Urea-formaldehyde resin: 0.0061
  “尿素甲醛”是从数据库中选择的，该数据库替代了报告中的“树脂硬化剂（三聚氰胺甲醛硬化剂）”。尿素甲醛与三聚氰胺甲醛硬化剂具有类似的性质。
- freshwater: 0.01351
- transport in t*km: 169.62
  报告中提到“木材卡车运输”。
- transport in t*km: 9.83
  指报告中的“树脂运输”。
- Electricity: 304.92
- natural gas; 44.1 MJ/kg: 1.56
- Diesel: 0.00101
- Gasoline (regular): 8e-5
- Propane: 1.56
- Hog fuel: 40.06
- Lubricant: 1e-5
- Hydraulic Fluid: 1e-5
- Polyethylene: 0.01
  “聚乙烯”是从数据库中选择的，该数据库替代了报告中的“包装（塑料捆扎）”。根据报告，“包装（塑料捆扎）”是指高密度聚乙烯树脂。
- Polypropylene: 0.28
  “聚丙烯”是从数据库中选择的，该数据库替代了报告中的“包装（木材包装）”。根据报告，“包装（木材包装）”是指聚丙烯树脂。
- transport in t*km: 0.23
  报告中提到“耗材卡车运输”。

## Outputs
All rows: measured
- wood waste: 38.52
  “木材废料”是从数据库中选择的，该数据库替代了报告中的“废物免费转移（回收和猪肉燃料）”。
- particles (PM2.5): 0.00151
- particles (PM10): 0.00105
- Total particulate matter: 0.000284
  指报告中的“颗粒物其他”流程。
- Nitrogen oxides: 0.024
- sulfur oxides: 0.00126
- carbon monoxide,carbon monoxide (fossil): 0.0297
  原文未区分bio和fossil，根据专家判断此处为fossil
- Aldehydes: 0.0015
- formaldehyde: 8.89e-5
- methanol: 0.000259
- phenol: 0.000366
- butylene glycol: 0.00011
  报告中提到的“1,4-丁二醇”。
- ethanol: 0.000257
- citric acid: 7.32e-5
- resorcinol: 0.000512
- formic acid: 0.000661
- caprolactam: 0.00011

## Deviations from the LCI method approaches
分配是指当几个产品或功能共享同一过程时，用于划分过程的环境负荷的方法。CLT制造是一个单一的输出过程，其中CLT是唯一生产的产品。CLT的制造过程确实产生了免费转移给下游用户的木材废物，但没有为这些废物分配环境负担。然而，CLT制造过程中的木材输入是一种由多输出过程产生的产品，通过该过程生产和销售有价值的副产品。根据UL PCR，“质量”被认为是分配这些输入的最合适参数，因此“质量分配”结果包含了基于质量分配的木材数据。

## Data selection and combination
本LCA研究涉及三个信息模块。“提取和上游生产”包括软木原料的从摇篮到大门的生产，以及CLT生产中使用的所有树脂和辅助材料的生产。所有工厂的“工厂运输”均采用柴油牵引拖车。参与的CLT设施提供了设施投入的运输距离和运输方式。“制造业”LCI数据来自不列颠哥伦比亚省目前运营的三家工厂。

## Data treatment and extrapolations
在LCIA中，在计算GWP1时，生物碳去除的LCI流量以-1 kg CO2e/kg CO2的生物碳为特征。同样，在全球变暖潜能值的计算中，生物碳排放的LCI流量以+1 kg CO2e/kg CO2的生物碳因子为特征。与生物质燃烧相关的二氧化碳以外的排放（如甲烷或氮氧化物）在全球升温潜能值的计算中以其特定的辐射强迫因子为特征。我们分别手动计算了与生物碳相关的全球变暖潜力的组成部分。在本研究中，影响类别和特征因子（CF）2来自美国环保局减少和评估化学和其他环境影响工具TRACI 2.1的中点指标应用。TRACI方法是专门为美国开发的，使用与美国位置一致的输入参数，并与木制品PCR第A部分一致。一次能源消耗总量是根据ecoinvent3发布的累积能源需求法根据LCI结果制成的。一次能量载体的低热值用于计算研究中报告的一次能量值。与材料使用、废物、水使用和生物碳有关的其他库存参数来自LCI结果。我们遵循了ACLCA根据ISO 21930:2017计算非LCIA库存指标的指南。根据数据可用性，采用了一种使用平均加权因子的方法。

## Use advice
使用此数据的用户应考虑不列颠哥伦比亚省CLT生产过程的具体细节，包括从摇篮到大门涉及的材料和能源流。数据聚焦于生产阶段（上游活动、运输和包括包装的制造）但不包括使用或生命周期终止阶段。如果将评估扩展到大门到大门以外，数据的用户必须确保针对CLT的回收、能量回收和废物处理过程根据当地具体情况进行建模。资本设备和人类活动的环境影响被排除在外，如果对于扩展的系统边界有关，应予以考虑。在使用此数据进行生命周期评估时，始终应参考最新的标准并应用最新的特征化因子。

## Review details
清单： 内部审查通过几个迭代步骤完成，涉及原始数据验证、原始数据记录、代表性、完整性、与 ISO 14040 和 14044 有关的建模的一致性。

## Data sources
- Athena Sustainale Materials Institute. A Cradle-to-Gate Life Cycle Assessment of CLT produced in British Columbia. (2021).
