# cement production|cement, ordinary portland cement, 42.5MPa|new dry process|mixed solid wastes

Dataset: ILCD process, Unit process, black box
Geography: CN
Reference year: 2004
Classification: Materials production / Other mineralic materials
Generated by: Siqi Yang
Amounts: no units in this file; such an amount is in the reference unit of its flow, which a separate flow dataset defines
copyright: false

## General comment
Assuming that the cement used for stabilizing gravel is P·O 42.5 Portland cement. Cement production adopts a new dry-process production method. Raw materials used include limestone, clay, gypsum, etc. Energy consumption during the production process includes electricity and coal consumption in various production processes. Pollutants include particulate matter, SO2, NOX, CO2, etc.

## Model description
Considering the complexity of the cement production process, varieties, and practical processes, the cement used in stabilizing the gravel during the study was P.O.42.5 portland cement, and the raw materials were limestone, clay and gypsum. The transportation cement raw material assumes that the 5T dump truck is used, the fuel consumption of 1km by 5T diesel truck is 0.2L, and the transportation distance is 1km. Cement production adopts a new dry process production. The energy consumption of the production process includes the electricity and coal consumption of each production process. Pollutants include particulate matter, SO2, NOX, CO2, etc.

## Reference product
- cement, ordinary portland cement, 42.5MPa: 1000
  P.O.42.5 silicate cement

## Inputs
All rows: article inperiodical
- limestone, crushed, for mill: 1073.7
  Limestone
- clay: 216.8
  Clay
- gypsum (desulphurized): 51.1
  Gupsum
- iron, powder: 28.5
  Iron powder
- ash: 98
  Fly ash
- blast furnace slag: 137.6
  Blast furnace slag
- electricity, medium voltage: 350.64
  Power consumption
- hard coal, run-of-mine: 116
  Coal consumption
- diesel: 0.0002
  Diesel fuel. The fuel consumption of a 5-ton dump truck and a 5-ton diesel truck for transporting cement raw materials for 1 km is assumed to be 0.2L, and the transportation distance is assumed to be 1 km.

## Outputs
- carbon dioxide: 781; article inperiodical
  CO2
- Nitrogen oxides: 1.53; article inperiodical
  NxO
- methane: 3.414; article inperiodical
  CH4

## Data sources
- 杜丽. (2012). 基于生命周期评价方法半刚性基层施工过程中温室气体排放分析研究 [硕士, 长安大学].
