# 水泥生产|水泥, 复合硅酸盐水泥|干法回转窑|混合固废

Dataset: ILCD process, LCI结果
Geography: CN
Classification: Materials production / Other mineralic materials
LCI method principle: Other
Generated by: 杨思琪
Amounts: no units in this file; such an amount is in the reference unit of its flow, which a separate flow dataset defines
copyright: false

## General comment
2013年，中国超过90％的水泥熟料是应用干法旋转窑技术生产的（中国水泥协会，2014）。因此，只分析应用干法旋转窑技术生产的水泥。在这个企业中，水泥生产过程中产生的粉煤灰被回收作为水泥生产的替代材料之一。废水经过初步处理后也被回收用于浇灌当地的花园。

## Model description
系统边界采用从摇篮到大门的方法进行设置，即不包括水泥使用和最终处置。
以1吨水泥产品为功能单位。

## Reference product
- cement, portland-composite cement: 1000
  水泥

## Inputs
All rows: article inperiodical
- calcium carbonate: 1050
  石灰石
- electricity, medium voltage: 295
  电
- hard coal: 91.8105
  烟煤。原始数据是2.50E+9J，这里换算为硬煤，换算公式为1MJ=27.23kg硬煤。
- gypsum: 50.5
  石膏
- sandstone: 54.8
  砂岩
- Pyrite cinder: 14.6
  黄铁矿煤渣
- water: 360
  水
- ash: 241
  粉煤灰
- transport, freight, lorry, unspecified: 85.05
  运输（卡车）

## Outputs
- carbon dioxide: 620; article inperiodical
  二氧化碳
- sulfur dioxide: 0.023; article inperiodical
  SO2
- Nitrogen oxides: 0.19; article inperiodical
  NOx
- particles (> PM10): 0.065; article inperiodical
  颗粒，未标明粒径，按PM>10处理。

## Data selection and combination
数据来源于可以代表当前中国水泥生产水平的中国前50家水泥生产企业之一。年度监测数据（即原材料和能源消耗，以及空气排放）是从该企业的年度运营数据中获取的。

## Data sources
- Wei Chen, Wenjing Liu, Yong Geng, Satoshi Ohnishi, Lu Sun, Wenyi Han, Xu Tian, & Shaozhuo Zhong. (2016). Life cycle based emergy analysis on China’s cement production. JOURNAL OF CLEANER PRODUCTION, 131, 272–279.
