# 菠萝生产

Dataset: ILCD process, Unit process, black box
Geography: CR
Reference year: 2007
Valid until: 2008
Classification: Unit processes / Materials production / Food and renewable raw materials
Functional unit: 1 hectare pineapple garden
Generated by: 朱娴, zzhu0918@163.com
Owner: 天工LCI数据工作小组
Review: Dependent internal review by 天工LCI数据工作小组
Amounts: no units in this file; such an amount is in the reference unit of its flow, which a separate flow dataset defines
copyright: false
licenseType: Free of charge for all users and uses

## General comment
播种菠萝种子，在生长阶段进行化肥、农药道德施用，在收获阶段获得菠萝果实。

## Geography
从哥斯达黎加的各种菠萝农场建立了新鲜菠萝供应链模型

## Technical purpose
该数据集描述了哥斯达黎加1公顷农场的菠萝种植过程，旨在用于新鲜菠萝供应链的环境影响评估。它概述了生长阶段化肥和农药的应用以及收获阶段菠萝果实的获取，可用于农业效率、可持续农业实践和供应链优化研究。

## Reference product
- Pineapple: 57506; measured

## Inputs
All rows: measured
- diesel oil: 440
- Gasoline (regular): 37.4
- Nitrogenous fertilizer: 401
- Phosphate fertilizer: 61
- Potassium fertilizer: 998
- magnesium: 35
- Pesticide: 3227

## Use advice
在使用此数据集进行生命周期评估时，考虑到生长阶段详细说明的化肥和农药使用特定实践。确保理解化学使用的道德层面，因为它与地区指南和认证有关。若种植实践有所变更，应相应调整数据集，并且因气候或地区差异导致的产量变化也应考虑在内。从该数据集中排除任何收获后的过程，如运输、存储和零售，专注于菠萝生产指定生命阶段期间的实际种植影响。

## Review details
清单： 内部审查通过几个迭代步骤完成，涉及原始数据验证、原始数据记录、代表性、完整性、与 ISO 14040 和 14044 有关的建模的一致性。
