# 炼铁;铁水;高炉炼铁（Z11）

Dataset: ILCD process, Unit process, single operation
Geography: CN
Reference year: 1998
Classification: Materials production / Metals and semimetals
Generated by: 付翔, 1162850692@qq.com
Owner: 天工LCI数据工作小组
Review: Dependent internal review by 天工LCI数据工作小组
Amounts: no units in this file; such an amount is in the reference unit of its flow, which a separate flow dataset defines
copyright: false
licenseType: Free of charge for all users and uses

## General comment
来自表 4-15 Z11 钢厂生产吨材环境负荷编目表

## Time period
论文提到钢铁企业环境总体数据为1998年的吨钢环境基础数据。

## Technical purpose
该工艺生产的铁水主要用于钢铁制造行业。它作为原料进一步加工和精炼成各种钢铁产品。这些产品范围可以从建筑材料到汽车零部件、家用电器以及其他需要高强度金属部件的商品。

## Reference product
- Molten Iron: 1054.46; measured
  铁水

## Inputs
All rows: measured
- Energy, geothermal, converted: 14028.7
- water: 15585
- Sinter: 1906.46
  烧结矿
- Metallurgical ash: 182
  冶金白灰
- coke,Coke: 684
  焦炭

## Outputs
All rows: measured
- Dust (unspecified, from stack): 4.133
- sulfur dioxide: 1.042
- cyanide: 0.002278
- phenol: 0.001497
  挥发酚
- Hydrocarbons, aliphatic, alkanes, unspecified: 0.063299
  石油类
- Suspended solids, unspecified: 7.78553
- chemical oxygen demand: 4.39024
- Dust (unspecified, from stack): 12.59
  集尘
- Spoil (deposited, hibernating in ground, non elementary flow): 947.327

## Use advice
使用该数据集时，重要的是要考虑到1998年的技术适用性。提供的环境数据对应于当年铁钢公司的基线环境数据，可能不反映当前技术或环境标准。用户应仔细评估是否需要对数据进行调整或更新以符合当前的做法和法规。此外，用户应了解数据集的范围，并考虑包含的生命周期阶段的界限，特别是关于循环过程的包含或排除。

## Review details
清单： 内部审查通过几个迭代步骤完成，涉及原始数据验证、原始数据记录、代表性、完整性、与 ISO 14040 和 14044 有关的建模的一致性。

## Data sources
- 周和敏. 钢铁材料生产过程环境协调性评价研究. (北京工业大学, 2001).
