# clinker production|clinker|ordinary rotary kiln, wet process long kiln

Dataset: ILCD process, Unit process, single operation
Geography: CN
Classification: Materials production / Other mineralic materials
Generated by: Siqi Yang
Amounts: no units in this file; such an amount is in the reference unit of its flow, which a separate flow dataset defines
copyright: false

## General comment
The ordinary rotary kiln is taken as the research object.

## Model description
The functional unit is 1 ton of cement clinker. The scope of the study is cement calcination.

## Reference product
- clinker: 1000
  Clinker

## Inputs
- limestone, crushed, for mill: 1201.8; missing unimportant
  Limestone
- clay: 267.8; missing unimportant
  Clay
- iron, powder: 31; missing unimportant
  Iron powder
- hard coal, run-of-mine: 241.7; article inperiodical
  Coal-fired. The energy consumption data comes from the literature. The coal -fired thermal value is calculated at 5500kcal/kg, and the fixed carbon is calculated at 50%.
- electricity, medium voltage: 210.096; article inperiodical
  Electric. The energy consumption data comes from the literature.

## Outputs
- carbon dioxide: 954.73; calculated
  CO2. Coal -fired CO2 is calculated from fixed carbon, and the raw material CO2 is calculated by 50%based on the content of calcium carbonate.
- carbon monoxide: 9.75
  CO. CO emissions are calculated according to the concentration of exhaust gas.
- sulfur dioxide: 2.1647; calculated
  SO2. The number of NOX and SO2 is calculated by the average emission factor of the building materials industry.
- Nitrogen oxides: 3.278; calculated
  NOx. The number of NOX and SO2 is calculated by the average emission factor of the building materials industry.
- hydrocarbons (unspecified): 0.041
  CxHy. Due to the lack of sources, other pollution data reference power plant coal-fired coal coal is converted by energy consumption.

## Data sources
- 刘顺妮. (2003). 水泥-混凝土体系环境影响评价及其应用研究 [博士, 武汉理工大学].
