# 氧化铝生产; 冶金用氧化铝 ; 铝土矿 ; 2007年

Dataset: ILCD process, Unit process, single operation
Geography: CN
Reference year: 2021
Classification: Unit processes / Materials production / Non-energetic raw materials
Generated by: 封羽真, fyz22
Owner: 天工LCI数据工作小组
Review: Dependent internal review by 天工LCI数据工作小组
Amounts: no units in this file; such an amount is in the reference unit of its flow, which a separate flow dataset defines
copyright: false
licenseType: Free of charge for all users and uses

## General comment
该数据集代表了冶金工业中使用的氧化铝产品。数据集中来源于铝土矿的氧化铝适用于通过电解生产铝等应用。该数据专门针对2007年的方法论和实践，并适用于铝生产链或任何需要冶金级氧化铝作为输入的过程的生命周期评估（LCA）研究。

## Time period
文献发表日期

## Reference product
- aluminium oxide, metallurgical: 1000; software or database
  alumina

## Inputs
All rows: software or database
- soda ash, dense: 107.21
  soda ash
- Petroleum Coke: 1806.4
  Energy sources proportion of energy consumption is coal: fuel oil: coke: natural gas: coke even gas=46.0%: 11.0%: 7.1%: 14.1%: 21.7%
- coal gas: 5520.96
  (same comment as for Petroleum Coke)
- natural gas, high pressure: 3587.35
  (same comment as for Petroleum Coke)
- fuel oil, unspecified: 2798.64
  (same comment as for Petroleum Coke)
- hard coal: 11703.4
  (same comment as for Petroleum Coke)
- Water, unspecified natural origin: 4.28
  water consumption

## Data selection and combination
本研究的数据参考了PA、SA、电力等背景数据的LCA数据。PA数据来自统计数据源，SA数据主要来自文献。背景数据主要来自中国科学院生态环境研究中心CASRCEES 2018建立的中国本地化LCA数据库，涵盖能源、材料、交通、废物管理等LCA数据。

## Use advice
使用该氧化铝生产的生命周期评估（LCA）数据时，数据集用户应该注意它代表的特定年份（2007年），因为随着时间的推移，方法论和技术效率会发生变化。数据应在由CAS RCEES 2018数据库概述的中国生产实践的背景下使用。用户应意识到地理和技术范围，确保在将这些数据应用于更广泛的LCA模型时考虑能源产生和材料加工的区域差异。此外，任何对LCA数据库的后续更新都应考虑，以保持评估的相关性。

## Review details
清单： 内部审查通过几个迭代步骤完成，涉及原始数据验证、原始数据记录、代表性、完整性、与 ISO 14040 和 14044 有关的建模的一致性。

## Data sources
- Ding, N., Liu, N., Lu, B. & Yang, J. Life cycle greenhouse gas emissions of aluminum based on regional industrial transfer in China. J. Ind. Ecol. 25, 1657–1672 (2021).
