# 电解水制氢

Dataset: ILCD process, Unit process, single operation
Geography: HEB-CN
Reference year: 2022
Classification: Unit processes / Energy carriers and technologies / Electricity
Functional unit: 1 kg H2
LCI method principle: Attributional
Generated by: 甘金璐, jinlu.gan1998@gmail.com
Owner: 天工LCI数据工作小组
Review: Dependent internal review by 天工LCI数据工作小组
Amounts: no units in this file; such an amount is in the reference unit of its flow, which a separate flow dataset defines
copyright: false
licenseType: Free of charge for all users and uses

## General comment
参考中国河北省固原市大型制氢装置，本文研究的质子交换膜电解槽设备功耗为5MW，制氢能力为90kg/h，效率为60%。该设备年产量为17.52 MNm3 H2。考虑电解槽与太阳能的耦合，假设设备每天运行10 h，则整个制氢装置的寿命为30年。满负荷运行状态下，整个系统能耗为54.81 kWh/kg H2。 PEM电解装置的阴极是在碳钎板上喷涂铂基金属，阳极是喷涂氧化铱。膜材料为杜邦公司的Nafion材料，是Walther Grot博士改进Teflon材料得到的。它是质子交换膜最常用的膜材料。电解装置的整体结构由室体结构和骨架结构组成。除膜和电极外，大部分腔室结构均由不锈钢制成。骨架部分由树脂、不锈钢、氯丁橡胶构成。

## Geography
参考中国河北省固原市的大型制氢厂

## Time period
文章的发表日期

## Technical purpose
所描述的高效质子交换膜（PEM）电解系统旨在进行大规模氢气生产。它用于生成适用于多种用途的高纯度氢气，包括燃料电池汽车燃料、化工行业原料和能源储存。PEM技术确保了生产效率，并与可再生太阳能资源集成，以提高可持续性。系统每小时90公斤的高产量使其成为工业环境中需求量大的氢气的理想选择。

## Reference product
- Hydrogen: 1; measured

## Inputs
All rows: measured
- carbon: 9.94e-6
- aluminium: 2.98e-5
- copper: 4.97e-6
- Electricity: 216
- iridium: 8.3e-7
- platinum: 8e-8
- Secondary Steel Making Slag: 0.000111
  不锈钢
- titanium: 0.000583
- freshwater: 9
- Chemicals (unspecified): 1.76e-5
  Nafion，膜材料是杜邦公司的Nafion材料，由Walther Grot博士获得以改进特氟龙材料

## Use advice
数据使用者在使用这份数据集时必须考虑特定于PEM电解过程的操作参数，包括5MW的功耗、每小时90公斤的氢气生产能力和60%的效率率。此外，应使用设备假定的每天10小时运行时间和30年的使用寿命来模拟其整个生命周期的总环境影响。需要注意太阳能耦合方面以评估可再生能源的集成。请注意，涉及Nafion膜、铂和铱涂层、不锈钢、树脂和氯丁橡胶的材料构造可能需要在LCA中特别考虑它们的生产和使用寿命终了处理。

## Review details
清单： 内部审查通过几个迭代步骤完成，涉及原始数据验证、原始数据记录、代表性、完整性、与 ISO 14040 和 14044 有关的建模的一致性。

## Data sources
- Zhang, J., Ling, B., He, Y., Zhu, Y., & Wang, Z. (2022). Life cycle assessment of three types of hydrogen production methods using solar energy. International Journal of Hydrogen Energy, 47(30), 14158–14168.
