# 原铝生产 ; 原生铝锭 ; 铝土矿 ; 2003

Dataset: ILCD process, Unit process, single operation
Geography: CN
Reference year: 2014
Classification: Unit processes / Materials production / Metals and semimetals
Generated by: 封羽真, fyz22
Owner: 天工LCI数据工作小组
Review: Dependent internal review by 天工LCI数据工作小组
Amounts: no units in this file; such an amount is in the reference unit of its flow, which a separate flow dataset defines
copyright: false
licenseType: Free of charge for all users and uses

## General comment
原铝生产的铝锭产品在多个工业领域有着广泛的应用，包括但不限于汽车部件制造、飞机结构、建筑材料（如窗框和门）、消费电子外壳、包装（如罐头和箔材）以及电力传输线。该数据集特别描述了2003年从铝土矿中生产原生铝锭的过程。

## Time period
文献发表日期

## Reference product
- aluminium, primary, ingot: 1000; missing unimportant

## Inputs
All rows: missing unimportant
- electricity, high voltage, aluminium industry: 59680.8
  电力
- hard coal: 1110
  煤炭
- Petroleum Coke: 87.7
  焦炭
- drying, natural gas: 42
  天然气
- coal gas: 1260
  煤气
- light fuel oil: 161
  燃料油

## Data selection and combination
原铝生产的资源和能耗数据，均 以《有 色 金 图 1 原铝生产的系统边界 Fig． 1 System boundary of primary aluminum production 属工业 年 鉴》 中的统计数据作为主要参考依 据。对于一些非统计性工艺数据，则来源于典型企 业生产工艺及技术指标的调研和公开发表的文献。

## Use advice
在使用此数据集时，生命周期评估实践者应当注意数据的时效性，因为它反映了2003年的原铝生产实践。在假定自数据发布以来可能出现的技术进步和效率提高时应谨慎行事。提供的资源和能耗数据主要基于《有色金属工业年鉴》中的统计数据，并有来自典型企业调研和已发表文献的额外工艺数据。特别用于环境影响评估时，可能需要包括图1所示的系统边界。在新的LCA研究中使用此数据时，应当考虑技术、法规和市场条件的未来变化，以确保其连续适用性。

## Review details
清单： 内部审查通过几个迭代步骤完成，涉及原始数据验证、原始数据记录、代表性、完整性、与 ISO 14040 和 14044 有关的建模的一致性。

## Data sources
- 郭杰, 高峰, 王志宏, 刘宇, & 龚先政. 原铝生产流程温室气体排放主要影响因素的关联度分析. 环境工程学报 8, 4858–4863 (2014).
