# Lowtemperaturemethanolwashingunit|Syntheticgas|Rawmaterialcoal|Lowtemperaturemethanolwashing|All sizes / 低温甲醇洗单元|合成气|原料煤|低温甲醇洗|所有规模

Dataset: ILCD process, Unit process, single operation
Geography: CN
Reference year: 2019
Classification: Energy carriers and technologies / Energetic raw materials
Generated by: The data was created by the Office of the Second National Pollution Source Census of the Ministry of Ecology and Environment, and the data was organized by the TianGong Plan team for ILCD format / 生态环境部第二次全国污染源普查工作办公室创建数据，天工计划团队常慧敏整理数据为ILCD格式
Owner: Tiangong LCI Data Working Group / 天工LCI数据工作小组
Amounts: no units in this file; such an amount is in the reference unit of its flow, which a separate flow dataset defines
copyright: false
licenseType: Free of charge for all users and uses

## Technology and included processes
the Technical of end-of-pipe management technology for pollution volatile organic compoundisRegenerative thermal combustion method，Its Technical efficiency of end-of-pipe management70，The formula for calculating the actual operation rate (k-value) of the end-of-pipe treatment facility is /

## Reference product
- Crude coal: 1000; input; calculated
  源文件中描述为为原料煤，此处对其进行了匹配工作，将其匹配到LCAflow库里面相最符合的流，污染物指标备注为工业废气量，产污系数备注为气化工艺为碎煤气化的产污系数；

## Outputs
All rows: calculated
- Exhaust gas: nan
  污染物指标工业废气量的末端治理技术是-，末端治理设施实际运行率（k值）计算公式为-。原文件中描述污染物类别为废气，污染物指标为工业废气量，此处对其进行了匹配工作，将其匹配到LCAflow库里面相最符合的流，污染物指标备注为工业废气量，产污系数备注为气化工艺为粉煤气化和水煤浆气化的产污系数
- Exhaust gas: nan
  污染物指标工业废气量的末端治理技术是-，末端治理设施实际运行率（k值）计算公式为-。原文件中描述污染物类别为废气，污染物指标为工业废气量，此处对其进行了匹配工作，将其匹配到LCAflow库里面相最符合的流，污染物指标备注为工业废气量，产污系数备注为气化工艺为碎煤气化的产污系数；
- volatile organic compound: nan
  污染物指标挥发性有机物的末端治理技术是直排，其效率为0，末端治理设施实际运行率（k值）计算公式为-。原文件中描述污染物类别为废气，污染物指标为挥发性有机物，此处对其进行了匹配工作，将其匹配到LCAflow库里面相最符合的流，污染物指标备注为挥发性有机物，产污系数备注为气化工艺为粉煤气化和水煤浆气化的产污系数
- volatile organic compound: nan
  污染物指标挥发性有机物的末端治理技术是直排，其效率为0，末端治理设施实际运行率（k值）计算公式为-。原文件中描述污染物类别为废气，污染物指标为挥发性有机物，此处对其进行了匹配工作，将其匹配到LCAflow库里面相最符合的流，污染物指标备注为挥发性有机物，产污系数备注为气化工艺为碎煤气化的产污系数；
- volatile organic compound: nan
  污染物指标挥发性有机物的末端治理技术是蓄热式热力燃烧法，其效率为70，末端治理设施实际运行率（k值）计算公式为k=废气焚烧炉耗电量（千瓦时）/（废气焚烧炉额定功率（千瓦）×废气焚烧炉运行时间（小时））。原文件中描述污染物类别为废气，污染物指标为挥发性有机物，此处对其进行了匹配工作，将其匹配到LCAflow库里面相最符合的流，污染物指标备注为挥发性有机物，产污系数备注为气化工艺为粉煤气化和水煤浆气化的产污系数
- volatile organic compound: nan
  污染物指标挥发性有机物的末端治理技术是蓄热式热力燃烧法，其效率为70，末端治理设施实际运行率（k值）计算公式为k=废气焚烧炉耗电量（千瓦时）/（废气焚烧炉额定功率（千瓦）×废气焚烧炉运行时间（小时））。原文件中描述污染物类别为废气，污染物指标为挥发性有机物，此处对其进行了匹配工作，将其匹配到LCAflow库里面相最符合的流，污染物指标备注为挥发性有机物，产污系数备注为气化工艺为碎煤气化的产污系数；

## Data sources
- 第二次全国污染源普查产排污核算系数手册（试用版）,二级代码25,四级代码2522文件，在完整版文件中第2905页
