# 底泥修复;异位修复;异位热解析;工程实施;产品分离

Dataset: ILCD process, Unit process, single operation
Geography: CN
Classification: Other Services / Repair and maintenance
Generated by: 王枫, wangfeng@caep.org.cn
Owner: 天工LCI数据工作小组
Review: Dependent internal review by 天工LCI数据工作小组
Amounts: no units in this file; such an amount is in the reference unit of its flow, which a separate flow dataset defines
copyright: false
licenseType: Free of charge for all users and uses

## General comment
以处理1 t 污泥为功能单位。1）运输环节采用载重5t卡车，运输距离2 km；2）干化环节采用空心桨叶干化机，功率55 kW，整个干化系统规模为50 t/d，24 h工作制；3）热解环节管式炉额定功率4 kW，空载功率1.4 kW，反应前通入2~3 分钟N2以保证无氧环境，热解终温选定350℃；4）热解所产气体首先经过冷却装置，冷凝收集液体成分主要为可以回收利用的生物油，回收分离出的可燃性气体，固体半焦可用作吸附剂。

## Technical purpose
所描述的工业过程涉及使用异位热解析方法进行底泥修复。该过程作为工程项目实施，其功能是处理1吨污泥。运送污泥使用载重5吨的卡车，运输距离为2公里。干化步骤采用功率为55千瓦的空心桨叶干化机，系统规模为每日50吨，24小时不停工作。热解步骤在额定功率为4千瓦、空载功率为1.4千瓦的管式炉中进行。反应前需通入氮气2至3分钟以确保无氧环境。热解终温为350摄氏度，首先通过冷却装置使气体产品冷凝，收集的冷凝物主要是具有较高热值的生物油，可回收利用。该数据集代表单一单元过程（单一操作）。

## Reference product
- tar: 100.32; calculated

## Inputs
- Remediated Sediment: 1000; calculated

## Outputs
- carbon monoxide: 12.07; calculated
- carbon dioxide: 6.15; calculated
- Oils (unspecified): 79.18; calculated

## Use advice
在使用此数据集进行生命周期评估（LCA）时，用户必须确保处理条件与所描述的匹配（例如，设备类型和容量，反应参数）。该数据集专用于使用异位热解析的底泥修复过程，并且只应应用于类似场景。对于模型中运输距离的设定，应根据具体情况进行考虑，默认设置为2公里。干化和热解阶段的能耗输入应按给定数据核算，并且在规模有差异时进行调整。用户应注意，生产的生物油回收是过程的一部分，并应在影响评估中考虑其能源回收潜力。热解步骤中缺氧是必要的，因此在将此过程适用于其他应用或与操作条件不同的过程进行比较时应予以注意。

## Review details
清单： 内部审查通过几个迭代步骤完成，涉及原始数据验证、原始数据记录、代表性、完整性、与 ISO 14040 和 14044 有关的建模的一致性。

## Data sources
- 王久兵.污泥热解反应机制及其能源化工艺的全生命周期评价研究[D].浙江工业大学,2016.
