# Geological design of exploration well | Different structural belts in Weining block | Study on Profile Refinement

Dataset: ILCD process, Unit process, single operation
Geography: BJ-CN
Reference year: 2009
Classification: Materials production / Other mineralic materials
LCI method principle: Attributional
LCI method approaches: Consequential
Generated by: Shikang Kang, 908798159@qq.com
Review: Dependent internal review by Tiangong LCI Data Working Group
Amounts: no units in this file; such an amount is in the reference unit of its flow, which a separate flow dataset defines
copyright: false

## General comment
According to the difference of pressure system in different structural belts of Weining block, the fine study of three pressure profiles is carried out by synthesizing a number of data. On this basis, the wellbore structure of South Ayashi and Winnie structural belts is optimized by using the top-down wellbore structure design method, aiming at providing technical support for excellent and fast drilling in this exploration area.

## Geography
Data development site

## Time period
Data collection time

## Technology and included processes
Based on the data of rock mechanics experiment, logging, oil and gas test, MDT formation pressure test and formation integrity test, and considering the difference of formation pressure system in different structural zones in Weining block, three fine pressure profiles of South Ayashi structural zone and Wini structural zone are established respectively, and the wellbore structure and casing program system suitable for different structural zones are further optimized.

## Reference product
- process steam from natural gas: 1898; input; log-normal; article inperiodical
  Ø340mm技套1898m,数据为分布，量中填写的数据为取平均（取中值）的结果

## Inputs
- process steam from natural gas: 0.96; log-normal; article inperiodical
  平均钻井生产时效,数据为分布，量中填写的数据为取平均（取中值）的结果

## Data selection and combination
Based on logging data, three pressure profiles of South Ayashi structural belt and Winnie structural belt in Weining block are established. After repeated checking and verification by test data, MDT data and formation integrity test data, three fine pressure profiles are finally formed in Weining block

## Data treatment and extrapolations
The geological understanding of exploration blocks is generally shallow, and the drilling success rate should be paid attention to in wellbore structure design. Therefore, the top-down design method combined with casing strength check is selected to make the upper large-size casing run as deep as possible, so as to ensure the drilling reach the target horizon and avoid the completion of slim hole drilling

## Review details
Inventory: The internal review was done by several iteration steps concerning raw data validation, raw data documentation, representativity, completeness and consistency of modelling with regard to ISO 14040 and 14044.; Documentation: The review of the documentation was performed by Ecobilan and is in compliance with ISO 14040 and 14044. The data set documentation is correct in view of the appropriateness of the information provided. It includes all relevant information in view of data quality and scope of application of the respective LCI result.

## Data sources
- 沈海超;张华卫;刘畅;曲洪娜; 亚北极海域萨哈林维宁区块探井井身结构优化研究. 钻采工艺 96–98 (2016).
