# 铝土矿开采 ; 铝土矿 ; 摇篮 ; 2014年

Dataset: ILCD process, Unit process, single operation
Geography: CN
Reference year: 2021
Classification: Unit processes / Materials production / Non-energetic raw materials
Generated by: 蔡梓萌, caizm6178@163.com
Owner: 天工LCI数据工作小组
Review: Dependent internal review by 天工LCI数据工作小组
Amounts: no units in this file; such an amount is in the reference unit of its flow, which a separate flow dataset defines
copyright: false
licenseType: Free of charge for all users and uses

## General comment
氧化铝生产2017

## Time period
文献发表日期

## Technical purpose
该数据集描述了铝土矿开采和氧化铝（铝的氧化物）生产的生命周期清单（LCI），作为铝制造业的初级加工步骤。铝土矿通常用于生产铝金属，由于其重量轻、耐蚀性好和导电性高的特性，进一步应用于汽车、航空航天、建筑、包装和电气工业等各种应用中。

## Reference product
- bauxite: 5.99337e10; software or database

## Inputs
All rows: software or database
- electricity, high voltage, aluminium industry: 1.98486e8
  electricity
- Coal, brown, in ground: 3.76756e8
  coal
- natural gas, high pressure: 6.405e6
  coal
- Gasoline: 1.036e6
  gasoline
- Diesel oil: 2.0346e7
  diesel

## Data selection and combination
本研究的数据参考了PA、SA、电力等背景数据的LCA数据。PA数据来自统计数据源，SA数据主要来自文献。背景数据主要来自中国科学院生态环境研究中心CASRCEES 2018建立的中国本地化LCA数据库，涵盖能源、材料、交通、废物管理等LCA数据。

## Use advice
在使用该数据集进行生命周期评估时，重要的是确保评估的系统边界包括铝土矿开采的摇篮阶段。PA（过程分析）数据应参照统计数据来源以确保准确性，而SA（情景分析）数据应与相关文献比较，以确定其适用性。用户还必须考虑所提供的特定于2014年和2017年的技术背景，并结合中国本地化的CAS RCEES 2018生命周期评估数据库中的背景数据，以进行全面评估。应特别注意中国背景下这些年里普遍存在的能耗、材料采购、运输和废物管理实践的方法论假设。

## Review details
清单： 内部审查通过几个迭代步骤完成，涉及原始数据验证、原始数据记录、代表性、完整性、与 ISO 14040 和 14044 有关的建模的一致性。

## Data sources
- Ding, N., Liu, N., Lu, B. & Yang, J. Life cycle greenhouse gas emissions of aluminum based on regional industrial transfer in China. J. Ind. Ecol. 25, 1657–1672 (2021).
