# 铝锭铸造 ; 原生铝锭 ; 液态原铝 ; 2008年

Dataset: ILCD process, Unit process, single operation
Geography: CN
Reference year: 2021
Classification: Unit processes / Materials production / Metals and semimetals
Generated by: 蔡梓萌, caizm6178@163.com
Owner: 天工LCI数据工作小组
Review: Dependent internal review by 天工LCI数据工作小组
Amounts: no units in this file; such an amount is in the reference unit of its flow, which a separate flow dataset defines
copyright: false
licenseType: Free of charge for all users and uses

## General comment
此原生铝锭铸造过程用于从液态原生铝生产高纯度铝锭。这些铝锭通常用于汽车、建筑和包装等行业，进一步加工成组件、结构或包装材料。

## Time period
文献发表日期

## Reference product
- aluminium, primary, ingot: 1000; software or database

## Inputs
- aluminium, primary, liquid: 1027.16; software or database

## Data selection and combination
本研究的数据参考了PA、SA、电力等背景数据的LCA数据。PA数据来自统计数据源，SA数据主要来自文献。背景数据主要来自中国科学院生态环境研究中心CASRCEES 2018建立的中国本地化LCA数据库，涵盖能源、材料、交通、废物管理等LCA数据。

## Use advice
本原生铝锭铸造过程的生命周期评估（LCA）数据应谨慎使用。确保LCA范围包含产品的整个生命周期，从原材料提取到生命周期结束阶段。考虑出版年份对数据相关性至关重要，并依赖于更新的统计数据来源和文献进行过程分析。背景数据来源于CAS RCEES 2018数据库；验证这是否与评估的地理背景一致。注意方法论差异，并在与其他数据集整合时确保数据一致性。

## Review details
清单： 内部审查通过几个迭代步骤完成，涉及原始数据验证、原始数据记录、代表性、完整性、与 ISO 14040 和 14044 有关的建模的一致性。

## Data sources
- Ding, N., Liu, N., Lu, B. & Yang, J. Life cycle greenhouse gas emissions of aluminum based on regional industrial transfer in China. J. Ind. Ecol. 25, 1657–1672 (2021).
