# 铝电解 ; 液态原铝 ; 预焙 ; 冶金用氧化铝 ; 2015年

Dataset: ILCD process, Unit process, single operation
Geography: CN
Reference year: 2021
Classification: Unit processes / Materials production / Metals and semimetals
Generated by: 蔡梓萌, caizm6178@163.com
Owner: 天工LCI数据工作小组
Review: Dependent internal review by 天工LCI数据工作小组
Amounts: no units in this file; such an amount is in the reference unit of its flow, which a separate flow dataset defines
copyright: false
licenseType: Free of charge for all users and uses

## General comment
该生命周期评价数据集代表了使用冶金级氧化铝、并包含预焙步骤的铝电解过程，用以生产液态原铝。该过程适用于多种行业中高纯度铝的合成，例如航天、交通、电子和建筑材料行业。通过此过程生产的原铝通常会被铸造成锭块、棒材或其他形式，以便进一步加工或直接用于制造业。

## Time period
文献发表日期

## Reference product
- aluminium, primary, liquid: 1000; software or database

## Inputs
All rows: software or database
- Integrated AC power consumption: 47652.2
- aluminium oxide, metallurgical: 1910.16
- fluoride salt: 18.19
- anode, prebake, for aluminium electrolysis: 450.79
- Water, unspecified natural origin: 1.58

## Data selection and combination
本研究的数据参考了PA、SA、电力等背景数据的LCA数据。PA数据来自统计数据源，SA数据主要来自文献。背景数据主要来自中国科学院生态环境研究中心CASRCEES 2018建立的中国本地化LCA数据库，涵盖能源、材料、交通、废物管理等LCA数据。

## Use advice
使用此数据集时，必须考虑特定年份（2015年）因为自那时起技术和能效可能已发展变化。由于此数据是区域特定的（中国生命周期评价背景），应在相应的地理范围内进行LCA研究时使用，或谨慎考虑调整以代表其他地区。为了方法论的一致性，用户应注意PA数据源自统计数据来源，SA数据主要来自现有文献，背景数据来自中国本土化的CAS RCEES 2018数据库。确保这些数据源与正在进行的LCA的目标和范围兼容。

## Review details
清单： 内部审查通过几个迭代步骤完成，涉及原始数据验证、原始数据记录、代表性、完整性、与 ISO 14040 和 14044 有关的建模的一致性。

## Data sources
- Ding, N., Liu, N., Lu, B. & Yang, J. Life cycle greenhouse gas emissions of aluminum based on regional industrial transfer in China. J. Ind. Ecol. 25, 1657–1672 (2021).
