# 修复后土壤;异位固化稳定化;水泥、膨润土;土壤原位修复;5个月

Dataset: ILCD process, Unit process, black box
Geography: UM
Reference year: 2009
Classification: Unit processes / Other Services / Repair and maintenance
Functional unit: The functional unit is defined as remediation of 5000 yd 3 of soil. The design of the treatment options is generic, and lacks parameters such as site characteristics, hydrology and efficiency of technology.
Generated by: 杨欣桐, yangxt@caep.org.cn
Owner: 天工LCI数据工作小组
Review: Dependent internal review by 天工LCI数据工作小组
Amounts: no units in this file; such an amount is in the reference unit of its flow, which a separate flow dataset defines
copyright: false
licenseType: Free of charge for all users and uses

## General comment
异位固化稳定化，即挖掘受污染的土壤，在搅拌机中混合，并在场外处理，这需要运输。处理所需的粘合剂量是根据实际场地的报告中的数据。供应商、垃圾填埋场和清洁填料来源的运输距离假定为75公里。处理的平均运行时间假定为5个月（US EPA, 2000）。

## Geography
本研究使用的是一个假设的场地，且没有明确场地所在位置，因此采用作者所在的区域作为场地位置，即美国Newark

## Technology and included processes
异位固化稳定化需要搅拌机1台、挖掘机、压实机、装载机料、斗和鼓风机、40吨自卸车1辆，修复周期：5个月，需要工人10名工人/天.假设场地到垃圾填埋场和到供应商的运输距离均为75公里。

## Technical purpose
所述工艺用于污染土壤修复。它涉及使用水泥和膨润土进行异位固化/稳定化(S/S)处理。修复后的土壤适用于安全再分配或在建筑、景观设计或作为覆盖材料中的再利用。它不特定于任何位置，但使用美国纽瓦克地区作为案例研究。

## Reference product
- Remediated soil: 3822.77; estimated
  功能单元定义为5000 yd 3土壤的修复（1yd3等于0.764554857984立方米,即修复方量约为3822.77 m3）。

## Inputs
All rows: estimated
- cement, unspecified: 1e6
- bentonite: 400000
- Electricity: 32400
- Diesel,Diesel: 57
- Road Transport,Road Transport: 6e7
- transport in t*km: 2.12e6
  运输总距离为450km，自卸车载重40吨
- contaminated soil: 3822.77

## Use advice
使用此数据进行生命周期评估时，应包括在场地准备和拆卸阶段材料和设备的运输。考虑在处理阶段使用材料和电力。注意处理选项的通用设计和缺乏具体的现场特性。在将结果推广到其他位置时要小心。所有阶段的运输距离假定为75公里。

## Review details
清单： 内部审查通过几个迭代步骤完成，涉及原始数据验证、原始数据记录、代表性、完整性、与 ISO 14040 和 14044 有关的建模的一致性。

## Data sources
- Dhaliwal, Harnoor, "Sustainable site remediation : a life cycle assessment approach" (2009). Theses. 296.
