# 西北（张掖高台）玉米生产 ; 农业资料生产

Dataset: ILCD process, Unit process, single operation
Geography: ZY-GS-CN
Reference year: 2012
Valid until: 2012
Classification: Unit processes / Materials production / Agricultural production means
Functional unit: 1 t
LCI method principle: Attributional
LCI method approaches: Consequential
Generated by: Haoran Zhang, hrzhang@whu.edu.cn
Owner: 天工LCI数据工作小组
Review: Dependent internal review by 天工LCI数据工作小组
Amounts: no units in this file; such an amount is in the reference unit of its flow, which a separate flow dataset defines
copyright: false
licenseType: Free of charge for all users and uses

## General comment
文章基于农户调研数据,运用农业碳足迹理论及生命周期法定量研究长江下游地区稻麦轮作系统碳足迹大小及组成,并进一步分析碳足迹影响因素

## Geography
高台县

## Technology and included processes
用 LCA 方法评估制种玉米农业系统，是把产品 从投入到最终产出的处理的整个过程作为研究对象， 进行量化分析和比较，以评价制种玉米环境影响[13]。本 文使用制种玉米质量 1 t 作为功能单元，系统边界从化 肥和电力的生产开始，终止边界为作物种植过程输出 农产品和污染物，即存在两个生产系统，分别是农资生 产系统和作物生产系统

## Technical purpose
该数据表述了张掖高台地区玉米生产的生命周期清单，用于评估玉米生产过程的环境足迹，特别是碳足迹。所产玉米可作为食品来源、畜牧饲料或作为工业过程原料，如生物燃料生产或生物塑料制造。研究包括农业投入生产系统（包括化肥和电力）和作物生产系统，反映了农业实践中资源投入和污染物输出的全方位。

## Reference product
- maize grain: 1000; measured

## Inputs
- Labor: 0.3; measured
  人
- Production Expenditure: 2176.05; calculated
  元
- Electricity: 658.368; measured
  用于抽水

## Deviations from the LCI method approaches
系统边界从化肥和电力的生产开始，终止边界为作物种植过程输出农产品和污染物，即存在两个生产系统，分别是农资生产系统和作物生产系统

## Data selection and combination
本文数据来源于张掖市统计抽样调查 2012年投 入产出表时，增加专项调查所获得的数据。甘州区选择碱滩镇、党寨村和小满村三个村镇，临泽县选择沙河镇和平川镇，高台县选择宣化镇、巷道村和骆驼城乡三个村镇， 剔除其中不完整的数据，共得到 72户农户的有效数 据

## Data treatment and extrapolations
，采用分层随机抽样和典型样本选择 法结合，问卷调查和典型样本结构化访谈的方式收集 数据。。调查内容围 绕所有投入的生产要素和经济成本以及资源性消耗 等，产出主要关注产品产量和当期的经济价值 ，以及 产生的废弃物量和处理方式等。

## Sampling procedure
确定张掖市三县区调 查样本量需补充人户调查 80户。样本的构成保持与 当地农业增加值比例相同的原则，按照农业增加值比 例 7：5：8确定相应调查户数，即三县区分别抽取28、 20、32户

## Use advice
用户应将此数据用于农作物生命周期评估的背景下，并考虑例如张掖高台等地区的特性，以获得更准确的环境影响评估。在未调整地区条件的情况下，慎重将结果外推至不同地区或农业系统。LCA模型还应考虑所使用的化肥和电力生产类型，因为这些是系统边界的起点。当有更多近期统计数据可用时，应更新评估结果，以保证相关性和准确性。

## Review details
清单： 内部审查通过几个迭代步骤完成，涉及原始数据验证、原始数据记录、代表性、完整性、与 ISO 14040 和 14044 有关的建模的一致性。

## Data sources
- 杨肖,钟方雷,郭爱君,王琼.干旱区绿洲制种玉米生命周期环境影响评价——以张掖市为例[J].农业环境科学学报,2017,36(8):1664-1671
