# 修复后土壤;原位化学氧化;土壤原位修复;芬顿试剂;50对注入井;1年

Dataset: ILCD process, Unit process, black box
Geography: UM
Reference year: 2009
Classification: Unit processes / Other Services / Repair and maintenance
Functional unit: The functional unit is defined as remediation of 5000 yd 3 of soil. The design of the treatment options is generic, and lacks parameters such as site characteristics, hydrology and efficiency of technology.
Generated by: 杨欣桐, yangxt@caep.org.cn
Owner: 天工LCI数据工作小组
Review: Dependent internal review by 天工LCI数据工作小组
Amounts: no units in this file; such an amount is in the reference unit of its flow, which a separate flow dataset defines
copyright: false
licenseType: Free of charge for all users and uses

## General comment
化学氧化已被用作一种原位技术来处理土壤碳氢化合物污染。处理时间通常为几个月（US EPA, 1998）。过氧化氢是常用的氧化剂之一，尤其是KMnO4和臭氧（ITRC，2005）。一旦氧化剂注入污染区，过氧化物就会在数小时内分解成氧气和水，并产生一种羟基自由基，可以非常有效地氧化复杂的有机化合物。通常，过氧化物在修复部位以液体形式使用，剂量浓度范围为5%至50%。

## Geography
本研究使用的是一个假设的场地，且没有明确场地所在位置，因此采用作者所在的区域作为场地位置，即美国Newark

## Technology and included processes
原位化学氧化的工艺参数涉及：50个成对注入井（钢制，每对井各由6m和2m深的单井组成，井管直径6.25cm），注入井影响半径2m；4口监测井（8m深，直径6.25cm）；氧化剂：芬顿试剂；泵的功率为1kW；20t自卸车一辆；修复周期：1年；需要工人数量：10名工人/d

## Technical purpose
该数据集描述了一种使用芬顿试剂的土壤原位化学氧化修复过程。土壤原位化学氧化修复适用于通过氧化降解处理碳氢化合物污染土壤。该过程可用于环境修复项目，在这些项目中需要原位处理污染物，无需对土壤进行挖掘，通常适用于工业场地或污染物已经渗入地下深处的区域。

## Reference product
- Remediated soil: 3822.77; estimated
  功能单元定义为5000 yd 3土壤的修复（1yd3等于0.764554857984立方米,即修复方量约为3822.77 m3）。

## Inputs
All rows: estimated
- bentonite: 530
- sand: 113
- Steel: 3400
- Mortar: 1600
- Hydrogen peroxide,Hydrogen peroxide: 10
- Ferrous sulfate,ferrous sulfate: 20000
- Electricity: 360
- Road Transport,Road Transport: 1.6e7
- transport in t*km: 9000
  运输总距离为450km，自卸车载重20吨
- contaminated soil: 3822.77

## Use advice
在使用此数据集进行生命周期评估时，用户必须注意案例研究的假设性质，并考虑缺乏特定场地特征、水文和技术效率的情况。基于作者区域即美国纽瓦克的假设已被使用，用户应调整参数以适应其项目的具体条件和位置。所描述的功能单元要求基于需要修复的土壤体积进行缩放。在模型化环境影响时，还需关键地包括在准备和拆卸阶段材料和设备的运输。

## Review details
清单： 内部审查通过几个迭代步骤完成，涉及原始数据验证、原始数据记录、代表性、完整性、与 ISO 14040 和 14044 有关的建模的一致性。

## Data sources
- Dhaliwal, Harnoor, "Sustainable site remediation : a life cycle assessment approach" (2009). Theses. 296.
