# cement production|cement, ordinary portland cement

Dataset: ILCD process, Partly terminated system
Geography: CN
Classification: Materials production / Other mineralic materials
Generated by: Siqi Yang
Amounts: no units in this file; such an amount is in the reference unit of its flow, which a separate flow dataset defines
copyright: false

## General comment
Selecting the portland cement series as the research object, calculate the carbon emissions from the cement production process.

## Model description
The focus of the research is on the carbon emissions and energy consumption associated with the production of cement in the portland cement series, excluding calculations for resource consumption of industrial waste. The study mainly examines the direct carbon emissions and energy consumption during the processes of raw material extraction, raw material preparation, clinker calcination, grinding, homogenization, packaging, and transportation. It is assumed that all raw materials related to cement production are transported using diesel trucks with a carrying capacity of 5 tons, and the average transportation distance is 100 km. Other relevant factors are not considered.

## Reference product
- cement, ordinary portland cement: 1000
  Ordinary Portland Cement

## Inputs
All rows: article inperiodical
- limestone, crushed, for mill: 1300
  Limestone
- clay: 300
  Clay
- iron ore: 30
  Iron ore
- gypsum (desulphurized): 50
  Gypsum
- electricity, medium voltage: 435.237
  Electricity consumption
- hard coal: 100.831
  The original text is hot consumption (that is, coal consumption). The original data is 2745.617MJ heat consumption, here converted to hard coal, the conversion formula is 1kg hard coal = 27.23MJ heat consumption.
- diesel: 46.6099
  Diesel vehicle transportation energy consumption. Assuming that all raw materials related to cement production are transported by diesel vehicles with a load capacity of 5 tons, and the average transportation distance is 100 km, without considering other relevant factors.

## Outputs
- carbon dioxide: 870.306; article inperiodical
  CO2

## Cut-off and completeness
Focusing only on carbon emissions from cement production.

## Data selection and combination
From statistics data of cement production enterprises.

## Data sources
- 陈乔. (2014). 建筑工程建设过程碳排放计算方法研究 [硕士, 长安大学].
