# Tebuconazole|Triazole,potassiumhydroxidereduction|Fully synthetic|All sizes / 戊唑醇|三氮唑、氢氧化还原法钾|全合成|所有规模

Dataset: ILCD process, Unit process, single operation
Geography: CN
Reference year: 2019
Classification: Materials production / Organic chemicals
Generated by: The data was created by the Office of the Second National Pollution Source Census of the Ministry of Ecology and Environment, and the data was organized by the TianGong Plan team for ILCD format / 生态环境部第二次全国污染源普查工作办公室创建数据，天工计划团队常慧敏整理数据为ILCD格式
Owner: Tiangong LCI Data Working Group / 天工LCI数据工作小组
Amounts: no units in this file; such an amount is in the reference unit of its flow, which a separate flow dataset defines
copyright: false
licenseType: Free of charge for all users and uses

## Technology and included processes
the Technical of end-of-pipe management technology for pollution volatile organic compoundis(Absorption + diversion) + thermal combustion，Its Technical efficiency of end-of-pipe management99.9

## Reference product
- Tebuconazole: 1000; calculated
  源文件中描述为为戊唑醇，此处对其进行了匹配工作，将其匹配到LCAflow库里面相最符合的流，污染物指标备注为工业废水量

## Outputs
All rows: calculated
- Waste water: 7000
  污染物指标工业废水量的末端治理技术是/，其效率为0。原文件中描述污染物类别为废水，污染物指标为工业废水量，此处对其进行了匹配工作，将其匹配到LCAflow库里面相最符合的流，污染物指标备注为工业废水量
- chemical oxygen demand: 13.52
  污染物指标化学需氧量的末端治理技术是电解法+氧化还原法+A/O工艺，其效率为96，末端治理设施实际运行率（k值）计算公式为k=治理设施耗电量（千瓦时）/（治理设施运行时数（小时）*治理设施额定功率(千瓦)）。原文件中描述污染物类别为废水，污染物指标为化学需氧量，此处对其进行了匹配工作，将其匹配到LCAflow库里面相最符合的流，污染物指标备注为化学需氧量
- chemical oxygen demand: 6.76
  污染物指标化学需氧量的末端治理技术是萃取+吸附+厌氧水解类+活性污泥法，其效率为98，末端治理设施实际运行率（k值）计算公式为k=治理设施耗电量（千瓦时）/（治理设施运行时数（小时）*治理设施额定功率(千瓦)）。原文件中描述污染物类别为废水，污染物指标为化学需氧量，此处对其进行了匹配工作，将其匹配到LCAflow库里面相最符合的流，污染物指标备注为化学需氧量
- Ammonia Nitrogen: 0.1498
  污染物指标氨氮的末端治理技术是电解法+氧化还原法+A/O工艺，其效率为72，末端治理设施实际运行率（k值）计算公式为k=治理设施耗电量（千瓦时）/（治理设施运行时数（小时）*治理设施额定功率(千瓦)）。原文件中描述污染物类别为废水，污染物指标为氨氮，此处对其进行了匹配工作，将其匹配到LCAflow库里面相最符合的流，污染物指标备注为氨氮
- Ammonia Nitrogen: 0.0214
  污染物指标氨氮的末端治理技术是萃取+吸附+厌氧水解类+活性污泥法，其效率为96，末端治理设施实际运行率（k值）计算公式为k=治理设施耗电量（千瓦时）/（治理设施运行时数（小时）*治理设施额定功率(千瓦)）。原文件中描述污染物类别为废水，污染物指标为氨氮，此处对其进行了匹配工作，将其匹配到LCAflow库里面相最符合的流，污染物指标备注为氨氮
- Nitrogen, organic bound: 0.5792
  污染物指标总氮的末端治理技术是电解法+氧化还原法+A/O工艺，其效率为84，末端治理设施实际运行率（k值）计算公式为k=治理设施耗电量（千瓦时）/（治理设施运行时数（小时）*治理设施额定功率(千瓦)）。原文件中描述污染物类别为废水，污染物指标为总氮，此处对其进行了匹配工作，将其匹配到LCAflow库里面相最符合的流，污染物指标备注为总氮
- Nitrogen, organic bound: 0.0724
  污染物指标总氮的末端治理技术是萃取+吸附+厌氧水解类+活性污泥法，其效率为98，末端治理设施实际运行率（k值）计算公式为k=治理设施耗电量（千瓦时）/（治理设施运行时数（小时）*治理设施额定功率(千瓦)）。原文件中描述污染物类别为废水，污染物指标为总氮，此处对其进行了匹配工作，将其匹配到LCAflow库里面相最符合的流，污染物指标备注为总氮
- phenol: 0.0002
  污染物指标挥发酚的末端治理技术是电解法+氧化还原法+A/O工艺，其效率为98，末端治理设施实际运行率（k值）计算公式为k=治理设施耗电量（千瓦时）/（治理设施运行时数（小时）*治理设施额定功率(千瓦)）。原文件中描述污染物类别为废水，污染物指标为挥发酚，此处对其进行了匹配工作，将其匹配到LCAflow库里面相最符合的流，污染物指标备注为挥发酚
- phenol: 2e-5
  污染物指标挥发酚的末端治理技术是萃取+吸附+厌氧水解类+活性污泥法，其效率为99.8，末端治理设施实际运行率（k值）计算公式为k=治理设施耗电量（千瓦时）/（治理设施运行时数（小时）*治理设施额定功率(千瓦)）。原文件中描述污染物类别为废水，污染物指标为挥发酚，此处对其进行了匹配工作，将其匹配到LCAflow库里面相最符合的流，污染物指标备注为挥发酚
- Exhaust gas: 2000
  污染物指标工业废气量的末端治理技术是/，其效率为0。原文件中描述污染物类别为废气，污染物指标为工业废气量，此处对其进行了匹配工作，将其匹配到LCAflow库里面相最符合的流，污染物指标备注为工业废气量
- volatile organic compound: 0.396
  污染物指标挥发性有机物的末端治理技术是（吸收+分流）+热力燃烧，其效率为99.9，末端治理设施实际运行率（k值）计算公式为k=治理设施耗电量（千瓦时）/（治理设施运行时数（小时）*治理设施额定功率(千瓦)）。原文件中描述污染物类别为废气，污染物指标为挥发性有机物，此处对其进行了匹配工作，将其匹配到LCAflow库里面相最符合的流，污染物指标备注为挥发性有机物

## Data sources
- 第二次全国污染源普查产排污核算系数手册（试用版）,二级代码26,三级代码263.0文件，在完整版文件中第2936页
