# 聚合物铝电解电容器 (PAEC) 使用 ; 使用过的电容器

Dataset: ILCD process, Unit process, single operation
Geography: CN
Reference year: 2022
Classification: Unit processes / Materials production / Metals and semimetals
Generated by: 封羽真, fyz22
Owner: 天工LCI数据工作小组
Review: Dependent internal review by 天工LCI数据工作小组
Amounts: no units in this file; such an amount is in the reference unit of its flow, which a separate flow dataset defines
copyright: false
licenseType: Free of charge for all users and uses

## General comment
接着49

## Time period
文献发表于2022-11-15，文献中 The reference year of the elementary data (alumminum ingots, separator paper, tansport, electricity, and water) is around 2016 and qcruired from the Gabi database (Version: 10.6.1.35)

## Technical purpose
聚合物铝电解电容器（PAECs）主要用于需要稳定电荷储存和过滤的电子设备中。这些电容器在电源电路、消费性电子产品、电信、汽车电子以及其他高级电子设备中发挥着重要作用。

## Reference product
- capacitor, electrolyte type, > 2cm height: 1e6; input; measured

## Inputs
- electricity, high voltage, aluminium industry: 214626; measured
  Electricity

## Outputs
- used capacitor: 1e6; measured
  Capacitors (waste)

## Data selection and combination
三种 AEC 的材料信息和性能参数均来自被调查的制造商。此外，通过对 AEC 行业的几家工厂进行实地调研，获得了铝坯箔制造（由铝锭制成）、阳极/阴极箔制造（由铝坯箔制成）和电容器制造的原始数据。由于技术保密原因，无法直接从供应商处获得 PHAEC 阴极箔制造的 LCI 数据。因此，考虑到两者的相似性，根据 PAECs 阴极箔的涂层工艺数据调整 PHAECs 阴极铝箔的制造 LCI。在运输阶段，主要原材料从材料产地到电容器制造商的数据以及电容器制成品从制造商到客户的数据均来自制造商的供应链系统。使用阶段的能耗是根据 AEC 的物理方程和电气参数计算得出的。为确保分析的完整性，在分析和计算的基础上获得报废阶段的数据。基本数据的参考年份约为 2016 年。基本数据（即铝锭、分离纸、运输、电力和水）来自 Gabi 数据库（版本：10.6.1.35）。此外，一些背景数据，包括 3，4-乙烯二氧噻吩（EDOT）、己二酸铵、柠檬酸铵等，在 Gabi 数据库中无法获得。它们是根据 Gabi 数据库中现有原材料在材料制备过程中发生的化学反应估算出来的。用于制造 PHAECs 的分散溶液（PEDOT:PSS，1%wt）的制备过程数据是根据实验室数据按比例计算的。三种 AEC 的详细 LCI 数据和物质流的单位影响见辅助信息 B 的第 5-7 张和第 2 张。

## Use advice
数据集用户应注意，由于保密性，聚合物高压铝电解电容器（PHAECs）的阴极箔的生命周期清单（LCI）数据是基于与PAECs相似的调整数据。用户在将研究成果推广到参考研究范围之外时应格外谨慎，并尽可能用更新的数据更新LCI。基础数据的参考年份为2016年左右，用户可能需要考虑时间对齐以进行最新评估。运输数据反映了特定制造商的供应链系统，可能不代表所有可能的运输场景。使用阶段的能耗必须使用针对所讨论的AEC的特定物理方程和电参数来计算。产品生命周期的末期阶段数据需要仔细分析，并应考虑回收和处置场景。

## Review details
清单： 内部审查通过几个迭代步骤完成，涉及原始数据验证、原始数据记录、代表性、完整性、与 ISO 14040 和 14044 有关的建模的一致性。

## Data sources
- Zhang, C., Zheng, Y., Jing, J., Liu, Y. & Huang, H. A comparative LCA study on aluminum electrolytic capacitors: From liquid-state electrolyte, solid-state polymer to their hybrid. J. Clean. Prod. 375, (2022).
