# cement production|cement, common portland cement|shaft kiln|mixed solid wastes

Dataset: ILCD process, Unit process, black box
Geography: GS-CN
Classification: Materials production / Other mineralic materials
Generated by: Siqi Yang
Amounts: no units in this file; such an amount is in the reference unit of its flow, which a separate flow dataset defines
copyright: false

## General comment
Shaft kiln. 100% cement dust was recycled.

## Geography
Yongjing County Jinhe Shunfa Building Materials Co., Ltd.

## Model description
The production of 1 ton common Portland cement, which accounts for approximately 98% of the total cement production in China , was selected as the functional unit.
The system boundaries of the shaft kiln. Three stages, namely, raw material crushing, clinker generation, and cement grinding, were generally considered. The clinker generation stage of the scenarios that employ mixing with water, ball-making, and incineration. Raw materials, energy consumption, road transport, direct emissions (i.e., carbon dioxide, sulfur dioxide, nitrogen oxides, and particulates), and infrastructure were considered in each process.

## Reference product
- cement, common portland cement: 1000
  Common Portland cement

## Inputs
All rows: article inperiodical
- calcium carbonate: 1180
  Limestone
- gypsum: 42.9
  Gypsum
- water: 850
  Water
- dolomite: 53.68
  Dolomite
- clay: 33.66
  Red clay
- iron, powder: 18.32
  Iron powder
- Magnesium slag: 71.01
- blast furnace slag: 32.17
  Slag
- hard coal, run-of-mine: 183.63
  Coal
- electricity, medium voltage: 435.6
  Electricity

## Outputs
All rows: article inperiodical
- carbon dioxide: 850
  CO2. CO2 emission was calculated according to Eq.(Wu et al., 2006): E = 3:67a x k x Mcoal x Q + 0.38 x Mlimestone, where E, a, k, Mcoal, Q, and Mlimestone represent the amount of CO2 emission per ton of cement production, carbon oxygenation efficiency of coal (0.93, National Development and Reform Commission, 2011), carbon emission factor of coal (26.1 x 10-3, National Development and Reform Commission, 2011), mass of coal consumption per ton of cement production, caloric value of coal, and mass of limestone consumption per ton of cement production, respectively. The caloric value of coal considered in the present study was 24.48 MJ/kg.
- electricity, medium voltage: 1.2
  SO2. Emission data from the Chinese standard for cleaner production in the cement industry (HJ 467-2009).
- Nitrogen oxides: 2.4
  NOx. Emission data from the Chinese standard for cleaner production in the cement industry (HJ 467-2009).
- particles (> PM10): 5.4
  Particulates. The particle size is not specified. Here we treat it as PM>10. Direct air emission data were obtained from the Hongda Cement Plant (Yunnan, China).
- wastewater, unpolluted: 0.71
  Wastewater. The wastewater generated from the shaft kiln was treated in a civilian wastewater treatment plant.

## Data selection and combination
Shaft kiln scenarios, data were taken from literature. Application Research on Clean Production Technology in Cement Industry. Master Thesis. Lanzhou University.” Direct air emission data were obtained from the Hongda Cement Plant (Yunnan, China) because of lack of information from the former. In addition, the Chinese standard for cleaner production in the cement industry (HJ 467-2009) was used to determine direct air SO2 and NOx emissions in the shaft kiln scenario.

## Data sources
- Wei Chen, Jinglan Hong, & Changqing Xu. (2015). Pollutants generated by cement production in China, their impacts, and the potential for environmental improvement. JOURNAL OF CLEANER PRODUCTION, 103, 61–69.
