# Rare Earth leaching and inorganic pre-separation|Rare Earth|In-situ leaching|neodymium iron boron (NdFeB) magnet

Dataset: ILCD process, Unit process, single operation
Geography: NMG-CN
Reference year: 2014
Classification: Materials production / Other mineralic materials
Functional unit: The functional unit is a 1 kg NdFeB magnet
LCI method principle: Attributional
LCI method approaches: Allocation - market value; Allocation - mass
Generated by: Tao Wang, twang@iue.ac.cn
Review: Dependent internal review by Tiangong LCI Data Working Group
Amounts: no units in this file; such an amount is in the reference unit of its flow, which a separate flow dataset defines
copyright: false

## Geography
Bayan Obo (China)

## Technology and included processes
The basic process for Nd and Pr production is the same at all three deposits. It is identical for Nd and Pr except for the last solvent extraction step (SX5) where both are separated.

## Reference product
- RE chloride solution: 115; article inperiodical
  RE chloride solution. Bayan Obo: input for next process: Solvent extraction

## Inputs
- sulphuric acid: 7.58; article inperiodical
  Bayan Obo: based on annual demand
- hydrogen chloride: 6.32; article inperiodical
  Bayan Obo: own calculation based on Xu
- Ammonium bicarbonate: 7.3; calculated
  Ammonium bicarbonate. Bayan Obo: calculated amount for a pH value adjustment to 4
- hydrated lime dry slaked: 4.92; article inperiodical
  Bayan Obo: used for precipitation, calculation based on Xu
- Electricity: 0.9756; article inperiodical
  Bayan Obo: used for treatment of wastewater filtrate precipitation, stoichiometric calculation based on wastewater concentration
- Water: 256.4; article inperiodical
  Bayan Obo: estimation based on energy demand of solvent extraction
- transport in t*km,transport in t*km: 0.56; article inperiodical
  Bayan Obo: own calculation, based on Xu and mass and humidity of REE carbonate for the leaching processes and on solubility of NH4HCO3 for precipitation

## Outputs
All rows: article inperiodical
- Sludge: 6.97
  Bayan Obo: Ecoinvent process (RER: aluminium hydroxide factory) adapted to lifetime and throughput
- waste water - treated: 153
  Bayan Obo: own calculation based on Xu
- ammonium: 6.12
  Bayan Obo: own calculation based on Xu
- sulfate: 1.15
  Bayan Obo: own calculation based on Xu
- carbon dioxide: 1.179
  Bayan Obo: emitted during HCl leaching, stoichiometric calculation

## Deviations from the LCI method approaches
In this study, an allocation method based on the market prices of REOs28 is considered. To estimate uncertainties that refer to the allocation method, a mass-based allocation is undertaken as a sensitivity analysis

## Review details
Inventory: The internal review was done by several iteration steps concerning raw data validation, raw data documentation, representativity, completeness and consistency of modelling with regard to ISO 14040 and 14044.; Documentation: The review of the documentation was performed by Ecobilan and is in compliance with ISO 14040 and 14044. The data set documentation is correct in view of the appropriateness of the information provided. It includes all relevant information in view of data quality and scope of application of the respective LCI result.

## Data sources
- Marx, J., Schreiber, A., Zapp, P. & Walachowicz, F. Comparative Life Cycle Assessment of NdFeB Permanent Magnet Production from Different Rare Earth Deposits. ACS Sustainable Chem. Eng. 6, 5858–5867 (2018).
