# Soil and Groundwater Remediation;In Situ;Soil Bioventilation;Equipment and Materials Arriving on Site

Dataset: ILCD process, Unit process, single operation
Geography: CA
Reference year: 2007
Classification: Other Services / Engineering and consulting
Generated by: Wang Ning, wang_ning@caep.org.cn
Owner: Tiangong LCI Data Working Group
Review: Dependent internal review by Tiangong LCI Data Working Group
Amounts: no units in this file; such an amount is in the reference unit of its flow, which a separate flow dataset defines
copyright: false
licenseType: Free of charge for all users and uses

## General comment
Transportation of required materials to the site

## Geography
The contaminated area was located 600 m from a river shore in the northern part of the prov-ince of Quebec， Canada.

## Technology and included processes
Consumption of diesel gasoline for transportation of equipment and materials to project sites

## Technical purpose
This dataset represents a process used for in situ bioremediation of soil and groundwater, specifically soil bioventilation. It is applicable to environmental remediation projects where contamination is close to sensitive ecosystems, such as river shores. The data pertains to the mobilization of equipment and materials required for the bioremediation process, including the transportation to the site that is experiencing soil contamination.

## Reference product
- Equipment and Materials Arriving on Site: 1; estimated
  到达现场的材料和设备

## Inputs
- Diesel: 0.5; estimated
  将所需材料和设备运至现场所需要的柴油

## Use advice
When using this dataset for Life Cycle Assessment (LCA) of soil and groundwater remediation projects, users should ensure to account for the geographical specificity of the process, as it is based on a scenario in Quebec, Canada. LCA practitioners should include the transportation distances and modes relevant to the project context. Diesel fuel consumption for transportation should be adjusted based on actual distances and equipment used. The dataset assumes localization 600 m from a river shore; adjustments should be made if the contamination site in the LCA study has different characteristics.

## Review details
Inventory: The internal review was done by several iteration steps concerning raw data validation, raw data documentation, representativity, completeness and consistency of modelling with regard to ISO 14040 and 14044.
