# raw meal preparation|raw meal, portland cement raw meal|new dry process, ≥4000 t/d

Dataset: ILCD process, Unit process, single operation
Geography: CN
Reference year: 2019
Classification: Materials production / Other mineralic materials
Generated by: Siqi Yang
Amounts: no units in this file; such an amount is in the reference unit of its flow, which a separate flow dataset defines
copyright: false

## General comment
New dry process for cement raw meal production.

## Model description
The system boundary of the Life Cycle Assessment (LCA) is the raw meal preparation unit process.

## Reference product
- raw meal: 1000
  Ordinary portlant cement raw material

## Inputs
- iron, powder: 32.5; measured
  Iron powder. Upstream data source: CLCD-China-ECER 0.8.1.
- electricity, medium voltage: 79.2; measured
  Electricity. Upstream data source: CLCD-China-ECER 0.8.1.
- limestone, crushed, for mill: 824.8; measured
  Limestone. Upstream data source: CLCD-China-ECER 0.8.1.
- clay: 142.7; measured
  Clay. Upstream data source: CLCD-China-ECER 0.8.1.

## Outputs
- Clean gas: 857; measured
  Waste gas [emitted to atmosphere]
- particles (> PM10): 0.059; measured
  Total particulate matter [emitted to atmosphere], with an unspecified particle size, is treated as PM > 10 micrometers in diameter.

## Deviations from the LCI method approaches
A cement clinker lifecycle model was developed using eFootprint software system from Integrated Knowledge for our Environment, combined with CLCD quality assessment method, and LCA results were calculated.

## Cut-off and completeness
The data selection principle in this study adopts the cut-off principle recommended in the ISO140 series of international standards. The principle is based on the ratio of raw and auxiliary material input to product quality in the production process. The specific cut-off principle is as follows: (1) When the input weight of each ordinary raw material is less than 1% of the total input weight of process raw materials, and the weight of the raw material containing high-purity substances is less than 0.1% of the total input weight of process raw materials, the upstream production data of the material can be ignored. Additionally, the total mass of the ordinary material ignored should not exceed 5% of the total weight of the raw material input. In the case of system environmental emission data, the value of its contribution to the relevant LCA results can be calculated before deciding whether to ignore this data; (2) Upstream production data of low-value waste materials generated from other production processes as raw materials, such as tailings, can be ignored.

## Data selection and combination
The inventory data for each raw material involved in the raw meal preparation stage is provided by the background database.

## Data sources
- 李畅. (2020). 江西省某铜尾矿资源化过程生命周期评价研究 [硕士, 江西理工大学].
