# 砖生产 ; 透水砖 ; 固化工艺

Dataset: ILCD process, Unit process, single operation
Geography: JNA-SD-CN
Reference year: 2018
Classification: Unit processes / Materials production / Other mineralic materials
Functional unit: The functional unit is the area of 1 m2 brick products.
Generated by: 王湘锦, r99rt4@163.com
Owner: 天工LCI数据工作小组
Review: Dependent internal review by 天工LCI数据工作小组
Amounts: no units in this file; such an amount is in the reference unit of its flow, which a separate flow dataset defines
copyright: false
licenseType: Free of charge for all users and uses

## General comment
非烧结砖块中的透水砖生产工艺

## Technical purpose
本数据集代表由济南顺德水泥制品有限公司生产的透水混凝土砖。这些砖主要用于建造允许水通过的路面，减少径流并促进地下水补给。这些砖适用于人行道、步行道、广场、车道和其他需要雨水管理和生态考虑的户外表面。

## Reference product
- permeable brick: 1; measured

## Inputs
- green brick: 94; measured
- freshwater: 4.88; measured

## Deviations from the LCI method approaches
本研究采用了 ReCiPe midpoint（H）模型。

## Data selection and combination
本研究从济南顺德水泥制品有限公司收集了混凝土路面砖和透水砖的生产能耗以及各种原材料、能源投入和废气排放的相关数据。济南顺德水泥制品有限公司 山东省。

## Sampling procedure
原材料、能源投入和废物排放的大部分数据都是从生产厂家的现场调查中收集的。减水剂，其化学成分是磺酸钠盐的甲醛缩合物

## Use advice
本数据集旨在用于对路面砖产品进行生命周期评估（LCA），特别是混凝土路面砖和透水砖。用户应使用 ReCiPe midpouint (H) 模型作为影响评估的方法论框架。数据解释的功能单位是 1 平方米的砖制品。在使用这些数据时，应特别注意关键工序变化中输入和输出的变化，坚持5%的变化原则进行敏感性分析。必须考虑有关原材料消耗、能源投入和废气排放的数据，并适当地纳入评估中。其中减水剂作为原材料，必须根据其作为磺酸钠盐类甲醛缩合物的化学组成进行核算。

## Review details
清单： 内部审查通过几个迭代步骤完成，涉及原始数据验证、原始数据记录、代表性、完整性、与 ISO 14040 和 14044 有关的建模的一致性。

## Data sources
- Yuan, X. et al. Environmental and economic impacts assessment of concrete pavement brick and permeable brick production process - A case study in China. Journal of Cleaner Production 171, 198–208 (2018).
