# 选矿;铁精矿;选矿（Z08）

Dataset: ILCD process, Unit process, single operation
Geography: CN
Reference year: 1998
Classification: Materials production / Metals and semimetals
Generated by: 付翔, 1162850692@qq.com
Owner: 天工LCI数据工作小组
Review: Dependent internal review by 天工LCI数据工作小组
Amounts: no units in this file; such an amount is in the reference unit of its flow, which a separate flow dataset defines
copyright: false
licenseType: Free of charge for all users and uses

## General comment
来自表 4-16 Z08 钢厂生产吨材环境负荷编目表

## Time period
论文提到钢铁企业环境总体数据为1998年的吨钢环境基础数据。

## Technical purpose
此选矿工艺生产的铁精矿用于钢铁制造工业。 它作为生产各种钢铁产品的主要原料，由于其富集的铁含量和提高的纯度。

## Reference product
- Refined Iron Ore: 1990; measured
  精铁矿

## Inputs
- Energy, geothermal, converted: 3030.76; measured
- water: 37010; measured
- Iron ore: 5369; measured
  铁矿石

## Outputs
All rows: measured
- Dust (unspecified, from stack): 0.312
  烟尘
- Dust (unspecified, from stack): 2.848
- sulfur dioxide: 0.679
- Suspended solids, unspecified: 0.20696
- Dust (unspecified, from stack): 73.63
  集尘
- Spoil (deposited, hibernating in ground, non elementary flow): 2189

## Use advice
数据集用户应注意，此生命周期评估信息基于1998年钢铁厂每生产一吨材料的环境负荷。 应用此数据时，必须考虑技术适用性以及自1998年以来发生的环境标准或工艺的变化。 重要的是要考虑提炼过程的改进，材料潜在的回收，以及可能影响环境影响的技术进步。

## Review details
清单： 内部审查通过几个迭代步骤完成，涉及原始数据验证、原始数据记录、代表性、完整性、与 ISO 14040 和 14044 有关的建模的一致性。

## Data sources
- 周和敏. 钢铁材料生产过程环境协调性评价研究. (北京工业大学, 2001).
