# 聚乙烯（PE）生产 ; 整个风电场

Dataset: ILCD process, Unit process, single operation
Geography: SH-CN
Reference year: 2009
Classification: Unit processes / Energy carriers and technologies / Renewable fuels
Functional unit: The functional unit is 1 kWh on-grid electricity provision.
LCI method principle: Attributional
LCI method approaches: Allocation
Generated by: 赵云志, ll10088@163.com
Owner: 天工LCI数据工作小组
Review: Dependent internal review by 天工LCI数据工作小组
Amounts: no units in this file; such an amount is in the reference unit of its flow, which a separate flow dataset defines
copyright: false
licenseType: Free of charge for all users and uses

## General comment
所描述的聚乙烯（PE）生产工艺中产生的PE用于东海大桥海上风电场（DBOWF）的建筑和维护。该材料作为风力涡轮机、基础和电缆的组成部分，通过风能生成并网电力。这一工业过程特定于支持上海管辖区域内的可再生能源基础设施，并可作为全球类似海上风电项目的参考。

## Geography
所研究的风电场- -东海大桥海上风电场( DBOWF )是中国在上海管辖范围内的第一个海上风电场，也是欧洲以外的第一个海上风电场。工程分两期施工，分别位于东海大桥两侧(图1 )。

## Reference product
- polyethylene high density granulate (PE-HD): 257000; estimated

## Inputs
- Energy, geothermal, converted: 1.76e7; software or database

## Outputs
- carbon dioxide: 645000; software or database
- particles (PM2.5): 50; software or database
- sulfur dioxide: 870; software or database
- nitrous oxide: 1170; software or database

## Deviations from the LCI method approaches
本研究采用PLCA建模方法计算了中国某典型海上风电场的能源和环境排放。从摇篮到坟墓的过程包括材料和设备制造、运输和安装、操作和维护、拆解和回收4个阶段(图2 )。

## Data selection and combination
风机、基础和电缆的技术参数从DBOWF的设计文件中获得(表2)。能源和排放因子(即单位材料和构件生产的能源消耗和环境排放)来源于Ecoinvent 2.2数据集(生态发明中心, 2009)，优先参考中国实践的系数。对于关键材料和设备，其海上运输能量由运输负荷和海运能量强度计算得到。根据施工方案，对设施安装能耗和排放进行了估算。风电场的运行和维护数据，如维护的频率和工作时间，是通过与工程技术人员的现场调查获得的。与模型参数和输入数据相关的不确定性在本文的敏感性分析部分进行了说明。

## Use advice
本LCA数据集的用户应当注意，能源和排放因子特定于DBOWF，并基于Ecoinvent 2.2数据集，优先采用与中国实践相关的系数。在将这些发现推广到其他情境时应谨慎，因为当地条件和建设实践可能会有显著不同。材料至海上风电场的海上运输所需能量已为特定此项目而计算，对于其他地点可能需要调整。用户还应考虑数据敏感性分析中讨论的参数不确定性和可变性。最后，在使用这些数据进行比较或者纳入更大系统时，确保充分考虑了上游和下游过程，比如材料和设备的制造、运输、安装、操作、维护、拆解和回收。

## Review details
清单： 内部审查通过几个迭代步骤完成，涉及原始数据验证、原始数据记录、代表性、完整性、与 ISO 14040 和 14044 有关的建模的一致性。

## Data sources
- Yang, J. et al. The life-cycle energy and environmental emissions of a typical offshore wind farm in China. Journal of Cleaner Production 180, 316–324 (2018).
