# Hydrometallurgical recycling of waste power batteries to produce lithium nickel-cobalt-manganese oxide (LNCMO)

Dataset: ILCD process, Unit process, single operation
Geography: CN
Reference year: 2015
Classification: Materials production / Other mineralic materials
Functional unit: 1 000 kg of lithium nickel cobalt manganese oxide (ternary material) as a functional unit.
Generated by: huzhikang, hzk2503593129@163.com
Review: Dependent internal review by Tiangong LCI Data Working Group
Amounts: no units in this file; such an amount is in the reference unit of its flow, which a separate flow dataset defines
copyright: false

## General comment
The method includes pretreatment, alkali washing, leaching, debinding, precipitation, and sintering processes.

## Reference product
- Ternary cathode material: 1000; measured
  Lithium nickel cobalt manganese oxide (ternary material)

## Inputs
All rows: measured
- Battery: 3330
  Waste Power Battery
- Sulfuric acid(98%): 3660
  H2SO4（98%）
- Hydrochloric acid (30%): 133.08
  HCl（30%）
- sodium hydroxide: 7260
  NaOH（30%）
- Sodium carbonate: 69.86
  Na2CO3
- Ammonia (28%): 373.35
- 2-ethylhexyl hydrogen -2-ethylhexylphosphonate: 6.66
  P507 Extractant
- Kerosene: 16.27
- hydrogen peroxide: 1220
  H2O2
- Water (fresh water): 46580
  Industrial water
- Lithium carbonate: 402.51
- Electricity: 27924
  electricity
- natural gas: 465.79
  Natural Gas

## Outputs
All rows: measured
- Water (river water from technosphere, cooling water): 33270
  Waste Water
- Ammonia Nitrogen: 0.19962
- nickel: 0.013308
  Ni
- carbon dioxide: 224
  Exhaust gas (CO2)
- Other Solid Waste: 1170
  Residue and ash
- Plastic (unspecified),Plastic (unspecified): 133.08
  Plastic PP
- copper: 332.7
  Copper
- iron: 598.86
  Steel

## Review details
Inventory: The internal review was done by several iteration steps concerning raw data validation, raw data documentation, representativity, completeness and consistency of modelling with regard to ISO 14040 and 14044.

## Data sources
- 谢英豪, 余海军, 欧彦楠, & 李长东. 废旧动力电池回收的环境影响评价研究. 无机盐工业 47, 43-46+61 (2015).
