# Vegetable Production | Cultivation (Plastic Shed)

Dataset: ILCD process, Unit process, single operation
Geography: XA-SAX-CN
Classification: Materials production / Other mineralic materials
Functional unit: 1000 kg tomatoes
Generated by: Haoran Zhang, hrzhang@whu.edu.cn
Review: Dependent internal review by Tiangong LCI Data Working Group
Amounts: no units in this file; such an amount is in the reference unit of its flow, which a separate flow dataset defines
copyright: false

## Technology and included processes
The data were obtained as averages from 10 solar greenhouses and 5 plastic greenhouses. Based on the typical service life of construction materials, the consumption of building materials and energy for constructing solar greenhouses and plastic greenhouses were calculated as the equivalent of one year of usage. The service life was assumed to be 15 years for general building materials, 5 years for PVC water pipes, 1 year for greenhouse films (3 years for plastic greenhouses), and 3 years for the anti-cold films (skirt films of plastic greenhouses). The annual consumption of building materials for plastic greenhouses was evenly allocated to tomatoes and watermelons.

## Reference product
- tomato: 1000
  plastic greenhouse

## Inputs
- water: 53.33
  plastic greenhouse
- Electricity: 338.31
  plastic greenhouse

## Outputs
- Rice Seeds: 5.8e-5
  solar greenhouse soil
- carbon dioxide (fossil): 25.432
  plastic greenhouse
- carbon monoxide: 0.034
  plastic greenhouse
- methane (fossil): 0.071
  plastic greenhouse
- non-methane volatile organic compounds: 0.011
  plastic greenhouse
- sulfur dioxide: 0.218
  plastic greenhouse
- Nitrogen oxides: 0.173
  plastic greenhouse
- ammonia: 0.11
  plastic greenhouse
- nitrous oxide: 0.333
  plastic greenhouse
- nitrate: 0.412
  plastic greenhouse
- cadmium: 0.000276
  plastic greenhouse
- lead: 0.009096
  plastic greenhouse
- calcium: 0.03656
  plastic greenhouse
- zinc: 0.302396
  plastic greenhouse
- arsenic: 0.00587
  plastic greenhouse
- nickel: 0.010398
  plastic greenhouse
- Rice Seeds: 1.7e-5
  plastic greenhouse air
- Rice Seeds: 8e-6
  plastic greenhouse water
- Rice Seeds: 7.8e-5
  plastic greenhouse soil

## Deviations from the LCI method approaches
The system boundary defined in this study includes the construction of facilities and their routine operation (hereinafter referred to as "facility infrastructure"), and the production of materials required for them (cement, steel, bricks, and shed films, etc.), the production of agricultural inputs (chemical fertilizers, mulch films, fungicides, and insecticides), the cultivation of tomatoes (nursery, plowing, transplanting, mulching, fertilizing, spraying, irrigation, and harvesting) as well as the production and consumption of energy used in each process. It does not include the production of agricultural machinery, the transportation of tomatoes to the market for sale, or the process of consumer consumption.

## Data selection and combination
The environmental impact data of energy production and usage processes are sourced from literature (Di et al., 2007; Hu Zhiyuan et al., 2006). The resource, energy, and environmental emission data of the production of steel, cement, bricks, mulching films, frost protection films, plastic films, PVC water pipes, and fertilizers are taken from literature and the 'Clean Production Indicator System of the Phosphate Fertilizer Industry' and 'Clean Production Indicator System of the Nitrogen Fertilizer Industry'. Due to the lack of detailed research data, only energy consumption and CO2 emission volumes are considered in the production processes of insecticides and fungicides, represented in terms of the quality of effective ingredients, and data are adopted from the research results of West et al. (2002).

## Sampling procedure
In this study, 10 sunlight greenhouses (each with an area of 6 m×90 m) and 5 plastic greenhouses (each with an area of 9 m×110 m) were selected as research objects, and the material consumption of the construction and daily operation of the sunlight greenhouses and plastic greenhouses were investigated.

## Review details
Inventory: The internal review was done by several iteration steps concerning raw data validation, raw data documentation, representativity, completeness and consistency of modelling with regard to ISO 14040 and 14044.; Documentation: The review of the documentation was performed by Ecobilan and is in compliance with ISO 14040 and 14044. The data set documentation is correct in view of the appropriateness of the information provided. It includes all relevant information in view of data quality and scope of application of the respective LCI result.

## Data sources
- 王效琴,吴庆强,周建斌,陈妍,吴发启.设施番茄生产系统的环境影响生命周期评价[J].环境科学学报,2014,34(11):2940-2947.
