# Oyster feed production | Oyster feed | Single-celled algae culture

Dataset: ILCD process, Unit process, black box
Geography: FJ-CN
Classification: Materials production / Other mineralic materials
Functional unit: 1 tonne of fresh oyster
Generated by: 吴康妮, wukangni@xmu.stu.edu.cn
Review: Dependent internal review by Tiangong LCI Data Working Group
Amounts: no units in this file; such an amount is in the reference unit of its flow, which a separate flow dataset defines

## General comment
这一碳足迹的范围是从“摇篮到大门”，包括太平洋牡蛎直到被运输到市场进行分销的所有生命周期阶段，详细养殖阶段如图1所示。 资本建设和生产的排放本研究不考虑船舶、工厂、机械等设备及其维护。材料投入除以服务时间，得到每轮耕作的平均值。

## Geography
福建省

## Inputs
All rows: article inperiodical
- Electricity: 5.148
- Glass (formed & finished): 0.0004
- polymethyl methacrylate (PMMA) beads: 0.008
  丙烯酸桶
- polyethylene terephthalate fibres (PET): 0.01
- Sodium hypochlorite: 0.04
- sodium nitrate: 0.03
- sodium silicate: 0.0072
- ferric citrate: 0.0014
- sodium dihydrogen phosphate: 0.0016

## Review details
Inventory: The internal review was done by several iteration steps concerning raw data validation, raw data documentation, representativity, completeness and consistency of modelling with regard to ISO 14040 and 14044.; Documentation: The review of the documentation was performed by Ecobilan and is in compliance with ISO 14040 and 14044. The data set documentation is correct in view of the appropriateness of the information provided. It includes all relevant information in view of data quality and scope of application of the respective LCI result.

## Data sources
- Sun, L., Feng, J.-C. & Zhang, S. The Carbon Footprint of Pacific Oyster Farming in China. 19, (2021).
