# Electricity production ; Electricity ; Thermal power (97.0%) + wind power (2.0%) + solar power (1.0%)

Dataset: ILCD process, Partly terminated system
Geography: SH-CN
Reference year: 2019
Classification: Energy carriers and technologies / Electricity
LCI method principle: Other
Generated by: Ruoxi Xiong, xiongrx0126@163.com
Owner: Tiangong LCI Data Working Group
Review: Dependent internal review by Tiangong LCI Data Working Group
Amounts: no units in this file; such an amount is in the reference unit of its flow, which a separate flow dataset defines
copyright: false
licenseType: Free of charge for all users and uses

## General comment
Electricity generation forms include thermal power generation, wind power generation and solar power generation

## Time period
Calculated based on data from the 2019 Energy Statistics Yearbook

## Technical purpose
This mixed electricity utility is commonly used for a variety of applications including residential, commercial, and industrial electricity supply. The electricity is generated primarily through thermal power (97%) with the inclusion of renewable energies such as wind power (2%) and solar power (1%). It addresses the energy needs that require a stable and continuous power supply, while integrating a small fraction of renewable sources to support sustainable practices.

## Reference product
- Electricity: 3.6; calculated

## Outputs
- carbon dioxide: 0.746; calculated
- sulfur dioxide: 0.000118; calculated
- Nitrogen oxides: 0.000188192; calculated
- Dust (unspecified, from stack): 2.6133e-5; calculated

## Data treatment and extrapolations
For the accounting method, please refer to the "Enterprise Greenhouse Gas Emissions Accounting Methods and Reporting Guidelines for Power Generation Facilities". Different forms of power generation and fuel consumption come from Chapter 3 (Energy Production) and Chapter 6 (Regional Energy Balance Sheet) in the "China Energy Statistical Yearbook 2020". The fuel parameters such as low calorific value and carbon content per unit calorific value used to calculate the carbon dioxide emission factor come from the "2019 China Regional Power Grid Carbon Dioxide Baseline Emission Factor Calculation Instructions OM" and the "Enterprise Greenhouse Gas Emission Accounting Method and Reporting Guide for Power Generation Facilities" 》

## Use advice
When applying this data for Life Cycle Assessment or carbon footprint calculations, it is crucial to accurately attribute the respective proportions of thermal, wind, and solar generated electricity. Ensure that carbon emission factors are up-to-date and derived from reliable sources such as the indicated 2019 Energy Statistics Yearbook. Special attention should be given to the methodological guidelines cited in the 'Enterprise Greenhouse Gas Emissions Accounting Methods and Reporting Guidelines for Power Generation Facilities' and the '2019 China Regional Power Grid CO2 Baseline Emission Factor Calculation Instructions OM'. Users should also be aware of the regional variations in energy production and consumption that may affect the accuracy and regional specificity of the assessment.

## Review details
Inventory: The internal review was done by several iteration steps concerning raw data validation, raw data documentation, representativity, completeness and consistency of modelling with regard to ISO 14040 and 14044.

## Data sources
- 熊若熙. 中国电力生产和消费二氧化碳与污染物排放因子核算. (清华大学, 2023).
