# clinker production|clinker, portland cement clinker, 52.5MPa|new dry process

Dataset: ILCD process, Unit process, black box
Geography: CN
Reference year: 2011
Classification: Materials production / Other mineralic materials
Generated by: Siqi Yang
Amounts: no units in this file; such an amount is in the reference unit of its flow, which a separate flow dataset defines
copyright: false

## General comment
New dry-process technology for producing Portland cement clinker. In 2011, the proportion of newly developed dry-process cement accounted for 89.0% of the national total, and it was still on the rise, thus basically representing the national level.

## Model description
The study specifically targeted ordinary cement and selected domestically produced cement clinker using the new dry-process technology, with a strength grade of 52.5MPa per 1kg (assuming the national average strength is 52.5MPa) as the functional unit. In addition, the transportation process of raw materials was taken into account when establishing the life cycle model.

## Reference product
- clinker, portland cement clinker, 52.5MPa: 1000
  Clinker, 52.5MPa

## Inputs
All rows: article inperiodical
- hard coal, run-of-mine: 156.8
  Raw coal. The input data for the benchmark scenario is based on the Level III benchmark value of the clean production indicator system.
- electricity, medium voltage: 230.4
  Electricity. The input data for the benchmark scenario is based on the Level III benchmark value of the clean production indicator system.
- limestone, crushed, for mill: 1328
  Limestone. The input data for the benchmark scenario is based on the Level III benchmark value of the clean production indicator system.
- tap water: 750
  Industrial tap water. The input data for the benchmark scenario is based on the Level III benchmark value of the clean production indicator system.
- transport, freight, lorry, unspecified: 0.0141
  Road transportation. The input data for the benchmark scenario is based on the Level III benchmark value of the clean production indicator system.
- iron ore: 184.5
  Iron ore. The input data for the benchmark scenario is based on the Level III benchmark value of the clean production indicator system.
- clay: 180.9
  Clay. The input data for the benchmark scenario is based on the Level III benchmark value of the clean production indicator system.

## Outputs
- carbon dioxide: 832; article inperiodical
  Carbon dioxide. Environmental emissions are mainly based on the emission factor manual and literature survey data.
- Nitrogen oxides: 1.67; article inperiodical
  Nitrogen oxide. Environmental emissions are mainly based on the emission factor manual and literature survey data.
- sulfur dioxide: 0.21; article inperiodical
  Sulfur dioxide. Environmental emissions are mainly based on the emission factor manual and literature survey data.

## Cut-off and completeness
The data is incomplete, focusing only on the list of indicators relevant to the ECER policy objectives.

## Data selection and combination
By investigating relevant literature on domestic cement production, and combining with the evaluation index system for clean production in the cement industry, as well as the pollutant discharge coefficient manual, a list of data on clinker production and cement grinding processes was obtained.

## Data sources
- 何晓雪, 张璐, & 王洪涛. (2014). 基于生命周期节能减排评价方法的水泥行业清洁生产评价指标权重的计算. 化学工程与装备, 4, 208–211.
