# 炼钢;粗钢;电弧炉炼钢;铁水/废钢

Dataset: ILCD process, Unit process, single operation
Geography: CN
Classification: Unit processes / Energy carriers and technologies / Heat and steam
Generated by: 纪伟, 1299801467@qq.com
Owner: 天工LCI数据工作小组
Review: Dependent internal review by 天工LCI数据工作小组
Amounts: no units in this file; such an amount is in the reference unit of its flow, which a separate flow dataset defines
copyright: false
licenseType: Free of charge for all users and uses

## General comment
该数据集代表了电弧炉炼钢工艺，这一过程通过使用生铁和废钢的结合来生产粗钢。该过程通常用于制造结构钢产品、工具、机械和车辆的钢铁厂。

## Reference product
- Steel hot rolled coil: 1000; measured

## Inputs
All rows: measured
- iron: 318.53
- Iron scrap: 738.29
- quicklime: 27.61
- oxygen: 30.29
- freshwater,freshwater: 62.65
- Electrode consumption: 1.16
- Electricity: 1061.93
- nitrous oxide: 0.1
- argon: 0.04
- Refractory consumption: 5.51

## Outputs
All rows: measured
- Slag: 61.94
- particles (> PM10): 22.82
- carbon monoxide (fossil): 29.63
  原文未区分bio和fossil，根据专家判断此处为carbon monoxide (fossil)
- carbon dioxide (fossil): 5.18
  原文未区分bio和fossil，根据专家判断此处为carbon dioxide (fossil)
- Iron splashing: 11.41

## Use advice
在使用此生命周期评估数据集时，请确保数据反映您评估的电弧炉工艺的特定技术和效率水平。除非钢铁回收过程明确是研究场景的一部分，否则请排除钢铁在生命周期末期可能的回收。此外，如果对钢铁使用阶段进行建模，请考虑与预期应用相匹配的特定行为因素，如维护、腐蚀和生命周期结束时的回收率。

## Review details
清单： 内部审查通过几个迭代步骤完成，涉及原始数据验证、原始数据记录、代表性、完整性、与 ISO 14040 和 14044 有关的建模的一致性。

## Data sources
- Yang, L. et al. Life cycle carbon footprint of electric arc furnace steelmaking processes under different smelting modes in China. Sustainable Materials and Technologies 35, e00564 (2023).
