# 高浓卤水生产 ; 高浓卤水（锂含量6%） ; 太阳池蒸发法 ; 智利阿塔盐湖（锂含量0.17%）

Dataset: ILCD process, Unit process, single operation
Geography: CL
Reference year: 2018
Classification: Unit processes / Materials production / Inorganic chemicals
Generated by: 孙鑫, xs389@cornell.edu
Owner: 天工LCI数据工作小组
Review: Dependent internal review by 天工LCI数据工作小组
Amounts: no units in this file; such an amount is in the reference unit of its flow, which a separate flow dataset defines
licenseType: Free of charge for all users and uses

## General comment
历史上，锂一直产自智利安第斯山区的地下卤水，该地区被称为 "锂三角"，还包括玻利维亚和阿根廷的部分地区。全世界还有其他几个富含锂的卤水产地，每种卤水都有独特的化学成分，因此需要不同的工艺来分离出所需的最终产品（Wietelmann 和 Steinbild，2014 年）。本项生命周期评估考虑的是智利阿塔卡马沙漠中的卤水，即阿塔卡马盐湖。盐水经过浓缩，加工成电池级 Li2CO3 和 LiOH-H2O，然后运往世界各地加工成电池阴极材料，最终制成电池。

## Technology and included processes
根据具体地点的不同，阿塔卡马盐湖盆地的年降雨量在 5 毫米到 120 毫米之间。为生产浓缩盐水，低浓度盐水（锂浓度约为 0.17%，其中 70% 为水，其余为其他矿物质）会被泵送到地表，并进入一个干燥池，在那里接受阳光和热量的照射，以促进蒸发。这些池塘位于阿塔卡马盐湖的南部，降雨较少，因此有利于有效蒸发。

## Technical purpose
该工艺数据代表了利用智利阿塔卡马盐湖的太阳池蒸发方法生产含6%锂的高浓卤水。这种卤水通常用作提取和生产锂化合物的原料，这些锂化合物是制造电子设备和电动汽车等多种应用中不可或缺的。

## Reference product
- Concentrated brine (6% Li): 1000; measured

## Inputs
- freshwater,freshwater: 5.94; measured
- Brine (0.17% Li): 24100; measured
- Electricity: 760; measured
- Diesel: 657; measured

## Outputs
- Lithium carbonate,Lithium carbonate: 800; measured
- Potash: 8520; measured

## Use advice
在使用此数据集进行生命周期评估时，请注意，数据排除了原材料的生产流程和非常小量（少于1%）的能源流。在某些情况下，这种排除可能具有重要性，尤其是在即使是小量输入也可能对整体环境影响有所贡献的精细生命周期评估研究中。如果这些轻微流量被认为对特定的生命周期评估至关重要，用户应考虑用额外信息补充本数据集。

## Review details
清单： 内部审查通过几个迭代步骤完成，涉及原始数据验证、原始数据记录、代表性、完整性、与 ISO 14040 和 14044 有关的建模的一致性。

## Data sources
- Kelly, J. C., Wang, M., Dai, Q. & Winjobi, O. Energy, greenhouse gas, and water life cycle analysis of lithium carbonate and lithium hydroxide monohydrate from brine and ore resources and their use in lithium ion battery cathodes and lithium ion batteries. Resources, Conservation and Recycling 174, 105762 (2021).
