# Beneficiation of REE|REE|baseline|REE containing ore

Dataset: ILCD process, Unit process, single operation
Geography: NMG-CN
Reference year: 2012
Classification: Materials production / Other mineralic materials
Functional unit: Not Mentationed
LCI method principle: Attributional
LCI method approaches: Allocation - market value
Generated by: Tao Wang, twang@iue.ac.cn
Review: Dependent internal review by Tiangong LCI Data Working Group
Amounts: no units in this file; such an amount is in the reference unit of its flow, which a separate flow dataset defines
copyright: false

## Technology and included processes
Ore is recovered from the open pit mine using conventional surface mining techniques such as drilling and blasting. The mine contains 750 million tons of ore at 4.1% REO

## Reference product
- REO: 1; software or database

## Inputs
All rows: software or database
- Sodium carbonate: 0.09
  Soda ash
- transport in t*km,transport in t*km: 0.021
  transport, lorry >16t, fleet average
- transport in t*km,transport in t*km: 0.378
  transport, freight, rail
- Sodium silicate: 0.09
- Fatty acid: 0.03
  fatty acids
- heavy fuel oil: 0.97
- process steam: 2.7
- Electricity: 1.2168
- transport in t*km,transport in t*km: 0.15
  transport, coal freight, rail
- Raw ore: 30

## Outputs
All rows: software or database
- Iron ore: 12.5
- water: 0.0275
- Land Occupation: 1
  Industrial area, built up
- waste heat: 1.22
- uranium-234: 0.022
  air_low population density
- thorium-232: 1
  water unspecified

## Deviations from the LCI method approaches
In this section, we discuss the life cycle inventory (LCI) in detail. Each subsection discusses one process of the LCA. Section 3.1 describes the conventional method of rare earths in China from mineral sources. Section 3.2 describes the production process used to transform neodymium oxide into an NdFeB magnet. Finally, section 3.3 describes two alternative recycling processes that could be used. Detailed information on the LCI, assumptions, and allocation choices can be found in the Supporting Information.

## Review details
Inventory: The internal review was done by several iteration steps concerning raw data validation, raw data documentation, representativity, completeness and consistency of modelling with regard to ISO 14040 and 14044.; Documentation: The review of the documentation was performed by Ecobilan and is in compliance with ISO 14040 and 14044. The data set documentation is correct in view of the appropriateness of the information provided. It includes all relevant information in view of data quality and scope of application of the respective LCI result.

## Data sources
- Sprecher, B. et al. Life Cycle Inventory of the Production of Rare Earths and the Subsequent Production of NdFeB Rare Earth Permanent Magnets. Environ. Sci. Technol. 48, 3951–3958 (2014).
