# Northwest (Yangling) Wheat-Corn Production | Wheat Cultivation

Dataset: ILCD process, Unit process, single operation
Geography: XY-SAX-CN
Reference year: 2013
Valid until: 2013
Classification: Materials production / Other mineralic materials
Functional unit: 1t
LCI method principle: Attributional
LCI method approaches: Consequential
Generated by: Haoran Zhang, hrzhang@whu.edu.cn
Review: Dependent internal review by Tiangong LCI Data Working Group
Amounts: no units in this file; such an amount is in the reference unit of its flow, which a separate flow dataset defines
copyright: false

## Geography
Yang Ling

## Reference product
- wheat: 1000

## Inputs
- arable: 2008.62
- water: 922.81
- Electricity: 35736.6
- Corn Seeds: 39.4

## Outputs
- carbon monoxide: 0.46929
- Nitrogen oxides: 3.1848
- sulfide: 2.50289
- carbon dioxide (fossil): 1021
- methane (fossil): 0.035
- nitrous oxide: 0.48018
- ammonium: 10.72
- phosphorus, total: 0.01874
- phosphoric acid: 0.06026
- sodium nitrate: 1.45758
- Insecticide: 0.10372
- heavy metals (unspecified): 0.00148

## Deviations from the LCI method approaches
The lifecycle evaluation of agricultural products starts from mining of ores and energy, terminated by the output of crops, including the output of agricultural products and pollutants. Land resources are the basis of all production activities and directly enter the agricultural production system."

## Data selection and combination
The data for the study mainly comes from field surveys conducted from August to September 2013, randomly surveying 30 farmers each in Fuping and Yangling, regarding the planting of winter wheat and summer corn.

## Data treatment and extrapolations
Impact assessment consists of four steps: impact categorization, characterization, normalization, and weighted assessment.

## Review details
Inventory: The internal review was done by several iteration steps concerning raw data validation, raw data documentation, representativity, completeness and consistency of modelling with regard to ISO 14040 and 14044.; Documentation: The review of the documentation was performed by Ecobilan and is in compliance with ISO 14040 and 14044. The data set documentation is correct in view of the appropriateness of the information provided. It includes all relevant information in view of data quality and scope of application of the respective LCI result.

## Data sources
- 彭小瑜, 吴喜慧, 吴发启, 等. 陕西关中地区冬小麦-夏玉米轮作系统生命周期评价[J]. Journal of Agro-Environment Science, 2015, 34(4).
