# Earthquake prediction| Limestone reservoir of Taiyuan Formation| Fine characterization technology of micro-faults

Dataset: ILCD process, Unit process, single operation
Geography: EEDS-NMG-CN
Reference year: 1987
Valid until: 2022
Classification: Materials production / Other mineralic materials
LCI method principle: Attributional
LCI method approaches: Consequential
Generated by: Shikang Kang, 908798159@qq.com
Review: Dependent internal review by Tiangong LCI Data Working Group
Amounts: no units in this file; such an amount is in the reference unit of its flow, which a separate flow dataset defines
copyright: false

## General comment
The technical flow of micro-fault fine characterization seismic processing consists of three parts: ① the original seismic data are processed by structural guidance filtering under the constraint of horizon, and the interference of background noise is suppressed to highlight fault breakpoints; ② Carry out neural network deep learning to obtain deep learning coherence body (fault) and curvature body (fracture), and establish nonlinear mapping relationship from seismic data to micro-fault; Select the dominant information for weighted fusion to realize the fine identification of faults with small concealment and micro-faults.

## Geography
Limestone of Taiyuan Formation in Central and Eastern Ordos Basin

## Time period
Exploration began in the 1980s

## Technology and included processes
Seismic processing adopts the combination of "guided filtering + artificial intelligence + key seismic information fusion", and the fault prediction results have better continuity, clear boundary and higher confidence.

## Inputs
- natural gas: 1.5e9; max 1.5e9; uniform; article inperiodical
  微断层精细刻画

## Data selection and combination
The exploration of limestone natural gas in Taiyuan Formation of Ordos Basin began in 1980s, and the exploration process can be roughly divided into three stages. The initial exploration stage is from 1987 to 1999, the second exploration stage is from 2000 to 2005, and the third exploration stage is from 2019 to the present

## Data treatment and extrapolations
Through enlarging limestone coring of Taiyuan Formation in the middle and east of the basin, it is confirmed that limestone of Taiyuan Formation develops favorable facies belts of bioclastic beach and biological hill. Through secondary logging interpretation, more than 300 gas reservoir wells are re-examined, and combined with the analysis of reservoir forming conditions, it is considered that limestone of Taiyuan Formation has a superior "sandwich" reservoir forming model.

## Review details
Inventory: The internal review was done by several iteration steps concerning raw data validation, raw data documentation, representativity, completeness and consistency of modelling with regard to ISO 14040 and 14044.; Documentation: The review of the documentation was performed by Ecobilan and is in compliance with ISO 14040 and 14044. The data set documentation is correct in view of the appropriateness of the information provided. It includes all relevant information in view of data quality and scope of application of the respective LCI result.

## Data sources
- 刘新社;张涛;黄道军;董国栋;王康乐;付勋勋;赵小会;卢子兴;于洲;荆雪媛;张君莹; 鄂尔多斯盆地中东部太原组石灰岩天然气勘探新突破及勘探方向. 天然气工业 1–11 (2023).
