# 天然气制氢

Dataset: ILCD process, Unit process, single operation
Geography: CN
Reference year: 2022
Classification: Energy carriers and technologies / Heat and steam
Functional unit: 1000 N m3 hydrogen
LCI method principle: Attributional
Generated by: Bonnie Gan, jinlu.gan1998@gmail.com
Owner: 天工LCI数据工作小组
Review: Dependent internal review by 天工LCI数据工作小组
Amounts: no units in this file; such an amount is in the reference unit of its flow, which a separate flow dataset defines
copyright: false
licenseType: Free of charge for all users and uses

## General comment
蒸汽甲烷重整在高温下由天然气和蒸汽产生氢气。

## Time period
文章的发表日期

## Technical purpose
蒸汽甲烷重整过程用于生产氢气。这种方法产生的氢气常用于各种工业应用，包括用于合成肥料生产的氨、石油炼制厂的加氢裂化以及作为生产甲醇的原料。它也可能用于燃料电池或食品和化学工业的氢化过程中。

## Reference product
- Hydrogen: 1000; article inperiodical

## Inputs
All rows: article inperiodical
- natural gas; 44.1 MJ/kg: 480
  CH4 > 96.6% (volume fraction)min 来源：10.1177/0734242X211045004max 来源：10.1016/j.ijhydene.2012.03.028
- Natural gas, at consumer EU-27: 120
- process steam: 1.27
- de-ionised water: 1.7
  Soft water, boiler water standard
- electricity mix: 720
  380/220 V, 50 Hz, CN-grid mixmin 来源：10.1016/j.ijhydene.2012.03.028max 来源：10.24193/subbchem.2020.4.01
- Cooling water: 27000
  Circulating cooling water, Pressure: 0.3–0.4 MPa, temperature: 27 ◦C–32 ◦C
- compressed air: 42
  Instrument air

## Use advice
在使用此数据进行生命周期评估时，请确保LCA的范围包括在类似高温条件下进行的蒸汽甲烷重整操作。注意文章的发表日期，以确保数据反映当前技术。对所产生的氢气的纯度和潜在用途（如燃料或原料）进行核算，并注意此数据代表了1000 N m3氢气的产出。在评估系统边界时，考虑蒸汽的能源以及与天然气提取相关的任何环境影响。

## Review details
清单： 内部审查通过几个迭代步骤完成，涉及原始数据验证、原始数据记录、代表性、完整性、与 ISO 14040 和 14044 有关的建模的一致性。

## Data sources
- Chen, Y., Lan, L., Hao, Z. & Fu, P. Cradle-grave energy consumption, greenhouse gas and acidification emissions in current and future fuel cell vehicles: Study based on five hydrogen production methods in China. Energy Reports 8, 7931–7944 (2022).
