# 氧化铝生产 ; 冶金用氧化铝 ; 铝合金轮毂制造工艺

Dataset: ILCD process, Unit process, single operation
Geography: CN
Reference year: 2018
Classification: Unit processes / Materials production / Metals and semimetals
Generated by: 傅晨玲, fu-chenling@tsinghua.edu.cn
Owner: 天工LCI数据工作小组
Review: Dependent internal review by 天工LCI数据工作小组
Amounts: no units in this file; such an amount is in the reference unit of its flow, which a separate flow dataset defines
copyright: false
licenseType: Free of charge for all users and uses

## General comment
氧化铝生产 ; 铝合金轮毂制造工艺

## Time period
文献发表日期

## Technical purpose
该过程中产生的氧化铝专门用于冶金行业，特别是用于制造铝合金车轮。这种冶金级氧化铝经过定制，满足生产高质量、耐用铝合金车轮所需的严格规范，适用于汽车行业。

## Reference product
- aluminium oxide, metallurgical: 108.2; missing unimportant

## Inputs
All rows: missing unimportant
- electricity, high voltage, aluminium industry: 181.908
- bauxite: 296.5
- soda ash, dense: 7.08
- limestone, crushed, washed: 194.76
  Lime rock
- Water, unspecified natural origin: 908.88
  water
- hard coal: 57.45
- heavy fuel oil: 4.65
- Petroleum Coke: 4.87
- Gas, mine, off-gas, process, coal mining: 19.5

## Outputs
All rows: missing unimportant
- carbon dioxide (fossil),carbon dioxide (fossil): 259.68
- carbon monoxide (fossil),carbon monoxide (fossil): 0.26
- sulfur dioxide: 0.35
- Nitrogen oxides: 0.75
- methane (fossil): 0.24
- particles, unspecified: 0.77
- redmud from bauxite digestion: 154.73
- Oil Pollution: 0.0048
  oil pollution
- effluent: 2.25
- sodium hydroxide, without water, in 50% solution state: 2.43
  alkali

## Use advice
该数据集的用户应注意，所产氧化铝为冶金质量，只应考虑需要此类规范的应用。在铝合金车轮的生命周期评估中应包括回收的考虑，因为回收可能会显著影响环境影响结果。此外，使用阶段行为的建模必须反映铝车轮运行的实际条件，包括里程数、磨损和潜在的翻新过程等因素。

## Review details
清单： 内部审查通过几个迭代步骤完成，涉及原始数据验证、原始数据记录、代表性、完整性、与 ISO 14040 和 14044 有关的建模的一致性。

## Data sources
- Yi Qiu-ping & Tang Chang-ping. Environmental impact assessment of magnesium alloy automobile hub based on life cycle assessment. JOURNAL OF CENTRAL SOUTH UNIVERSITY 25, 1870–1878 (2018).
