# 铝产品加工 ; 铝产品 ; 原生铝锭与再生铝

Dataset: ILCD process, Unit process, single operation
Geography: CN
Reference year: 2005
Classification: Unit processes / Materials production / Metals and semimetals
Generated by: 徐常青, xcq@bit.edu.cn
Owner: 天工LCI数据工作小组
Review: Dependent internal review by 天工LCI数据工作小组
Amounts: no units in this file; such an amount is in the reference unit of its flow, which a separate flow dataset defines
copyright: false
licenseType: Free of charge for all users and uses

## General comment
此铝产品加工数据集涉及来自原生铝锭和再生铝源制造和处理的铝产品。该数据集代表的材料用于制造各种铝制品，包括但不限于建筑材料、交通部件、包装方案和电导体，因为铝具有重量轻、耐蚀性强和高导电性等属性。

## Time period
文中表明是基于2005年数据

## Reference product
- aluminium and aluminium alloy products: 7.84e9; missing unimportant

## Inputs
- aluminium, primary, ingot: 1.46e9; missing unimportant
- recycled aluminium, unspecified: 1.66e9; missing unimportant
- hard coal: 7.28e9; missing unimportant

## Use advice
该数据集的使用者应注意，信息基于2005年可用的工艺和技术，因此可能无法准确反映当前的实践或技术进步。用户在将这些数据应用于生命周期评估时必须考虑到这一点，特别是如果目标是当代相关性。在使用此数据集进行比较目的或与较新的数据集成时，可能需要调整技术、效率和环境法规的变化。此外，还应特别考虑循环利用的内容和实践，并结合时间数据点的上下文。

## Review details
清单： 内部审查通过几个迭代步骤完成，涉及原始数据验证、原始数据记录、代表性、完整性、与 ISO 14040 和 14044 有关的建模的一致性。

## Data sources
- Xue, J., Liu, G.,Brown, M. T. & Casazza, M. Trash or treasure? Prospects for full aluminumchain in China based on the recycling options. J. Clean. Prod. 193,217–227 (2018)
