# 电力输送和分配｜电力｜无工艺流程参数

Dataset: ILCD process, Unit process, single operation
Geography: CN
Reference year: 2020
Classification: Unit processes / Energy carriers and technologies / Electricity
Functional unit: Taking 1 ton of straw as the functional unit
LCI method principle: Consequential
Generated by: 刘超硕, liucs22@mails.jlu.edu.cn
Owner: 天工LCI数据工作小组
Review: Dependent internal review by 天工LCI数据工作小组
Amounts: no units in this file; such an amount is in the reference unit of its flow, which a separate flow dataset defines
copyright: false
licenseType: Free of charge for all users and uses

## General comment
秸秆含水量为14%

## Technical purpose
此工业流程描述涉及电力的输送和分配。这一公共事业过程用于将电力从发电设施输送至最终用户。另外，数据集指出该过程涉及处理含水量为14%的秸秆，暗示秸秆可能被用作能源生产中的生物质来源，可能用于产生电力。这里定义的功能单位是处理1吨秸秆的操作，包括其收集、加工以及作为燃料在能源生成上下文中的使用。

## Reference product
- electricity from waste incineration: 435.276; measured

## Outputs
All rows: measured
- carbon dioxide (biogenic),carbon dioxide (biogenic): 4.353
  原文未区分排放源为生物源或化石源，根据专家判断此处为生物源。
- volatile organic compound: 0.00051
- carbon monoxide (biogenic): 0.00054
  原文未区分排放源为生物源或化石源，根据专家判断此处为生物源。
- nitrous oxide: 0.00435, 0.0001 (2 entries)
- particles (> PM10),particles (> PM10): 0.00094
- Particles (PM0.2 - PM2.5): 0.00037
- sulfur oxides: 0.01306
- methane (biogenic),methane (biogenic): 0.00871
  原文未区分排放源为生物源或化石源，根据专家判断此处为生物源。

## Use advice
数据集使用者应当考虑他们正在评估的特定地区或电网中电力输送和分配的范围。使用阶段行为建模应该包括区域输电和分配基础设施典型的损失和效率。由于秸秆含水量为14%，在秸秆被用作生物质能源生产时，应在能源转换效率计算中考虑此因素。在使用这个数据集代表处理1吨秸秆时，必须将其能源潜力、处理过程中的排放以及运输影响纳入考虑。用户在将此数据集纳入更广泛的LCA研究时，还应注意方法论边界。

## Review details
清单： 内部审查通过几个迭代步骤完成，涉及原始数据验证、原始数据记录、代表性、完整性、与 ISO 14040 和 14044 有关的建模的一致性。

## Data sources
- Yang, Y., Ni, J.-Q., Zhou, S. & Xie, G. H. Comparison of energy performance and environmental impacts of three corn stover-based bioenergy pathways. Journal of Cleaner Production 272, 122631 (2020).
