# 注入井;Din=0.15m,L=50m;地下水原位修复;生物强化修复;注射井和监测井的建设

Dataset: ILCD process, Unit process, single operation
Geography: SH-CN
Reference year: 2020
Classification: Unit processes / Other Services / Repair and maintenance
Generated by: 杨欣桐, yangxt@caep.org.cn
Owner: 天工LCI数据工作小组
Review: Dependent internal review by 天工LCI数据工作小组
Amounts: no units in this file; such an amount is in the reference unit of its flow, which a separate flow dataset defines
copyright: false
licenseType: Free of charge for all users and uses

## General comment
CHC+ISB（加热-冷却系统+原位生物修复）用于现场修复，在施工准备阶段，修建注入井。

## Geography
The aquifer in a certain area in Shanghai, China, is uniformly contaminated with chlorinated volatile organic compounds (CVOCs), with a surface area of 20,000 m2 and a depth of 50 m, with the water table located at a depth of 30 m.

## Technical purpose
该工业过程描述了注入井和监测井的构建和使用，尺寸为直径0.15米，长度50米。这些专门设计用于受污染区域的地下水原位修复。该过程涉及生物强化修复，并在现场采用联合加热和冷却系统（CHC）及原位生物修复（ISB）进行氯代挥发性有机化合物（CVOCs）的清除。这套设施用于位于上海地下30米的含水层环境修复工作，该含水层面积为20,000平方米，深度为50米。

## Reference product
- injection well: 272
  文中仅给出监测井和注入井一共544口，没有给出单独的监测井和注入井数量，这里填报人简单估计两种监测井数量各半。

## Inputs
- Gravel Sand: 178145; calculated
- bentonite: 75216.2; calculated
- Steel: 1360; software or database
- Polyethylene,Polyethylene: 13600; software or database
- Electricity: 846029; software or database

## Outputs
- Waste (solid): 245130
  每口井约产生钻井废土0.9012吨

## Use advice
将此数据集纳入生命周期评估（LCA）的用户应确保系统边界包括注入井和监测井的建设阶段。应注意评估原位修复技术对环境影响的特定方法论，尤其是涉及CVOCs的降解。还建议包括CHC+ISB系统运行期间的潜在排放。在模拟使用阶段行为时，应考虑影响区域地下水流和污染物扩散的独特特性。

## Review details
清单： 内部审查通过几个迭代步骤完成，涉及原始数据验证、原始数据记录、代表性、完整性、与 ISO 14040 和 14044 有关的建模的一致性。

## Data sources
- Ni, Z. et al. Comparative Life-Cycle Assessment of Aquifer Thermal Energy Storage Integrated with in Situ Bioremediation of Chlorinated Volatile Organic Compounds. Environ. Sci. Technol. 54, 3039–3049 (2020).
