# Printing|Printedproducts(substrateispaper),printedproducts(substrateisplastic),printedproducts(substrateismetal),printedproducts(othersubstrates)|Inkcleaner(solvent-based)|Lithographic printing, gravure printing, letterpress printing (flexographic printing), stencil printing (screen printing), digital printing|All sizes / 印刷|印刷品（承印物为纸）、印刷品（承印物为塑料）、印刷品（承印物为金属）、印刷品（其他承印物）|油墨清洗剂（溶剂型）|平版印刷、凹版印刷、凸版印刷（柔性版印刷）、孔版印刷（丝网印刷）、数字印刷|所有规模

Dataset: ILCD process, Partly terminated system
Geography: CN
Reference year: 2019
Classification: Materials production / Other mineralic materials
Generated by: The data was created by the Office of the Second National Pollution Source Census of the Ministry of Ecology and Environment, and the data was organized by the TianGong Plan team for ILCD format / 生态环境部第二次全国污染源普查工作办公室创建数据，天工计划团队常慧敏整理数据为ILCD格式
Amounts: no units in this file; such an amount is in the reference unit of its flow, which a separate flow dataset defines
copyright: false

## Technology and included processes
the treatment technology for the pollution of Printing Ink Cleanerdidn't offered，Its Technical efficiency of end-of-pipe management15，The formula for calculating the actual operation rate (k-value) of the end-of-pipe treatment facility is k = power consumption of wastewater treatment facilities (kWh/year) / operating time of wastewater treatment facilities (hours/year) / total power of wastewater treatment facilities (kW)
污染物指标挥发性有机物的末端治理技术是1、其他（活性炭法），其效率为15，末端治理设施实际运行率（k值）计算公式为k=治理设施正常运行时间（小时/年）/总生产时间（小时/年）

## Reference product
- Printing Ink Cleaner: 1000; input; calculated
  原文件中描述污染物类别为Product，污染物指标为油墨清洗剂（溶剂型），此处对其进行了匹配工作，将其匹配到LCAflow库里面相最符合的流

## Outputs
- volatile organic compound: 807.5, 627, 57, 788.5, 788.5, 332.5, 142.5, 142.5, 579.5, 446.5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 (13 entries); calculated
  原文件中描述污染物类别为废气，污染物指标为挥发性有机物，此处对其进行了匹配工作，将其匹配到LCAflow库里面相最符合的流

## Data sources
- 第二次全国污染源普查产排污核算系数手册（试用版）,二级代码23,三级代码231.0文件，在完整版文件中第516页
