# cement production|cement, ordinary portland cement, 52.4MPa|wet long kiln|blast furnace slag

Dataset: ILCD process, Unit process, black box
Geography: CN
Reference year: 2001
Classification: Materials production / Other mineralic materials
Generated by: Siqi Yang
Amounts: no units in this file; such an amount is in the reference unit of its flow, which a separate flow dataset defines
copyright: false

## General comment
The wet process plant is a secondary key enterprise, and its technological process is relatively mature, with main production processes including slurry preparation and storage, raw material grinding, slurry preparation, and clinker sintering, etc.

## Model description
The scope of the study is defined from the arrival of raw materials, the processes of raw material pre-treatment, raw meal grinding, raw meal calcination, clinker grinding, and up to the cement homogenization and storage. Specific processes such as mining, transportation, and cement packaging are not included.

## Reference product
- cement, ordinary portland cement, 52.4MPa: 1000
  The average grade of cement is 524.

## Inputs
All rows: measured
- limestone, crushed, for mill: 1243.89
  Limestone
- clay: 129.923
  Clay
- iron, powder: 21.472
  Iron powder
- gypsum (desulphurized): 44.3374
  Gupsum
- fluorspar, 97% purity: 3.00822
  Fluorspar
- blast furnace slag: 88.8605
  The original literature was labeled with water slag (i.e., ironmarking blast furnace slag).
- Water (fresh water): 1262.36
  Fresh water
- hard coal: 194.117
  Standard coal. The original data is 75.742kt standard coal, here converted to hard coal, the conversion formula is 1kg hard coal = 0.929kg standard coal.
- electricity, medium voltage: 399.572
  Electricity

## Outputs
- particles (> PM10): 5.69176; measured
  Dust, with an unspecified particle size, is treated as PM > 10 micrometers in diameter.
- particles (> PM10): 0.0256521; measured
  Smoke, with an unspecified particle size, is treated as PM > 10 micrometers in diameter.
- sulfur dioxide: 0.0574254; measured
  Sulfur dioxide
- Nitrogen oxides: 0.0162439; measured
- carbon dioxide: 1073.45
  Carbon dioxide

## Data treatment and extrapolations
CO2 data processing: Based on the CO2 emissions data for one functional unit, calculate the CO2 emissions for the production of 419849 tonnes of cement.

## Data sources
- 狄向华. (2001). 材料环境协调性评价的标准流程方法研究 [硕士, 北京工业大学].
