# 污泥处理与处置|好氧发酵

Dataset: ILCD process, Unit process, single operation
Geography: QHD-HEB-CN
Classification: Materials production / Other mineralic materials
Generated by: Jin Sitian, 2331276@tongji.edu.cn
Review: Dependent internal review by Tiangong LCI Data Working Group
Amounts: no units in this file; such an amount is in the reference unit of its flow, which a separate flow dataset defines

## Reference product
- Sludge: 1000; input; estimated
  1t湿污泥( 含水率为 80% )

## Inputs
- Electricity: 103.68; calculated
- Diesel: 0.22; calculated

## Outputs
- ammonia: 0.0032
- hydrogen sulfide: 0.011
- carbon dioxide: 42; calculated

## Review details
Inventory: The internal review was done by several iteration steps concerning raw data validation, raw data documentation, representativity, completeness and consistency of modelling with regard to ISO 14040 and 14044.

## Data sources
- 城镇污水处理厂污泥处理处置工艺生命周期评价
