# 磷酸铁生产;磷酸铁;硫酸亚铁、磷酸、氢氧化钠、过氧化氢

Dataset: ILCD process, Unit process, single operation
Geography: AH-CN
Classification: Materials production / Inorganic chemicals
Functional unit: Produce 1kg iron phosphate
LCI method principle: Attributional
Generated by: 陈鑫, xinchen@mail.nankai.edu.cn
Owner: 天工LCI数据工作小组
Review: Dependent internal review by 天工LCI数据工作小组
Amounts: no units in this file; such an amount is in the reference unit of its flow, which a separate flow dataset defines
copyright: false
licenseType: Free of charge for all users and uses

## General comment
由硫酸亚铁与磷酸在双氧水下反应生成，然后过滤、水洗干燥而成。

## Geography
安徽安纳达钛业有限公司

## Technical purpose
通过这个工艺生产的磷酸铁常用作锂离子电池的阴极材料，因其稳定性和环保性。它也可以作为颜料，在肥料生产中使用，或作为饲料和食品工业中的铁补充剂。

## Reference product
- Iron phosphate: 1
  数据来自于安徽安徽安纳达钛业有限公司（年产量5000吨）

## Inputs
- ferrous sulfate: 0.808
  数据来自于安徽安徽安纳达钛业有限公司（年产量5000吨）
- phosphoric acid: 1.8
  数据来自于安徽安徽安纳达钛业有限公司（年产量5000吨）
- hydrogen peroxide: 0.0331
  数据来自于安徽安徽安纳达钛业有限公司（年产量5000吨）
- sodium hydroxide: 1.85
  数据来自于安徽安徽安纳达钛业有限公司（年产量5000吨）
- water: 50
  数据来自于安徽安徽安纳达钛业有限公司（年产量5000吨）
- Electricity: 3.4992
  数据来自于安徽安徽安纳达钛业有限公司（年产量5000吨）
- Natural gas, at consumer EU-27: 0.206
  数据来自于安徽安徽安纳达钛业有限公司（年产量5000吨）

## Outputs
- chemical oxygen demand: 0.00114
  数据来自于安徽安徽安纳达钛业有限公司（年产量5000吨）
- ammonium: 6e-6
  数据来自于安徽安徽安纳达钛业有限公司（年产量5000吨）
- sulfur dioxide: 2.06e-5
  数据来自于安徽安徽安纳达钛业有限公司（年产量5000吨）
- nitrogen dioxide: 0.000126
  数据来自于安徽安徽安纳达钛业有限公司（年产量5000吨）
- Soot: 4.8e-9
  数据来自于安徽安徽安纳达钛业有限公司（年产量5000吨）
- Dust: 0.0006
  数据来自于安徽安徽安纳达钛业有限公司（年产量5000吨）

## Data selection and combination
来源于安徽安纳达钛业有限公司2015年生产数据

## Use advice
磷酸铁生产的生命周期评估数据应包括所有原材料采购和生产过程中消耗的能源的环境影响。应确保准确核算排放量。在应用此数据时，重要的是要考虑磷酸铁在生命周期末端可能的回收或二次使用场景。

## Review details
清单： 内部审查通过几个迭代步骤完成，涉及原始数据验证、原始数据记录、代表性、完整性、与 ISO 14040 和 14044 有关的建模的一致性。

## Data sources
- Feng, T., Guo, W., Li, Q., Meng, Z. & Liang, W. Life cycle assessment of lithium nickel cobalt manganese oxide batteries and lithium iron phosphate batteries for electric vehicles in China. Journal of Energy Storage52, 104767 (2022).
