# Refinedoil|Woolenoil|Refining|less than500 t - raw material/d / 精制油|毛油|精炼|小于500吨-原料/天

Dataset: ILCD process, Unit process, single operation
Geography: CN
Reference year: 2019
Classification: Energy carriers and technologies / Crude oil based fuels
Generated by: The data was created by the Office of the Second National Pollution Source Census of the Ministry of Ecology and Environment, and the data was organized by the TianGong Plan team for ILCD format / 生态环境部第二次全国污染源普查工作办公室创建数据，天工计划团队常慧敏整理数据为ILCD格式
Owner: Tiangong LCI Data Working Group / 天工LCI数据工作小组
Amounts: no units in this file; such an amount is in the reference unit of its flow, which a separate flow dataset defines
copyright: false
licenseType: Free of charge for all users and uses

## Technology and included processes
the Technical of end-of-pipe management technology for pollution Petroleum-related wasteisPhysical treatment②

## Reference product
- wool oil: 1000; input; calculated
  源文件中描述为为毛油，此处对其进行了匹配工作，将其匹配到LCAflow库里面相最符合的流，污染物指标备注为工业废水量

## Outputs
All rows: calculated
- Waste water: 160
  污染物指标工业废水量的末端治理技术是/，其效率为0。原文件中描述污染物类别为废水，污染物指标为工业废水量，此处对其进行了匹配工作，将其匹配到LCAflow库里面相最符合的流，污染物指标备注为工业废水量
- chemical oxygen demand: 0.0213368
  污染物指标化学需氧量的末端治理技术是物理处理法+化学处理法+厌氧生物处理法+好氧生物处理法，其效率为97.02，末端治理设施实际运行率（k值）计算公式为k=污水处理设施年耗电量/(总额定功率(千瓦)×年运行时间(小时))。原文件中描述污染物类别为废水，污染物指标为化学需氧量，此处对其进行了匹配工作，将其匹配到LCAflow库里面相最符合的流，污染物指标备注为化学需氧量
- chemical oxygen demand: 0.045824
  污染物指标化学需氧量的末端治理技术是物理处理法+化学处理法+好氧生物处理法①，其效率为93.6，末端治理设施实际运行率（k值）计算公式为k=污水处理设施年耗电量/(总额定功率(千瓦)×年运行时间(小时))，①指生产非单一产品的企业。
  。原文件中描述污染物类别为废水，污染物指标为化学需氧量，此处对其进行了匹配工作，将其匹配到LCAflow库里面相最符合的流，污染物指标备注为化学需氧量
- chemical oxygen demand: 0.716
  污染物指标化学需氧量的末端治理技术是物理处理法②，末端治理设施实际运行率（k值）计算公式为k=污水处理设施年耗电量/(总额定功率(千瓦)×年运行时间(小时))，①指生产非单一产品的企业。
  。原文件中描述污染物类别为废水，污染物指标为化学需氧量，此处对其进行了匹配工作，将其匹配到LCAflow库里面相最符合的流，污染物指标备注为化学需氧量
- phosphorus, total: nan
  污染物指标总磷的末端治理技术是物理处理法+化学处理法+厌氧生物处理法+好氧生物处理法，其效率为95.02，末端治理设施实际运行率（k值）计算公式为k=污水处理设施年耗电量/(总额定功率(千瓦)×年运行时间(小时))。原文件中描述污染物类别为废水，污染物指标为总磷，此处对其进行了匹配工作，将其匹配到LCAflow库里面相最符合的流，污染物指标备注为总磷，产污系数备注为采用“预压榨+浸出+精炼”工艺生产的菜籽精制油/葵花籽精制油/棉籽精制油等其它精制食用植物油，选用系数表单中同规模大豆精制油的产污系数和去除效率
- phosphorus, total: nan
  污染物指标总磷的末端治理技术是物理处理法+化学处理法+好氧生物处理法①，其效率为91.93，末端治理设施实际运行率（k值）计算公式为k=污水处理设施年耗电量/(总额定功率(千瓦)×年运行时间(小时))，③采用“预压榨+浸出+精炼”工艺生产的菜籽精制油/葵花籽精制油/棉籽精制油等其它精制食用植物油，选用系数表单中同规模大豆精制油的产污系数和去除效率。。原文件中描述污染物类别为废水，污染物指标为总磷，此处对其进行了匹配工作，将其匹配到LCAflow库里面相最符合的流，污染物指标备注为总磷，产污系数备注为采用“预压榨+浸出+精炼”工艺生产的菜籽精制油/葵花籽精制油/棉籽精制油等其它精制食用植物油，选用系数表单中同规模大豆精制油的产污系数和去除效率
- phosphorus, total: nan
  污染物指标总磷的末端治理技术是物理处理法②，末端治理设施实际运行率（k值）计算公式为k=污水处理设施年耗电量/(总额定功率(千瓦)×年运行时间(小时))，③采用“预压榨+浸出+精炼”工艺生产的菜籽精制油/葵花籽精制油/棉籽精制油等其它精制食用植物油，选用系数表单中同规模大豆精制油的产污系数和去除效率。。原文件中描述污染物类别为废水，污染物指标为总磷，此处对其进行了匹配工作，将其匹配到LCAflow库里面相最符合的流，污染物指标备注为总磷，产污系数备注为采用“预压榨+浸出+精炼”工艺生产的菜籽精制油/葵花籽精制油/棉籽精制油等其它精制食用植物油，选用系数表单中同规模大豆精制油的产污系数和去除效率
- Petroleum-related waste: 0.00104533
  污染物指标石油类a的末端治理技术是物理处理法+化学处理法+厌氧生物处理法+好氧生物处理法，其效率为97.79，末端治理设施实际运行率（k值）计算公式为k=污水处理设施年耗电量/(总额定功率(千瓦)×年运行时间(小时))。原文件中描述污染物类别为废水，污染物指标为石油类a，此处对其进行了匹配工作，将其匹配到LCAflow库里面相最符合的流，污染物指标备注为石油类a
- Petroleum-related waste: 0.00335357
  污染物指标石油类a的末端治理技术是物理处理法+化学处理法+好氧生物处理法①，其效率为92.91，末端治理设施实际运行率（k值）计算公式为k=污水处理设施年耗电量/(总额定功率(千瓦)×年运行时间(小时))，①指生产非单一产品的企业。
  。原文件中描述污染物类别为废水，污染物指标为石油类a，此处对其进行了匹配工作，将其匹配到LCAflow库里面相最符合的流，污染物指标备注为石油类a
- Petroleum-related waste: 0.0473
  污染物指标石油类a的末端治理技术是物理处理法②，末端治理设施实际运行率（k值）计算公式为k=污水处理设施年耗电量/(总额定功率(千瓦)×年运行时间(小时))，①指生产非单一产品的企业。
  。原文件中描述污染物类别为废水，污染物指标为石油类a，此处对其进行了匹配工作，将其匹配到LCAflow库里面相最符合的流，污染物指标备注为石油类a

## Data sources
- 第二次全国污染源普查产排污核算系数手册（试用版）,二级代码13,四级代码1331文件，在完整版文件中第3413页
