# cement production|cement, ordinary portland cement|new dry process, 5000 t/d|pure low-temperature waste heat power generation technology|mixed solid wastes

Dataset: ILCD process, Unit process, black box
Geography: CN
Classification: Materials production / Other mineralic materials
Generated by: Siqi Yang
Amounts: no units in this file; such an amount is in the reference unit of its flow, which a separate flow dataset defines
copyright: false

## General comment
Equipped with a 5000T/D new dry process cement clinker production line, which adopts advanced enhanced suspension preheater five-stage kiln decomposition technology and advanced cement production equipment such as vertical raw material mill and large ball mill with roller press. The case adopts the technology of pure low temperature waste heat power generation. The kiln head exhaust gas from thechiller is used for heating AQC boilers, and the kiln tail exhaust gas from the preheating device is used for heating PH boilers. The heat energy in the exhaust gas is converted into overheating steam by high -efficiency waste heat boiler to promote the power generation of the steam generator set.

## Geography
Two cement plants in the Northeast

## Model description
The system boundary is the cement production system of the cement plant.

## Reference product
- cement, ordinary portland cement: 1000
  Cement products

## Inputs
All rows: measured
- limestone, crushed, for mill: 1150
  Limestone
- clay: 191.111
  Clay
- ash: 123.333
  Fly ash
- copper slag: 30.6111
  Copper
- gypsum (desulphurized): 70
  Gupsum
- blast furnace slag: 58.8889
  Blast furnace slag
- hard coal: 150.722
  Bituminous coal. Annual energy consumption from coal = (2.713E+8） kg x (2.1502E+7) J/kg (average low heating value) = 5.83E+15)J.
- electricity, medium voltage: 290.6
  Total electricity consumption. Annual energy consumption from electricity = (1.453E+8) kWh x (3.60E+6) J/kWh = (5.23E+14)J.
- tap water: 983.516
  Total water

## Outputs
All rows: measured
- particles (> PM10): 0.441209
  Dust, with an unspecified particle size, is treated as PM > 10 micrometers in diameter.
- nitrogen dioxide: 2.45604
  NO2
- sulfur dioxide: 0.653846
  SO2
- carbon dioxide: 409.341
  CO2
- electricity, medium voltage: 122.4
  Annual electricity generation. Annual electricity generation = (6.12E+7) kWh x (3.60E+6) J/kWh = (2.20E+14) J. In the cement clinker calcination process, there is a large amount of heat contained in the exhaust gas discharged from the kiln head cooler and kiln tail preheater, with the heat contained in the low-temperature exhaust gas below 400°C accounting for about one-third of the total heat consumption in cement clinker calcination. Waste heat power generation technology can save a lot of resources and energy by recovering this part of waste heat, and it will not cause secondary pollution to the environment. Therefore, waste heat power generation technology has become a new technology in the cement industry, which is an effective way to achieve pollution reduction, energy conservation, efficiency improvement, and sustainable development.

## Data sources
- 邵帅. (2016). 基于Emergy和Em-LCA的水泥企业可持续发展水平评价 [硕士, 大连理工大学].
