# 牛奶生产 ; 粪便处理 ; 非种养一体化奶牛场(non-IPBS)

Dataset: ILCD process, Unit process, single operation
Geography: QD-SD-CN
Reference year: 2016
Classification: Unit processes / End-of-life treatment / Material recycling
Functional unit: The 1t FPCM corrected for protein and fat content was selected as the evaluation unit
Generated by: 杨瑞, 1632707028@qq.com
Owner: 天工LCI数据工作小组
Review: Dependent internal review by 天工LCI数据工作小组
Amounts: no units in this file; such an amount is in the reference unit of its flow, which a separate flow dataset defines
copyright: false
licenseType: Free of charge for all users and uses

## General comment
在粪便处理环节,2 种模式的粪便处理方式相同,粪便均采用堆肥制成有机肥,尿液污水进入氧化塘经无害化处理制成液 体肥,此环节投入主要是电和柴油(表 8).此环节的排 放包括粪肥储存排放、有机肥生产能耗排放.尿液污 水在氧化塘中的温室气体排放较小[25],可忽略.

## Geography
于 2020 年 7 月~8 月在山东省青岛市进行奶牛 场问卷调查.

## Time period
从 2016 年,山东开始实施青贮玉米种植补贴 政策,是国内最早实施该补贴政策的省份之一,补贴 标准为 20~50 元/t.2019 年,山东省青贮玉米种植面 积达 1.41 万 hm2,占全国的 7.3%.

## Technology and included processes
研究地区主要有 2 种牛奶生产模式:IPBS 和 non-IPBS.non-IPBS 中,养殖场只有饲养 环节和粪污处理环节,饲料全部来源于购买,粪便堆 肥制成有机肥后全销售给果农和菜农.IPBS 中,养殖 场增加青贮玉米种植环节,有机肥、液体肥主要施用 于场内农田,剩余部分销售给果农和菜农等.2 种模 式的区别:1)养殖场青贮玉米的来源不同,导致饲料 运输距离和饲料成本不同;2)有机肥、液体肥的利用 途径不同,运输距离不同.本研究共调研奶牛场 109 家,剔除不符合研究问卷后,得 83 份有效问卷,其中 non-IPBS 为 38 家,IPBS 为 45 家.

## Technical purpose
该数据集表示山东省非种养一体化奶牛场（non-IPBS）的牛奶生产和粪便处理过程。非种养一体化养殖场外购所有饲料，并将堆肥化的粪便销售给果蔬种植者。这一过程与种养结合系统（IPBS）的区别在于青贮玉米的来源、饲料成本以及有机肥和液体肥料至田间的运输和施用。

## Reference product
- milk: 1000; estimated
  作为参考定量，非实际输出

## Inputs
All rows: measured
- manure: 1931
  粪便（non-IPBS模式）
- waste water - untreated: 11215
  尿液污水（non-IPBS模式）
- Electricity: 4.8672
- Diesel: 0.002577
- unspecified: 1.7
  土地占用（non-IPBS模式）

## Outputs
- organic fertilizer: 751; measured
  有机肥（non-IPBS模式）
- Fertilizer: 10654; measured
  液体肥（non-IPBS模式）

## Data treatment and extrapolations
表中数值为养殖场各项总投入、总产出均摊到每吨FPCM上,再取 各养殖场均值,所有投入产出清单数据均按此方法计算;“()”中的 数值为每公顷平均投入,为方便与相关研究比较;“a”由于养殖场耕 地的机械作业主要是代耕作业,养殖场主对该环节的柴油消耗不 清楚,该数据借鉴相关研究[20];“b”此数值为过程产出,最终全部用 于系统内部.

## Sampling procedure
研究地区主要有 2 种牛奶生产模式:IPBS 和 non-IPBS,具体见图 1.non-IPBS 中,养殖场只有饲养 环节和粪污处理环节,饲料全部来源于购买,粪便堆 肥制成有机肥后全销售给果农和菜农.IPBS 中,养殖 场增加青贮玉米种植环节,有机肥、液体肥主要施用 于场内农田,剩余部分销售给果农和菜农等.2 种模 式的区别:1)养殖场青贮玉米的来源不同,导致饲料 运输距离和饲料成本不同;2)有机肥、液体肥的利用 途径不同,运输距离不同.本研究共调研奶牛场 109 家,剔除不符合研究问卷后,得 83 份有效问卷,其中 non-IPBS 为 38 家,IPBS 为 45 家.

## Use advice
数据使用者应注意以下方法论建议：在建模粪便处理过程时考虑到粪便堆肥成有机肥和尿液在氧化塘的无害化处理。电力和柴油是此过程的主要投入，在评估环境影响时可能需要进行分摊。应在生命周期评估中包括粪便储存的排放和生产有机肥的能耗排放，以及来自氧化塘的可忽略不计的温室气体排放。数据集是基于每吨脂肪和蛋白校正的牛奶（FPCM）的总输入和输出计算的，用于跨农场的标准比较。

## Review details
清单： 内部审查通过几个迭代步骤完成，涉及原始数据验证、原始数据记录、代表性、完整性、与 ISO 14040 和 14044 有关的建模的一致性。

## Data sources
- 黄显雷, 师博扬, 张英楠, 龙昭宇, & 尹昌斌. 基于生命周期视角的种养一体化奶牛场环境经济效益评估. 中国环境科学 41, 3944–3955 (2021).
