# 热拌沥青混合料

Dataset: ILCD process, Unit process, single operation
Geography: CN
Classification: Unit processes / Materials production / Other mineralic materials
Generated by: Zhaoxing Wang, zhaoxing.wang@uantwerpen.be
Owner: 天工LCI数据工作小组
Review: Dependent internal review by 天工LCI数据工作小组
Amounts: no units in this file; such an amount is in the reference unit of its flow, which a separate flow dataset defines
licenseType: Free of charge for all users and uses

## General comment
该数据集关于生产热拌沥青混合料的单元过程，热拌沥青混合料用于建设和维护道路、停车场和机场。热拌沥青是通过单一操作过程将骨料、沥青粘合剂和填料结合在一起，然后分层铺设并压实而成。

## Reference product
- Asphalt mixture: 1000; calculated
  1吨热拌沥青

## Inputs
- natural gas; 44.1 MJ/kg: 5.374; calculated
  干燥骨料所需的天然气
- natural gas; 44.1 MJ/kg: 0.368; calculated
  加热沥青所需的天然气
- Electricity: 5.2056; calculated
  热搅拌沥青所需的电

## Use advice
生命周期评估(LCA)数据的用户应注意沥青生产过程的具体情况，包括原材料的类型和来源、能源消耗以及与生产相关的排放。用户应确保数据与预期应用的地区和技术背景相兼容。为进行全面评估，应考虑到生命周期终端阶段，如沥青材料的回收或处置。

## Review details
清单： 内部审查通过几个迭代步骤完成，涉及原始数据验证、原始数据记录、代表性、完整性、与 ISO 14040 和 14044 有关的建模的一致性。

## Data sources
- Modeling and Validation of Energy Consumption in Asphalt Mixture Production
