# 聚合物杂化铝电解电容器 (PHAEC) 使用 ; 使用过的电容器

Dataset: ILCD process, Unit process, single operation
Geography: CN
Reference year: 2022
Classification: Unit processes / Materials production / Other materials
Generated by: 封羽真, fyz22
Owner: 天工LCI数据工作小组
Review: Dependent internal review by 天工LCI数据工作小组
Amounts: no units in this file; such an amount is in the reference unit of its flow, which a separate flow dataset defines
copyright: false
licenseType: Free of charge for all users and uses

## General comment
接着50

## Time period
文献发表于2022-11-15，文献中 The reference year of the elementary data (alumminum ingots, separator paper, tansport, electricity, and water) is around 2016 and qcruired from the Gabi database (Version: 10.6.1.35)

## Technical purpose
聚合物杂化铝电解电容器（PHAECs）用于需要高品质能量存储组件的应用。由于它们的混合特性，结合了电解质聚合物与铝，适合在不同温度下需要稳定性能和长时间操作寿命的设备中使用。典型的应用包括电源电路、消费电子、汽车电子以及工业机械。

## Reference product
- capacitor, electrolyte type, > 2cm height: 1e6; input; measured

## Inputs
- electricity, high voltage, aluminium industry: 86376.2; measured
  Electricity

## Outputs
- used capacitor: 1e6; measured
  Capacitors (waste)

## Data selection and combination
三种 AEC 的材料信息和性能参数均来自被调查的制造商。此外，通过对 AEC 行业的几家工厂进行实地调研，获得了铝坯箔制造（由铝锭制成）、阳极/阴极箔制造（由铝坯箔制成）和电容器制造的原始数据。由于技术保密原因，无法直接从供应商处获得 PHAEC 阴极箔制造的 LCI 数据。因此，考虑到两者的相似性，根据 PAECs 阴极箔的涂层工艺数据调整 PHAECs 阴极铝箔的制造 LCI。在运输阶段，主要原材料从材料产地到电容器制造商的数据以及电容器制成品从制造商到客户的数据均来自制造商的供应链系统。使用阶段的能耗是根据 AEC 的物理方程和电气参数计算得出的。为确保分析的完整性，在分析和计算的基础上获得报废阶段的数据。基本数据的参考年份约为 2016 年。基本数据（即铝锭、分离纸、运输、电力和水）来自 Gabi 数据库（版本：10.6.1.35）。此外，一些背景数据，包括 3，4-乙烯二氧噻吩（EDOT）、己二酸铵、柠檬酸铵等，在 Gabi 数据库中无法获得。它们是根据 Gabi 数据库中现有原材料在材料制备过程中发生的化学反应估算出来的。用于制造 PHAECs 的分散溶液（PEDOT:PSS，1%wt）的制备过程数据是根据实验室数据按比例计算的。三种 AEC 的详细 LCI 数据和物质流的单位影响见辅助信息 B 的第 5-7 张和第 2 张。

## Use advice
使用提供的数据时，必须考虑基础数据的参考年份约为2016年，这意味着可能需要更新数据以用于现代评估。生命周期清单（LCI）数据特定于所调查制造商使用的制造过程，可能不具有普遍适用性。用户必须考虑阴极箔制造过程中的技术保密性问题，由于供应商未披露，此过程基于类似过程。对于与运输相关的排放，用户应当只将特定制造商的供应链数据应用于类似的供应链环境。使用阶段的能源消耗应根据提供的物理方程计算，并根据PHAECs的特定应用进行调整。对于终生阶段的数据，用户必须确保分析与电容器将被丢弃的时间段和地区相关的处置和回收实践保持一致。

## Review details
清单： 内部审查通过几个迭代步骤完成，涉及原始数据验证、原始数据记录、代表性、完整性、与 ISO 14040 和 14044 有关的建模的一致性。

## Data sources
- Zhang, C., Zheng, Y., Jing, J., Liu, Y. & Huang, H. A comparative LCA study on aluminum electrolytic capacitors: From liquid-state electrolyte, solid-state polymer to their hybrid. J. Clean. Prod. 375, (2022).
