# Organicauxiliaries|Organicchemicalrawmaterials/inorganicchemicalrawmaterials|Chemicalsynthesisormixed|All sizes / 有机助剂|有机化工原料/无机化工原料|化学合成或混合|所有规模

Dataset: ILCD process, Unit process, single operation
Geography: CN
Reference year: 2019
Classification: Materials production / Organic chemicals
Generated by: The data was created by the Office of the Second National Pollution Source Census of the Ministry of Ecology and Environment, and the data was organized by the TianGong Plan team for ILCD format / 生态环境部第二次全国污染源普查工作办公室创建数据，天工计划团队常慧敏整理数据为ILCD格式
Owner: Tiangong LCI Data Working Group / 天工LCI数据工作小组
Review: Dependent internal review by Tiangong LCI Data Working Group / 天工LCI数据工作小组
Amounts: no units in this file; such an amount is in the reference unit of its flow, which a separate flow dataset defines
copyright: false
licenseType: Free of charge for all users and uses

## General comment
the Technical of end-of-pipe management technology for pollution Nitrogen, organic boundisPhysicochemical treatment + biological treatment，Its Technical efficiency of end-of-pipe management82

## Reference product
- Auxiliary: 1000; calculated
  源文件中描述为为有机助剂，此处对其进行了匹配工作，将其匹配到LCAflow库里面相最符合的流，污染物指标备注为工业废水量

## Outputs
- Waste water: 21200; calculated
  污染物指标工业废水量的末端治理技术是/。原文件中描述污染物类别为废水，污染物指标为工业废水量，此处对其进行了匹配工作，将其匹配到LCAflow库里面相最符合的流，污染物指标备注为工业废水量
- chemical oxygen demand: 6.62; calculated
  污染物指标化学需氧量的末端治理技术是物理化学处理法+生物法，其效率为99，末端治理设施实际运行率（k值）计算公式为k=污染处理设备年耗电量（千瓦时）/(污染处理设备功率(千瓦)×年运行小时数(时))。原文件中描述污染物类别为废水，污染物指标为化学需氧量，此处对其进行了匹配工作，将其匹配到LCAflow库里面相最符合的流，污染物指标备注为化学需氧量
- Ammonia Nitrogen: 0.0998; calculated
  污染物指标氨氮的末端治理技术是物理化学处理法+生物法，其效率为80，末端治理设施实际运行率（k值）计算公式为k=污染处理设备年耗电量（千瓦时）/(污染处理设备功率(千瓦)×年运行小时数(时))。原文件中描述污染物类别为废水，污染物指标为氨氮，此处对其进行了匹配工作，将其匹配到LCAflow库里面相最符合的流，污染物指标备注为氨氮
- Nitrogen, organic bound: 27.9; calculated
  污染物指标总氮的末端治理技术是物理化学处理法+生物法，其效率为82，末端治理设施实际运行率（k值）计算公式为k=污染处理设备年耗电量（千瓦时）/(污染处理设备功率(千瓦)×年运行小时数(时))。原文件中描述污染物类别为废水，污染物指标为总氮，此处对其进行了匹配工作，将其匹配到LCAflow库里面相最符合的流，污染物指标备注为总氮

## Use advice
This dataset is derived from the Pollution Source Census Report and contains information on pollution emissions and related products. However, it does not include data on energy or chemical consumption, nor does it provide information on waste or co-product generation. When utilizing this dataset, please supplement the missing data based on actual conditions before use
该数据集来源于污染源普查报告，包含污染物排放及相关产品信息，但不包含能源或化学品消耗数据，也不提供废弃物或共生产物产生信息。在使用该数据集时，请根据实际情况补充缺失数据后再使用。

## Review details
Inventory: The internal review was done by several iteration steps concerning raw data validation, raw data documentation, representativity, completeness and consistency of modelling with regard to ISO 14040 and 14044.
清单： 内部审查通过几个迭代步骤完成，涉及原始数据验证、原始数据记录、代表性、完整性、与 ISO 14040 和 14044 有关的建模的一致性。

## Data sources
- 第二次全国污染源普查产排污核算系数手册（试用版）,二级代码26,四级代码2661文件，在完整版文件中第4111页
