# 稀土氧化物 采矿/原地浸出;稀土氧化物;一般工艺;离子吸附粘土

Dataset: ILCD process, Unit process, single operation
Geography: CN
Reference year: 2016
Classification: Unit processes / Materials production / Non-energetic raw materials
Functional unit: The functional unit chosen for this study is 1 kg of heavy REOs at 90% purity
LCI method principle: Attributional
LCI method approaches: Allocation - market value
Generated by: 汪涛, twang@iue.ac.cn
Owner: 天工LCI数据工作小组
Review: Dependent internal review by 天工LCI数据工作小组
Amounts: no units in this file; such an amount is in the reference unit of its flow, which a separate flow dataset defines
copyright: false
licenseType: Free of charge for all users and uses

## General comment
从中国南方的离子吸附粘土中生产的稀土氧化物（REOs）用于电子、磁铁和催化剂等多种高科技行业。这些混合REOs具有规定的90%纯度，适用于需要特定磁性、导电性和光学性质的应用，例如永磁体制造、电池合金和抛光粉的制造。

## Geography
Ganzhou city, Jiangxi Province

## Technology and included processes
本研究描述了中国南方地区用离子吸附粘土生产混合 REO 的情况，纯度为 90%。 REO 中各个稀土矿物的成分因矿石而异。表 1 显示了来自江西普罗维登斯（本次 LCA 数据收集的同一地区）的两种离子吸附粘土的矿石，尽管它们可能无法准确表征在本次 LCA 数据收集地点开采的特定 REO。研究，它们可能是相似的。1 LCA 研究的系统边界包括使用原地浸出方法的采矿、提取和煅烧。这些过程全部在现场进行，最终产品是混合REO。不包括进一步的过程，例如溶剂萃取和单独的金属分离，因为它们通常发生在场外。

## Reference product
- Ammonium sulfate: 7; input; calculated
  Ammonia sulfate

## Inputs
- Electricity: 30.96; calculated

## Deviations from the LCI method approaches
The LCI was developed using primary data for the foreground system collected from four sites in southern China, as described in Sections 2.1.2.Background data are from the Chinese life cycle database (CLCD). CLCD is a Chinese national reference LCI database developed by Sichuan University, China, and IKE Environmental Technology CO. Ltd., and it sources original data from industry statistics, government publications, academic research, and other LCA databases (Liu et al. 2010). The one exception is electricity data provided by Ecoinvent that is used in the scenario analysis conducted in this study (Ecoinvent Center 2016). These datasets from Ecoinvent are used to model the effects of changing electricity grid composition via scenario analysis.

## Use advice
在使用江西省采用原地浸出法和离子吸附粘土方法生产REO的LCA数据时，应考虑数据的地理特定性和技术代表性。LCA研究的系统边界包括采矿、提取和煅烧，但不包括溶剂提取和金属分离。用户应确保这些系统边界与其研究范围一致。在对使用阶段行为或回收进行建模时，应单独考虑在现场外发生的额外过程。如果电力数据与用于情景分析的Ecoinvent数据明显不同，应适应电力数据以反映特定电网结构的实际情况。

## Review details
清单： 内部审查通过几个迭代步骤完成，涉及原始数据验证、原始数据记录、代表性、完整性、与 ISO 14040 和 14044 有关的建模的一致性。

## Data sources
- Deng, H. & Kendall, A. Life cycle assessment with primary data on heavy rare earth oxides from ion-adsorption clays. Int J Life Cycle Assess 24, 1643–1652 (2019).
