# GasPurification|Coalgas|Coal|Coal retorting|All sizes / 煤气净化|煤制气|煤炭|煤炭干馏|所有规模

Dataset: ILCD process, Unit process, single operation
Geography: CN
Reference year: 2019
Classification: Energy carriers and technologies / Hard coal based fuels
Generated by: The data was created by the Office of the Second National Pollution Source Census of the Ministry of Ecology and Environment, and the data was organized by the TianGong Plan team for ILCD format / 生态环境部第二次全国污染源普查工作办公室创建数据，天工计划团队常慧敏整理数据为ILCD格式
Owner: Tiangong LCI Data Working Group / 天工LCI数据工作小组
Amounts: no units in this file; such an amount is in the reference unit of its flow, which a separate flow dataset defines
copyright: false
licenseType: Free of charge for all users and uses

## Technology and included processes
the Technical of end-of-pipe management technology for pollution Ammonia NitrogenisAerobic biological treatment + physical chemical treatment (coagulation and precipitation)，Its Technical efficiency of end-of-pipe management97

## Reference product
- Coal Gasification: 10000; calculated
  源文件中描述为为煤制气，此处对其进行了匹配工作，将其匹配到LCAflow库里面相最符合的流

## Outputs
All rows: calculated
- cyanide: 0.000532
  污染物指标氰化物的末端治理技术是好氧生物处理法+物理化学处理法（混凝沉淀），其效率为90，末端治理设施实际运行率（k值）计算公式为k=废水处理设施DCS年运行时间（小时）/正常生产时间（小时）。原文件中描述污染物类别为废水，污染物指标为氰化物，此处对其进行了匹配工作，将其匹配到LCAflow库里面相最符合的流
- chemical oxygen demand: 1.596
  污染物指标化学需氧量的末端治理技术是好氧生物处理法+物理化学处理法（混凝沉淀），其效率为93，末端治理设施实际运行率（k值）计算公式为k=废水处理设施DCS年运行时间（小时）/正常生产时间（小时）。原文件中描述污染物类别为废水，污染物指标为化学需氧量，此处对其进行了匹配工作，将其匹配到LCAflow库里面相最符合的流
- phenol: 0.00308
  污染物指标挥发酚的末端治理技术是好氧生物处理法+物理化学处理法（混凝沉淀），其效率为96，末端治理设施实际运行率（k值）计算公式为k=废水处理设施DCS年运行时间（小时）/正常生产时间（小时）。原文件中描述污染物类别为废水，污染物指标为挥发酚，此处对其进行了匹配工作，将其匹配到LCAflow库里面相最符合的流
- Petroleum-related waste: 0.003381
  污染物指标石油类的末端治理技术是好氧生物处理法+物理化学处理法（混凝沉淀），其效率为93，末端治理设施实际运行率（k值）计算公式为k=废水处理设施DCS年运行时间（小时）/正常生产时间（小时）。原文件中描述污染物类别为废水，污染物指标为石油类，此处对其进行了匹配工作，将其匹配到LCAflow库里面相最符合的流
- Waste water: 8720
  污染物指标工业废水量的末端治理技术是好氧生物处理法+物理化学处理法（混凝沉淀），末端治理设施实际运行率（k值）计算公式为k=废水处理设施DCS年运行时间（小时）/正常生产时间（小时）。原文件中描述污染物类别为废水，污染物指标为工业废水量，此处对其进行了匹配工作，将其匹配到LCAflow库里面相最符合的流
- Ammonia Nitrogen: 0.0348
  污染物指标氨氮的末端治理技术是好氧生物处理法+物理化学处理法（混凝沉淀），其效率为97，末端治理设施实际运行率（k值）计算公式为k=废水处理设施DCS年运行时间（小时）/正常生产时间（小时）。原文件中描述污染物类别为废水，污染物指标为氨氮，此处对其进行了匹配工作，将其匹配到LCAflow库里面相最符合的流

## Data sources
- 第二次全国污染源普查产排污核算系数手册（试用版）,二级代码45,四级代码4513文件，在完整版文件中第2495页
