# Electricity production ; Electricity ; Thermal power (70.7%) + hydropower (7.3%) + nuclear power (17.8%) + wind power (0.9%) + solar power (3.4%)

Dataset: ILCD process, Partly terminated system
Geography: ZJ-CN
Reference year: 2019
Classification: Energy carriers and technologies / Electricity
LCI method principle: Other
Generated by: Ruoxi Xiong, xiongrx0126@163.com
Owner: Tiangong LCI Data Working Group
Review: Dependent internal review by Tiangong LCI Data Working Group
Amounts: no units in this file; such an amount is in the reference unit of its flow, which a separate flow dataset defines
copyright: false
licenseType: Free of charge for all users and uses

## General comment
Forms of electricity generation include thermal power generation, hydropower generation, nuclear power generation, wind power generation and solar power generation.

## Time period
Calculated based on data from the 2019 Energy Statistics Yearbook

## Technical purpose
The industrial process described is for electricity production, and includes various methods such as thermal power, hydropower, nuclear power, wind power, and solar power generation. The distribution of the energy mix includes a significant proportion of thermal power (70.7%), followed by nuclear power (17.8%), hydropower (7.3%), solar power (3.4%), and wind power (0.9%). This electricity production mix is intended for general consumption, supplying energy to the grid for use in residential, commercial, industrial, and transport sectors.

## Reference product
- Electricity: 3.6; calculated

## Outputs
- carbon dioxide: 0.467; calculated
- sulfur dioxide: 8e-5; calculated
- Nitrogen oxides: 0.000123996; calculated
- Dust (unspecified, from stack): 1.5794e-5; calculated

## Data treatment and extrapolations
For the accounting method, please refer to the "Enterprise Greenhouse Gas Emissions Accounting Methods and Reporting Guidelines for Power Generation Facilities". Different forms of power generation and fuel consumption come from Chapter 3 (Energy Production) and Chapter 6 (Regional Energy Balance Sheet) in the "China Energy Statistical Yearbook 2020". The fuel parameters such as low calorific value and carbon content per unit calorific value used to calculate the carbon dioxide emission factor come from the "2019 China Regional Power Grid Carbon Dioxide Baseline Emission Factor Calculation Instructions OM" and the "Enterprise Greenhouse Gas Emission Accounting Method and Reporting Guide for Power Generation Facilities" 》

## Use advice
When utilizing this LCA data for electricity production, it is important to consider the specific energy mix in the assessment. The carbon emission factor has been calculated based on the 2019 Energy Statistics Yearbook, and users should reference the 'Enterprise Greenhouse Gas Emissions Accounting Methods and Reporting Guidelines for Power Generation Facilities' for accurate representation. Appropriate consideration should be given to the different forms of power generation and their specific fuel consumption as listed in the China Energy Statistical Yearbook 2020 (Chapters 3 and 6). Use fuel parameters from the '2019 China Regional Power Grid CO2 Baseline Emission Factor Calculation Instructions OM' for accurate CO2 emission factor determination.

## Review details
Inventory: The internal review was done by several iteration steps concerning raw data validation, raw data documentation, representativity, completeness and consistency of modelling with regard to ISO 14040 and 14044.

## Data sources
- 熊若熙. 中国电力生产和消费二氧化碳与污染物排放因子核算. (清华大学, 2023).
