# Coalpreparation|Coalgas|Coal|Coal retorting|All sizes / 备煤|煤制气|煤炭|煤炭干馏|所有规模

Dataset: ILCD process, Unit process, single operation
Geography: CN
Reference year: 2019
Classification: Energy carriers and technologies / Hard coal based fuels
Generated by: The data was created by the Office of the Second National Pollution Source Census of the Ministry of Ecology and Environment, and the data was organized by the TianGong Plan team for ILCD format / 生态环境部第二次全国污染源普查工作办公室创建数据，天工计划团队常慧敏整理数据为ILCD格式
Owner: Tiangong LCI Data Working Group / 天工LCI数据工作小组
Amounts: no units in this file; such an amount is in the reference unit of its flow, which a separate flow dataset defines
copyright: false
licenseType: Free of charge for all users and uses

## Technology and included processes
the Technical of end-of-pipe management technology for pollution Exhaust gasisDirect discharge，The formula for calculating the actual operation rate (k-value) of the end-of-pipe treatment facility is k = equipment operating time (hours) / total production time (hours)

## Reference product
- Coal Gasification: 10000; calculated
  源文件中描述为为煤制气，此处对其进行了匹配工作，将其匹配到LCAflow库里面相最符合的流

## Outputs
- particles (PM2.5 - PM10): 0.1212; calculated
  污染物指标颗粒物的末端治理技术是袋式除尘，其效率为97，末端治理设施实际运行率（k值）计算公式为k=除尘设备耗电量（千瓦时/年）/（除尘设备额定功率（千瓦）×除尘设备运行时间（小时/年））。原文件中描述污染物类别为废气，污染物指标为颗粒物，此处对其进行了匹配工作，将其匹配到LCAflow库里面相最符合的流
- particles (PM2.5 - PM10): 4.04; calculated
  污染物指标颗粒物的末端治理技术是直排。原文件中描述污染物类别为废气，污染物指标为颗粒物，此处对其进行了匹配工作，将其匹配到LCAflow库里面相最符合的流
- Exhaust gas: 1930; calculated
  污染物指标工业废气量的末端治理技术是直排。原文件中描述污染物类别为废气，污染物指标为工业废气量，此处对其进行了匹配工作，将其匹配到LCAflow库里面相最符合的流

## Data sources
- 第二次全国污染源普查产排污核算系数手册（试用版）,二级代码45,四级代码4513文件，在完整版文件中第2493页
