# 修复后土壤;原位固化稳定化;水泥、膨润土;土壤原位修复;5个月

Dataset: ILCD process, Unit process, black box
Geography: UM
Reference year: 2009
Classification: Unit processes / Other Services / Repair and maintenance
Functional unit: The functional unit is defined as remediation of 5000 yd 3 of soil. The design of the treatment options is generic, and lacks parameters such as site characteristics, hydrology and efficiency of technology.
Generated by: 杨欣桐, yangxt@caep.org.cn
Owner: 天工LCI数据工作小组
Review: Dependent internal review by 天工LCI数据工作小组
Amounts: no units in this file; such an amount is in the reference unit of its flow, which a separate flow dataset defines
copyright: false
licenseType: Free of charge for all users and uses

## General comment
原位固化稳定化，包括使用水泥和膨润土作为粘合剂来固化和稳定受污染的土壤。假设使用现场搅拌机械——螺旋钻/沉箱系统。处理所需的粘合剂量是根据实际场地的报告中的数据。供应商、垃圾填埋场和清洁填料来源的运输距离假定为75公里。处理的平均运行时间假定为5个月（US EPA, 2000）。

## Geography
本研究使用的是一个假设的场地，且没有明确场地所在位置，因此采用作者所在的区域作为场地位置，即美国Newark

## Technology and included processes
原位固化稳定化需要钻机一台，40t自卸车一辆；处理时间5个月，需要工人8人/天。假设场地到供应商的运输距离均为75公里。

## Technical purpose
所描述的工业过程是一种原位固化和稳定化（S/S）修复技术，使用水泥和膨润土作为结合剂来处理受污染的土壤。这个方法适用于与假设中的美国纽瓦克类似的假设场所，用于使用现场搅拌机械如螺旋钻/沉箱系统进行土壤修复。该过程旨在通用，可能适用于缺乏详细场地特定特征、水文和技术效率的多种土壤修复项目。

## Reference product
- Remediated soil: 3822.77; estimated
  功能单元定义为5000 yd 3土壤的修复（1yd3等于0.764554857984立方米,即修复方量约为3822.77 m3）。

## Inputs
All rows: estimated
- cement, unspecified: 1e6
- bentonite: 400000
- Diesel,Diesel: 38
- Road Transport,Road Transport: 4.8e7
- transport in t*km: 18000
  运输总距离为5550km，自卸车载重40吨
- contaminated soil: 3822.77

## Use advice
对于这个生命周期评估数据集的用户，建议将其应用于类似的原位S/S土壤修复场景，并根据具体场地条件和运输距离进行调整。重要的是要注意，假设的运营时间是基于5个月时间，每天8名工人，并且所有供应品的运输距离标准化为75公里，这可能不反映未来应用中的实际距离。用户应确保这些假设与特定案例的一致性。此外，用户应考虑扩大生命周期评估的范围，以包含任何未在这个通用数据集中涵盖的场地特定特征、水文条件和技术效率。

## Review details
清单： 内部审查通过几个迭代步骤完成，涉及原始数据验证、原始数据记录、代表性、完整性、与 ISO 14040 和 14044 有关的建模的一致性。

## Data sources
- Dhaliwal, Harnoor, "Sustainable site remediation : a life cycle assessment approach" (2009). Theses. 296.
