# 轮胎生产;纤维织物，钢织物;轧制和挤压;混合化合物

Dataset: ILCD process, Unit process, single operation
Geography: CN
Reference year: 2014
Classification: Unit processes / Materials production / Other materials
Generated by: Cui, di, 2806553850@qq.com
Owner: 天工LCI数据工作小组
Review: Dependent internal review by 天工LCI数据工作小组
Amounts: no units in this file; such an amount is in the reference unit of its flow, which a separate flow dataset defines
copyright: false
licenseType: Free of charge for all users and uses

## General comment
生产阶段相当复杂，包括复合共混、轧制、挤出、包环生产、切割成型、硫化和测试等工艺。我们将密切相关的流程与避免分配。确定了以下四种主要生产工艺：复合共混、轧制和挤出，切割成型，硫化成型。

## Time period
”评估中使用了中国最大的轮胎公司之一在2014年现场收集的数据“。文章中已说明数据调研与2014年，但没有具体时间，所以该时间定位2014年1月1日。

## Technical purpose
该数据集描述了轮胎生产过程，包括复合物的混合、轧制、挤出、包环生产、切割成型、硫化和测试。这些过程旨在制造不同类型的轮胎，使用纤维和钢质织物。这些轮胎适用于从乘用车到重型卡车的各种车辆，满足标准和专用轮胎性能特征的需求。

## Reference product
- Tire: 9.497; measured

## Inputs
All rows: measured
- Steel wire: 1.048
- Nylon 6-6: 0.083
- polyethylene terephthalate fibres (PET): 0.309
- Electricity: 4.57
- steam: 0.2

## Outputs
- Waste wire cord fabric,Waste steel wire: 0.002, 0.001 (2 entries); measured
- Waste rubber,Waste fiber fabric: 0.001, 0.001 (2 entries); measured
- Waste cord thread ,Waste tire: 0.01; measured

## Data selection and combination
调查轮胎产品中使用的原材料数据来源于中国最大轮胎公司之一的现场调查。这些数据是在2014年目标轮胎产品制造期间收集的。还考虑了其他材料，如活性粘土、氧化锌、硬脂酸、加工剂和润滑油。这些其他材料的生命周期背景数据来自Ecoinvent 3.0的全球平均LCI数据

## Use advice
用户应注意，数据收集于2014年，涉及当时特定的生产技术和实践。自那时以来，生产工艺或所用材料的变化可能影响数据的相关性。应用这个数据集时，建议考虑技术适用性，并更新清单以反映原材料来源或轮胎生产过程中的任何进展或变化。注意包括或排除回收过程以及对Ecoinvent 3.0中的背景材料使用全球平均LCI数据。数据应结合适用范围、功能单元定义以及关于轮胎终生处理的任何假设一起使用。

## Review details
清单： 内部审查通过几个迭代步骤完成，涉及原始数据验证、原始数据记录、代表性、完整性、与 ISO 14040 和 14044 有关的建模的一致性。

## Data sources
- Sun X, Liu J, Hong J, et al. Life cycle assessment of Chinese radial passenger vehicle tire[J]. The International Journal of Life Cycle Assessment, 2016, 21: 1749-1758.
