# cement production|cement, portland fly-ash cement, 44.6MPa|dry process precalciner kiln|fly ash

Dataset: ILCD process, Unit process, black box
Geography: CN
Reference year: 2001
Classification: Materials production / Other mineralic materials
Generated by: Siqi Yang
Amounts: no units in this file; such an amount is in the reference unit of its flow, which a separate flow dataset defines
copyright: false

## General comment
Dry precalciner kilns produce cement. The new dry pre-decomposition technology is adopted, the main production facility is a 2,000-ton-per-day clinker dry precalciner production line, with a design capacity of 700,000 tons of cement per year.

## Model description
The scope of the study is defined from the arrival of raw materials, the processes of raw material pre-treatment, raw meal grinding, raw meal calcination, clinker grinding, and up to the cement homogenization and storage. Specific processes such as mining, transportation, and cement packaging are not included.

## Reference product
- cement, portland fly-ash cement, 44.6MPa: 1000
  The average grade of cement is 446.

## Inputs
All rows: measured
- limestone, crushed, for mill: 1199.08
  limestone
- sandstone: 0.0082496
- iron, powder: 28.5861
  Iron powder
- gypsum (desulphurized): 52.917
  gupsum
- ash: 159.373
  Fly ash
- Water (fresh water): 402.239
  Fresh water
- hard coal: 139.857
  Standard coal. The original data is 93.882kt standard coal, here converted to hard coal, the conversion formula is 1kg hard coal = 0.929kg standard coal.
- electricity, medium voltage: 396.406
  Electricity

## Outputs
- particles (> PM10): 0.0188322; measured
  Dust, with an unspecified particle size, is treated as PM > 10 micrometers in diameter.
- particles (> PM10): 0.00844125; measured
  Smoke, with an unspecified particle size, is treated as PM > 10 micrometers in diameter.
- sulfur dioxide: 0.00930531; measured
  Sulfur dioxide
- Nitrogen oxides: 0.0150381; measured
- carbon monoxide: 0.0135564; measured
  Carbon dioxide
- carbon dioxide: 886.733
- wastewater, unpolluted: 157.581; measured
  The original text is industrial wastewater (i.e. wastewater from cement production).

## Data treatment and extrapolations
CO2 data processing: Based on the CO2 emissions data for one functional unit, calculate the CO2 emissions for the production of 722168 tonnes of cement.

## Data sources
- 狄向华. (2001). 材料环境协调性评价的标准流程方法研究 [硕士, 北京工业大学].
