# Bioethanol ; Collection and transportation ; Acid

Dataset: ILCD process
Geography: GLO
Classification: Energy carriers and technologies / Renewable fuels
Generated by: 袁嘉翼, jiayi_y@mail.bnu.edu.cn
Owner: 天工LCI数据工作小组
Review: Dependent internal review by 天工LCI数据工作小组
Amounts: no units in this file; such an amount is in the reference unit of its flow, which a separate flow dataset defines
licenseType: Free of charge for all users and uses

## General comment
提供的生命周期评估数据集涉及生物乙醇生产的收集和运输阶段，该阶段包括酸预处理。该数据是评估生物乙醇整个生命周期环境影响的关键组成部分。预处理后，后续技术步骤是对齐的，使得可以跨不同研究进行比较和整合。这种生物乙醇适用于作为化石燃料的可持续替代品，特别是在设计为使用这种生物燃料的车辆中燃烧使用。

## Technology and included processes
Through data quality evaluation, 141 datasets with high completeness and consistency were selected from the reported 561 datasets in 474 published papers and classified into eight technological configurations determined by the pretreatment technology. The technological steps following pretreatment were all the same, although actual flows and parameter values vary, as observed in the literature

## Inputs
- Diesel: 0.0006; missing unimportant
  L/kg

## Data selection and combination
Global datasets were used where possible, since the study does not apply to any specific region. LCI data for one external process named “Combustion of bioethanol in car” were obtained from the GREET database

## Data treatment and extrapolations
We assessed the robustness of the modeling results through uncertainty propagation (Monte Carlo), discernibility analysis, global sensitivity analysis, and scenario variation.

## Use advice
使用这个数据集时，认识到它的全球范围很关键，它不针对任何特定地理区域。如果地区特异性对于评估很重要，用户应确保考虑了当地条件。通过包括GREET数据库中的'汽车燃烧生物乙醇'数据，应保持向使用阶段过渡的完整性。建议用户通过考虑提供的稳健性指标（如不确定性传播（蒙特卡洛模拟）、可识别性分析、全球敏感性分析和情景变化的结果）来解决不确定性和可变性。应用这些方法确保了更可靠和全面的LCA结果。

## Review details
清单： 内部审查通过几个迭代步骤完成，涉及原始数据验证、原始数据记录、代表性、完整性、与 ISO 14040 和 14044 有关的建模的一致性。
