# 氢氧化锂生产 ; 电池级单水氢氧化锂 ; 硫酸锂法 ; 芬兰锂辉石精矿

Dataset: ILCD process, Unit process, single operation
Geography: FI
Reference year: 2016
Classification: Unit processes / Materials production / Inorganic chemicals
Generated by: 孙鑫, xs389@cornell.edu
Owner: 天工LCI数据工作小组
Review: Dependent internal review by 天工LCI数据工作小组
Amounts: no units in this file; such an amount is in the reference unit of its flow, which a separate flow dataset defines
licenseType: Free of charge for all users and uses

## General comment
本研究审查的未来供应路线是基于从几家锂矿开采和加工公司（Lithium Americas Corp.、Minera Salar Blanco、Nemaska Lithium Inc.和Keliber Oy）的技术报告和环境影响评估报告中收集的数据，这些公司的锂资产正处于不同的开发阶段。这些锂资产正处于不同的开发阶段。预计在 5-10 年内投入运营。这些以卤水为基础的来源的锂浓度较低，也反映了当前供应路线中卤水的未来锂品位。

## Technology and included processes
加拿大 Whabouchi 矿区和芬兰中部 Ostrobothnia 地区的运营技术报告中描述了未来的闪锌矿供应路线。虽然加拿大和芬兰都不是锂储量最大的国家（美国地质调查局，2021 年），但它们代表了新锂供应的范例，可能会随着锂需求的增加而被开采。Whabouchi矿区的钠长石中平均锂浓度约为0.7%，而在中奥斯特罗布特尼亚地区则为0.6%。在这些未来的供应路线中，浓缩的磷灰石会直接转化为 LiOH⋅H2O，而不会产生 Li2CO3 作为中间产物。代表加拿大和芬兰采矿作业的数据集分别基于为内玛斯卡锂业公司（Golder Associates，2013 年；Laferri´ere 等人，2012 年；内玛斯卡锂业公司，2013 年；SENES 咨询有限公司，2013 年）和 Keliber Oy（Keliber Oy，2020a，b；Sweco，2016 年）编写的技术报告。在内玛斯卡锂业公司的报告中，没有关于锂OH⋅H2O 生产单元工艺（来自浓缩锂辉石）的化学品投入的具体数据。因此，在比较不同的锂供应时，Keliber Oy 报告中的化学品用量被用作替代数据。

## Technical purpose
通过芬兰锂辉石精矿硫酸锂法生产的电池级单水氢氧化锂主要用于锂离子电池，这类电池广泛应用于便携式电子设备、电动汽车和电网储能解决方案中。

## Reference product
- Lithium Hydroxide Monohydrate: 1000; measured

## Inputs
All rows: measured
- Spodumene concentrate (6.3% Li2O): 5810
- Electricity: 5364
- Natural gas, at consumer EU-27: 20700
- sodium hydroxide: 1120
- sodium carbonate: 1580
- hydrogen chloride: 72
- Calcium carbonate (> 63 microns): 1820
- freshwater,freshwater: 74.9

## Use advice
在使用本数据集进行生命周期评估时，请注意，原材料的生产过程以及少于1%的能源流量不包括在系统边界范围内。在评估的完整性以及与系统边界不同的其他数据集比较时，应注意这一点。用户还应考虑数据的地理特定性，因为它涉及来自芬兰的锂辉石源。

## Review details
清单： 内部审查通过几个迭代步骤完成，涉及原始数据验证、原始数据记录、代表性、完整性、与 ISO 14040 和 14044 有关的建模的一致性。

## Data sources
- Chordia, M., Wickerts, S., Nordelöf, A. & Arvidsson, R. Life cycle environmental impacts of current and future battery-grade lithium supply from brine and spodumene. Resources, Conservation and Recycling 187, 106634 (2022).
