# 水泥生产|水泥, 普通硅酸盐水泥|新型干法, 2500 t/d

Dataset: ILCD process, LCI结果
Geography: CN
Classification: Materials production / Other mineralic materials
LCI method principle: Other
Generated by: 杨思琪
Amounts: no units in this file; such an amount is in the reference unit of its flow, which a separate flow dataset defines
copyright: false

## General comment
传统硅酸盐水泥（Traditional portland cement，TPC）生产。基于矿渣的水泥（Slag-based cement，SBC）中的矿渣含量约为10％。该矿渣可以替代水泥生产中的粘土，并由于其磨矿性差而影响磨矿过程中的能耗。

## Model description
功能单元为42.5MPa强度的1千克水泥。系统边界包括采矿、水泥生产、发电、煤炭生产和运输。

## Reference product
- cement, ordinary portland cement: 1000
  传统硅酸盐水泥

## Inputs
All rows: measured
- clay: 250
  黏土
- sandstone: 29.7
  砂岩
- limestone, crushed, for mill: 1170
  石灰石
- gypsum: 50.5
  石膏
- hard coal, run-of-mine: 155
  原煤生产
- electricity, medium voltage: 317.16
  电力生产

## Outputs
- carbon dioxide: 822; measured
  二氧化碳
- methane: 0.00207; measured
  CH4
- dinitrogen: 0.000483; measured
  N2O

## Data selection and combination
水泥生产的数据是从中国生产规模和技术水平相似的典型水泥厂（新型干法生产工艺，生产规模为2500吨/天）获取的。

## Data sources
- Yao Li, Yu Liu, Fei Fei Shi, Zhi Hong Wang, & Xian Zheng Gong. (2015). Life Cycle Analysis on Carbon Emission Reduction and Energy Saving by Using Slag as Alternative Materials in Cement Production. Materials Science Forum 814, 411–417.
