# 湿蒸法棉布染整加工;印染棉布;最终处置;卫生填埋

Dataset: ILCD process, Unit process, black box
Geography: CN
Reference year: 2012
Classification: Unit processes / End-of-life treatment / Landfilling
Generated by: 段颖凡, 1300925579@qq.com
Owner: 天工LCI数据工作小组
Review: Dependent internal review by 天工LCI数据工作小组
Amounts: no units in this file; such an amount is in the reference unit of its flow, which a separate flow dataset defines
copyright: false
licenseType: Free of charge for all users and uses

## General comment
由于产品消费和最终处置的地点具有不确定性，本研究忽略研究对象到终处置地的运输过程。其中，产品最终处置过程基于中国某一城市的终处置模型（杨建新,徐成,王如松.产品生命周期评价方法及应用[M]北京:气象出版社,2002,6.）。由于缺乏足够可信的数据，本研究忽略产品终处置过程中的能源消耗且假设卫生填埋和焚烧这两种处置方式所占的比例相同，即各为50%。

## Geography
中国是世界上最大的印染生产基地，但高速发展的同时也伴随着严重的环境问题。目前印染行业主要是通过企业的清洁生产审核，实施原辅材料低毒与低污染研究、废弃物的资源化、设备改造与更新、水与蒸汽的循环利用、生产工艺改进等针对某一特定环境问题的清洁生产方案来实现节能减排，而忽略了工业系统间的关联。

## Technical purpose
湿蒸法棉布染整加工适用于纺织行业，专门处理印染棉布。这些布料常用于生产服装、家用纺织品以及其他基于棉的产品。消费者使用后，棉料最终被送往终处置，其中一种方法是卫生填埋。

## Reference product
- Cotton Fabric: 1000; input; estimated

## Outputs
All rows: estimated
- carbon monoxide (fossil): 0.204
- carbon dioxide (fossil): 120
- methane (fossil): 26.3
- Chlorinated Hydrocarbon: 0.00279
- Nitrogen oxides: 0.235
- sulfur dioxide: 0.275
- hydrogen chloride: 0.00523
- hydrogen sulfide: 0.0134
- ammonia: 4.61e-7
- chemical oxygen demand: 0.0641
- cadmium: 6.31e-7
- lead: 2.87e-6
- mercury: 0.27

## Use advice
由于产品消费和最终处置地点的不确定性，数据集没有包括到终处置地的运输过程。产品的最终处置过程是基于中国某城市的处置模型，并且由于缺乏可靠的数据，未计算终处置过程中的能源消耗。假设卫生填埋和焚烧作为处置方法的比例均等，各占50%。在应用此数据进行生命周期评估时应注意，运输和终处置过程中的能源消耗可能会显著影响棉产品生命周期的整体环境影响概况。这类方法论选择和假设应在研究情境中得到适当的证明。

## Review details
清单： 内部审查通过几个迭代步骤完成，涉及原始数据验证、原始数据记录、代表性、完整性、与 ISO 14040 和 14044 有关的建模的一致性。

## Data sources
- 朱亚楠. 棉布连续轧染工艺生命周期环境影响评价. (南京大学, 2012).
