# 铜生产;原生铜;湿法冶金;硫化铜精矿

Dataset: ILCD process, Unit process, single operation
Geography: CN
Reference year: 2010
Classification: Unit processes / Materials production / Metals and semimetals
Functional unit: Functional unit: 1 kg copper
LCI method principle: Attributional
LCI method approaches: Allocation - market value
Generated by: 王鹏, 2867919560@qq.com
Owner: 天工LCI数据工作小组
Review: Dependent internal review by 天工LCI数据工作小组
Amounts: no units in this file; such an amount is in the reference unit of its flow, which a separate flow dataset defines
copyright: false
licenseType: Free of charge for all users and uses

## General comment
使用湿法冶金工艺从硫化铜精矿生产的原生铜通常用于包括电子在内的各种工业领域，用于制造电线，以及在建筑领域用于制造管道和屋面材料。它也常用于工业机械生产和运输设备制造。

## Geography
本研究包括进口铜数据以及代表中国平均情况而非典型企业的统计数据，对三种铜生产路线的每个组成过程进行统计，特别是前台过程中的能源和资源使用以及后台过程中的电力生产。

## Time period
2010年至2050年中国铜需求预测。

## Reference product
- Refined copper: 1; software or database

## Inputs
All rows: software or database
- Electricity: 14.292
- Diesel: 1.86
- Limestone: 1.11
- sulphuric acid: 0.0111
  Sulfuric acid
- Copper extractant: 0.00619
  Copper extractant需要补充
- copper sulfide ore: 307
  Copper ore
- water: 0.022

## Outputs
All rows: software or database
- Sulfidic tailing: 554
  Sulfidic tailing需要补充
- waste water - untreated: 0.141
  Waste water
- carbon dioxide (fossil): 7.37
  Carbon dioxide
- sulfur dioxide: 0.068
- water: 0.166

## Deviations from the LCI method approaches
使用 CMLCA 6.0 软件和 CML2001 影响类别进行生命周期环境影响

## Data selection and combination
数据来源总结如表2和表3 后台系统中与铜生产相关的电力生产和其他流程的数据来自ecoinvent v3.4数据库，

## Data treatment and extrapolations
Ecoinvent v3.4 数据库-从摇篮到大门

## Use advice
在使用湿法冶金铜生产的生命周期评估数据时，必须考虑数据代表的是中国的平均情况，而非特定企业的情况。数据涵盖了从摇篮到大门的整个供应链，包括前台过程中的能源和资源使用以及后台过程中的电力生产。数据基于Ecoinvent v3.4数据库，应与CMLCA 6.0软件和CML2001影响类别结合使用。为保持方法论上的一致性，仅将此数据应用于2010年至2050年间的铜需求预测，并确保所有比较都使用1公斤铜的功能单位进行。

## Review details
清单： 内部审查通过几个迭代步骤完成，涉及原始数据验证、原始数据记录、代表性、完整性、与 ISO 14040 和 14044 有关的建模的一致性。

## Data sources
- Dong, D., Van Oers, L., Tukker, A. & Van Der Voet, E. Assessing the future environmental impacts of copper production in China: Implications of the energy transition. Journal of Cleaner Production 274, 122825 (2020).
