# 畜禽养殖 ; 屠宰阶段 ; 奶牛

Dataset: ILCD process, Unit process, single operation
Geography: SD-CN
Reference year: 2014
Classification: Unit processes / Materials production / Agricultural production means
Functional unit: 1kg milk
Generated by: 杨瑞, 1632707028@qq.com
Owner: 天工LCI数据工作小组
Review: Dependent internal review by 天工LCI数据工作小组
Amounts: no units in this file; such an amount is in the reference unit of its flow, which a separate flow dataset defines
copyright: false
licenseType: Free of charge for all users and uses

## General comment
屠宰阶段一般消耗的能源为电力，猪肉、牛肉、禽肉、牛奶和禽蛋的屠宰加 工耗能系数分别为 3.76 KJ·kg-1、4.37 KJ·kg-1、2.59 KJ·kg-1、1.12 KJ·kg-1、8.16 KJ·kg-1[61]。

## Geography
本研究于 2014~2015 年，针对畜禽饲养周期、肉料比、饲料配方、饲料消耗 量、煤和电的消耗量等，先后对山东省高密正大种猪场、莱西市知双奶牛场、即 墨市段泊岚镇姜家坡村养猪场、即墨市刘家庄镇畜禽养殖场、日照市莒县长岭镇 上官庄村、莒县寨里河镇东兴农牧公司、莒县峤山镇东辰奶牛场、莒县峤山镇刘 家义水养猪场、诸城市外贸有限责任公司凤凰父母代种鸭场，新疆阜康宏发养殖 专业合作社、九运街镇旭鸿蛋鸡合作社、九运街镇六运村自成养殖场、中澳控股 集团有限公司、德州市庆云县洼于村、山东省庆云县四柳社区肉牛养殖基地、德 州市庆云青年鸡养殖基地、庆云县永利禽业蛋鸡育成公司、庆云县兴晨青年鸡养 殖专业合作社、庆云县东泰肉鸡养殖专业合作社、河北省盐山县博远饲料有限公 司、盐山县大华人饲料有限公司、无棣县六和饲料有限公司、中澳东方希望饲料 公司等地进行了实地调研。

## Technology and included processes
本文将畜禽养殖生命周期 分为饲料作物种植、饲料加工、畜禽饲养、粪便处理、屠宰、运输等 6 个阶段。 畜禽养殖的生命周期具体流程如图 2-1 所示。由于部分数据的缺乏和基础条件的 限制，未对农药、地膜、饲料添加剂等生产、运输、使用进行分析，其他相关的 基础设施建设、运输工具生产、人力成本所引起的环境影响也不再考虑的范畴内。

## Technical purpose
该数据集涉及屠宰阶段畜禽及其加工品（猪肉、牛肉、家禽肉、牛奶和禽蛋）的能耗系数。可能的应用领域包括屠宰场的能源管理和牛奶及屠宰动物（如猪肉、牛肉和家禽肉）产品的环境影响评估。

## Reference product
- milk: 1; measured

## Inputs
- Electricity: 0.00112; estimated
  屠宰阶段一般消耗的能源为电力

## Outputs
- carbon dioxide (fossil),carbon dioxide (fossil): 0.00034; measured
  奶牛
- sulfur dioxide: 9e-6; measured
  奶牛
- nitrogen, total (excluding N2): 1.1e-6; measured
  奶牛

## Use advice
该数据集的用户在评估环境影响时应仔细考虑特定产品类型的能耗系数。在生命周期评价模型中准确应用这些系数至关重要，特别是关注畜禽屠宰阶段。包括所使用的电力类型（煤炭或可再生能源）在内的技术适用性假设应与所描述的实地研究中观察到的区域实践保持一致。

## Review details
清单： 内部审查通过几个迭代步骤完成，涉及原始数据验证、原始数据记录、代表性、完整性、与 ISO 14040 和 14044 有关的建模的一致性。

## Data sources
- 周景月. 基于生命周期评价的畜禽养殖环境影响分析. (青岛科技大学, 2017).
