# Equipment and Materials Arriving on Site ; Soil in-situ remediation ; SVE system ; Material transportation

Dataset: ILCD process, Unit process, single operation
Geography: KR
Reference year: 2011
Classification: Unit processes / Other Services / Repair and maintenance
Generated by: Zhang Jianbin, zhangjb@caep.org.cn
Owner: Tiangong LCI Data Working Group
Review: Dependent internal review by Tiangong LCI Data Working Group
Amounts: no units in this file; such an amount is in the reference unit of its flow, which a separate flow dataset defines
copyright: false
licenseType: Free of charge for all users and uses

## General comment
All materials 99.8 ton, 30km round

## Technical purpose
The described industrial process involves the remediation of 1000 m3 of TPH polluted soil at a site using an SVE (Soil Vapor Extraction) system. All necessary materials and reagents, totaling 99.8 tons, are transported to the site over a total distance of 30 kilometers for this purpose. This process is specifically intended for in-situ soil remediation projects that address hydrocarbon contamination such as that of TPH (Total Petroleum Hydrocarbons).

## Reference product
- Equipment and Materials Arriving on Site: 99800; measured

## Inputs
- transport in t*km: 2994; measured

## Use advice
Data set users should note that this process data accounts for the transportation and application of materials and reagents necessary for the remediation of TPH-contaminated soil over a specified volume. The energy consumption associated with the material transportation and the operational energy use of the SVE system should be included in the LCA. Users must consider the boundary of the data set to include all main raw materials and essential energy consumption related to the single process operation of soil remediation.

## Review details
Inventory: The internal review was done by several iteration steps concerning raw data validation, raw data documentation, representativity, completeness and consistency of modelling with regard to ISO 14040 and 14044.

## Data sources
- Jeong, S.-W. & Suh, S.-W. Assessment of Environmental Impacts and CO 2 Emissions from Soil Remediation Technologies using Life Cycle Assessment - Case Studies on SVE and Biopile Systems -. Journal of Korean Society of Environmental Engineers 33, 267–274 (2011).
