# Life cycle inventory for average rare earth oxide|REE|Seven Southern Provinces (in-situ leaching)|REE containing ore

Dataset: ILCD process, Unit process, single operation
Geography: CN
Reference year: 2012
Valid until: 2014
Classification: Materials production / Other mineralic materials
Functional unit: 1 kg REO at 100% purity
LCI method principle: Attributional
LCI method approaches: Allocation - mass
Generated by: Tao Wang, twang@iue.ac.cn
Review: Dependent internal review by Tiangong LCI Data Working Group
Amounts: no units in this file; such an amount is in the reference unit of its flow, which a separate flow dataset defines
copyright: false

## Geography
Seven Southern Provinces

## Technology and included processes
The LCA model was constructed using eBalance Professional 4.7 (IT & Knowledge for Environment, Sichuan, China). We chose to construct an attributional model because it aligned more with the aims of our research, although we adopted a contributional approach to the scenarios sensitivity analysis. Life cycle environmental impacts were assessed using the CML2002 method (CML 2015). Eleven mid-point impact categories were selected based on suggested LCA practice (Hauschild et al. 2013) and previously identified environmental harms in the industry.

## Reference product
- REO: 1

## Inputs
- Ammonium sulfate: 9.07; article inperiodical
- sulphuric acid: 1.16; calculated
- Ammonium bicarbonate: 4.78; article inperiodical
- Lime: 3.37; calculated
- Hydrochloric acid: 10; measured
- phosphoric acid: 0.004; article inperiodical
- ammonia: 11; software or database
- Kerosene: 0.01; measured
- Sodium carbonate: 1.05; measured
- Charcoal: 0.04; measured
- water: 893.8; article inperiodical
- Electricity: 44.496; article inperiodical

## Outputs
- Spray mold: 1.08; calculated
  Ammonium chloride
- ammonia: 0.219; article inperiodical
- sulfur dioxide: 0.029; article inperiodical
- carbon dioxide: 1.235; calculated
- Ammonium sulfate: 7.5; calculated

## Deviations from the LCI method approaches
The LCI is first described individually for the three REO production chains, followed by a section on metal refining. Aggregated modeling data are also included for the industry average REO production in tabular form (Tables 1, 2, and 3). A more in-depth description of the processes, LCI, and modeling data used for the entire study (including metal refining) is available in section 1 in supporting information S1 on the Web.

## Review details
Inventory: The internal review was done by several iteration steps concerning raw data validation, raw data documentation, representativity, completeness and consistency of modelling with regard to ISO 14040 and 14044.; Documentation: The review of the documentation was performed by Ecobilan and is in compliance with ISO 14040 and 14044. The data set documentation is correct in view of the appropriateness of the information provided. It includes all relevant information in view of data quality and scope of application of the respective LCI result.

## Data sources
- Lee, J. C. K. & Wen, Z. Rare Earths from Mines to Metals: Comparing Environmental Impacts from China’s Main Production Pathways: Environmental Impacts of Rare Earths in China. Journal of Industrial Ecology 21, 1277–1290 (2017).
