# 铝电解碳阳极生产 ; 碳阳极 ; 石油焦 ; 2016年

Dataset: ILCD process, Unit process, single operation
Geography: CN
Reference year: 2021
Classification: Materials production / Non-energetic raw materials
Generated by: 蔡梓萌, caizm6178@163.com
Owner: 天工LCI数据工作小组
Review: Dependent internal review by 天工LCI数据工作小组
Amounts: no units in this file; such an amount is in the reference unit of its flow, which a separate flow dataset defines
copyright: false
licenseType: Free of charge for all users and uses

## General comment
此数据集中描述的使用石油焦的碳阳极生产过程，旨在用于铝电解。作为铝冶炼过程中必不可少的组成部分，碳阳极被消耗以促进电解槽中将氧化铝还原为铝金属的电导性。

## Time period
文献发表日期

## Reference product
- aluminium, primary, liquid: 1000; article inperiodical
  liquid Al

## Inputs
- electricity, medium voltage: 748.8; software or database
  electricty
- Integrated AC power consumption: 47726.9; article inperiodical
- heavy fuel oil: 65; software or database
  fuel oil
- coal tar: 214; software or database
  coal tar pitch
- petroleum coke: 1089; software or database
  petroleum coak
- sodium aluminate, powder: 1913.11; article inperiodical
  alumina
- Fluoride: 18.02; article inperiodical
  fluoride salt
- anode, for metal electrolysis: 401.32; article inperiodical
  anode
- coal gas: 1277; software or database
- Water: 1.22; article inperiodical
  water consumption

## Outputs
- anode, for metal electrolysis: 1000; software or database
  anode

## Data selection and combination
The data in this study refers to the LCA data of PA, SA, electricity, and other background data. The PA data were obtained from statistical data sources, and the SA data were mainly obtained from the literatures. The background data were mainly derived from the Chinese localization LCA database CAS RCEES 2018, which was established by the Research Center for Eco-Environmental Sciences, Chinese Academy of Sciences and covers LCA data for energy, materials, transportation, waste management etc.

## Use advice
用户应注意，此处呈现的生命周期评估数据包括预焙阳极（PA）的生产、阳极（SA）的来源、电力以及其他背景过程。PA数据应参照统计数据来源，而SA数据主要来自文献。背景数据来自于2018年的CAS RCEES数据库，必须考虑该数据库以准确反映在能源、材料、运输、废物管理等方面的中国情境。方法论上的考量应包括数据年份，因为运行参数和环境影响可能已发生重大变化。数据用户在将此数据集纳入更广泛的生命周期评估研究时，必须确保方法论的一致性。

## Review details
清单： 内部审查通过几个迭代步骤完成，涉及原始数据验证、原始数据记录、代表性、完整性、与 ISO 14040 和 14044 有关的建模的一致性。

## Data sources
- Ding, N., Liu, N., Lu, B. & Yang, J. Life cycle greenhouse gas emissions of aluminum based on regional industrial transfer in China. J. Ind. Ecol. 25, 1657–1672 (2021).
