# Site preparation stage-Road repair&construction

Dataset: ILCD process, Unit process, black box
Geography: SC-CN
Reference year: 2014
Valid until: 2016
Classification: Materials production / Other mineralic materials
Generated by: Pu Hong, 15695258655@163.com
Review: Dependent internal review by Tiangong LCI Data Working Group
Amounts: no units in this file; such an amount is in the reference unit of its flow, which a separate flow dataset defines

## Geography
China's shale gas extraction work is currently concentrated in the Sichuan and Chongqing areas, and the data from Sichuan and Chongqing are selected for LCA calculations.

## Time period
Raw data dates between 2014-2016

## Inputs
- gravel: 163000; min 359000; max 12000; uniform; article inperiodical
  道路修建所用碎石
- Diesel: 1050; min 2877; max 50; uniform; article inperiodical
  设备及碎石等运输

## Review details
Inventory: The internal review was done by several iteration steps concerning raw data validation, raw data documentation, representativity, completeness and consistency of modelling with regard to ISO 14040 and 14044.; Documentation: The review of the documentation was performed by Ecobilan and is in compliance with ISO 14040 and 14044. The data set documentation is correct in view of the appropriateness of the information provided. It includes all relevant information in view of data quality and scope of application of the respective LCI result.

## Data sources
- Wang, J., Liu, M., McLellan, B. C., Tang, X. & Feng, L. Environmental impacts of shale gas development in China: A hybrid life cycle analysis. Resources, Conservation and Recycling 120, 38–45 (2017).
