# 直接还原铁生产;直接还原铁;天然气直接还原（MID）

Dataset: ILCD process, Unit process, single operation
Geography: CN
Classification: Energy carriers and technologies / Natural gas based fuels
Generated by: 付翔, 1162850692@qq.com
Owner: 天工LCI数据工作小组
Review: Dependent internal review by 天工LCI数据工作小组
Amounts: no units in this file; such an amount is in the reference unit of its flow, which a separate flow dataset defines
copyright: false
licenseType: Free of charge for all users and uses

## General comment
使用天然气直接还原（MID）方法生产的直接还原铁（DRI）主要用作炼钢的原材料。与传统高炉方法相比，天然气直接还原提供了一种更清洁、更节能的生产铁单元的方式，用于电弧炉（EAF）中或进一步加工成各种钢铁产品。

## Geography
The average operating data of Coal-DR, NG-DR (MID), and NG-DR (ENE) demonstration projects in China are used as the benchmark for the LCI of DR routes.

## Reference product
- Direct Reduced Iron: 1000; calculated
  DRI

## Inputs
All rows: calculated
- Pellet: 1357.3
  Pellets
- Water (fresh water): 300
  The average operating data of Coal-DR, NG-DR (MID), and NG-DR (ENE) demonstration projects in China are used as the benchmark for the LCI of DR routes. LCI of COG-DR and H-DR routes, which is not scaled-up in China are estimated based on Coal-DR routes combined with literature data from simulations, laboratory tests, and process modeling in
- oxygen: 50
  (same comment as for Water (fresh water))
- Natural gas, at consumer EU-27: 293.8
  (same comment as for Water (fresh water))
- Electricity: 446.4
  (same comment as for Water (fresh water))

## Outputs
- Dust (unspecified, from stack): 0.1; calculated
  (same comment as for Water (fresh water))
- carbon dioxide: 298.1; calculated
  (same comment as for Water (fresh water))

## Data treatment and extrapolations
LCI of COG-DR and H-DR routes, which is not scaled-up in China are estimated based on Coal-DR routes combined with literature data from simulations, laboratory tests, and process modeling in Table 9 [49,50]. The LCI of Coal-DR is obtai

## Use advice
在使用直接还原铁生产路线的生命周期清单（LCI）数据时，确保适当地模拟特定技术（煤基直接还原Coal-DR, 天然气直接还原（MID）NG-DR (MID), 天然气直接还原（ENE）NG-DR (ENE), 焦炉气直接还原COG-DR, 氢直接还原H-DR）在过程中的应用。由于LCI是基于示范项目的平均运营数据，并辅以模拟、实验室测试和过程建模等文献数据得出的，用户应确认其使用环境与提供的中国基准相符。在准确性上，必须考虑规模化可行性、技术成熟度和区域可变性。对于在中国尚未完全规模化的路线，如COG-DR和H-DR路线，应额外注意将LCI数据适应于部署的特定环境。

## Review details
清单： 内部审查通过几个迭代步骤完成，涉及原始数据验证、原始数据记录、代表性、完整性、与 ISO 14040 和 14044 有关的建模的一致性。

## Data sources
- The carbon reduction potential of hydrogen in the low carbon transition of the iron and steel industry: The case of China
