# 废纸浆造纸;白牛卡纸

Dataset: ILCD process, Unit process, black box
Geography: SD-CN
Classification: Unit processes / Materials production / Paper and cardboards
Functional unit: In this study, one tonne of waste paper feedstock was collected as a functional unit.
LCI method principle: Attributional
Generated by: 高逸翔, 22210740040@m.fudan.edu.cn
Owner: 天工LCI数据工作小组
Review: Dependent internal review by 天工LCI数据工作小组
Amounts: no units in this file; such an amount is in the reference unit of its flow, which a separate flow dataset defines
copyright: false
licenseType: Free of charge for all users and uses

## General comment
在生产方案中，制浆、造纸、原材料运输、辅料化学品运输、废水处理以及固体废弃物处理等流程均包含在系统边界内。

## Technology and included processes
在制浆工段，废纸经过链板输送机送到水力碎浆机，碎解后的浆料进入粗筛选系统(高浓除渣器和粗筛系统):粗筛后的浆料再通过分级筛系统，筛分为短纤维和长纤维，其中短纤维通过低浓除砂器除渣和浓缩机浓缩处理后进入抄前池;而长纤维通过低浓除砂器和精饰系统处理后再通过浓缩机、热分散系统和磨浆机后进入抄前池，抄前池的浆料再送往抄纸车间。此外，浆料浓缩过程中产生的白水部分回用于制浆工段。在造纸工段中，四种再生纸生产方案的流程基本相同分成打浆、抄纸、烘干三个工段。浆料经过调浆箱、浓白水塔及冲浆泵进入网前压力筛,后进入面层流浆箱上网。在再生白牛卡纸方案中，原生木浆与废纸浆按一定配浆比例混合后分别送至配浆池中，经多段除砂器低浓净化后，再进入机外白水槽的另一侧冲浆;各层浆经压力筛筛选，后进入流浆箱上网。上网的浆料经三长网成型部脱水成型，再经过由直通式靴压组成的压榨部进步脱水，通过于燥部烘缸干燥、硬压光、表面施胶、后干燥部干燥、涂布、再经水平复卷机复卷，后包装入库送至成品库储存。在废弃物处置环节，对再生纸生产制造中产生的一般固体废弃物、城市生活垃圾处理进行了安全填埋处置;而对浮选脱墨系统产生的工业危险废弃物脱墨渣收集后统一进行焚烧处置。再生白牛卡纸方案中，对碎浆系统和除渣系统产生的废渣使用重力脱水机和污泥压榨机进行收集，后送至焚烧厂进行焚烧处理。

## Technical purpose
该白牛卡纸生产工艺用于再生牛卡纸的制造。生产的白牛卡纸可用于包装领域，包括重型包装应用、购物袋以及其他需要高强度和耐久性的应用。牛卡纸具有适合进一步表面处理（如印刷、涂层和层压）的质量。

## Reference product
- Cardboard: 1090; measured
  再生白牛卡纸

## Inputs
All rows: measured
- Oxidized starch: 37.62
  氧化淀粉
- Modified Starch: 4.51
  阳离子淀粉
- calcium carbonate: 18.81
  碳酸钙
- Inorganic Chemical Reagents: 0.06
  无机化学试剂
- Wood Pulp: 374.8
  外购木浆
- Polyester Mesh Fabric: 0.03
  聚酯网
- Blanket: 0.07496
  毛布
- water: 10.54
  水
- process steam: 1480
  蒸汽
- Electricity: 907.2
  电力
- chemical oxygen demand: 0.6
  CODcr

## Outputs
All rows: measured
- Ammonia Nitrogen: 0.00795
  NH3-N
- waste water - untreated: 7.91
  废水排放
- Plastic Waste: 3.83
  塑料和金属废物
- Waste Residue: 2.9
  废渣
- sludge (paper production): 35.65
  污泥
- Waste solid: 2.68
  一般固体废弃物

## Data selection and combination
再生白牛卡纸方案的清单数据来自于山东省某造纸企业的实地调研。其次，本研究中涉及的绝大部分背景数据均来自中国本土化基于流程的生命周期清单数据库（CPLCID）。

## Use advice
在对再生白牛卡纸进行生命周期评估（LCA）时，用户应考虑包含制浆、造纸、原材料运输、辅料化学品运输、废水处理和固体废弃物管理的系统边界。清单数据基于山东省一家综合造纸企业的实地调研。用户应注意，研究采用截断方法，不考虑可回收的固体废弃物（如煤渣、聚酯树脂和棉纤维）回收或再利用过程对研究目标的经济和环境影响。用户应根据ISO 14040标准，以收集一吨废纸原料的功能单位为量化基准来衡量系统的所有输入输出。

## Review details
清单： 内部审查通过几个迭代步骤完成，涉及原始数据验证、原始数据记录、代表性、完整性、与 ISO 14040 和 14044 有关的建模的一致性。

## Data sources
- 杨冬璐. 典型再生纸产品的生命周期环境与经济影响评价. (山东大学, 2019).
