# 水泥生产;普通硅酸盐水泥 32.5MPa;新型悬浮预热器生产

Dataset: ILCD process, Unit process, black box
Geography: CN
Reference year: 2017
Classification: Materials production / Other mineralic materials
Functional unit: 1t cement with strength grade of 32.5Mpa
Generated by: 宋睿, 2120230927@mail.nankai.edu
Owner: 天工LCI数据工作小组
Review: Dependent internal review by 天工LCI数据工作小组
Amounts: no units in this file; such an amount is in the reference unit of its flow, which a separate flow dataset defines
licenseType: Free of charge for all users and uses

## General comment
数据集描述了32.5 MPa 普通硅酸盐水泥的使用，该水泥是通过使用新型悬浮预热器（NSP）技术的高温工艺生产的关键建筑材料。这种水泥通常用于住宅和商业建筑工程、道路和桥梁等基础设施以及其他土木工程作业，因其具有适中的强度等级。所描述的制造过程反映了中国典型的大规模生产线，表明其在该地区广泛的结构应用中的相关性很高。

## Technology and included processes
There are three primary production processes: The pulverized coal and raw material preparation process, including the transfer, grinding, homogenization, and storage of raw materials, and the grinding and storage of coal. In the incineration process, the ground and mixed raw materials are inputted into the preheater and then the calciner and decomposed with 60% coal at 950 ◦C. The limestone decomposes to about 95% in the calciner and 5% in the kiln. The decomposed materials fall into the kiln and are incinerated to clinker with 40% coal at a temperature of over 1400 ◦C. In the finishing process, the cement is produced when the clinker, mineral additions, and gypsum are granulated finely by a grinding mill. The raw materials are suspended and heated by recycled hot air in the preheater

## Reference product
- cement: 1000; calculated

## Inputs
- Limestone: 811.32; measured
- Gypsum: 44.35; measured
- Red mud (dry): 36.06; measured
- silica sand: 26.63; measured
- Slag: 58.01; measured
- shale: 7.78; measured
- Fly ash: 272.51; measured
- Coal Gangue: 2.7; measured
- Sediment and Sludge: 4.24; measured
- ammonia: 0.57; measured
- water: 290; measured
- Electricity: 200.916; calculated
- Standard coal: 72.74; calculated
- transport in t*km: 268.03

## Outputs
All rows: calculated
- carbon dioxide: 440.61
- sulfur dioxide: 0.075
- nitrous oxide: 0.15
- Dust: 0.094
- fluoride: 0.00186
- ammonia: 0.00586
- mercury: 7.801e-5
- Water (groundwater from technosphere, waste water): 0.023

## Data selection and combination
The annual average data for the operation processes of different kinds of cement manufacturing were acquired from a survey of the China United Cement Corporation, which accounts for 9.45% of the Chinese cement market.The LCI data for electricity and coal were collected from the literature.According to the survey, the transport distance of raw materials in the cement production is about 200 km. In this study, the environmental impacts of road transportation were taken from the literature.

## Use advice
该LCA数据集包含年平均操作数据，应用于评估使用NSP技术在中国生产普通硅酸盐水泥的环境影响。用户应确保数据与其特定项目的地理和技术背景相关。根据数据集的规定，应注意包括原材料运输超过200公里的交通影响。使用这些数据评估其他类型的水泥或生产过程可能需要进行调整以进行准确的影响评估。

## Review details
清单： 内部审查通过几个迭代步骤完成，涉及原始数据验证、原始数据记录、代表性、完整性、与 ISO 14040 和 14044 有关的建模的一致性。

## Data sources
- Yang, D., Fan, L., Shi, F., Liu, Q. & Wang, Y. Comparative study of cement manufacturing with different strength grades using the coupled LCA and partial LCC methods—A case study in China. Resour. Conserv. Recycl. 119, 60–68 (2017).
