# GarmentWashing|Washingandprocessingofready-to-weargarments|Garmentapparel|Washing (washing water)|All sizes / 成衣水洗|水洗加工成衣服装|成衣服装|水洗（洗水）|所有规模

Dataset: ILCD process, Unit process, single operation
Geography: CN
Reference year: 2019
Classification: Other Services / Cleaning
Generated by: The data was created by the Office of the Second National Pollution Source Census of the Ministry of Ecology and Environment, and the data was organized by the TianGong Plan team for ILCD format / 生态环境部第二次全国污染源普查工作办公室创建数据，天工计划团队常慧敏整理数据为ILCD格式
Owner: Tiangong LCI Data Working Group / 天工LCI数据工作小组
Amounts: no units in this file; such an amount is in the reference unit of its flow, which a separate flow dataset defines
copyright: false
licenseType: Free of charge for all users and uses

## Technology and included processes
the Technical of end-of-pipe management technology for pollution Total NitrogenisChemical coagulation + anaerobic biological treatment + aerobic biological treatment + chemical treatment，Its Technical efficiency of end-of-pipe management73.13

## Reference product
- Garment Wash: 1000; calculated
  源文件中描述为为水洗加工成衣服装，此处对其进行了匹配工作，将其匹配到LCAflow库里面相最符合的流

## Outputs
All rows: calculated
- Water (river water from technosphere, waste water): 88.06
  污染物指标工业废水量的末端治理技术未说明。原文件中描述污染物类别为废气，污染物指标为工业废水量，此处对其进行了匹配工作，将其匹配到LCAflow库里面相最符合的流
- ammonia: 0.0969698
  污染物指标氨氮的末端治理技术是化学混凝法+厌氧生物处理法+好氧生物处理法+化学，其效率为68.82，末端治理设施实际运行率（k值）计算公式为k=污水治理设施运行时间/正常生产时间。原文件中描述污染物类别为废气，污染物指标为氨氮，此处对其进行了匹配工作，将其匹配到LCAflow库里面相最符合的流
- ammonia: 0.11535
  污染物指标氨氮的末端治理技术是化学混凝法+厌氧生物处理法+好氧生物处理法，其效率为62.91，末端治理设施实际运行率（k值）计算公式为k=污水治理设施运行时间/正常生产时间。原文件中描述污染物类别为废气，污染物指标为氨氮，此处对其进行了匹配工作，将其匹配到LCAflow库里面相最符合的流
- Total Nitrogen: 0.647787
  污染物指标总氮的末端治理技术是化学混凝法+厌氧生物处理法+好氧生物处理法，其效率为71.7，末端治理设施实际运行率（k值）计算公式为k=污水治理设施运行时间/正常生产时间。原文件中描述污染物类别为废气，污染物指标为总氮，此处对其进行了匹配工作，将其匹配到LCAflow库里面相最符合的流
- Chemical Oxygen Demand: 1.86167
  污染物指标化学需氧量的末端治理技术是化学混凝法+厌氧生物处理法+好氧生物处理法+化学，其效率为97.5，末端治理设施实际运行率（k值）计算公式为k=污水治理设施运行时间/正常生产时间。原文件中描述污染物类别为废气，污染物指标为化学需氧量，此处对其进行了匹配工作，将其匹配到LCAflow库里面相最符合的流
- Chemical Oxygen Demand: 7.4467
  污染物指标化学需氧量的末端治理技术是化学混凝法+厌氧生物处理法+好氧生物处理法，其效率为90，末端治理设施实际运行率（k值）计算公式为k=污水治理设施运行时间/正常生产时间。原文件中描述污染物类别为废气，污染物指标为化学需氧量，此处对其进行了匹配工作，将其匹配到LCAflow库里面相最符合的流
- phosphorus, total: 0.0522192
  污染物指标总磷的末端治理技术是化学混凝法+厌氧生物处理法+好氧生物处理法+化学处理法，其效率为92.41，末端治理设施实际运行率（k值）计算公式为k=污水治理设施运行时间/正常生产时间。原文件中描述污染物类别为废水，污染物指标为总磷，此处对其进行了匹配工作，将其匹配到LCAflow库里面相最符合的流
- phosphorus, total: 0.073272
  污染物指标总磷的末端治理技术是化学混凝法+厌氧生物处理法+好氧生物处理法，其效率为89.35，末端治理设施实际运行率（k值）计算公式为k=污水治理设施运行时间/正常生产时间。原文件中描述污染物类别为废水，污染物指标为总磷，此处对其进行了匹配工作，将其匹配到LCAflow库里面相最符合的流
- Total Nitrogen: 0.615054
  污染物指标总氮的末端治理技术是化学混凝法+厌氧生物处理法+好氧生物处理法+化学处理法，其效率为73.13，末端治理设施实际运行率（k值）计算公式为k=污水治理设施运行时间/正常生产时间。原文件中描述污染物类别为废气，污染物指标为总氮，此处对其进行了匹配工作，将其匹配到LCAflow库里面相最符合的流

## Data sources
- 第二次全国污染源普查产排污核算系数手册（试用版）,二级代码18,三级代码181.0,四级代码1819文件，在完整版文件中第322页
