# 砖生产 ; 混凝土路面砖 ; 基层混合工艺

Dataset: ILCD process, Unit process, single operation
Geography: JNA-SD-CN
Reference year: 2018
Classification: Unit processes / Materials production / Other mineralic materials
Functional unit: The functional unit is the area of 1 m2 brick products.
Generated by: 王湘锦, r99rt4@163.com
Owner: 天工LCI数据工作小组
Review: Dependent internal review by 天工LCI数据工作小组
Amounts: no units in this file; such an amount is in the reference unit of its flow, which a separate flow dataset defines
copyright: false
licenseType: Free of charge for all users and uses

## General comment
混凝土路面砖块的非烧结工艺

## Technical purpose
通过工业过程生产的混凝土路面砖通常用于建造道路、人行道和其他行人区域的耐用表面。此外，透水砖被用于需要提高排水和减少径流的透水性区域。

## Reference product
- brickbat aggregate: 102; measured
  基础混合材料

## Inputs
- basalt: 81.48; measured
- freshwater: 6.17; measured
- portland cement: 14.81; measured
- Electricity: 0.4392; measured

## Outputs
- particles (PM10): 9e-5; measured

## Deviations from the LCI method approaches
本研究采用了 ReCiPe midpoint（H）模型。

## Data selection and combination
本研究从济南顺德水泥制品有限公司收集了混凝土路面砖和透水砖的生产能耗以及各种原材料、能源投入和废气排放的相关数据。济南顺德水泥制品有限公司 山东省。

## Sampling procedure
原材料、能源投入和废物排放的大部分数据都是从生产厂家的现场调查中收集的。减水剂，其化学成分是磺酸钠盐的甲醛缩合物

## Use advice
从济南顺德水泥制品有限公司收集的生命周期评估数据，在评价混凝土路面砖和透水砖的生产时，应仔细考虑能耗、原材料投入和废气排放。数据使用者应根据研究应用ReCiPe midpoint (H)模型，并在评估环境影响时考虑1平方米砖制品的功能单元。在关键工序的输入和输出变化5%或以上时应进行敏感性分析。

## Review details
清单： 内部审查通过几个迭代步骤完成，涉及原始数据验证、原始数据记录、代表性、完整性、与 ISO 14040 和 14044 有关的建模的一致性。

## Data sources
- Yuan, X. et al. Environmental and economic impacts assessment of concrete pavement brick and permeable brick production process - A case study in China. Journal of Cleaner Production 171, 198–208 (2018).
