# 熟料生产|熟料|窑尾余热预干燥|混合固废

Dataset: ILCD process, LCI结果
Geography: SD-CN
Classification: Materials production / Other mineralic materials
LCI method principle: Other
Generated by: 杨思琪
Amounts: no units in this file; such an amount is in the reference unit of its flow, which a separate flow dataset defines
copyright: false

## General comment
电石渣是化学工业中由电石产生乙炔的副产品，其主要化学成分为钙水化物。在运输到水泥工业之前，乙炔发生器产生的电石渣的含水量约为35％。然而，它仍无法满足水泥生产的要求；因此，需要进一步预干燥以确保电石渣的含水量降至15％。
窑尾余热预干燥工艺。有一种使用水泥窑尾废气预干燥电石渣以节约此阶段煤炭消耗的工艺。山东的一家水泥工业在生产1吨水泥熟料时消耗1.2吨含水量为35％的电石渣。如果将电石渣预干燥至15％，则需要从窑尾排放的气体温度约为700°C。因此，可以将预热器从5级改为2级，以确保有足够的气体进行预干燥。但是，随着预热器级数的下降，熟料热消耗将增加1100KJ/kg，并且电力降低了30％。

## Model description
该功能单元的设置为1吨抗压强度高达42.5MPa的水泥熟料。
水泥熟料生产的生命周期可以分为六个阶段：采矿、运输、能源生产、生产电石渣、处理电石渣和生产水泥熟料。

## Reference product
- clinker: 1000
  熟料

## Inputs
All rows: measured
- calcium carbonate: 1200
  石灰石
- Carbide slag: 291
  电石渣
- clay: 148
  黏土
- sandstone: 99
  砂岩
- Sulfate slag: 29.2
  硫酸渣
- hard coal, run-of-mine: 437
  原煤
- crude oil; 42.3 MJ/kg: 2.96
  原油
- natural gas; 44.1 MJ/kg: 0.557
  天然气

## Outputs
All rows: measured
- carbon dioxide: 552
  二氧化碳
- nitrogen dioxide: 2.18
  NOX
- sulfur dioxide: 1.53
  SO2
- methane: 2.04
  CH4
- non-methane volatile organic compounds: 0.147
  NMVOC
- particles (> PM10): 5.08
  PM，未标明粒径，按PM>10处理。

## Data selection and combination
利用电石渣替代石灰石的生产过程数据来自山东某水泥厂，该厂采用燃煤预干工艺，预干阶段的煤耗为50.4kg。在原料和其他生产过程不变的前提下，采用窑尾余热预干工艺时，余热转移的煤为55.16kg，该数据来自于焦作市一家水泥工业。
发电过程。发电生命周期清单包括资源/能源消耗和污染物排放，其数据取自Sinocenter数据库。矿物开采过程。石灰石生命周期清单数据来自北京工业大学Sinocenter的材料生命周期数据，而粘土、砂岩的清单清单则来自Ecoinvent数据库。公路运输过程。从石灰石矿或电石渣到水泥厂的平均距离为2公里。此外，根据中国原煤和商品的平均运输距离，原煤和其他原材料的运输距离分别假设为179公里和177公里。运输过程生命周期清单数据也是来自Sinocenter数据库。电石渣生产过程。一般来说，每吨电石水解可以产生1.2吨电石渣（干基）和300升乙炔。因此，需要将这个过程中的环境影响分配给这两种产品，即电石渣和乙炔。根据经济价值的分配规则，电石渣应承担总环境负荷的0.74%。电石泥生产清单数据来自于参考文献。

## Data sources
- Jia Ping Cui et al. (2014). Life Cycle Assessment of Silicate Cementitious Material Production Using Calcium Carbide Sludge. Key Engineering Materials 599, 324–327.
