# Electricity production ; Electricity ; Thermal power (11.8%) + hydropower (62.8%) + wind power (7.5%) + solar power (17.9%)

Dataset: ILCD process, Partly terminated system
Geography: QH-CN
Reference year: 2019
Classification: Energy carriers and technologies / Electricity
LCI method principle: Other
Generated by: Ruoxi Xiong, xiongrx0126@163.com
Owner: Tiangong LCI Data Working Group
Review: Dependent internal review by Tiangong LCI Data Working Group
Amounts: no units in this file; such an amount is in the reference unit of its flow, which a separate flow dataset defines
copyright: false
licenseType: Free of charge for all users and uses

## General comment
Forms of electricity generation include thermal power, hydropower, wind power and solar power

## Time period
Calculated based on data from the 2019 Energy Statistics Yearbook

## Technical purpose
This electricity generation data set is intended for applications in Life Cycle Assessment (LCA) of products or services that require a breakdown of the electricity mix. The electricity produced is used across various sectors, ranging from industrial manufacturing, commercial operations, to residential energy consumption. The electricity generation forms described include thermal power, hydropower, wind power, and solar power, each with its respective contribution to the overall electricity mix.

## Reference product
- Electricity: 3.6; calculated

## Outputs
- carbon dioxide: 0.097; calculated
- sulfur dioxide: 1.7e-5; calculated
- Nitrogen oxides: 2.6373e-5; calculated
- Dust (unspecified, from stack): 3.172e-6; calculated

## Data treatment and extrapolations
For the accounting method, please refer to the "Enterprise Greenhouse Gas Emissions Accounting Methods and Reporting Guidelines for Power Generation Facilities". Different forms of power generation and fuel consumption come from Chapter 3 (Energy Production) and Chapter 6 (Regional Energy Balance Sheet) in the "China Energy Statistical Yearbook 2020". The fuel parameters such as low calorific value and carbon content per unit calorific value used to calculate the carbon dioxide emission factor come from the "2019 China Regional Power Grid Carbon Dioxide Baseline Emission Factor Calculation Instructions OM" and the "Enterprise Greenhouse Gas Emission Accounting Method and Reporting Guide for Power Generation Facilities" 》

## Use advice
When using this data set for LCA, users should consider the specific electricity mix percentages presented (thermal power 11.8%, hydropower 62.8%, wind power 7.5%, and solar power 17.9%) to reflect the energy profile of the region. Carbon emission factors are calculated based on the 2019 Energy Statistics Yearbook, and accounting methods follow the 'Enterprise Greenhouse Gas Emissions Accounting Methods and Reporting Guidelines for Power Generation Facilities.' Ensure to use appropriate allocation methods when considering multi-output processes and include considerations for regional differences in energy production and carbon intensity. The methodology must also include the evaluation of fuel consumption using parameters such as low calorific value and unit calorific value carbon content.

## Review details
Inventory: The internal review was done by several iteration steps concerning raw data validation, raw data documentation, representativity, completeness and consistency of modelling with regard to ISO 14040 and 14044.

## Data sources
- 熊若熙. 中国电力生产和消费二氧化碳与污染物排放因子核算. (清华大学, 2023).
