# NCM湿法回收

Dataset: ILCD process, Unit process, single operation
Geography: CN
Reference year: 2020
Classification: Unit processes / End-of-life treatment / Material recycling
Functional unit: The product systems evaluated in this study are EB batteries. The service provided by these batteries is the distance driven; thus, the functional unit in this study is defined as an overall 100-km driving distance of a typical EB driven by a group of batteries (4 × 12 V, 20 Ah). According to the data of EB manufacturers, LFP, and NCM batteries can support a typical EB to travel for approximately 45 km and 50 km with one charge, the calculated lifetime distance is of 36, 000 km, and 30,000 km, respectively.
Generated by: 马清源, m1120498928@163.com
Owner: 天工LCI数据工作小组
Review: Dependent internal review by 天工LCI数据工作小组
Amounts: no units in this file; such an amount is in the reference unit of its flow, which a separate flow dataset defines
copyright: false
licenseType: Free of charge for all users and uses

## General comment
回收NCM电池的前体材料（锂镍钴锰酸盐氧化物）。

## Technical purpose
NCM湿法回收工艺用于从废弃的NCM电池中回收前体材料，特别是锂镍钴锰酸盐氧化物（NCM）。这使得可以重新提取有价值的金属用于新电池的生产。此过程与电池生产、回收和材料回收相关的行业尤其相关，特别是对于锂离子电池原料的恢复。

## Reference product
- Ni-Co-Mn precursor: 0.604; measured
  锂镍钴锰

## Inputs
All rows: measured
- sulfate: 7.69
  硫酸盐 (98%)
- magnesium chloride: 0.0009
- potassium chloride: 0.0004
- sodium chloride: 0.0005
- Lithium carbonate: 0.846
- Heavy oil: 0.016
- silicon: 0.021
- Light gas oil: 0.013
- natural gas,natural gas: 0.979
- Water for industrial use: 98
- Electricity: 48.6
- carbon: 0.002
- Sodium carbonate: 0.147
- Ammonia (28%): 0.785
- Hydrochloric acid (30%): 0.28
- 2-ethylhexyl hydrogen -2-ethylhexylphosphonate: 7.69
- Hydrogen peroxide (27.5%): 9.31

## Outputs
All rows: measured
- Secondary Synthetic Graphite: 1.21
- Secondary Aluminum: 0.35
- Secondary copper: 0.324
- Recycled Polypropylene: 0.198
- carbon dioxide (fossil): 0.471
  原文未区分bio和fossil，根据专家判断此处为fossil
- nickel: 2.8e-5
- Total particulate matter: 1e-5
- sulfur dioxide: 4.16e-6
- nitrogen monoxide: 1.5e-5
- aluminium: 0.005
- Waste Graphite: 5.1e-5
- chemical oxygen demand: 9.4e-8
- hazardous waste (unspecified): 0.0523
- waste incineration of plastics (PE, PP, PS, PB): 0.005
- Ammonia Nitrogen: 0.00042

## Data selection and combination
NCM和LFP电池的生命周期清单是根据2018年至2019年的调查数据建立的，代表了锂离子电池技术的现状。

## Sampling procedure
电池回收的LCI是根据中国几家电池回收商的调查数据建立的，包括春星、宇光金铅（用于LAB）、GEM和Brump（用于LIB）。假设从废电池收集点到电池回收厂的距离为100公里。

## Use advice
使用NCM和LFP电池的生命周期清单（LCI）数据时，用户应考虑到数据代表了截至2018年至2019年的锂离子电池技术状况。此外，电池回收的LCI基于特定中国电池回收商的调查数据，并假设从收集点到回收厂的运输距离为100公里。使用这些数据时应考虑自数据收集期以来可能发生的技术更新和地区实践变化。用户在将数据应用于其他背景或比较研究时，还必须承认评估产品系统的功能单元——电动自行车（EB）行驶的距离。

## Review details
清单： 内部审查通过几个迭代步骤完成，涉及原始数据验证、原始数据记录、代表性、完整性、与 ISO 14040 和 14044 有关的建模的一致性。

## Data sources
- Liu, W., Liu, H., Liu, W. & Cui, Z. Life cycle assessment of power batteries used in electric bicycles in China. RENEWABLE & SUSTAINABLE ENERGY REVIEWS 139, (2021).
