# Wastelead-acidbattery|scrapplastic,leadrecycledrawmaterials|Dismantling+sorting|All sizes / 废铅酸电池|废塑料、含铅再生原料|拆解+分选|所有规模

Dataset: ILCD process, Unit process, single operation
Geography: CN
Reference year: 2019
Classification: End-of-life treatment / Raw material recycling
Generated by: The data was created by the Office of the Second National Pollution Source Census of the Ministry of Ecology and Environment, and the data was organized by the TianGong Plan team for ILCD format / 生态环境部第二次全国污染源普查工作办公室创建数据，天工计划团队常慧敏整理数据为ILCD格式
Owner: Tiangong LCI Data Working Group / 天工LCI数据工作小组
Amounts: no units in this file; such an amount is in the reference unit of its flow, which a separate flow dataset defines
copyright: false
licenseType: Free of charge for all users and uses

## Technology and included processes
the Technical of end-of-pipe management technology for pollution chemical oxygen demandisChemical precipitation + physical treatment，Its Technical efficiency of end-of-pipe management60，The formula for calculating the actual operation rate (k-value) of the end-of-pipe treatment facility is /

## Reference product
- landfill of plastic waste: 1000; input; calculated
  源文件中描述为为废塑料、含铅再生原料，此处对其进行了匹配工作，将其匹配到LCAflow库里面相最符合的流

## Outputs
- Ammonia Nitrogen: 2.7e-5; calculated
  污染物指标氨氮的末端治理技术是化学沉淀法+物理处理法，其效率为10，末端治理设施实际运行率（k值）计算公式为k=废水治理设备运行时间（小时/年）/正常生产时间（小时/年）。原文件中描述污染物类别为废水，污染物指标为氨氮，此处对其进行了匹配工作，将其匹配到LCAflow库里面相最符合的流
- Waste water: 50; calculated
  污染物指标工业废水量的末端治理技术是/，末端治理设施实际运行率（k值）计算公式为/。原文件中描述污染物类别为废水，污染物指标为工业废水量，此处对其进行了匹配工作，将其匹配到LCAflow库里面相最符合的流
- lead: 2.5e-7; calculated
  污染物指标铅的末端治理技术是化学沉淀法+物理处理法，其效率为50，末端治理设施实际运行率（k值）计算公式为k=废水治理设备运行时间（小时/年）/正常生产时间（小时/年）。原文件中描述污染物类别为废水，污染物指标为铅，此处对其进行了匹配工作，将其匹配到LCAflow库里面相最符合的流
- chemical oxygen demand: 0.00164; calculated
  污染物指标化学需氧量的末端治理技术是化学沉淀法+物理处理法，其效率为60，末端治理设施实际运行率（k值）计算公式为k=废水治理设备运行时间（小时/年）/正常生产时间（小时/年）。原文件中描述污染物类别为废水，污染物指标为化学需氧量，此处对其进行了匹配工作，将其匹配到LCAflow库里面相最符合的流

## Data sources
- 第二次全国污染源普查产排污核算系数手册（试用版）,二级代码42,四级代码4210文件，在完整版文件中第2456页
