# 钢材;生产;钢材;轧钢;钢坯

Dataset: ILCD process, Unit process, single operation
Geography: CN
Reference year: 2006
Classification: Unit processes / Materials production / Metals and semimetals
Generated by: 王环宇, wanghuanyu00@126.com
Owner: 天工LCI数据工作小组
Review: Dependent internal review by 天工LCI数据工作小组
Amounts: no units in this file; such an amount is in the reference unit of its flow, which a separate flow dataset defines
copyright: false
licenseType: Free of charge for all users and uses

## General comment
本过程描述的钢材旨在用于以钢坯为主要原料的制造业。例如，在建筑行业中需要特定强度和尺寸的钢材，以及在汽车工业中用于车辆车架部件。

## Geography
Z19工厂同一名称的工艺过程

## Reference product
- phenol,Sulphur oxides (as SO2): 0.0002; measured

## Inputs
All rows: measured
- Electricity: 136.8
- freshwater,freshwater: 35
- Concentrate powder: 950
  精矿粉
- hard coal,hard coal: 28
  煤粉
- soil: 7
  膨润土
- dolomite: 20
  白云石
- Limestone: 55
  石灰石

## Outputs
- Flue dust: 1.8e-5; measured
- nitrogen monoxide: 9.5e-5; measured

## Use advice
本数据集的用户应关注所描述的钢材的具体等级和质量。在存在共产品时，必须使用适当的分配方法。应考虑钢坯运输到最终制造地点的影响。数据集应在特定轧钢过程在Z19工厂的技术适用性背景下使用，并不必然代表其他钢材轧制过程。

## Review details
清单： 内部审查通过几个迭代步骤完成，涉及原始数据验证、原始数据记录、代表性、完整性、与 ISO 14040 和 14044 有关的建模的一致性。

## Data sources
- 刘微. LCI数据质量体系中的分析方法研究. (北京工业大学, 2006).
