# 电力生产 ; 混合电力 ; 黑龙江

Dataset: ILCD process, Unit process, single operation
Geography: HLJ-CN
Reference year: 2019
Classification: Unit processes / Energy carriers and technologies / Electricity
Generated by: 熊若熙, xiongrx0126@163.com
Owner: 天工LCI数据工作小组
Review: Dependent internal review by 天工LCI数据工作小组
Amounts: no units in this file; such an amount is in the reference unit of its flow, which a separate flow dataset defines
copyright: false
licenseType: Free of charge for all users and uses

## General comment
混合电力产生形式包括火力发电、水力发电、风力发电、核能发电和太阳能发电

## Technical purpose
黑龙江的混合电力通过多种形式产生，包括火力发电、水力发电、风力发电、核能发电和太阳能发电。这种混合能源组合是多样化能源组合的体现，用于满足该地区工业、商业、居民和其他需求的通用电力供应。

## Reference product
- Electricity: 3.6; missing unimportant
  [{'text': '3.6', 'type': 'text'}]

## Inputs
All rows: missing unimportant
- electricity for thermal power: 2.95149
  [{'text': '3.6', 'type': 'text'}]
- electricity from hydroelectric power plant: 0.090792
  [{'text': '3.6', 'type': 'text'}]
- electricity for nuclear power: 0
  [{'text': '3.6', 'type': 'text'}]
- electricity from wind power: 0.45396
  [{'text': '3.6', 'type': 'text'}]
- electricity for solar power: 0.103763
  [{'text': '3.6', 'type': 'text'}]

## Use advice
在使用该数据集进行生命周期评估时，应考虑混合电力中每种电源的比例及其相应的环境影响。在对该地区电力供应进行建模时，应考虑随时间变化的混合比例。确保对能源组合的任何假设都明确说明，并且数据的使用适合既定的范围，同时考虑技术适用性和时间对齐。

## Review details
清单： 内部审查通过几个迭代步骤完成，涉及原始数据验证、原始数据记录、代表性、完整性、与 ISO 14040 和 14044 有关的建模的一致性。

## Data sources
- 能源统计年鉴2020
