# Equipment and Materials Arriving on Site ; Farmland remediation ; In-situ solidification/stabilization ; Equipment transportation

Dataset: ILCD process, Unit process, single operation
Geography: NJ-YN-CN
Reference year: 2023
Classification: Unit processes / Other Services / Repair and maintenance
Generated by: Xiao Meng, xiaomeng@mail
Owner: Tiangong LCI Data Working Group
Review: Dependent internal review by Tiangong LCI Data Working Group
Amounts: no units in this file; such an amount is in the reference unit of its flow, which a separate flow dataset defines
copyright: false
licenseType: Free of charge for all users and uses

## General comment
Stable repair construction preparation stage, equipment transportation process.

## Geography
云南省怒江州受铅锌矿污染某耕地土壤 污染修复工程

## Technical purpose
This dataset represents the process involved in transporting equipment and materials required for the remediation of heavy metal-contaminated farmland. It specifically covers the preparation phase for in-situ solidification/stabilization techniques for the remediation of soil polluted by lead and zinc mines over an area of 16 hectares in Nujiang, Yunnan Province, China. The purpose of this process is to ensure that the concentration of Cd and Pb in the crops meet the standards 100% of the time and to reduce the bioavailable concentrations of Cd and Pb in the soil by over 70%.

## Reference product
- Equipment and Materials Arriving on Site: 2050; measured
  运输到场的设备

## Inputs
- transport in t*km: 10.25; measured

## Use advice
When utilizing this data for Life Cycle Assessment, ensure that the scope of the analysis includes the transportation of equipment and materials for farmland remediation. The dataset should only be applied to scenarios involving soil polluted by lead and zinc mining activities, where in-situ solidification/stabilization remediation techniques are employed. Users should also take into account the specified effectiveness of the remediation process, which includes achieving standard concentrations of Cd and Pb in crops and a significant reduction in the bioavailability of these metals in soil. The use of this dataset for other types of environmental or industrial processes should be done with caution and may require additional contextual information.

## Review details
Inventory: The internal review was done by several iteration steps concerning raw data validation, raw data documentation, representativity, completeness and consistency of modelling with regard to ISO 14040 and 14044.

## Data sources
- 肖萌 et al. 农田污染钝化修复环境影响定量评估方法与案例分析. 中国环境科学 43, 3571–3581 (2023).
