# 铝电解碳阳极生产 ; 碳阳极 ; 石油焦 ; 2012年

Dataset: ILCD process, Unit process, single operation
Geography: CN
Reference year: 2021
Classification: Unit processes / Materials production / Non-energetic raw materials
Generated by: 蔡梓萌, caizm6178@163.com
Owner: 天工LCI数据工作小组
Review: Dependent internal review by 天工LCI数据工作小组
Amounts: no units in this file; such an amount is in the reference unit of its flow, which a separate flow dataset defines
copyright: false
licenseType: Free of charge for all users and uses

## General comment
该寿命周期评估(LCA)数据集涉及使用石油焦生产碳阳极的工艺，该工艺专门为铝电解工业设计。2012年生产的碳阳极用作电化学过程中还原铝氧化物为铝金属的关键部件，适用于需要高热电导率和结构耐久性的行业。

## Time period
文献发表日期

## Reference product
- anode, for metal electrolysis: 1000; software or database
  anode

## Inputs
All rows: software or database
- electricity, high voltage, aluminium industry: 748.8
  electricty
- heavy fuel oil: 65
  fuel oil
- coal tar: 214
  coal tar pitch
- Petroleum Coke: 1089
  petroleum coak
- coal gas: 1277

## Data selection and combination
本研究的数据参考了PA、SA、电力等背景数据的LCA数据。PA数据来自统计数据源，SA数据主要来自文献。背景数据主要来自中国科学院生态环境研究中心CASRCEES 2018建立的中国本地化LCA数据库，涵盖能源、材料、交通、废物管理等LCA数据。

## Use advice
使用此数据集时，用户必须确认数据涉及2012年的碳阳极生产过程，并考虑自那时以来行业内的任何技术进步或变化。预焙阳极(PA)的主要数据来源于统计数据源，而补充阳极(SA)的信息主要来自文献。背景数据应假定为具有区域特异性，来源于CAS RCEES 2018 LCA数据库，侧重于中国本土化。方法论考虑必须包括此数据对应用特定背景的适用性，以及是否需要更新或区域调整以反映当前实践。用户还必须确定在其LCA模型中包括或排除回收是否适用。

## Review details
清单： 内部审查通过几个迭代步骤完成，涉及原始数据验证、原始数据记录、代表性、完整性、与 ISO 14040 和 14044 有关的建模的一致性。

## Data sources
- Ding, N., Liu, N., Lu, B. & Yang, J. Life cycle greenhouse gas emissions of aluminum based on regional industrial transfer in China. J. Ind. Ecol. 25, 1657–1672 (2021).
