# 修复后土壤;异位修复;异位热处理

Dataset: ILCD process, Unit process, black box
Geography: BE
Reference year: 2015
Classification: Unit processes / Other Services / Repair and maintenance
Functional unit: The functional unit in this study is the removal of approximately 80% of the estimated 500 metric tons of contaminant mass from a subsurface soil volume of approximately 40,000 cubic meters and can be achieved.
Generated by: 杨欣桐, yangxt@caep.org.cn
Owner: 天工LCI数据工作小组
Review: Dependent internal review by 天工LCI数据工作小组
Amounts: no units in this file; such an amount is in the reference unit of its flow, which a separate flow dataset defines
copyright: false
licenseType: Free of charge for all users and uses

## General comment
将土壤挖掘出来，运输到场外的热处理设施进行土壤修复。

## Geography
SRI Biochim是一个2公顷的场地，位于布鲁塞尔东北部Vilvorde Machelen 250公顷的工业区。

## Time period
文献发表时间

## Technology and included processes
现场覆盖着一层17~25cm厚的混凝土层，使用安装有液压顶锤的挖掘机进行清除，混凝土层的移除和土壤的挖掘在现场将建造一个占地400平方米的大型活动棚内进行。棚内的空气净化处理后排放。土壤开挖至地表以下3.7米（m），需要降低地表以下1.5米左右的地下水位。抽取的地下水也需要进行处理。空气和地下水净化过程都将使用颗粒活性炭。土壤需要用卡车运输到110公里外的场地进行热处理。

## Technical purpose
该数据集描述了场外土壤修复过程，特别是受污染土壤被挖掘并在场外热处理设施中处理。这一过程适用于环境工程，并通常用于修复受污染的工业场地，其中需要大幅度减少或消除土壤污染物以满足法规或安全标准。

## Reference product
- Remediated soil: 7.708e7; measured

## Inputs
All rows: measured
- Cast Iron: 2.4
  For Centrifugal pump, the amount of original useage is0.024t. Percentage of service life consumedis 0.1
- Stainless Steel: 3
  For Blower, the amount of original useage is0.03t. Percentage of service life consumedis 0.1
- Stainless Steel: 10.75
  For Fog Cannon, the amount of original useage is0.1075t. Percentage of service life consumedis 0.1
- Cast Iron: 81.6
  For Granular Activated Carbon (GAC) vessel for gas-phase treatment, the amount of original useage is1.632t. Percentage of service life consumedis 0.05
- Cast Iron: 55.8
  For Granular Activated Carbon vessel (GAC) for liquid-phase treatment, the amount of original useage is1.116t. Percentage of service life consumedis 0.05
- Aluminum oxide (alumina): 2.7306
  For 50 L pressurized air container, the amount of original useage is0.082t. Percentage of service life consumedis 0.0333
- Aluminum oxide (alumina): 2.9304
  For 6 L SCBA, the amount of original useage is0.088t. Percentage of service life consumedis 0.0333
- Cast Iron: 21.3
  For Air compressor, the amount of original useage is0.213t. Percentage of service life consumedis 0.1
- Galvanized Corrugated Iron: 332
  For Shed, the amount of original useage is20t. Percentage of service life consumedis 0.0166
- Steel: 1400
  For Hydraulic Excavators, the amount of original useage is28t. Percentage of service life consumedis 0.05
- Steel: 5
  For Hydraulic Jackhammers, the amount of original useage is0.05t. Percentage of service life consumedis 0.1
- polyvinylchloride resin (S-PVC): 127
  For piping, the amount of original useage is25.4t. Percentage of service life consumedis 0.005
- Activated Carbon: 250000
- transport in t*km: 16229.7
  Transport of Assembly
- transport in t*km: 16130
  Disposal of components and GAC
- transport in t*km: 1.29769e7
  Transport of soil and backfill
- Light fuel oil: 3469
- Electricity: 28750.3
- Diesel,Diesel: 748323
- contaminated soil: 7.708e7

## Use advice
使用此数据集的用户应确保包括土壤修复的所有阶段，从挖掘、运输到异位处理。应注意正确核算能耗和材料处理，并使用颗粒活性炭在空气和地下水净化过程中。数据集使用必须考虑运输和处置危险物质的当地法规要求。关于去除效率和污染物质量变异的敏感性分析，对于生命周期评估结果的有效性和可靠性可能至关重要。

## Review details
清单： 内部审查通过几个迭代步骤完成，涉及原始数据验证、原始数据记录、代表性、完整性、与 ISO 14040 和 14044 有关的建模的一致性。

## Data sources
- Beames B., et al. Accounting for land-use efficiency and temporal variations between brownfield remediation alternatives in life-cycle assessment. Journal of Cleaner Production 101 (2015) 109e117
