# 对二甲苯生产 | 对二甲苯 | 石脑油路线 | 石脑油

Dataset: ILCD process
Geography: CN
Reference year: 2022
Classification: Materials production / Other mineralic materials
Functional unit: A functional unit is defined as 1 ton of p-xylene product
LCI method principle: Attributional
LCI method approaches: Allocation - mass
Generated by: 任亚楠, renyn15@tsinghua.org.cn
Review: Dependent internal review by Tiangong LCI Data Working Group
Amounts: no units in this file; such an amount is in the reference unit of its flow, which a separate flow dataset defines
copyright: false

## General comment
芳烃联合装置生产对二甲苯，并副产抽余油、苯、重芳烃等产品，包括二甲苯分馏装置、吸附分离装置、异构化装置、歧化烷基转移装置和芳烃抽提装置。

## Geography
国内某炼化企业

## Time period
未提及，以文献发表时间代替

## Reference product
- p-xylene: 1000; measured
  对二甲苯

## Outputs
- carbon dioxide: 828.29; measured
  CO2

## Deviations from the LCI method approaches
对于评价产品多为石油烃类的物质体系，其物性和组成相近，因此可按照质量分配法进行温室气体排放量分配。

## Review details
Inventory: The internal review was done by several iteration steps concerning raw data validation, raw data documentation, representativity, completeness and consistency of modelling with regard to ISO 14040 and 14044.; Documentation: The review of the documentation was performed by Ecobilan and is in compliance with ISO 14040 and 14044. The data set documentation is correct in view of the appropriateness of the information provided. It includes all relevant information in view of data quality and scope of application of the respective LCI result.

## Data sources
- 田涛, 朱明璋, & 姜晔. 石化产品碳足迹评价研究与实践. 油气与新能源 34, 100–108 (2022).
