# Soil remediation;in-situ;electrokinetic remediation;long-term monitoring;Electricity;

Dataset: ILCD process, Unit process, single operation
Geography: KR
Reference year: 2014
Classification: Other Services / Repair and maintenance
Generated by: Wang Yipeng, wangyp@caep.org.cn
Owner: Tiangong LCI Data Working Group
Review: Dependent internal review by Tiangong LCI Data Working Group
Amounts: no units in this file; such an amount is in the reference unit of its flow, which a separate flow dataset defines
copyright: false
licenseType: Free of charge for all users and uses

## General comment
System monitoring

## Technology and included processes
Online real-time monitoring of contaminants in the site

## Technical purpose
This electrokinetic remediation process is designed for in-situ soil decontamination. It is applicable for sites contaminated with heavy metals, radionuclides, or organic pollutants, which require carefully controlled conditions and system monitoring. It is generally employed when conventional remediation methods are not feasible or cost-effective. Online monitoring features allow for real-time adjustments and ensure the remediation process adheres to environmental safety standards.

## Reference product
- Electricity: 720; input; measured
  Equipment etc

## Outputs
- Greenhouse Gases: 90; measured
- Nitrogen oxides: 0.239; measured
- SOx: 0.326; measured

## Use advice
When using this data set for life cycle assessment, it is important to take into account the specific context of the remediation site, including the type of contaminants and their concentrations. Users should ensure that the boundaries of the system include all relevant inputs and outputs, such as energy consumption for the electrokinetic process and treatment of the extracted contaminants. Consideration should also be given to the fate of contaminants post-remediation, as it may impact the overall environmental benefit. Careful attention should be given to the system monitoring data, as it can directly inform the efficiency and effectiveness of the remediation process.

## Review details
Inventory: The internal review was done by several iteration steps concerning raw data validation, raw data documentation, representativity, completeness and consistency of modelling with regard to ISO 14040 and 14044.

## Data sources
- Environmental assessment on electrokinetic remediation of multimetal-contaminated site: a case study
