# Multi-Si PV cell production

Dataset: ILCD process, Unit process, black box
Geography: ZJ-CN
Reference year: 2016
Classification: Materials production / Other mineralic materials
Functional unit: In this study, 1 kWp multi-Si PV cell production was selected as the functional unit.
LCI method principle: Attributional
LCI method approaches: Allocation
Generated by: Jinfeng Yang, yjfzfshn@163.com
Review: Dependent internal review by Tiangong LCI Data Working Group
Amounts: no units in this file; such an amount is in the reference unit of its flow, which a separate flow dataset defines
copyright: false

## General comment
Multi-Si

## Geography
The 2010 onsite data (i.e., raw material, energy, storage, direct emissions, and waste disposal) for multi-Si, solar glass, PV wafer, and cell production in Zhejiang Province, China, were used in this study

## Time period
Available online

## Reference product
- Solar Module: 1000; article inperiodical
  multi-Si PV cell(Multi-Si PV cell production)

## Inputs
All rows: article inperiodical
- electricity: 5244.84
  Electricity (Multi-Si PV cell production)
- Heavy oil: 0.02688
  Heavy oil (Multi-Si PV cell production)
- diesel: 1.76
  Diesel(Multi-Si PV cell production)
- Hydrogen: 1.8
  Hydrogen(Multi-Si PV cell production)
- sodium: 8.73
  Sodium(Multi-Si PV cell production)
- aluminium: 10.82
  Aluminum powder(Multi-Si PV cell production)
- Lime: 2.03
  Lime(Multi-Si PV cell production)
- quartz sand: 18.76
  Quartz sand(Multi-Si PV cell production)
- fluorspar: 48.79
  Fluorite(Multi-Si PV cell production)
- Sulfuric acid: 65.06
- Oleum: 23.36
- sodium hydroxide: 26.88
  NaOH
- Organic Chemistry: 14.43
  Organic chemicals
- Limestone: 5.87
  Lime stone
- sodium nitrate: 1.17
  Sodium nitrate
- sodium sulfate: 0.53
  Mirabilite
- Glass for recovery (shards): 48.53
  Reused broken glass
- Silver Paste: 0.09234
  Silver paste
- TPT film: 9.83
- Phosphorus Oxychloride: 0.0208
  Phosphorus oxychloride
- nitrogen: 10.57
  Nitrogen
- Ammonia: 0.00254
- Terpineol: 0.00609
- Soft water: 1140
  Softened water
- Triethylaluminium: 0.55
  Triethyl aluminum
- water: 6.69
  Water
- Polyfoam: 24.24
- Silicon nitride: 0.01522
- Lactic acid: 0.06827
- Steel Wire,Cable: 4.09
  steel wire
- Hydrochloric acid: 0.5
  Hydrochloric acid (38%)
- Hydrofluoric acid: 2.77
  Hydrofluoric acid (40%)
- Nitric acid: 0.95
  Nitric acid(70%)
- Silicon carbide: 14.2
- Very fine milled silica sand d50 = 20 micrometer: 59.68
  Silica sand
- Aluminum hydroxide: 1.25
- dolomite: 13.12
  Dolomite
- Antimony(III) oxide: 0.19
  Antimony trioxide
- aluminium: 0.42
  Aluminum paste
- Ethylene-vinyl acetate copolymer: 18.95
  EVA film
- aluminium: 24.85
  Aluminum bar
- Silane: 0.00051
- oxygen: 9.59e-5
  Oxygen
- Ethanol: 1.53

## Outputs
All rows: article inperiodical
- processed water to groundwater, regionalized, CN: 2.33
  Wastewater
- waste incineration of municipal solid waste (MSW): 23750
  Solid waste Incineration
- municipal solid waste deposition: 8.58
  Solid waste Landfill
- toluene: 0.03301
  Toluene
- fluoride: 0.00194
  Fluoride
- Nitrogen oxides: 0.0349
- hydrogen chloride: 0.00034
  Hydrogen chloride
- chlorine: 3e-5
  Chlorine
- Silica: 0.00169
- Ethylene glycol dimethyl ether: 0.07147
  Glycol dimethyl ether (二乙二醇二甲醚)
- particles (PM2.5 - PM10): 0.03103
  Particulates
- sulfur dioxide: 0.05935
  Sulfur dioxide
- Dust (unspecified, from stack): 0.00045
  Lampblack gas
- ammonia: 5e-5
  Ammonia
- non-methane volatile organic compounds: 0.00635
  Non-methane volatile organic compounds

## Deviations from the LCI method approaches
This study aims to identify the environmental effects associated with photovoltaic (PV) cell made up of multicrystalline silicon (multi-Si) in China by life cycle assessment.

## Review details
Inventory: The internal review was done by several iteration steps concerning raw data validation, raw data documentation, representativity, completeness and consistency of modelling with regard to ISO 14040 and 14044.; Documentation: The review of the documentation was performed by Ecobilan and is in compliance with ISO 14040 and 14044. The data set documentation is correct in view of the appropriateness of the information provided. It includes all relevant information in view of data quality and scope of application of the respective LCI result.

## Data sources
- Hong, J., Chen, W., Qi, C., Ye, L. & Xu, C. Life cycle assessment of multicrystalline silicon photovoltaic cell production in China. Solar Energy 133, 283–293 (2016).
