# copper production|cathode copper| flash smelting approach|sulfide ore

Dataset: ILCD process, Unit process, single operation
Geography: CN
Reference year: 2014
Classification: Materials production / Other mineralic materials
Functional unit: functional unit was defined as the production of 1 t of refined copper (i.e., cathode copper).
LCI method principle: Attributional
LCI method approaches: Allocation - market value
Generated by: Peng Wang, 2867919560@qq.com
Review: Dependent internal review by Tiangong LCI Data Working Group
Amounts: no units in this file; such an amount is in the reference unit of its flow, which a separate flow dataset defines
copyright: false

## Geography
a copper plant in western China

## Technology and included processes
Pyrometallurgical processes consist of mining, beneficiation, smelting, converting, fire refining (including anode casting) and electrolytic refining, of which smelting is the key phase. There are two main types of smelters in China, namely flash and bath smelters

## Reference product
- copper ore/(0.81%): 128977; input; measured
  copper ore/(0.81%) needs to be supplemented

## Inputs
- copper ore/(1.02%): 0; measured
  copper ore/(1.02%) needs to be supplemented
- waste wire: 0; software or database
  waste wire needs to be replenished
- Limestone: 0; software or database
  imestone
- quartz sand: 574.59; software or database
- oxygen: 1007.38; software or database
- Sulfuric acid(98%): 9.9; software or database
  Sulfuric acid needs to be supplemented with resourse
- steam: 600; software or database
  steam needs to be supplemented
- AC electricity: 14890.6; software or database
  AC electricity needs to be replenished
- DC electricity: 849.6; software or database
  DC electricity needs to be replenished
- hard coal: 1987.3; software or database
  coal
- coke: 0; software or database
  Coke needs to be replenished
- diesel oil: 11743.2; software or database
  Diesel oil needs to be replenished
- Heavy fuel oil (1.0 wt.% S): 9886.17; software or database
  heavy fuel oil

## Outputs
All rows: software or database
- carbon dioxide: 2092.26
  CO2
- sulfur oxides: 75.46
  SO2
- chemical oxygen demand: 56.79
  COD needs to be supplemented
- particles (PM2.5): 64.82
  dust needs to be replenished
- Slag: 2187
  slag

## Deviations from the LCI method approaches
The Eco-Indicator 99 (EI99), a damage-oriented method widely used as an impact assessment method in LCA [22], was applied for the life cycle impact assessment. The impact assessment was performed with the EI99 methodology (hierarchist perspective).

## Data selection and combination
Inventory data of copper production originated mainly from two plants that adopted different equipment and processes, supplemented by other published literature.Inventory data of some auxiliary materials were obtained from the PE-GaBi database.

## Data treatment and extrapolations
GaBi 4 software was used to model the copper production processes and determine the environmental burdens in this study.

## Review details
Inventory: The internal review was done by several iteration steps concerning raw data validation, raw data documentation, representativity, completeness and consistency of modelling with regard to ISO 14040 and 14044.

## Data sources
- Song, X., Yang, J., Lu, B., Li, B. & Zeng, G. Identification and assessment of environmental burdens of Chinese copper production from a life cycle perspective. Front. Environ. Sci. Eng. 8, 580–588 (2014).
