# 铝土矿开采｜铝土矿 ; 摇篮

Dataset: ILCD process, Unit process, single operation
Geography: HEN-CN
Reference year: 2018
Classification: Materials production / Non-energetic raw materials
Generated by: 徐常青, xcq@bit.edu.cn
Owner: 天工LCI数据工作小组
Review: Dependent internal review by 天工LCI数据工作小组
Amounts: no units in this file; such an amount is in the reference unit of its flow, which a separate flow dataset defines
copyright: false
licenseType: Free of charge for all users and uses

## General comment
无流程图

## Time period
论文发表年

## Technical purpose
本工艺描述了从地球提取铝土矿矿石的过程，该矿石是生产铝的主要原材料。提取的铝土矿可以进一步加工成氧化铝，然后用来制造各种铝制品，如罐头、箔材、汽车和航空航天工业的组成部分，以及建筑材料。

## Reference product
- bauxite: 1000; article inperiodical
  铝土矿

## Inputs
- electricity, medium voltage, aluminium industry: 58.32; article inperiodical
- light fuel oil: 1.38; article inperiodical
  燃料油

## Outputs
All rows: article inperiodical
- carbon dioxide (fossil): 16.1
- carbon monoxide: 0.018
- sulfur dioxide: 0.024
- Nitrogen oxides: 0.04
- methane: 0.0007

## Use advice
在使用铝土矿开采过程数据集时，研究人员和行业专业人员应考虑开采可能带来的潜在环境影响。这包括土地利用变化、对空气和水的排放以及与采矿操作相关的能源消耗。还应注意相关论文发表的年份，因为数据可能不反映该年份后发生的进展或过程变化。数据可能不包括精炼等下游处理过程，因此在没有额外信息的情况下谨慎用于完整的生命周期评估。此外，该过程仅有能源数据，仅作为能源消耗的参考数据，如需使用请根据实际情况补全其它信息。

## Review details
清单： 内部审查通过几个迭代步骤完成，涉及原始数据验证、原始数据记录、代表性、完整性、与 ISO 14040 和 14044 有关的建模的一致性。

## Data sources
- 王姗姗, 刘赛男, 王灿, & 张瑞芹. 基于生命周期评价的河南省原铝生产环境影响分析. 轻金属 1-7+16 (2018)
