# 氧化铝生产; 冶金用氧化铝 ; 铝土矿 ; 2010年

Dataset: ILCD process, Unit process, single operation
Geography: CN
Reference year: 2021
Classification: Unit processes / Materials production / Non-energetic raw materials
Generated by: 封羽真, fyz22
Owner: 天工LCI数据工作小组
Review: Dependent internal review by 天工LCI数据工作小组
Amounts: no units in this file; such an amount is in the reference unit of its flow, which a separate flow dataset defines
copyright: false
licenseType: Free of charge for all users and uses

## General comment
此过程产生的氧化铝主要用于冶金工业中，特别是用于生产铝。通过这个过程从铝土矿中提取的高纯度氧化铝主要用于冶炼铝金属。

## Time period
文献发表日期

## Reference product
- aluminium oxide, metallurgical: 1000; software or database
  alumina

## Inputs
All rows: software or database
- soda ash, dense: 147.28
  soda ash
- Petroleum Coke: 1229.01
  Energy sources proportion of energy consumption is coal: fuel oil: coke: natural gas: coke even gas=46.0%: 11.0%: 7.1%: 14.1%: 21.7%
- coal gas: 3756.26
  (same comment as for Petroleum Coke)
- natural gas, high pressure: 2440.7
  (same comment as for Petroleum Coke)
- fuel oil, unspecified: 1904.09
  (same comment as for Petroleum Coke)
- hard coal: 7962.58
  (same comment as for Petroleum Coke)
- Water, unspecified natural origin: 2.7
  water consumption

## Data selection and combination
本研究的数据参考了PA、SA、电力等背景数据的LCA数据。PA数据来自统计数据源，SA数据主要来自文献。背景数据主要来自中国科学院生态环境研究中心CASRCEES 2018建立的中国本地化LCA数据库，涵盖能源、材料、交通、废物管理等LCA数据。

## Use advice
提供的LCA数据特定于2010年冶金用氧化铝的生产。用户必须准确归属于铝的生产阶段的数据，并考虑中国市场的区域特点。应用数据时，应确保数据与给定的时间框架相关，并且适用于所讨论工业过程的规模和位置。此外，还应监控中国科学院生态环境研究中心CAS RCEES LCA数据库中的更新，以便新数据或修订数据可能影响评估。

## Review details
清单： 内部审查通过几个迭代步骤完成，涉及原始数据验证、原始数据记录、代表性、完整性、与 ISO 14040 和 14044 有关的建模的一致性。

## Data sources
- Ding, N., Liu, N., Lu, B. & Yang, J. Life cycle greenhouse gas emissions of aluminum based on regional industrial transfer in China. J. Ind. Ecol. 25, 1657–1672 (2021).
