# 液态铝电解电容器 (LAEC) 报废 ; 铝粉 ; 使用过的电容器

Dataset: ILCD process, Unit process, single operation
Geography: CN
Reference year: 2022
Classification: Unit processes / Materials production / Metals and semimetals
Generated by: 常慧敏, huiminchang@tsinghua.edu.cn
Owner: 天工LCI数据工作小组
Review: Dependent internal review by 天工LCI数据工作小组
Amounts: no units in this file; such an amount is in the reference unit of its flow, which a separate flow dataset defines
copyright: false
licenseType: Free of charge for all users and uses

## General comment
该工业过程涉及将液态铝电解电容器（LAEC）回收成铝粉。所得铝粉可潜在地重新用于各种需要高品质铝的制造过程，例如生产新的电子组件、航空材料以及其他高精度铝应用。

## Time period
文献发表于2022-11-15，文献中 The reference year of the elementary data (alumminum ingots, separator paper, tansport, electricity, and water) is around 2016 and qcruired from the Gabi database (Version: 10.6.1.35)

## Reference product
- used capacitor: 1e6; input; measured
  Capacitors (waste)

## Outputs
All rows: measured
- electricity, high voltage, aluminium industry: 440.28
  Electricity
- Mixture of plastic and paper with electrolyte: 359.62
- iron, powder: 1.96
  Iron powder
- Aluminum powder: 739.9
- Rubber Powder: 121.52
  Rubber powder
- Dust: 0.1223

## Data selection and combination
三种 AEC 的材料信息和性能参数均来自被调查的制造商。此外，通过对 AEC 行业的几家工厂进行实地调研，获得了铝坯箔制造（由铝锭制成）、阳极/阴极箔制造（由铝坯箔制成）和电容器制造的原始数据。由于技术保密原因，无法直接从供应商处获得 PHAEC 阴极箔制造的 LCI 数据。因此，考虑到两者的相似性，根据 PAECs 阴极箔的涂层工艺数据调整 PHAECs 阴极铝箔的制造 LCI。在运输阶段，主要原材料从材料产地到电容器制造商的数据以及电容器制成品从制造商到客户的数据均来自制造商的供应链系统。使用阶段的能耗是根据 AEC 的物理方程和电气参数计算得出的。为确保分析的完整性，在分析和计算的基础上获得报废阶段的数据。

## Use advice
使用数据集时，应关注基本数据的参考年份，约为2016年，来源于Gabi数据库（版本：10.6.1.35）。用户应确保此数据与其评估周期和方法论框架兼容。在某些组件（例如PHAECs中的阴极箔）的数据由于技术保密而进行调整的情况下，使用者应意识到所做的假设和调整。对于运输和使用阶段，用户必须考虑制造商特定的供应链系统和从AECs的物理方程式和电参数计算的能耗。为了确保分析的完整性，应将生命周期终端阶段数据纳入生命周期评估。对于Gabi数据库中没有的任何材料，如EDOT和铵盐，都是基于化学反应进行估算，用户应慎重对待。

## Review details
清单： 内部审查通过几个迭代步骤完成，涉及原始数据验证、原始数据记录、代表性、完整性、与 ISO 14040 和 14044 有关的建模的一致性。

## Data sources
- Zhang, C., Zheng, Y., Jing, J., Liu, Y. & Huang, H. A comparative LCA study on aluminum electrolytic capacitors: From liquid-state electrolyte, solid-state polymer to their hybrid. J. Clean. Prod. 375, (2022).
