# Edibleice|Water|Water treatment + sterilization + filling + quick freezing + stripping + packaging|All sizes / 食用冰|水|水处理+杀菌+灌装+速冻+脱膜+包装|所有规模

Dataset: ILCD process, Unit process, single operation
Geography: CN
Reference year: 2019
Classification: Materials production / Water
Generated by: The data was created by the Office of the Second National Pollution Source Census of the Ministry of Ecology and Environment, and the data was organized by the TianGong Plan team for ILCD format / 生态环境部第二次全国污染源普查工作办公室创建数据，天工计划团队常慧敏整理数据为ILCD格式
Owner: Tiangong LCI Data Working Group / 天工LCI数据工作小组
Amounts: no units in this file; such an amount is in the reference unit of its flow, which a separate flow dataset defines
copyright: false
licenseType: Free of charge for all users and uses

## Technology and included processes
the Technical of end-of-pipe management technology for pollution Waste wateris/，Its Technical efficiency of end-of-pipe management0

## Reference product
- Shaved Ice: 1000; calculated
  源文件中描述为为食用冰，此处对其进行了匹配工作，将其匹配到LCAflow库里面相最符合的流，污染物指标备注为总磷

## Outputs
All rows: calculated
- phosphorus, total: 0.00533064
  污染物指标总磷的末端治理技术是物理处理法+厌氧生物处，其效率为76。原文件中描述污染物类别为废水，污染物指标为总磷，此处对其进行了匹配工作，将其匹配到LCAflow库里面相最符合的流，污染物指标备注为总磷
- Petroleum-related waste: 0.00207048
  污染物指标石油类的末端治理技术是物理处理法+厌氧生物处，其效率为98。原文件中描述污染物类别为废水，污染物指标为石油类，此处对其进行了匹配工作，将其匹配到LCAflow库里面相最符合的流，污染物指标备注为石油类
- Waste water: 6513, 767 (2 entries)
  污染物指标工业废水量的末端治理技术是/，其效率为0。原文件中描述污染物类别为废水，污染物指标为工业废水量，此处对其进行了匹配工作，将其匹配到LCAflow库里面相最符合的流，污染物指标备注为工业废水量
- chemical oxygen demand: 0.163333
  污染物指标化学需氧量的末端治理技术是/，其效率为0。原文件中描述污染物类别为废水，污染物指标为化学需氧量，此处对其进行了匹配工作，将其匹配到LCAflow库里面相最符合的流，污染物指标备注为化学需氧量
- Ammonia Nitrogen: 0.000379
  污染物指标氨氮的末端治理技术是/，其效率为0。原文件中描述污染物类别为废水，污染物指标为氨氮，此处对其进行了匹配工作，将其匹配到LCAflow库里面相最符合的流，污染物指标备注为氨氮
- Nitrogen, organic bound: 0.00284
  污染物指标总氮的末端治理技术是/，其效率为0。原文件中描述污染物类别为废水，污染物指标为总氮，此处对其进行了匹配工作，将其匹配到LCAflow库里面相最符合的流，污染物指标备注为总氮
- phosphorus, total: 0.00128
  污染物指标总磷的末端治理技术是/，其效率为0。原文件中描述污染物类别为废水，污染物指标为总磷，此处对其进行了匹配工作，将其匹配到LCAflow库里面相最符合的流，污染物指标备注为总磷

## Data sources
- 第二次全国污染源普查产排污核算系数手册（试用版）,二级代码14,四级代码1493文件，在完整版文件中第3413页
