# Soil and groundwater remediation;Ex-situ;groundwater pump and treat;Remediated groundwater

Dataset: ILCD process, Unit process, single operation
Geography: CA
Reference year: 2007
Classification: Other Services / Repair and maintenance
Generated by: Wang Ning, wang_ning@caep.org.cn
Owner: Tiangong LCI Data Working Group
Review: Dependent internal review by Tiangong LCI Data Working Group
Amounts: no units in this file; such an amount is in the reference unit of its flow, which a separate flow dataset defines
copyright: false
licenseType: Free of charge for all users and uses

## General comment
Consumption of electricity to operate extraction wells and wastewater disposal facilities

## Geography
The contaminated area was located 600 m from a river shore in the northern part of the prov-ince of Quebec， Canada.

## Technology and included processes
Remediation of contaminated groundwater through the use of electrically powered groundwater pump-and-treat systems

## Technical purpose
The described industrial process is intended for the remediation of contaminated soil and groundwater. The soil and groundwater pump-and-treat system is applied ex-situ to extract, treat, and clean polluted groundwater. This process is specifically used in environmental rehabilitation projects where groundwater has been contaminated. It is applicable in scenarios where the remediation site is near sensitive areas, such as 600 m from a river shore, similar to the site in the province of Quebec, Canada, mentioned in the description.

## Reference product
- Remediated groundwater: 4.2705e6; estimated
  得到修复的地下水

## Inputs
- Electricity: 6.701e7; estimated
  消耗电力是抽出-处理系统运行
- contaminated groundwater: 4.2705e6; estimated
  受污染的地下水

## Use advice
Users of this data set should consider the geographical specificity and environmental conditions similar to the described site when utilizing this process as part of their Life Cycle Assessment studies. It is important to account for the electricity consumption of the extraction and wastewater disposal systems, as it contributes significantly to the overall environmental impact of the remediation. Any changes or variations in electricity sources (e.g., grid mix, renewable sources) should be reflected in the LCA to ensure accuracy. Additionally, users should consider the distance from sensitive areas (e.g., water bodies) since this may require additional protective measures or impact the effectiveness of treatment.

## Review details
Inventory: The internal review was done by several iteration steps concerning raw data validation, raw data documentation, representativity, completeness and consistency of modelling with regard to ISO 14040 and 14044.
