# 生物质航空燃油纤维素加氢裂解定向合成环烷烃

Dataset: ILCD process, Unit process, black box
Geography: CN
Classification: Unit processes / Energy carriers and technologies / Renewable fuels
Functional unit: 1 MJ aviation fuel
LCI method principle: Attributional
LCI method approaches: Allocation - gross calorific value
Generated by: 张艺璇, zhangyixuan0444@igsnrr.ac.cn
Owner: 天工LCI数据工作小组
Review: Dependent internal review by 天工LCI数据工作小组
Amounts: no units in this file; such an amount is in the reference unit of its flow, which a separate flow dataset defines
licenseType: Free of charge for all users and uses

## General comment
生物质原材料经预处理与热解，烷基化反应，加氢处理和精馏步骤最终制备得到生物质航空燃料。这种替代航空燃料生产过程主要通过提供一种可再生燃料来源为航空工业服务，与传统基于化石燃料的航空燃料相比，潜在的温室气体排放更低。

## Model description
运用 Aspen Plus 软件搭建工艺完整流程的仿真模型并进行模拟计算，在质量平衡的基础上获得各项工艺的质量流、能量流、热力学参数和反应器的功耗

## Reference product
- carbon dioxide (biogenic): 1.5; calculated
  原文未区分bio和fossil，根据专家判断此处为bio

## Inputs
- Electricity: 0.1836, 0.504, 0.396 (3 entries); calculated

## Outputs
- waste water - untreated: 1.5; calculated

## Deviations from the LCI method approaches
按照能量分配的方式分配环境影响值，即在排放分配的过程中，根据航油以及其他燃料的能量分配给每 MJ 的航油生产

## Use advice
使用此数据集进行生命周期评估时，必须考虑能量分配原则。环境影响值必须根据生物航空燃油及任何其他共生产燃料的能量含量来分配。分配应与每MJ生产的生物航空燃油所提供的能量成比例。必须确保与系统边界保持方法论的一致性，并且选择分配方法需与研究目标相符合，并有适当的理由。

## Review details
清单： 内部审查通过几个迭代步骤完成，涉及原始数据验证、原始数据记录、代表性、完整性、与 ISO 14040 和 14044 有关的建模的一致性。

## Data sources
- 龙柯沅. 生物质定向合成航煤环烷烃的模拟及生命周期评价(东南大学, 2021).
