# Soil sample ; Soil sample lab-testing ; Farmland remediation ; In-situ solidification/stabilization

Dataset: ILCD process, Unit process, single operation
Geography: NJ-YN-CN
Reference year: 2023
Classification: Unit processes / Other Services / Repair and maintenance
Generated by: Xiao Meng, xiaomeng@mail
Owner: Tiangong LCI Data Working Group
Review: Dependent internal review by Tiangong LCI Data Working Group
Amounts: no units in this file; such an amount is in the reference unit of its flow, which a separate flow dataset defines
copyright: false
licenseType: Free of charge for all users and uses

## General comment
In the backend disposal stage of stabilization repair, flame atomic absorption spectroscopy is used for sample detection.

## Geography
云南省怒江州受铅锌矿污染某耕地土壤 污染修复工程

## Technical purpose
This dataset represents the process of farmland remediation through in-situ solidification/stabilization techniques. It is applicable in environmental engineering and land rehabilitation, particularly for agricultural soils contaminated with heavy metals such as cadmium (Cd) and lead (Pb). The process aims to reduce the bioavailable concentrations of Cd and Pb in the soil, thereby allowing for the safe cultivation of crops that meet health standards for heavy metal content.

## Reference product
- Soil Sample: 1000; input; measured
  运输到场检测的样土

## Inputs
- calcium chloride: 0.5; measured
- Electricity: 2880; measured

## Outputs
- Soil complete test: 1000; measured
  检测完成的土壤

## Use advice
When using this data set, ensure proper consideration of the specific context in which the remediation technique is applied since the effectiveness of in-situ solidification/stabilization can vary based on soil composition, contaminant characteristics, and local environmental conditions. If used for comparative studies, adjust the data to reflect regional differences. Accounting for the success rate of toxin reduction, as indicated (over 70% reduction in bioavailable Cd and Pb), is crucial for accurate impact assessments. Methodological consistency with the provided test method (flame atomic absorption spectroscopy) should be maintained.

## Review details
Inventory: The internal review was done by several iteration steps concerning raw data validation, raw data documentation, representativity, completeness and consistency of modelling with regard to ISO 14040 and 14044.

## Data sources
- 肖萌 et al. 农田污染钝化修复环境影响定量评估方法与案例分析. 中国环境科学 43, 3571–3581 (2023).
