# cement production|cement, ordinary portland cement, 42.5MPa|new dry process, 2000 t/d|fly ash

Dataset: ILCD process, Unit process, black box
Geography: CN
Reference year: 2005
Classification: Materials production / Other mineralic materials
Generated by: Siqi Yang
Amounts: no units in this file; such an amount is in the reference unit of its flow, which a separate flow dataset defines
copyright: false

## General comment
Two 2000t/d new dry process production lines.

## Time period
2005-2006

## Model description
1 ton of 42.5# ordinary portland cement with a 28-day compressive strength of 42.5 MPa was selected as a functional unit, while 32.5# cement was converted to 42.5# cement at a ratio of 1:1.25, which is regarded as one A unit of 32.5# cement has a similar environmental impact to 1.25 units of 42.5# cement. The scope of the study is raw material preparation, clinker calcination and cement grinding, and the rest is excluded from the system boundary. The main raw materials consumed are limestone, clayey raw materials, gypsum, etc. The energy consumed is coal, electricity and a certain amount of fuel oil, emit dust and environmental polluting gases such as carbon dioxide and sulfur dioxide.

## Reference product
- cement, ordinary portland cement, 42.5MPa: 1000
  Cement

## Inputs
All rows: measured
- limestone, crushed, for mill: 1270
  Limestone
- clay: 70.4
  Clay-based raw materials
- iron, powder: 25.1
  Iron correction raw material
- gypsum (desulphurized): 57.9
  Gupsum
- ash: 139
  Fly ash
- electricity, medium voltage: 388.8
  Electricity
- hard coal, run-of-mine: 134
  Raw coal
- heavy fuel oil: 0.0455
  The original literature is fuel oil (i.e., heavy oil)

## Outputs
- carbon dioxide: 798
  CO2. Due to the lack of a perfect monitoring mechanism and statistical system, there are many deficiencies in the filling of pollutant emissions by some enterprises in the research data sheet, focusing on the missing quantities of CO2, SO2, NOx and CO emissions. For life cycle assessment, the missing quantity of major pollutant emissions seriously affects the accuracy of the assessment, so certain estimation methods need to be used for estimation. In this paper, we use current or relevant literature on pollutant emissions in cement production to estimate the emissions of several major pollutants, in order to compensate for the deficiencies in the survey data.
- Carbon monoxide, non-fossil: 4.17
  CO. Due to the lack of a perfect monitoring mechanism and statistical system, there are many deficiencies in the filling of pollutant emissions by some enterprises in the research data sheet, focusing on the missing quantities of CO2, SO2, NOx and CO emissions. For life cycle assessment, the missing quantity of major pollutant emissions seriously affects the accuracy of the assessment, so certain estimation methods need to be used for estimation. In this paper, we use current or relevant literature on pollutant emissions in cement production to estimate the emissions of several major pollutants, in order to compensate for the deficiencies in the survey data.
- Nitrogen oxides: 1.34
  NOx. Due to the lack of a perfect monitoring mechanism and statistical system, there are many deficiencies in the filling of pollutant emissions by some enterprises in the research data sheet, focusing on the missing quantities of CO2, SO2, NOx and CO emissions. For life cycle assessment, the missing quantity of major pollutant emissions seriously affects the accuracy of the assessment, so certain estimation methods need to be used for estimation. In this paper, we use current or relevant literature on pollutant emissions in cement production to estimate the emissions of several major pollutants, in order to compensate for the deficiencies in the survey data.
- sulfur dioxide: 1.25
  SO2. Due to the lack of a perfect monitoring mechanism and statistical system, there are many deficiencies in the filling of pollutant emissions by some enterprises in the research data sheet, focusing on the missing quantities of CO2, SO2, NOx and CO emissions. For life cycle assessment, the missing quantity of major pollutant emissions seriously affects the accuracy of the assessment, so certain estimation methods need to be used for estimation. In this paper, we use current or relevant literature on pollutant emissions in cement production to estimate the emissions of several major pollutants, in order to compensate for the deficiencies in the survey data.
- particles (> PM10): 1.25; calculated
  Dust, with an unspecified particle size, is treated as PM > 10 micrometers in diameter.

## Sampling procedure
The study mainly investigates the environmental load information of their material production from 2004 to 2007, and takes one material production line or multiple production lines that can be inspected each year as the research object. According to statistics, a total of 115 building material enterprises were investigated, with a total of 234 research objects. Specifically, 37 enterprises in the cement industry, including 32 new dry process enterprises and 5 shaft kiln enterprises, with a total of 96 research objects.

## Data sources
- 张群. (2009). 材料生命周期分析网络数据库的研究与开发 [硕士, 北京工业大学].
