# 污泥处理与处置|与煤混烧发电

Dataset: ILCD process, Unit process, single operation
Geography: CN
Classification: Materials production / Other mineralic materials
Generated by: Jin Sitian, JSTian0302@163.com
Amounts: no units in this file; such an amount is in the reference unit of its flow, which a separate flow dataset defines

## General comment
干化+掺烧

## Reference product
- Sludge: 1000; input
  1t湿污泥（水分含 量在 70％ ～75％左右 ）

## Inputs
- hard coal: 1685; measured

## Outputs
All rows: measured
- carbon monoxide: 0.21
- carbon dioxide: 175.09
- Nitrogen oxides: 6.19801
- sulfur oxides: 0.53477
- hydrogen chloride: 0.10707
- Flue dust: 0.24
  烟尘
- Electricity: 219.816

## Data sources
- 城市污水污泥焚烧处理环境影响分析
