# 水泥生产|水泥, 硅酸盐水泥|混合固废

Dataset: ILCD process, LCI结果
Geography: CN
Classification: Materials production / Other mineralic materials
Generated by: 杨思琪
Amounts: no units in this file; such an amount is in the reference unit of its flow, which a separate flow dataset defines
copyright: false

## General comment
混合固废指废水泥和水泥加固剂。

## Model description
使用一吨水泥和固体废弃水泥作为功能单元。将系统边界定义为“摇篮到大门”，部分闭合。考虑了材料开采、原材料制备、熟料煅烧、磨碎和运输的过程，不包括水泥使用和废弃阶段。固体废弃物的生命周期始于废弃阶段。

## Reference product
- cement, portland cement: 1000
  水泥

## Inputs
- calcium carbonate: 612.895; measured
  石灰石。材料开采570。废物水泥12.25。
- clay: 300; measured
  黏土。材料开采285。
- iron: 100; measured
  铁。材料开采95。
- gypsum: 65.5263; measured
  石膏。熟料钙化50。废物水泥12.25。
- diesel: 1.89474; measured
  柴油。材料开采1.8。
- admixture: 10.5263
  水泥增强剂。废物水泥10。实验室中制备了以二氧化硅微粉和硅酸钠为主要成分的水泥增强剂。
- transport, freight, lorry, unspecified: 393684; measured
  运输。材料开采270.废物水泥104。
- electricity, medium voltage: 329.684; measured
  电。材料开采14.8。生料制备18.9。熟料煅烧16.3。研磨37。

## Outputs
All rows: measured
- carbon dioxide: 758.186
  二氧化碳。材料开采36.7。生料制备178.94。熟料煅烧154.327。研磨350.31。
- sulfur dioxide: 0.444695
  SO2。材料开采0.258。生料制备0.043。熟料煅烧0.0371。研磨0.08436。
- nitrogen dioxide: 1.18325
  NO2。材料开采0.0581。生料制备0.279。熟料煅烧0.24069。研磨0.5463。
- particles (> PM10): 0.0644087
  TSP。总悬浮颗粒，未标明粒径，按PM>10处理。。材料开采0.03。生料制备60.熟料煅烧0.354。研磨0.8043。
- carbon monoxide: 0.298389
  CO。材料开采0.00137。生料制备0.0738。熟料煅烧0.0637。研磨0.1446。
- methane: 5.4
  CH4。材料开采5.13。
- mercury: 6.3158e-8
  Hg。材料开采0.06。
- Nitrogen oxides: 0.555789
  NOx。熟料煅烧0.528。
- wastewater, unpolluted: 347.368
  H2O。水泥生产200。废物水泥130。
- chemical oxygen demand: 1.09837
  COD。材料开采1.02。生料制备0.00615。熟料煅烧0.0053。研磨0.012。
- iron sulfate: 0.915789
  FeSO4。熟料煅烧0.87。
- chromium VI: 2.5263e-5
  CR6+。熟料煅烧24。
- Oils, unspecified: 2.18433
  废油。材料开采2.02。生料制备0.0026。熟料煅烧2.3E-4。研磨0.05228。
- Waste, solid, from cement production: 513.421
  固体垃圾。废物水泥-487.75。负值表示输入或输出值代表环境增长。
- waste cement, hydrated: 52.6316
  废物水泥。水泥产量50。

## Data selection and combination
调查了200万吨水泥厂的生产数据，包括与水泥生产每个工序直接相关的输入和输出，其余数据来自背景数据库。

## Data sources
- Ming Tao, Daoming Lu, Ying Shi, & Chengqing Wu. (2022). Utilization and life cycle assessment of low activity solid waste as cementitious materials: A case study of titanium slag and granulated blast furnace slag. Science of The Total Environment, 849, 157797.
