# 砖生产;烧结砖;原材料加工（破碎、混合）

Dataset: ILCD process, Unit process, single operation
Geography: ZG-SC-CN
Reference year: 2020
Classification: Unit processes / Materials production / Other mineralic materials
Functional unit: 1t WDC were chosen as the functional unit
Generated by: 王湘锦, r99rt4@163.com
Owner: 天工LCI数据工作小组
Review: Dependent internal review by 天工LCI数据工作小组
Amounts: no units in this file; such an amount is in the reference unit of its flow, which a separate flow dataset defines
copyright: false
licenseType: Free of charge for all users and uses

## General comment
以页岩矿石、煤以及水基钻屑为原材料

## Technology and included processes
WDC（水基钻屑） 用于替代天然粘土制备烧结砖。通过压滤机预处理，WDC 的含水量可从 80% 降至 20%，从而满足对外交付的循环利用要求。WDC 中剩余的水可直接用于制砖（240 毫米 × 115 毫米 × 53 毫米），以减少水资源的消耗。整个生产过程包括原料制备、混合、压制、干燥和烧结（温度为 800-1000 ℃；时间为 1-4 h）。

## Technical purpose
本数据集涉及使用页岩矿石、煤和水基钻屑(WDC)作为替代天然黏土的烧结砖生产过程。经过预处理的WDC减少了水分含量，便于用于烧结砖的生产。通过在砖制造过程中重用WDC中的水，此过程旨在最小化水资源消耗。所生产的砖块尺寸为240毫米×115毫米×53毫米，适合建筑和建材应用。该利用项目年产烧结砖达3000万块。

## Reference product
- clay: 1000; input; measured
  原文献中以天然粘土替代水基岩屑，但是没有找到对应的流，暂时以粘土替代

## Inputs
- shale: 3500; measured
  原文为Shale ore
- hard coal: 375; measured
  原文中没有标注具体的煤的类型
- freshwater: 300; measured
- Electricity: 360; measured

## Outputs
- particles (> PM10): 0.0294; measured
- brickbat aggregate: 5175; measured
  砖块粗料

## Deviations from the LCI method approaches
作为生命周期评估的一部分，亿科环境技术有限公司开发的 eFootprint 在线分析平台用于对整个生命周期过程进行定量分析。

## Data selection and combination
原材料、能源投入和废气排放的原始数据来自自贡（中国四川）的一家案例研究企业--创奇环保建材有限公司，该公司承担了烧结砖原材料 WDC 的利用项目，年产 3000 万块烧结砖。

## Sampling procedure
此外，选择 1t WDC 作为功能单位，并按照功能单位计算所有原材料、辅助材料、能耗、运输和直接排放的输入参数。

## Use advice
在使用数据集进行生命周期评估(LCA)时，必须坚持将功能单元定义为1吨WDC。必须应用截断规则，允许在清单中排除重量占最终产品1%以下的低价值材料，比如粉煤灰。该数据针对中国四川省自贡市的烧结砖生产环境，应考虑地区和技术特点进行使用。用户应参考赵等人，2020年关于截断规则的方法学细节。

## Review details
清单： 内部审查通过几个迭代步骤完成，涉及原始数据验证、原始数据记录、代表性、完整性、与 ISO 14040 和 14044 有关的建模的一致性。

## Data sources
- Liu, W. et al. Comparative life cycle assessment of cement, sintered bricks and non-sintered bricks manufacturing using water-based drilling cuttings from shale gas production in the Sichuan Basin, China. J. Environ. Manage. 314, 115135 (2022).
