# Wet sand Production|Coarse Crushing|Jaw Crushing Technology

Dataset: ILCD process, Unit process, single operation
Geography: CS-HUN-CN
Reference year: 2020
Classification: Materials production / Other mineralic materials
Generated by: Cui hang, Cuihang0716@163.com
Review: Dependent internal review by Tiangong LCI Data Working Group
Amounts: no units in this file; such an amount is in the reference unit of its flow, which a separate flow dataset defines
copyright: false

## General comment
Primary crushing (jaw crushing) and screening

## Technology and included processes
Feed first, then jaw crusher crushing, after crushing into the vibrating screen screening, the obtained 2~4cm crushed stone through the conveyor belt into the finished product yard. Other parts after screening are sent to cone crusher (secondary crushing) through conveyor belt

## Reference product
- sand: 166667; measured
  经粗碎后产生的砂石

## Inputs
- gravel: 204400; measured
- electricity mix: 792; measured
  振动给料筛、颚式破碎机s所使用的电力

## Outputs
- gravel: 33333; measured
  经粗碎后产生的碎石
- Sludge: 1310; measured
  经粗碎后产生的污泥
- particles (> PM10): 8; measured
  生产过程中产生的粉尘颗粒

## Data selection and combination
The process and inventory data for wet sand are derived from empirical data provided by the project

## Review details
Inventory: The internal review was done by several iteration steps concerning raw data validation, raw data documentation, representativity, completeness and consistency of modelling with regard to ISO 14040 and 14044.; Documentation: The review of the documentation was performed by Ecobilan and is in compliance with ISO 14040 and 14044. The data set documentation is correct in view of the appropriateness of the information provided. It includes all relevant information in view of data quality and scope of application of the respective LCI result.

## Data sources
- 年产 60 万吨机制砂建设项目环评报告
