# 废聚对苯二甲酸乙二醇酯（PET）回收; 再生聚对苯二甲酸乙二醇酯; 机械回收; 废聚对苯二甲酸乙二醇酯

Dataset: ILCD process, Unit process, black box
Geography: TJ-CN
Reference year: 2016
Valid until: 2016
Classification: Unit processes / End-of-life treatment / Material recycling
Functional unit: 1 ton of waste Polyethylene terephthalate
Generated by: 程晓宇, xiaoyucheng@email.ncu.edu.cn
Owner: 天工LCI数据工作小组
Review: Dependent internal review by 天工LCI数据工作小组
Amounts: no units in this file; such an amount is in the reference unit of its flow, which a separate flow dataset defines
copyright: false
licenseType: Free of charge for all users and uses

## General comment
校准后，选择2016年的相应工艺数据来评估废塑料机械回收的环境影响。

## Geography
ZEDA位于天津西南部，是中国最大的可再生资源加工产业园区。

## Time period
文献中只说明是2016年。

## Technical purpose
本数据集描述的再生聚对苯二甲酸乙二醇酯（PET）通过机械回收后，用于生产各种塑料产品。该材料适用于需要低等级PET的应用，通常用于消费性包装、纺织纤维或建筑材料中。

## Reference product
- Waste Polyethylene terephthalate: 1000; input; measured

## Inputs
- Water for industrial use: 372; measured
- Electricity: 898.2; measured
- natural gas; 44.1 MJ/kg: 54.9; measured

## Outputs
All rows: measured
- particles (>PM10): 0.55
- non-methane volatile organic compounds: 0.38
- Suspended solids, unspecified,Suspended solids, unspecified: 0.0101
- chemical oxygen demand: 0.09048
- biological oxygen demand: 0.01522
- Ammonia Nitrogen: 0.00556
- Phosphorus: 0.00022
- Oils, unspecified: 0.0002
- waste water - untreated: 240
- General Solid Waste: 73.29
- Hazardous Solid Waste: 2.58
- Recycled Polyethylene Terephthalate Granules: 923.2

## Data selection and combination
2016年，再生塑料产量为327千吨，涵盖了所有主要塑料类别。

## Data treatment and extrapolations
校准

## Use advice
在使用此数据集进行生命周期评估时，请确保您的研究范围与2016年描述的废PET机械回收过程相匹配。考虑到地理位置和与中国天津市ZEDA工业园的技术相关性。请特别注意回收率和再生PET的纯度，因为这些因素可能显著影响环境影响评估。

## Review details
清单： 内部审查通过几个迭代步骤完成，涉及原始数据验证、原始数据记录、代表性、完整性、与 ISO 14040 和 14044 有关的建模的一致性。

## Data sources
- Chen, Y. et al. Life cycle assessment of end-of-life treatments of waste plastics in China. Resources, Conservation and Recycling 146, 348–357 (2019).
