# 煤炭露天开采;开采煤炭

Dataset: ILCD process, Unit process, black box
Geography: CN
Reference year: 2005
Classification: Energy carriers and technologies / Energetic raw materials
Generated by: 尹琳琳, yinlinlin0623@163.com
Owner: 天工LCI数据工作小组
Review: Dependent internal review by 天工LCI数据工作小组
Amounts: no units in this file; such an amount is in the reference unit of its flow, which a separate flow dataset defines
licenseType: Free of charge for all users and uses

## General comment
该数据集表示露天开采煤炭作业，主要用于在电力发电、钢铁生产、水泥制造和作为各种工业过程的原料中作为能源。当煤矿床接近地表时，露天采矿适用，与深层开采相比，可实现较低的提取成本和较少的采矿引起的土地沉降。

## Geography
2000年按《中国煤炭工业年鉴》统计的露天煤产量。露天煤矿无瓦斯灾害,无甲烷排放的实测数据。考虑到该类煤矿开采深度小,煤层瓦斯含量也较低, 在估算其甲烷排放系数时,取为全国国有重点煤矿低瓦斯矿井甲烷排放系数的二分之一。

## Technology and included processes
露天煤矿无瓦斯灾害,在估算其甲烷排放系数时,取为全国国有重点煤矿低瓦斯矿井甲烷排放系数的二分之一。

## Reference product
- Hard coal, at consumer EU-27: 4.061e10; uniform; software or database
  按《中国煤炭工业年鉴》的露天煤产量40.61Mt(2000年)。

## Outputs
- methane (fossil): 0.00165; uniform; estimated
  甲烷排放系数,2000年估测露天煤矿甲烷排放系数,取为全国国有重点煤矿低瓦斯矿井甲烷排放系数的二分之一,即每开采1kg的煤炭释放的甲烷体积。
- methane (fossil): 6.7e7; uniform; calculated
  2000年露天煤矿开采过程甲烷排放量。

## Use advice
在使用该数据集进行生命周期评估时，重要的是要考虑到甲烷排放系数是基于无瓦斯灾害的露天矿，并估计为国有重点煤矿低瓦斯矿井的一半。缺乏甲烷排放和灾害相关数据应在模拟环境影响时考虑在内，尤其是全球变暖潜力。对于影响评估的目的，还建议如果有更多近期数据，更新排放因子。

## Review details
清单： 内部审查通过几个迭代步骤完成，涉及原始数据验证、原始数据记录、代表性、完整性、与 ISO 14040 和 14044 有关的建模的一致性。
