# Pulping|Chemicalmechanicalpulp|Timber(broadleaf)|Chemical-mechanicalpulpmaking(withalkalirecovery)|All sizes / 制浆|化学机械浆|木材（阔叶木）|化机械法制浆（有碱回收）|所有规模

Dataset: ILCD process, Partly terminated system
Geography: CN
Reference year: 2019
Classification: Materials production / Other mineralic materials
Generated by: The data was created by the Office of the Second National Pollution Source Census of the Ministry of Ecology and Environment, and the data was organized by the TianGong Plan team for ILCD format / 生态环境部第二次全国污染源普查工作办公室创建数据，天工计划团队常慧敏整理数据为ILCD格式
Amounts: no units in this file; such an amount is in the reference unit of its flow, which a separate flow dataset defines
copyright: false

## Technology and included processes
the Technical of end-of-pipe management technology for pollution Chemi-mechanical pulpis/，The formula for calculating the actual operation rate (k-value) of the end-of-pipe treatment facility is k = operating time of waste gas treatment equipment (hours/year) / normal production time (hours/year)
污染物指标工业废水量的末端治理技术是/

## Reference product
- Chemi-mechanical pulp: 1000; calculated
  原文件中描述污染物类别为Product，污染物指标为化学机械浆，此处对其进行了匹配工作，将其匹配到LCAflow库里面相最符合的流

## Outputs
- Waste water: 2000; calculated
  原文件中描述污染物类别为废水，污染物指标为工业废水量，此处对其进行了匹配工作，将其匹配到LCAflow库里面相最符合的流
- chemical oxygen demand: 0.118475, 0.207162, 0.355425 (3 entries); calculated
  原文件中描述污染物类别为废水，污染物指标为化学需氧量，此处对其进行了匹配工作，将其匹配到LCAflow库里面相最符合的流

## Data sources
- 第二次全国污染源普查产排污核算系数手册（试用版）,二级代码22,三级代码221.0,四级代码2211文件，在完整版文件中第481页
