# 砖生产 ; 透水砖 ; 基层混合工艺

Dataset: ILCD process, Unit process, single operation
Geography: JNA-SD-CN
Reference year: 2018
Classification: Materials production / Other mineralic materials
Functional unit: The functional unit is the area of 1 m2 brick products.
Generated by: 王湘锦, r99rt4@163.com
Owner: 天工LCI数据工作小组
Review: Dependent internal review by 天工LCI数据工作小组
Amounts: no units in this file; such an amount is in the reference unit of its flow, which a separate flow dataset defines
licenseType: Free of charge for all users and uses

## General comment
所生产的透水砖主要用于铺设室外空间，包括人行道、广场等需要高水渗透性的区域，以支持有效排水和减少径流。它们作为城市基础设施和绿色建筑项目的功能性和环保铺装选项。

## Reference product
- brickbat aggregate: 104; measured
  基础混合材料

## Inputs
All rows: measured
- Rolling gravel: 76.54
- Water reducer: 0.309
- portland cement: 20.99
- Water (fresh water): 6.17
- electricity mix: 0.49248

## Outputs
- particles (PM10): 7.5e-5; measured

## Deviations from the LCI method approaches
本研究采用了 ReCiPe midpoint（H）模型。

## Data selection and combination
In this study, the production energy consumption of concrete pavement brick and permeable brick as well as the relevant data of all kinds of raw materials and energy input and exhaust emissions are collected from Jinan Shunde Cement Products Co. Ltd. Shandong Province.

## Sampling procedure
原材料、能源投入和废物排放的大部分数据都是从生产厂家的现场调查中收集的。减水剂，其化学成分是磺酸钠盐的甲醛缩合物

## Use advice
在使用混凝土路面砖和透水砖的生命周期评估（LCA）数据时，分析产品整个生命周期至关重要，包括原材料提取、生产、使用和处置阶段。特别需要关注在生产过程中所消耗的能源及其排放的包含或排除。同时，确保基层混合工艺在评估中得到准确表示也非常重要。在应用ReCiPe中点 (H) 模型时，用户必须严格遵循1平方米砖产品的功能单位，以保持比较评估的一致性。敏感性分析应考虑基于关键过程变化的输入和输出变化的5%变异。

## Review details
清单： 内部审查通过几个迭代步骤完成，涉及原始数据验证、原始数据记录、代表性、完整性、与 ISO 14040 和 14044 有关的建模的一致性。

## Data sources
- Yuan, X. et al. Environmental and economic impacts assessment of concrete pavement brick and permeable brick production process - A case study in China. Journal of Cleaner Production 171, 198–208 (2018).
