# coal mining | lifting out of the mine | storage of coal

Dataset: ILCD process, Unit process, single operation
Geography: CN
Reference year: 2005
Classification: Materials production / Other mineralic materials
Generated by: Linlin Yin, yinlinlin0623@163.com
Review: Dependent internal review by Tiangong LCI Data Working Group
Amounts: no units in this file; such an amount is in the reference unit of its flow, which a separate flow dataset defines

## Geography
The post-mine active gas emission refers to the amount of gas discharged during storage, transportation and stacking after the coal is lifted out of the mine, that is, the gas content remaining in the coal. Our country has conducted a special study on the residual gas content of coal in high gas and outburst mines. The residual gas content of coal with different metamorphic degrees is different.

## Technology and included processes
Post-mine activity gas emission : The amount of gas discharged during storage, transportation, and stacking after the coal is lifted out of the mine.

## Outputs
- methane (fossil): 0.003; uniform; article inperiodical
  排放因子,我国对高瓦斯和突出矿井煤的残存瓦斯量进行过专题研究,各种不同变质程度煤的残存瓦斯含量各有不同。瓦斯排放系数对于高变质无烟煤的高瓦斯和突出矿井取3ｍ3/t即3*10^-3m3/kg。
- methane (fossil): 0.0005; uniform; article inperiodical
  排放因子,矿后活动瓦斯排放量指煤炭提升运出矿井后在 储存、运输、堆放过程中排出的瓦斯量即残存于 煤中的瓦斯含量。我国对高瓦斯和突出矿井煤的残 存瓦斯量进行过专题研究各种不同变质程度煤的 残存瓦斯含量各有不同。低瓦斯和露天矿取0.5m3/t即0.5*10^-3m3/kg。

## Review details
Inventory: The internal review was done by several iteration steps concerning raw data validation, raw data documentation, representativity, completeness and consistency of modelling with regard to ISO 14040 and 14044.; Documentation: The review of the documentation was performed by Ecobilan and is in compliance with ISO 14040 and 14044. The data set documentation is correct in view of the appropriateness of the information provided. It includes all relevant information in view of data quality and scope of application of the respective LCI result.

## Data sources
- 1.程建军. 煤矿瓦斯排放现状及利用. 煤矿开采 24–26 (2007).
