# Sauceandmarinadeproducts,badmeatproducts,meatpine,driedmeat,driedmeat,bloodsausage,seasonedmeatproducts,meatcake|Rawmaterialmeat|Sauce pickling|All sizes / /|酱卤制品、糟肉制品、肉松、肉干、肉脯、血肠、调理肉制品、肉糕|原料肉|酱卤|所有规模

Dataset: ILCD process, Partly terminated system
Geography: CN
Reference year: 2019
Classification: Materials production / Other mineralic materials
Generated by: The data was created by the Office of the Second National Pollution Source Census of the Ministry of Ecology and Environment, and the data was organized by the TianGong Plan team for ILCD format / 生态环境部第二次全国污染源普查工作办公室创建数据，天工计划团队常慧敏整理数据为ILCD格式
Amounts: no units in this file; such an amount is in the reference unit of its flow, which a separate flow dataset defines
copyright: false

## Technology and included processes
the Technical of end-of-pipe management technology for pollution phosphorus, totalisPrecipitation separation + anaerobic biological treatment，Its Technical efficiency of end-of-pipe management20，The formula for calculating the actual operation rate (k-value) of the end-of-pipe treatment facility is k = opreating time of treatment facilities (days) / normal production time (days)
污染物指标总磷的末端治理技术是沉淀分离+厌氧生物处理法，其效率为20，末端治理设施实际运行率（k值）计算公式为k=污水治理设施耗电量（千瓦时/年）/污水治理设施运行时间（小时/年）/污水治理设施总功率（千瓦）

## Reference product
- Sauce Braised Products: 1000; calculated
  原文件中描述污染物类别为Product，污染物指标为酱卤制品、糟肉制品、肉松、肉干、肉脯、血肠、调理肉制品、肉糕，此处对其进行了匹配工作，将其匹配到LCAflow库里面相最符合的流

## Outputs
All rows: calculated
- Waste water: 18700
  原文件中描述污染物类别为废水，污染物指标为工业废水量，此处对其进行了匹配工作，将其匹配到LCAflow库里面相最符合的流
- chemical oxygen demand: 18.921, 15.1368, 15.1368, 11.3526, 4.73025, 0.94605, 0.75684, 4.73025, 9.4605 (9 entries)
  原文件中描述污染物类别为废水，污染物指标为化学需氧量，此处对其进行了匹配工作，将其匹配到LCAflow库里面相最符合的流
- Ammonia Nitrogen: 0.243, 0.2187, 0.2187, 0.1944, 0.03645, 0.0729, 0.0729, 0.1944, 0.0244 (9 entries)
  原文件中描述污染物类别为废水，污染物指标为氨氮，此处对其进行了匹配工作，将其匹配到LCAflow库里面相最符合的流
- Nitrogen, organic bound: 0.934, 0.8406, 0.8406, 0.7472, 0.5604, 0.7472, 0.2802, 0.1868, 0.5604 (9 entries)
  原文件中描述污染物类别为废水，污染物指标为总氮，此处对其进行了匹配工作，将其匹配到LCAflow库里面相最符合的流
- phosphorus, total: 0.307, 0.2763, 0.2763, 0.1842, 0.1842, 0.0614, 0.0921, 0.1842, 0.2456 (9 entries)
  原文件中描述污染物类别为废水，污染物指标为总磷，此处对其进行了匹配工作，将其匹配到LCAflow库里面相最符合的流

## Data sources
- 第二次全国污染源普查产排污核算系数手册（试用版）,四级代码1353文件，在完整版文件中第2557页
