# 碳酸锂生产 ; 电池级碳酸锂 ; 沉淀法 ; 智利阿塔卡马盐湖高浓卤水

Dataset: ILCD process, Unit process, single operation
Geography: CL
Reference year: 2018
Classification: Unit processes / Materials production / Inorganic chemicals
Generated by: 孙鑫, xs389@cornell.edu
Owner: 天工LCI数据工作小组
Review: Dependent internal review by 天工LCI数据工作小组
Amounts: no units in this file; such an amount is in the reference unit of its flow, which a separate flow dataset defines
licenseType: Free of charge for all users and uses

## General comment
历史上，锂一直产自智利安第斯山区的地下卤水，该地区被称为 "锂三角"，还包括玻利维亚和阿根廷的部分地区。全世界还有其他几个富含锂的卤水产地，每种卤水都有独特的化学成分，因此需要不同的工艺来分离出所需的最终产品（Wietelmann 和 Steinbild，2014 年）。本项生命周期评估考虑的是智利阿塔卡马沙漠中的卤水，即阿塔卡马盐湖。盐水经过浓缩，加工成电池级 Li2CO3 和 LiOH-H2O，然后运往世界各地加工成电池阴极材料，最终制成电池。

## Technology and included processes
在阿塔卡马盐湖作业区，有两条独立的途径：锂和钾盐分离。锂矿路线有两股钾流进入钾矿路线，而钾矿路线没有钾流返回锂矿路线。由于钾肥是整个系统的副产品，我们需要在建模中分配生产钾肥所消耗的能量。虽然我们主要关注锂生产途径的具体情况，但我们也会跟踪氯化钾（KCl）流向钾盐途径的情况。我们还需要分配锂生产商详细说明的与锂或钾肥生产无关的各种现场操作相关的能源和水。卤水被泵送到地面后，会流经几个池塘，最后以氯化锂卤水（锂浓度约为 6%）的形式排放。提取的卤水在池塘系统中管理约一年时间，同时水被陆续蒸发，锂被浓缩。在此过程中，各种盐类被从池塘中提取出来，这有利于去除盐水中的杂质，进一步提高锂的浓度。最后的盐水被运往转化为 Li2CO3。我们跟踪了氯化锂盐水和氯化钾的流向，它们是该系统的价值产品。生产商提供的专有信息说明了与流量相关的氯化钾数量。除了作为有价值副产品的氯化钾的流动外，系统中的锂与水和其他矿物质也会因系统渗透（即盐水流回地下）而损失。锂还会以盐水、收获盐和浸渍盐的形式储存在系统中。我们获得了 2018 年每个池塘的输入和输出流量数据，从而可以对这项生命周期评估工作进行流程级分析

## Technical purpose
该数据集描述了智利阿塔卡马盐湖高浓卤水沉淀法生产电池级碳酸锂的工艺。所产生的碳酸锂主要用于制造锂离子电池，这是电动车、便携式电子产品以及储能系统不可或缺的关键部件。

## Reference product
- Lithium carbonate,Lithium carbonate: 1000; measured

## Inputs
All rows: measured
- Concentrated brine (6% Li): 4000
- sodium carbonate: 2000
- hydrogen chloride: 40
- Sulfuric acid: 20
- Calcium Oxide: 10
- Extraction agent,extractant: 5
- Ethanol: 5
- Electricity: 1500
- Diesel: 400
- Natural gas, at consumer EU-27: 2800

## Outputs
- particles (PM10): 0.7; measured
- particles (PM2.5): 0.4; measured

## Use advice
使用本数据集进行生命周期评估时，请注意它并未包括原材料的生产流程以及占总流程少于1%的能源流。用户应在评估时考虑这些排除因素，并在必要时，用原材料生产和小量能源流的信息补充数据。应仔细关注数据集的方法论边界，确保与预定的LCA研究目标和范围的一致性。

## Review details
清单： 内部审查通过几个迭代步骤完成，涉及原始数据验证、原始数据记录、代表性、完整性、与 ISO 14040 和 14044 有关的建模的一致性。

## Data sources
- Kelly, J. C., Wang, M., Dai, Q. & Winjobi, O. Energy, greenhouse gas, and water life cycle analysis of lithium carbonate and lithium hydroxide monohydrate from brine and ore resources and their use in lithium ion battery cathodes and lithium ion batteries. Resources, Conservation and Recycling 174, 105762 (2021).
