# 净化后尾气;土壤原位修复;生物通风;尾气处理

Dataset: ILCD process, Unit process, single operation
Geography: CN
Reference year: 2022
Classification: Unit processes / Other Services / Repair and maintenance
Generated by: 杨欣桐, yangxt@caep.org.cn
Owner: 天工LCI数据工作小组
Review: Dependent internal review by 天工LCI数据工作小组
Amounts: no units in this file; such an amount is in the reference unit of its flow, which a separate flow dataset defines
copyright: false
licenseType: Free of charge for all users and uses

## General comment
采用活性炭罐进行尾气吸收，吸收净化后的尾气排放到大气中。

## Time period
文章投稿时间

## Technical purpose
该数据集描述的工艺包括使用活性炭罐吸收工业尾气。净化后，清洁的尾气会被排放到大气中。它是更广泛的土壤原位修复过程的一部分，特别是通过生物通风使用自然生物过程降解土壤中的有害污染物。这种尾气处理系统通常用于环境修复项目，在尾气可以安全排放之前必须净化污染物。

## Reference product
- Purified exhaust gas (produced by thermal desorption of 1 m3 soil): 1; measured

## Inputs
All rows: measured
- Exhaust gas: 1
- natural gas,natural gas: 15600
- Electricity: 864000
- Diesel,Diesel: 0.708, 0.698 (2 entries)
- Tap Water: 414

## Use advice
数据集用户应确保在土壤修复和活性炭吸收净化尾气的正确背景下应用数据。由于此过程涉及环境程序，根据当地环境法规和标准整合数据至关重要。应考虑活性炭罐的捕集效率和饱和点，并且应监测排放以确保处理后满足排放标准。如果存在不同的污染物或不符合生物通风修复实践的过程，该数据集可能不适用。

## Review details
清单： 内部审查通过几个迭代步骤完成，涉及原始数据验证、原始数据记录、代表性、完整性、与 ISO 14040 和 14044 有关的建模的一致性。

## Data sources
- 刘文晓等.基于修复效果的污染土壤修复工程环境足迹分析[J].环境科学研究 35,2367-2377（2022）.
