# Solar grade multi-Si ingot casting

Dataset: ILCD process, Unit process, single operation
Geography: CN
Reference year: 2017
Classification: Materials production / Other mineralic materials
Functional unit: In this paper, a 1 kWp solar PV system consisting of five 200 W modules made of 54 multi-Si cells, each with a size of 156*156 mm2 and 16% efficiency, was used as the primary study object
LCI method principle: Attributional
LCI method approaches: Allocation
Generated by: Jinfeng Yang, yjfzfshn@163.com
Review: Dependent internal review by Tiangong LCI Data Working Group
Amounts: no units in this file; such an amount is in the reference unit of its flow, which a separate flow dataset defines
copyright: false

## General comment
Multi-Si

## Geography
Environmental effects of China's solar photovoltaic industry during
2011e2016: A life cycle assessment approach

## Time period
Available online

## Technology and included processes
After the melt, solidifi-cation and anneal of solar grade multi-Si in quartz crucible, the ingot will be produced

## Reference product
- Multi-Si ingot: 5.6014; article inperiodical
  multi-Si ingot (Multi-Si ingot)

## Inputs
All rows: article inperiodical
- Solar grade multi-Si: 5.6519
- electricity: 199.968
  Electricity
- argon: 10.752
  Argon
- fluorine: 0.2599
  hydrofluoric acid (49%)
- sodium hydroxide: 0.0482
  Sodium hydroxide

## Outputs
- hydrogen fluoride: 0.0056; article inperiodical
  Hydrogen fluoride

## Deviations from the LCI method approaches
Building on the existing literature on LCA of China's solar PV
system (Fu et al., 2015; He, 2013; Hong et al., 2016; Li and Yu, 2014; Li and Chang, 2012; Liang, 2012; Yang et al., 2015; Yu et al., 2017; Xie et al., 2015), the LCI is obtained for this study.

## Review details
Inventory: The internal review was done by several iteration steps concerning raw data validation, raw data documentation, representativity, completeness and consistency of modelling with regard to ISO 14040 and 14044.; Documentation: The review of the documentation was performed by Ecobilan and is in compliance with ISO 14040 and 14044. The data set documentation is correct in view of the appropriateness of the information provided. It includes all relevant information in view of data quality and scope of application of the respective LCI result.

## Data sources
- Xu, L., Zhang, S., Yang, M., Li, W. & Xu, J. Environmental effects of China’s solar photovoltaic industry during 2011–2016: A life cycle assessment approach. Journal of Cleaner Production 170, 310–329 (2018).
