# ReactiveAdhesives|Polyurethane,epoxyresin,cyanoacrylate,modifiedacrylate,neoprenepolyacrylate,hardenerplasticizer,thinner,filler,auxiliary|Polymerization, physical mixing|All sizes / 反应型胶黏剂|聚氨酯、环氧树脂、氰基丙烯酸酯、改型丙烯酸酯、氯丁橡胶聚丙烯酸酯、固化剂增塑剂、稀释剂、填料、助剂|聚合反应、物理混合|所有规模

Dataset: ILCD process, Unit process, single operation
Geography: CN
Reference year: 2019
Classification: Materials production / Organic chemicals
Generated by: The data was created by the Office of the Second National Pollution Source Census of the Ministry of Ecology and Environment, and the data was organized by the TianGong Plan team for ILCD format / 生态环境部第二次全国污染源普查工作办公室创建数据，天工计划团队常慧敏整理数据为ILCD格式
Owner: Tiangong LCI Data Working Group / 天工LCI数据工作小组
Amounts: no units in this file; such an amount is in the reference unit of its flow, which a separate flow dataset defines
copyright: false
licenseType: Free of charge for all users and uses

## Technology and included processes
the Technical of end-of-pipe management technology for pollution volatile organic compoundisRegenerative thermal combustion method①，Its Technical efficiency of end-of-pipe management51

## Reference product
- Reactive Adhesive: 1000; calculated
  源文件中描述为为反应型胶黏剂，此处对其进行了匹配工作，将其匹配到LCAflow库里面相最符合的流，污染物指标备注为工业废气量

## Outputs
- Exhaust gas: 4300; calculated
  污染物指标工业废气量的末端治理技术是/，其效率为0。原文件中描述污染物类别为废气，污染物指标为工业废气量，此处对其进行了匹配工作，将其匹配到LCAflow库里面相最符合的流，污染物指标备注为工业废气量
- volatile organic compound: 0.5056; calculated
  污染物指标挥发性有机物的末端治理技术是吸附/催化燃烧法①，其效率为36，末端治理设施实际运行率（k值）计算公式为k=设施年耗电量（千瓦时）/设备设计耗电量（千瓦时），①指末端治理效率考虑了68%捕集效率
  。原文件中描述污染物类别为废气，污染物指标为挥发性有机物，此处对其进行了匹配工作，将其匹配到LCAflow库里面相最符合的流，污染物指标备注为挥发性有机物
- volatile organic compound: 0.6004; calculated
  污染物指标挥发性有机物的末端治理技术是光解①，其效率为24，末端治理设施实际运行率（k值）计算公式为k=设施年耗电量（千瓦时）/设备设计耗电量（千瓦时），①指末端治理效率考虑了69%捕集效率
  。原文件中描述污染物类别为废气，污染物指标为挥发性有机物，此处对其进行了匹配工作，将其匹配到LCAflow库里面相最符合的流，污染物指标备注为挥发性有机物
- volatile organic compound: 0.3871; calculated
  污染物指标挥发性有机物的末端治理技术是蓄热式热力燃烧法①，其效率为51，末端治理设施实际运行率（k值）计算公式为k=设施年耗电量（千瓦时）/设备设计耗电量（千瓦时），①指末端治理效率考虑了70%捕集效率
  。原文件中描述污染物类别为废气，污染物指标为挥发性有机物，此处对其进行了匹配工作，将其匹配到LCAflow库里面相最符合的流，污染物指标备注为挥发性有机物

## Data sources
- 第二次全国污染源普查产排污核算系数手册（试用版）,四级代码2669文件，在完整版文件中第4111页
