# 轴承的制造 ; 一个1.5 MW 风轮机的3个变桨轴承

Dataset: ILCD process, Unit process, single operation
Geography: NMG-CN
Reference year: 2017
Classification: Unit processes / Systems / Other machines
Functional unit: The functional unit is 1.5 MW wind turbine
LCI method principle: Attributional
LCI method approaches: Allocation
Generated by: 赵云志, ll10088@163.com
Owner: 天工LCI数据工作小组
Review: Dependent internal review by 天工LCI数据工作小组
Amounts: no units in this file; such an amount is in the reference unit of its flow, which a separate flow dataset defines
copyright: false
licenseType: Free of charge for all users and uses

## General comment
所制造的轴承专门用于1.5兆瓦风力发电机的变桨系统中。这些变桨轴承有助于调整叶片角度以优化风力涡轮机的性能，并且是风电场运行的关键组件，特别是位于风力发电容量高的省份——中国内蒙古东北部。

## Geography
风电功率参数的数据来自Wang ( 2012 )。以装有33台国产1.5兆瓦( MW )风电机组的风电场为案例，分析其环境影响及其替代效应。该风电场位于我国风电装机最多的省份- -内蒙古东北部。

## Reference product
- Rotors pitch bearing of wind turbine: 3; estimated

## Inputs
- iron: 3600; calculated
  Steel and iron

## Deviations from the LCI method approaches
风电的生命周期清单如下所示。生产制造阶段包括风电机组、变电站、电缆的生产，这些设备消耗大量能源，排放污染物( Xue et al . , 2015)。

## Use advice
使用此数据集时， 必须考虑风力发电的完整生命周期清单，该清单包括风电机组及其相关子系统（如变电站和电缆）的生产。需要评估生产阶段能源消耗和污染物排放的环境影响。此外，还应分析风电与传统能源相比的替代效应。应将Wang (2012)和Xue等人(2015)的研究成果整合到生命周期评估中，重点关注1.5兆瓦风力涡轮机及其子系统（如本研究所审查的变桨轴承）的生产和环境足迹。

## Review details
清单： 内部审查通过几个迭代步骤完成，涉及原始数据验证、原始数据记录、代表性、完整性、与 ISO 14040 和 14044 有关的建模的一致性。

## Data sources
- Li, H., Jiang, H.-D., Dong, K.-Y., Wei, Y.-M. & Liao, H. A comparative analysis of the life cycle environmental emissions from wind and coal power: Evidence from China. Journal of Cleaner Production 248, 119192 (2020).
