# Cobalt Sulfate Production | Battery Grade Cobalt Sulfate | Hydrometallurgy | Nickel-Copper-Cobalt Ore in Xinjiang Province

Dataset: ILCD process, Unit process, single operation
Geography: XJ-CN
Reference year: 2020
Classification: Materials production / Other mineralic materials
Generated by: Sun Xin, x.i.n.s@foxmail.com
Review: Dependent internal review by Tiangong LCI Data Working Group
Amounts: no units in this file; such an amount is in the reference unit of its flow, which a separate flow dataset defines

## Reference product
- Cobalt Sulfate: 1000; article inperiodical

## Inputs
All rows: article inperiodical
- industrial area: 22.23
- cobalt: 210
- transport in t*km: 1530.6
- sodium carbonate: 860
- Limestone: 50
- sodium hydroxide: 400
- Kerosene: 5.13
- Electricity: 41488.2
- Natural gas, at consumer EU-27: 71.11
- water: 104140
- Light fuel oil: 41.73
- steel rebar: 840
- Hard coal, at consumer EU-27: 2650
- to urban, discontinuously built: 1.32
- Isopropyl Ethyl Thionocarbamate: 2.57
- O-ethyl potassium carbonodithioate: 2.57
- Sodium hydrosulfide: 7.35
- Butylamine aerofloat: 8.75
- Sulfuric acid: 380
- hydrogen chloride: 1190
- Ammonia (28%): 7.6
- Ammonium bicarbonate: 240
- Calcium Oxide: 510
- Carboxymethyl cellulose: 10.3
- Butyl xanthate: 150
- Sodium Hydrosulphite: 110.91
- Sodium sulfide: 12.45
- Oxalic acid: 18.98
- Copper extractant: 1.01
- Disooctyl Phosphate (P204): 0.6
- 2-ethylhexyl hydrogen -2-ethylhexylphosphonate: 1.2

## Outputs
All rows: article inperiodical
- waste water - untreated: 14940
- municipal solid waste deposition: 4.39
- waste incineration of municipal solid waste (MSW): 1.06
- Suspended solids, unspecified: 0.04201
- chemical oxygen demand: 0.0733
- decane: 0.00413
- nickel: 0.00133
- arsenic: 0.00958
- mercury: 0.00029
- cobalt: 0.00038
- copper: 7e-5
- manganese: 0.00452
- zinc: 6e-5
- sulfide: 1e-5
- carbon dioxide: 71.66
- particles (PM10): 0.66
- sulfur dioxide: 0.00049
- nitrous oxide: 0.03939
- hydrogen chloride: 0.00167
- hydrogen sulfide: 5.42e-6

## Review details
Inventory: The internal review was done by several iteration steps concerning raw data validation, raw data documentation, representativity, completeness and consistency of modelling with regard to ISO 14040 and 14044.; Documentation: The review of the documentation was performed by Ecobilan and is in compliance with ISO 14040 and 14044. The data set documentation is correct in view of the appropriateness of the information provided. It includes all relevant information in view of data quality and scope of application of the respective LCI result.

## Data sources
- Zhang, T. et al. Cradle-to-gate life cycle assessment of cobalt sulfate production derived from a nickel–copper–cobalt mine in China. Int J Life Cycle Assess 26, 1198–1210 (2021).
