# 锂电池火法冶金技术

Dataset: ILCD process, Unit process, single operation
Geography: CN
Reference year: 2022
Classification: Unit processes / End-of-life treatment / Material recycling
Functional unit: Functional unit is a 12.717g used lithium battery
Generated by: 彭菲, pengfei24@email.ncu.edu.cn
Owner: 天工LCI数据工作小组
Review: Dependent internal review by 天工LCI数据工作小组
Amounts: no units in this file; such an amount is in the reference unit of its flow, which a separate flow dataset defines
copyright: false
licenseType: Free of charge for all users and uses

## General comment
火法冶金回收只需简单拆卸和排放废锂电池，并直接进行高温熔炼。通过添加熔渣形成剂和还原剂可获得钴、镍、铜和其他金属合金，而铝、锂和其他金属元素则进入熔渣中。

## Technology and included processes
通过煅烧去除有机粘结剂，使磷酸铁锂粉末与铝箔片分离，获得磷酸铁锂材料，之后再在其中加入适量原料，以得到所需的锂、铁、磷的摩尔比，经高温固相法合成新的磷酸铁锂。

## Technical purpose
本数据集所述的三元锂电池火法冶金技术用于废旧锂离子电池（LIBs）的回收。回收过程主要允许回收如钴、镍和铜等有价值的金属，这些金属通常在三元锂电池中发现。这些回收的金属用于生产新的电池单元及其他工业应用，这些应用需要高纯度的金属合金。

## Reference product
- spent LIBs: 0.012717; input; measured
  废旧锂电池

## Inputs
All rows: measured
- sodium hydroxide: 2.92
- Coke powder: 1.1
  焦粉
- Limestone: 1
- Slag: 1
  排渣剂
- Electricity: 24.012

## Outputs
All rows: measured
- particles (> PM10): 8.03e-5
- Fly ash: 4.38e-6
  粉煤灰
- sulphuric acid: 0.025
- hydrogen chloride: 0.0167
- sulfur dioxide: 2e-5
- Carbon dioxide (fossil): 2.03
  原文未区分bio和fossil，根据专家判断此处为fossil
- Nickel and Cobalt Alloy: 3.69
  镍钴合金

## Use advice
此数据集适用于评估电池回收过程环境影响的生命周期评估从业人员。使用数据时，确保在高温冶炼过程之前考虑废旧锂电池的简化拆卸和排放阶段。对与冶炼操作及后续金属分离和精炼相关的能源和排放的包括或排除应进行关键评估。同样重要的是要计算进入熔渣的金属（如铝、锂等）的去向，它们的潜在环境影响，以及任何熔渣处理或处置的考量。

## Review details
清单： 内部审查通过几个迭代步骤完成，涉及原始数据验证、原始数据记录、代表性、完整性、与 ISO 14040 和 14044 有关的建模的一致性。

## Data sources
- Lai, X. et al. Critical review of life cycle assessment of lithium-ion batteries for electric vehicles: A lifespan perspective. eTransportation 12, 100169 (2022).
