# Molten iron production|Molten iron|BF(Z08)

Dataset: ILCD process, Unit process, single operation
Geography: CN
Reference year: 1998
Classification: Materials production / Other mineralic materials
Generated by: Fuxiang, 1162850692@qq.com
Review: Dependent internal review by Tiangong LCI Data Working Group
Amounts: no units in this file; such an amount is in the reference unit of its flow, which a separate flow dataset defines
copyright: false

## General comment
来自表 4-16 Z08 钢厂生产吨材环境负荷编目表

## Time period
论文提到钢铁企业环境总体数据为1998年的吨钢环境基础数据。

## Reference product
- Molten Iron: 1061; measured
  铁水

## Inputs
All rows: measured
- Energy, geothermal, converted: 15068.8
- water: 33556
- Sinter: 1869
  烧结矿
- Metallurgical ash: 57.2
  冶金白灰
- Coke: 635.5
  焦炭

## Outputs
All rows: measured
- Dust (unspecified, from stack): 0.095
  烟尘
- Dust (unspecified, from stack): 1.856
- sulfur dioxide: 0.013
- cyanide: 5.9e-5
- phenol: 3.2e-5
  挥发酚
- Hydrocarbons, aliphatic, alkanes, unspecified: 0.013652
  石油类
- Suspended solids, unspecified: 0.263149
- chemical oxygen demand: 0.14262
- Dust (unspecified, from stack): 49.612
  集尘
- Spoil (deposited, hibernating in ground, non elementary flow): 658.032

## Review details
Inventory: The internal review was done by several iteration steps concerning raw data validation, raw data documentation, representativity, completeness and consistency of modelling with regard to ISO 14040 and 14044.; Documentation: The review of the documentation was performed by Ecobilan and is in compliance with ISO 14040 and 14044. The data set documentation is correct in view of the appropriateness of the information provided. It includes all relevant information in view of data quality and scope of application of the respective LCI result.

## Data sources
- 1. 周和敏. 钢铁材料生产过程环境协调性评价研究. (北京工业大学, 2001).
