# 废聚乙烯（PE）回收; 再生聚乙烯; 机械回收; 废聚乙烯

Dataset: ILCD process, Unit process, black box
Geography: TJ-CN
Reference year: 2016
Valid until: 2016
Classification: Unit processes / End-of-life treatment / Material recycling
Functional unit: 1 ton of waste polyethylene
Generated by: 程晓宇, xiaoyucheng@email.ncu.edu.cn
Owner: 天工LCI数据工作小组
Review: Dependent internal review by 天工LCI数据工作小组
Amounts: no units in this file; such an amount is in the reference unit of its flow, which a separate flow dataset defines
copyright: false
licenseType: Free of charge for all users and uses

## General comment
校准后，选择2016年的相应工艺数据来评估废塑料机械回收的环境影响。

## Geography
ZEDA位于天津西南部，是中国最大的可再生资源加工产业园区。

## Time period
文献中只说明是2016年。

## Technical purpose
通过废聚乙烯的机械回收获得的再生聚乙烯可用于制造塑木、容器及新的包装材料等各种应用。注重机械回收过程能确保聚乙烯保持适合这些应用的性质，通过物质回收支持循环经济。

## Reference product
- Waste Polyethylene: 1000; input; measured

## Inputs
- Water for industrial use: 388; measured
- Electricity: 920.52; measured
- natural gas; 44.1 MJ/kg: 54.3; measured

## Outputs
All rows: measured
- particles (>PM10): 0.52
- non-methane volatile organic compounds: 0.26
- Suspended solids, unspecified,Suspended solids, unspecified: 0.01089
- chemical oxygen demand: 0.08536
- biological oxygen demand: 0.01334
- Ammonia Nitrogen: 0.00427
- Phosphorus: 0.00031
- Oils, unspecified: 0.0002
- waste water - untreated: 286
- General Solid Waste: 78.02
- Hazardous Solid Waste: 4.21
- Recycled Polyethylene Granules: 917

## Data selection and combination
2016年，再生塑料产量为327千吨，涵盖了所有主要塑料类别。

## Data treatment and extrapolations
校准

## Use advice
使用ZEDA废聚乙烯机械回收过程的数据集时，请注意数据是针对2016年的工艺。如果将数据应用于其他时间段，应考虑校准。环境影响评估应包含报告中提到的所有主要塑料类别。建议考虑技术进步及随时间可能发生的材料属性变化，当利用这些数据进行未来预测时。

## Review details
清单： 内部审查通过几个迭代步骤完成，涉及原始数据验证、原始数据记录、代表性、完整性、与 ISO 14040 和 14044 有关的建模的一致性。

## Data sources
- Chen, Y. et al. Life cycle assessment of end-of-life treatments of waste plastics in China. Resources, Conservation and Recycling 146, 348–357 (2019).
