# 日光温室茄子生产 ; 农资生产(综合)

Dataset: ILCD process, Unit process, single operation
Geography: HD-HEB-CN
Reference year: 2002
Valid until: 2017
Classification: Materials production / Agricultural production means
Functional unit: 1T eggplant
Generated by: 张浩然, hrzhang@whu.edu.cn
Owner: 天工LCI数据工作小组
Review: Dependent internal review by 天工LCI数据工作小组
Amounts: no units in this file; such an amount is in the reference unit of its flow, which a separate flow dataset defines
copyright: false
licenseType: Free of charge for all users and uses

## General comment
实验采用的日光温室为拱圆式，长 60 m、宽 7 m． 温室内多种蔬菜轮作( 每年两茬) ，本研究茄 子生长 于 每 年 3 ～ 8 月，进 行 了 为 期 4 a ( 2013 ～ 2016 年) 的实验． 实验设 3 个处理 ①常规模式: 采 用当地农民传统的温室管理模式，主要施用化肥， 少量施用有机肥，病虫害的防治以化学防治为主; ②综合模式: 所施有机肥和化肥用量分别为有机和 常规模式施用量的 50% ，病虫害防治主要用生物防 治方法，严重时用低毒低残留的化学农药进行处 理; ③有机模式: 按照有机蔬菜生产标准，只施用 有机肥( 堆肥和鸡粪) ，不使用化肥和农药，病虫害 防治以农业措施和物理防治为主 ( 如使用黄板诱 杀、防虫网等) ． 综合和有机模式施氮量同常规模 式均为同一水平，各处理灌水情况一致，灌溉方式 为大水漫灌( 表 1)

## Geography
曲周

## Time period
设施蔬菜长期定位实验于2002年3月开始

## Technology and included processes
本实验采用的日光温室为拱圆式, 长60 m、宽7 m.温室内多种蔬菜轮作 (每年两茬) , 本研究茄子生长于每年3~8月, 进行了为期4 a (2013~2016年) 的实验.实验设3个处理：常规、综合、有机

## Technical purpose
此数据集重点关注在温室蔬菜生产中应用不同处理方法（常规、综合和有机）对茄子生长的影响。在60米长，7米宽的拱圆式温室内，每年对不同的蔬菜作物进行两次轮作，特别是在四年的研究周期中，每年3月至8月期间培育茄子。该数据可以为中国乃至其他从事类似生产技术地区的农业最佳实践和可持续性评估提供信息。

## Reference product
- eggplant: 1000; calculated
  综合

## Inputs
- Electricity: 633.58; calculated
  综合
- water: 0.9177; calculated
  综合

## Outputs
All rows: calculated
- Hydrocarbons, aliphatic, alkanes, unspecified: 0.0055
  综合
- carbon monoxide: 0.0221
  综合
- carbon dioxide (fossil): 46.82
  综合
- ammonium: 0.0418
  综合
- nitrous oxide: 0.0008
  综合
- Nitrogen oxides: 0.1826
  综合
- sulfide: 0.1472
  综合
- methane: 0.0226
  综合
- phosphorus, total: 0.0045
  综合
- Ammonia (NH4+, NH3, as N): 0.0789
  综合
- chemical oxygen demand: 0.4015
  综合
- cadmium: 3.98e-8
  综合
- lead-210: 6.21e-7
  综合
- copper: 3.11e-7
  综合
- zinc: 1.55e-6
  综合

## Deviations from the LCI method approaches
生命周期评价包括以下 4 个步骤: 目标定义与范围界定、清单分析、影响评价和结果解释． 下面对主要步骤进行简要描述

## Data selection and combination
清单分析包括数据的收集和对数据进行量化处理． 农资生产子系统中化肥、有机肥、杀虫剂、地膜和柴油等生产的污染物排放( 包括CO、CO2、NOx、SO2、CH4、N2O和COD 等) 及能源消耗等计算参考梁龙［22］的研究结果．

## Data treatment and extrapolations
氧化亚氮的收集采用静态箱法［19］，测定采用Agilent 7890A 型气相色谱仪． 土壤硝态氮( NO3－ -N和总磷淋溶采用自流式农田地下淋溶收集装置，每次灌溉后 3 ～ 5 d 内用抽水器抽取渗漏液，用流动分析仪( TＲAACS2000 ) 测定． 有机肥中重金属含量( 主要考虑 Cu、Zn、Pb 和 Cd) 的浸提采用硝酸-盐酸-氢氟酸消煮法，待测液用 ICP-MS 测定． 作物收获时，对每次采摘果实进行称量和记录，取 3 次平均值． 各指标的详细测定过程参见文献［

## Use advice
在使用此数据集进行生命周期评估时，请注意定义的系统边界从摇篮到农场大门。这包括农资生产子系统，农作生产子系统和运输子系统。排除与基础设施建设、农用机械生产、蔬菜消费和废物排放相关的过程。特别关注数据收集和测量的方法细节，例如用于收集氧化亚氮的静态箱法、土壤养分的自由流淋溶和有机肥料中重金属的ICP-MS方法。确保正确引用库存分析中提供的文献研究结果，特别是梁龙 [22] 和 [19] 中提供的详细测量过程。

## Review details
清单： 内部审查通过几个迭代步骤完成，涉及原始数据验证、原始数据记录、代表性、完整性、与 ISO 14040 和 14044 有关的建模的一致性。

## Data sources
- 徐强,胡克林,李季等.华北平原不同生产模式设施蔬菜生命周期环境影响评价[J].环境科学,2018,39(05):2480-2488.
