# Coking|Coke|Coking|CDQ(CWQ)

Dataset: ILCD process, Unit process, single operation
Geography: CN
Classification: Materials production / Other mineralic materials
Generated by: Fuxiang, 1162850692@qq.com
Review: Dependent internal review by Tiangong LCI Data Working Group
Amounts: no units in this file; such an amount is in the reference unit of its flow, which a separate flow dataset defines
copyright: false

## Geography
The data of the BF-BOF pathway were obtained from the large-scale integrated steel plants in China with an attached coking plant and EAF plant.

## Reference product
- Coke: 342.6; measured

## Inputs
All rows: measured
- Water (fresh water): 400
- Circulating water: 100
- process steam: 50.7
- compressed air: 3.5
- Coke oven gas: 7.4
  COG
- Blast furnace gas: 290.6
  BFG
- sulphuric acid: 2.9
- Cleaned coal: 384.2
  Clean coal
- Electricity: 43.2

## Outputs
- Coke oven gas: 152.6; measured
  COG
- tar: 13.8; measured
- sulfur: 0.4; measured
- benzene: 3.8; measured

## Review details
Inventory: The internal review was done by several iteration steps concerning raw data validation, raw data documentation, representativity, completeness and consistency of modelling with regard to ISO 14040 and 14044.; Documentation: The review of the documentation was performed by Ecobilan and is in compliance with ISO 14040 and 14044. The data set documentation is correct in view of the appropriateness of the information provided. It includes all relevant information in view of data quality and scope of application of the respective LCI result.

## Data sources
- The carbon reduction potential of hydrogen in the low carbon transition of the iron and steel industry: The case of China
