# 铝电解 ; 液态原铝 ; 铝合金轮毂制造工艺 ; 冶金用氧化铝

Dataset: ILCD process, Unit process, single operation
Geography: CN
Reference year: 2018
Classification: Unit processes / Materials production / Metals and semimetals
Generated by: 傅晨玲, fu-chenling@tsinghua.edu.cn
Owner: 天工LCI数据工作小组
Review: Dependent internal review by 天工LCI数据工作小组
Amounts: no units in this file; such an amount is in the reference unit of its flow, which a separate flow dataset defines
copyright: false
licenseType: Free of charge for all users and uses

## General comment
电解铝 ; 铝合金轮毂制造工艺

## Time period
文献发表日期

## Technical purpose
该数据描述的技术应用涉及铝合金车轮的制造过程。通过冶金用氧化铝的电解得到的液态原铝用于生产铝合金车轮，这是汽车制造中的关键组件。生产的车轮因其强度与重量比、耐腐蚀性以及美观性在各类车辆中被广泛使用。

## Reference product
- aluminium, primary, liquid: 55.5; missing unimportant

## Inputs
All rows: missing unimportant
- Carbon anode: 52.95
- aluminium oxide, metallurgical: 108.2
  Alumina
- cryolite: 0.66
  Cryolite
- aluminium fluoride: 0.93
  Aluminum fluoride
- Magnesium fluoride: 0.15
- other fluorides: 0.19
  Other fluorides

## Outputs
All rows: missing unimportant
- Nitrogen oxides: 3.69
- methane (fossil): 1.98
- hydrogen fluoride: 0.94
  HF
- carbon dioxide (fossil),carbon dioxide (fossil): 677.1
- carbon monoxide (fossil),carbon monoxide (fossil): 19.26
- sulfur dioxide: 4.17
- FC-14: 0.02
  CF4
- hexafluoroethane: 0.002
  C2F6
- particles, unspecified: 4.87

## Use advice
在使用此数据集进行生命周期评估（LCA）时，务必确保清晰界定铝合金轮毂制造过程的边界，包括电解阶段的电力消耗和任何潜在排放。应注意在生产过程中环境影响的分配，以及铝合金轮毂的末端生命周期回收能力。确保考虑行业特定使用模式和技术适用性，特别是与电解过程中使用的冶金级氧化铝有关。

## Review details
清单： 内部审查通过几个迭代步骤完成，涉及原始数据验证、原始数据记录、代表性、完整性、与 ISO 14040 和 14044 有关的建模的一致性。

## Data sources
- Yi Qiu-ping & Tang Chang-ping. Environmental impact assessment of magnesium alloy automobile hub based on life cycle assessment. JOURNAL OF CENTRAL SOUTH UNIVERSITY 25, 1870–1878 (2018).
