# 电池铝壳生产 ; 电池铝壳 ; 摇篮

Dataset: ILCD process, Unit process, black box
Geography: HEN-CN
Reference year: 2019
Classification: Unit processes / Materials production / Metals and semimetals
Generated by: 谢金良, jinliang.research@gmail.com
Owner: 天工LCI数据工作小组
Review: Dependent internal review by 天工LCI数据工作小组
Amounts: no units in this file; such an amount is in the reference unit of its flow, which a separate flow dataset defines
copyright: false
licenseType: Free of charge for all users and uses

## General comment
此过程中生产的电池铝壳主要用于电池组装。它的应用主要在于保护和容纳电池单元，确保电池动力设备（如电子产品、电动车辆和固定能源储存系统）内的结构完整性和热管理。

## Time period
论文发表年

## Reference product
- Aluminum housing: 1; measured

## Inputs
- transport, freight, lorry 16-32 metric ton, unregulated: 0.186; measured
  Lorry, 30t
- electricity, high voltage, aluminium industry: 0.54; measured
  Electricity
- aluminium: 1.01; measured
  Aluminum，居然没有flow？

## Use advice
用户在评估中应考虑电池铝壳的完整生命周期，从原材料提取到制造，以及潜在的生命周期末端回收过程。应关注数据的地理相关性、技术适用性以及与论文发表年份的时间对齐。如果考虑回收，应明确定义回收所带来的益处或负担的核算方法，并一致应用。

## Review details
清单： 内部审查通过几个迭代步骤完成，涉及原始数据验证、原始数据记录、代表性、完整性、与 ISO 14040 和 14044 有关的建模的一致性。

## Data sources
- Yin, R., Hu, S. & Yang, Y. Life cycle inventories of the commonly used materials for lithium-ion batteries in China. J. Clean. Prod. 227, 960–971 (2019).
