# 钻井阶段--钻井流程

Dataset: ILCD process
Geography: SC-CN
Reference year: 2014
Valid until: 2016
Classification: Materials production / Other mineralic materials
Generated by: 洪溥, 15695258655@163.com
Review: Dependent internal review by 天工LCI数据工作小组
Amounts: no units in this file; such an amount is in the reference unit of its flow, which a separate flow dataset defines

## Geography
我国页岩气开采工作目前集中在四川及重庆地区，选取四川及重庆的数据进行LCA计算。

## Time period
原始数据时间介于2014-2016之间

## Inputs
All rows: uniform; article inperiodical
- freshwater: 627000; min 849000; max 330000
  水基、油基钻井液组成部分
- Diesel: 330; min 432; max 267
  油基钻井液组成部分
- bentonite: 21000; min 30000; max 12000
  油基钻井液组成部分
- Limestone: 42000; min 54000; max 34000
  油基钻井液组成部分
- calcium chloride: 61000; min 80000; max 50000
  油基钻井液组成部分
- Diesel: 395000; min 522000; max 220000
  驱动钻井设备
- Diesel: 2596; min 3642; max 1453
  物料运输

## Review details
清单： 内部审查通过几个迭代步骤完成，涉及原始数据验证、原始数据记录、代表性、完整性、与 ISO 14040 和 14044 有关的建模的一致性。

## Data sources
- Wang, J., Liu, M., McLellan, B. C., Tang, X. & Feng, L. Environmental impacts of shale gas development in China: A hybrid life cycle analysis. Resources, Conservation and Recycling 120, 38–45 (2017).
