# 市政污泥处理与处置;干污泥;压滤脱水

Dataset: ILCD process, Unit process, single operation
Geography: CN
Classification: Unit processes / End-of-life treatment / Waste water treatment
Functional unit: One ton of sludge on a dry basis (1 t-DS) is defined as the functional unit.
Generated by: 金思甜, 2331276@tongji.edu.cn
Owner: 天工LCI数据工作小组
Review: Dependent internal review by 天工LCI数据工作小组
Amounts: no units in this file; such an amount is in the reference unit of its flow, which a separate flow dataset defines
copyright: ['opt4ROkqig']
licenseType: Free of charge for all users and uses

## General comment
选择国内几个典型的污泥处理设施，分别为厌氧消化、堆肥、共燃、热干燥焚烧和水泥生产，进行调查。数据主要来自具体地点的测量，要么通过实地调查，要么通过操作报告。污泥特性基于所调查场地的平均值。

## Technology and included processes
用带式过滤机脱水。加入高分子絮凝剂(聚丙烯酰胺，PAM)提高脱水能力，含水率进一步降低至78%。

## Technical purpose
该数据集代表了市政污泥处理和处置的过程。通过压滤脱水获得的干污泥可用于多种应用，如园林绿化、建筑材料以及农田土壤改良剂。它专门设计用于处理一吨干污泥（1 t-DS）作为功能单位的场景。

## Reference product
- Sludge: 1000; input; estimated
  干基 （1 t-DS）

## Inputs
- Electricity: 175.68; measured
- Polyacrylamide: 5; measured
  PAM(kg/t DS)

## Use advice
使用此数据集时，数据使用者应注意适用于脱水市政污泥处置和利用的具体地区规定和环境标准。确保在生命周期评估模型中使用正确的功能单位（1 t-DS），并考虑与时间框架、规模和当地处理技术相关的工艺的技术适用性。

## Review details
清单： 内部审查通过几个迭代步骤完成，涉及原始数据验证、原始数据记录、代表性、完整性、与 ISO 14040 和 14044 有关的建模的一致性。

## Data sources
- Dong, J., Chi, Y., Tang, Y., Wang, F. & Huang, Q. Combined Life Cycle Environmental and Exergetic Assessment of Four Typical Sewage Sludge Treatment Techniques in China. Energy Fuels 28, 2114–2122 (2014).
