# The production of a solid wood composite door | Use the straw-density board and hydroelectric power generation

Dataset: ILCD process, Unit process, single operation
Geography: JS-CN
Reference year: 2023
Valid until: 2043
Classification: Materials production / Other mineralic materials
LCI method principle: Attributional
LCI method approaches: Allocation
Generated by: Wanyue Tan, tanwanyue@foxmail.com
Review: Dependent internal review by Tiangong LCI Data Working Group
Amounts: no units in this file; such an amount is in the reference unit of its flow, which a separate flow dataset defines
copyright: false

## General comment
The large scale of the Chinese wooden door market has resulted in a slew of environmental issues that must be addressed. This paper evaluated a solid wood composite door using life cycle assessment (LCA).

## Geography
The research object of this study is a solid wood composite door used in residential interiors. Field research was conducted at a large-scale wooden door manufacturer in Jiangsu Province, China, to obtain production data.

## Time period
The service life of wooden doors can range from about 5 to 20 years, depending on the manufacturer and the current situation.

## Technology and included processes
The entire life cycle of a wooden door has been divided into three stages that have been separately analyzed, namely the production stage, the use stage, and the disposal stage. The production stage of this study consists of four sub-stages: the raw material stage, the transportation stage, the woodworking shop stage, and the painting shop stage. The wood wax oil required to maintain the doors, the electricity required for drying, and the first level of transportation costs are the main inputs in the use stage of wooden doors. Three scenarios were considered in this study to determine the best disposal methods: recycling, 100% landfill, and 100% incineration.
To find a more environmentally friendly production mode, the common density board was replaced with the straw-density board, and the power supply method of thermal power generation was replaced with hydroelectric power generation.

## Reference product
- solid wood composite door: 1; measured
  The functional unit is a solid wood composite door in the paper.

## Inputs
- medium density fiberboard: 0.047456; measured
  This is the input flow called common density boards in the paper.
- lumber core plywood: 12.51; measured
  This is the input flow called lumber core plywood in the paper.
- plywood: 0.02832; measured
  This is the input flow called Common plywood in the paper.
- Polyvinyl acetate: 1.2638; measured
  This is the input flow called Polyvinyl acetate (PVAc) in the paper.
- primer: 0.82; measured
  This is the input flow called Waterborne primer in the paper.
- Wood top-coat: 1.7; measured
  This is the input flow called Waterborne top-coat in the paper.
- wood veneer: 1.2; measured
  This is the input flow called Wood veneer in the paper.
- wood; 14.7 MJ/kg: 0.0103675; measured
  The "wood 14.7 MJ/kg" is selected here, which substitutes for the solid wood strips in the paper.
- corrugated board boxes: 5.74; measured
  The "corrugated board boxes" are selected here, which substitute for the Corrugated paper packaging in the paper.
- transport in t*km: 10.3245, 36.2248, 1.34 (3 entries); article inperiodical
- Electricity: 138.096, 0.52, 0.108 (3 entries); article inperiodical
- Water for industrial use: 1.0044; article inperiodical
  The "water for industrial use" is selected here, which substitutes for "Tap water" in the paper.
- wood wax oil: 20; measured
  This is the output flow called wood wax oil in the paper.
- landfill of wood products (OSB, particle board): 67.21; article inperiodical
  The landfill of wood products (OSB, particle board) is selected here, which substitutes for the landfill of wooden door in the paper.

## Data selection and combination
Foreground data are primarily obtained through field research in a large-scale wooden door factory, with the remainder obtained through EIA reports, industry yearbooks, and scientific literature.

## Review details
Inventory: The internal review was done by several iteration steps concerning raw data validation, raw data documentation, representativity, completeness and consistency of modelling with regard to ISO 14040 and 14044.; Documentation: The review of the documentation was performed by Ecobilan and is in compliance with ISO 14040 and 14044. The data set documentation is correct in view of the appropriateness of the information provided. It includes all relevant information in view of data quality and scope of application of the respective LCI result.

## Data sources
- Deng, N., Wang, J., Sun, J. & Cao, N. Life cycle assessment and optimization scenario of solid wood composite doors: A case study in the east of China. Science of The Total Environment 868, 161494 (2023).
