# 养猪生产 ; 适度规模专业户

Dataset: ILCD process, Unit process, single operation
Geography: SC-CN
Reference year: 2006
Classification: Unit processes / Materials production / Agricultural production means
Functional unit: In this study, the functional unit (FU) was defined as "1kg pig carcass", which included skin, bone and fat. Foreign studies generally only considered lean meat, but in China's consumption mode, skin and viscera were also fully utilized as edible foods. The concept of carcass was adopted in this study. Although the bone included in this study is an inedible part, it can play a certain compensative role because it does not contain internal organs. In addition, the current data can be easily converted into carcass weight, so it is more in line with the actual situation.
Generated by: 杨瑞, 1632707028@qq.com
Owner: 天工LCI数据工作小组
Review: Dependent internal review by 天工LCI数据工作小组
Amounts: no units in this file; such an amount is in the reference unit of its flow, which a separate flow dataset defines
copyright: false
licenseType: Free of charge for all users and uses

## General comment
丘陵区和平原区专业户适度规模饲养。提供了大约19%的商品猪,在四川养猪业中起着主要的调节作用。这种养猪情景的主要情景状态和设定参数为 ①50%能量饲料为本省玉米为主的谷物，蛋白饲料以购买浓缩饲料为主；另外50%饲料购买全价配合饲料。饲养期160d左右，出栏平均重量为80kg； ② 专业户养猪数量随着市场变化波动很大，本研究假设平均出栏数为100头/年·户。品种70%为洋二杂猪（两品系外种猪间杂交后代），屠宰率75%，30%为洋三元（如DLY), 屠宰率76%,全程料肉比3.2:1 ;③饲养管理:比较注重饲料合理配制,但环境管理 较差;④粪便处理及利用:未进行处理,40%还田(长期存贮量占8%),60%排放到周边环境,排出水COD为400mg/L。

## Geography
粪水量数据来自对川东、川北和四川西南盆地周边区个典型性散养农户的调查

## Technology and included processes
包括原料生产、运输和养猪生产过程，但没有包括猪的屠宰、加工及包装、运输过程。没有包括养猪设备、机械和建筑方面，对小于总量5%或环境关联性小的材料进行了剔除。药品的生产、使用和污染排放没有考虑。鱼粉和氨基酸生产没考虑

## Technical purpose
本数据集描述了四川丘陵与平原地区适度规模的专业养猪户，大约占该地区商业猪产量的19%。养殖重点是洋二杂猪和三元杂交猪，注重饲料配比，但对环境管理重视不足。猪主要以当地玉米为基础的粮食和购买的浓缩饲料及全价配合饲料喂养。标准养殖周期约160天，平均末重为80公斤，每户年均养殖产出约100头猪。该数据用于提供专业户在四川养猪业中的调节作用、饲料配比实践、粪便管理（包括未处理粪肥排放）以及地区养猪活动波动等方面的见解。

## Reference product
- pig: 1; measured
  猪肉

## Inputs
- Electricity: 0.744828; calculated
  情景B

## Outputs
- ammonia: 0.0175917; measured
  情景B
- nitrous oxide: 0.0003837
  情景B
- methane (biogenic): 0.037618; calculated
  情景B

## Deviations from the LCI method approaches
本研究采用LCA方法学和情景分析法相结合的方式对四川三种典型的养猪生产 情景进行系统的环境影响评估，探索这种分析方法应用于当前养猪生产环境影响评估 时的具体算法，并揭示各种养猪生产系统中的环境友好和不利方面以及其不可更新能 源利用效率。研究结果有助于对养猪业环境影响态势的认识，并为养猪可持续发展模 式的建立提供参考。

## Data selection and combination
各种情景下的养猪生产过程的污染排放清单中，主要分析粪便和尿液养分的产生量及主要的温室气体产生量，对恶臭气体、噪声和病原体的环境污染，因目前缺少其 对健康的影响潜势方面的量化数据，没有进行分析。动物生产过程的废物排放参考近年的研究文献，结合调查中收集的数据进行校正，以基本反映四川实际。其中，NH3的排放量估计是综合了多个文献的研究成果

## Data treatment and extrapolations
1）由于各地养猪模式十分复杂，无法在同类模式中取得完全一致的数据，因此根据相关文献、年鉴和设定情景间与环境污染有关的主要差异，在剔除可疑数据的基础上计算出同类情景中的平均数据。2）动物生产过程的废物排放数据来源有两类，一类是直接由调查和文献中得到，另一类是根据文献资料反推得到。为保证数据质量，对部分偏离均值较大的生产中实际产生量数据进行了试验验证和专家咨询，并通过多种途径的文献互相参照比较进行校正。

## Use advice
该数据在评估养猪生产的环境影响时应谨慎使用，需要考虑排除猪的屠宰、加工和运输阶段等方法论选择和边界。请注意，数据未考虑养猪的设备、机械和建筑的生命周期影响，也未包括药品等重要程度较低的材料或污染物的影响，以及排除了鱼粉和氨基酸生产。在使用数据进行LCA或情景分析时，存在多源数据和偏差处理机制以确保数据质量。应特别注意废物排放数据和排放估计值，并基于实证数据和专家验证进行调整，以确保准确地反映地区状况。功能单元'1kg猪胴体'包括了皮肤、骨头和脂肪，与当地消费模式一致，应在影响评估中适当应用。

## Review details
清单： 内部审查通过几个迭代步骤完成，涉及原始数据验证、原始数据记录、代表性、完整性、与 ISO 14040 和 14044 有关的建模的一致性。

## Data sources
- 白林. 四川养猪业清洁生产系统LCA及猪粪资源化利用关键技术研究. (四川农业大学, 2007).
