# 土壤修复;异位修复;生物堆;运输;到达现场的设备和材料

Dataset: ILCD process, Unit process, single operation
Geography: IT
Reference year: 2018
Classification: Unit processes / Other Services / Repair and maintenance
Generated by: 王宁, wang_ning@caep.org.cn
Owner: 天工LCI数据工作小组
Review: Dependent internal review by 天工LCI数据工作小组
Amounts: no units in this file; such an amount is in the reference unit of its flow, which a separate flow dataset defines
copyright: false
licenseType: Free of charge for all users and uses

## General comment
将建设生物堆设施的材料设备运输至现场

## Technical purpose
该过程数据代表了为建设生物反应器设施所需的材料和设备的运输，这是土壤原位修复程序的一部分。生物堆用于污染土壤的生物处理，为恢复土壤健康提供了一种环保解决方案。

## Reference product
- Equipment and Materials Arriving on Site: 16600; measured

## Inputs
- transport in t*km: 996; measured

## Use advice
使用此数据集时，请确保考虑运输距离、运输方式和使用车辆的效率，因为这些因素显著影响环境特性。在生命周期评估(LCA)的生命周期清单（LCI）阶段包括此数据，并考虑运输场景的潜在变化，以确保全面分析。用户还应了解系统边界并确保与应用程序的技术时间框架保持一致。

## Review details
清单： 内部审查通过几个迭代步骤完成，涉及原始数据验证、原始数据记录、代表性、完整性、与 ISO 14040 和 14044 有关的建模的一致性。

## Data sources
- D’Imporzano, G. et al. OPTIMIZING BIOREMEDIATION OF HYDROCARBON POLLUTED SOIL BY LIFE CYCLE ASSESSMENT (LCA) APPROACH. Environmental Engineering and Management Journal (2019).
