# 修复后土壤;土壤修复;原位修复;热处理;原位热解析

Dataset: ILCD process, Unit process, black box
Geography: DK
Reference year: 2010
Classification: Unit processes / Other Services / Repair and maintenance
Functional unit: The functional unit provided by all options compared in this study is the treatment of the 700 m3 of contaminated soil with a 98% removal of the contaminant mass within this volume. The estimated mass of TCE in the ap proximately 700 m3 of contaminated soil is 40 kg.
Generated by: 杨欣桐, yangxt@caep.org.cn
Owner: 天工LCI数据工作小组
Review: Dependent internal review by 天工LCI数据工作小组
Amounts: no units in this file; such an amount is in the reference unit of its flow, which a separate flow dataset defines
copyright: false
licenseType: Free of charge for all users and uses

## General comment
原位热解吸（ISTD）包括通过浸没在加热井中的电动加热元件对受污染的粘土进行加热。通过加热氯化乙烯快速转移到气相，然后使用真空提取井提取气相，并通过吸附到活性炭进行现场处理。

## Geography
哥本哈根市中心的一个TCE污染场地位于供水集水区内

## Technology and included processes
原位热解吸（ISTD）包括通过浸没在加热井中的电动加热元件对受污染的粘土进行加热。这导致氯化乙烯快速转移到气相，然后使用真空提取井提取气相，并通过吸附到活性炭进行现场处理。

## Technical purpose
本土壤修复过程通过原位热解吸（ISTD）技术对土壤进行除污。该方法特别适用于处理粘土地层中的氯代溶剂污染，例如三氯乙烯（TCE）。该过程适用于城市区域等场所，污染土壤位于供水集水区域内。ISTD旨在实现高效率的修复，并且不需要挖掘和运输受影响的土壤，就能显著去除污染物。

## Reference product
- Remediated soil: 700; measured

## Inputs
All rows: measured
- Steel: 1200
  Installation——20 heater wells (total depth 8 meter). Steel use for outer pipe:(Ø80 mm, thickness 4 mm, density 7850 kg/m3): 7.5 kg/m.
- Stainless Steel: 1088
  Installation——20 heater wells (total depth 8 meter). Stainless steel use for inner pipes (Ø72 mm, thickness 4 mm, density 8000 kg/m3): 6.8 kg/m
- Gravel Sand: 2840
  Installation——20 heater wells (total depth 8 meter). Gravel use per well: 142 kg(7.5 meter of gravel pack in Ø150 mm boring)
- Concrete: 300
  Installation——20 heater wells (total depth 8 meter). Concrete use per well: 15 kg (0.5 meter of concrete)
- Stainless Steel: 128
  Stainless steel use for filter (Ø20 mm, thickness 4 mm, density 8000 kg/m3): 1.6 kg/m
- Stainless Steel: 96
  Installation——20 heaters; Stainless steel use for heater (Ø10 mm, solid and U-shape, density 8000 kg/m3): 1.2 kg/m
- Stainless Steel: 48
  Installation——10 temperature sensors; Stainless steel use for temperature sensor (Ø10 mm, solid, density 8000 kg/m3): 0.6 kg/m
- Road Transport,Road Transport: 1.35e6
  Distance of round trip for consultants for supervision and monitoring is set to 90 km based on the actual distance between the site and the consultant.
- polystyrene (general purpose) granulate (GPPS): 560
  560 kg expanded polystyrene insulation
- Steel: 166
  Steelfor aboveground gas collection pipes:12 meter of Ø80 mm pipes: 90 kg; 48 meter of Ø20 mm pipes: 76 kg
- Activated Carbon: 260
- Electricity: 6372
  Estimated electricity use for pumping of groundwater during heating (0.75 kW, 2356 h, 3.3months): 1770 kWh
- Electricity: 1.008e6
  Energy for heating of soil: 400 kWh/m3 of soil
- Electricity: 50400
  Electricity use for ventilation, cooling, condensation: 20 kWh/m3 of soil
- waste water - treated: 60
  Water treatment: 60 kg (assumed to absorb 3% of weight = 1.8 kg TCE)
- Exhaust gases treated: 200
  Vapor treatment: 200 kg (assumed to absorb 20% of weight = 40 kg TCE)
- contaminated soil: 700

## Use advice
在将本LCA数据应用于土壤修复过程时，确保您的评估范围仅包括在原位热处理技术可行且对特定污染物如TCE有效的情境。重要的是要计算现场能源消耗以及通过活性炭吸附对抽出蒸汽进行现场处理的过程。还应考虑用过的活性炭和基础设施的报废过程。以高污染物去除率（98%）作为与替代修复技术比较的基线。数据特定于处理700立方米受污染土壤，评估应考虑土壤组成或污染物浓度的变化。

## Review details
清单： 内部审查通过几个迭代步骤完成，涉及原始数据验证、原始数据记录、代表性、完整性、与 ISO 14040 和 14044 有关的建模的一致性。

## Data sources
- Gitte L ,Z M H ,Julie C , et al. Environmental impacts of remediation of a trichloroethene-contaminated site: life cycle assessment of remediation alternatives. Environmental science & technology, 2010, 44 (23): 9163-9.
