# cement production|cement, portland cement|oxy-combustion CO2 capture

Dataset: ILCD process, Unit process, black box
Geography: CN
Reference year: 2008
Classification: Materials production / Other mineralic materials
Generated by: Siqi Yang
Amounts: no units in this file; such an amount is in the reference unit of its flow, which a separate flow dataset defines
copyright: false

## General comment
Cement production with oxy-combustion carbon capture and storage (CCS).
For oxy-combustion CO2 capture technology, fuel is burnt in almost pure oxygen rather than air. This requires an on-site ar separation unit (ASU) to deliver oxygen to the oxy-combustion process. The concentration of CO2 in the flue gas produced by oxy-combustion is higher (about 80 mol%, dryoasis) than that of post-combustion, so the flue gas can be transported and stored after a relativelsimple purification and compression processes instead of the separation process.

## Geography
http://documents.ieaghg.org/index.php/s/YKm6B7zikUpPgGA?path=%2F2008

## Reference product
- cement, portland cement: 1000
  Cement products. Data taken from the technical report, IEA Greenhous Gas R&D Programme (IEA GHG). CO2 Capture in the Cement Industry. 2008. Available online: http://documents.ieaghg.org/index.php/s/YKm6B7zikUpPgGA?path=%2F2008 (accessed on 5 September 2017).

## Inputs
All rows: article inperiodical
- hard coal, run-of-mine: 72.06
  Coal. Data taken from the technical report, IEA Greenhous Gas R&D Programme (IEA GHG). CO2 Capture in the Cement Industry. 2008. Available online: http://documents.ieaghg.org/index.php/s/YKm6B7zikUpPgGA?path=%2F2008 (accessed on 5 September 2017).
- petroleum coke: 27.09
  Petroleum coke. Data taken from the technical report, IEA Greenhous Gas R&D Programme (IEA GHG). CO2 Capture in the Cement Industry. 2008. Available online: http://documents.ieaghg.org/index.php/s/YKm6B7zikUpPgGA?path=%2F2008 (accessed on 5 September 2017).
- electricity, medium voltage: 628.416
  Electricity. Data taken from the technical report, IEA Greenhous Gas R&D Programme (IEA GHG). CO2 Capture in the Cement Industry. 2008. Available online: http://documents.ieaghg.org/index.php/s/YKm6B7zikUpPgGA?path=%2F2008 (accessed on 5 September 2017).
- limestone, crushed, for mill: 1256.74
  Limestone. Data taken from the technical report, IEA Greenhous Gas R&D Programme (IEA GHG). CO2 Capture in the Cement Industry. 2008. Available online: http://documents.ieaghg.org/index.php/s/YKm6B7zikUpPgGA?path=%2F2008 (accessed on 5 September 2017).
- ferric oxide: 7.54
  Iron oxide. Data taken from the technical report, IEA Greenhous Gas R&D Programme (IEA GHG). CO2 Capture in the Cement Industry. 2008. Available online: http://documents.ieaghg.org/index.php/s/YKm6B7zikUpPgGA?path=%2F2008 (accessed on 5 September 2017).
- gypsum (desulphurized): 40
  Gypsum. Data taken from the technical report, IEA Greenhous Gas R&D Programme (IEA GHG). CO2 Capture in the Cement Industry. 2008. Available online: http://documents.ieaghg.org/index.php/s/YKm6B7zikUpPgGA?path=%2F2008 (accessed on 5 September 2017).

## Outputs
- carbon dioxide: 465.01; article inperiodical
  CO2 captured. Data taken from the technical report, IEA Greenhous Gas R&D Programme (IEA GHG). CO2 Capture in the Cement Industry. 2008. Available online: http://documents.ieaghg.org/index.php/s/YKm6B7zikUpPgGA?path=%2F2008 (accessed on 5 September 2017).
- carbon dioxide: 282.85; article inperiodical
  CO2 emitted. Data taken from the technical report, IEA Greenhous Gas R&D Programme (IEA GHG). CO2 Capture in the Cement Industry. 2008. Available online: http://documents.ieaghg.org/index.php/s/YKm6B7zikUpPgGA?path=%2F2008 (accessed on 5 September 2017).
- sulfur dioxide: 2.57; article inperiodical
  SO2 emitted. Data were calculated according to the design of the technical report, IEA Greenhous Gas R&D Programme (IEA GHG). CO2 Capture in the Cement Industry. 2008. Available online: http://documents.ieaghg.org/index.php/s/YKm6B7zikUpPgGA?path=%2F2008 (accessed on 5 September 2017).
- nitrogen dioxide: 2.57; article inperiodical
  NO2 emitted. Data were calculated according to the design of the technical report, IEA Greenhous Gas R&D Programme (IEA GHG). CO2 Capture in the Cement Industry. 2008. Available online: http://documents.ieaghg.org/index.php/s/YKm6B7zikUpPgGA?path=%2F2008 (accessed on 5 September 2017).
- particles (PM2.5): 0.0219; software or database
  Particulates, <2.5um. Data taken from ecoinvent database, Ecoinvent Database v3. Available online: http://www.ecoinvent.org/database/ecoinvent-33/ecoinvent-33.html (accessed on 15 April 2018).
- particles (> PM10): 0.0052; software or database
  Particulates, >10um. Data taken from ecoinvent database, Ecoinvent Database v3. Available online: http://www.ecoinvent.org/database/ecoinvent-33/ecoinvent-33.html (accessed on 15 April 2018).
- particles (PM2.5 - PM10): 0.0072; software or database
  Particulates, >2.5 um, and <10 um. Data taken from ecoinvent database, Ecoinvent Database v3. Available online: http://www.ecoinvent.org/database/ecoinvent-33/ecoinvent-33.html (accessed on 15 April 2018).

## Sampling procedure
Production capacity was set to 1 Mt/y of cement and the proportion of clinker in cement products at 91%.

## Data sources
- Jing An, Richard S. Middleton, & Yingnan Li. (2019). Environmental Performance Analysis of Cement Production with CO2 Capture and Storage Technology in a Life-Cycle Perspective. Sustainability 11, 2626.
