# 运输到场的材料和设备;生物炭;农田土壤;原位稳定化

Dataset: ILCD process, Unit process, single operation
Geography: HZ-GD-CN
Reference year: 2021
Classification: Unit processes / Other Services / Repair and maintenance
Functional unit: 800kg of biochar is transported from the production site to the repair site.
Generated by: 杨欣桐, yangxt@caep.org.cn
Owner: 天工LCI数据工作小组
Review: Dependent internal review by 天工LCI数据工作小组
Amounts: no units in this file; such an amount is in the reference unit of its flow, which a separate flow dataset defines
copyright: false
licenseType: Free of charge for all users and uses

## General comment
药剂运输到场的过程。

## Geography
研究地点位于中国南方珠江三角洲惠州市龚庄镇，是一片受镉污染的稻田。

## Technology and included processes
基于生物炭的生产地址和修复场地的位置来计算修复药剂运输距离数据。

## Technical purpose
该数据集涉及的工业过程包括生产和运输生物炭，特别是源自椰壳的生物炭，用于镉污染稻田的原位稳定化和修复。修复药剂，在这种情况下是生物炭，用于农田土壤修复，有助于改善土壤质量和降低污染物水平。这个过程与专注于农业土地恢复的环境倡议相关，特别是在受重金属污染的地区。

## Reference product
- Equipment and Materials Arriving on Site: 1; measured

## Inputs
- Biochar: 800; measured
- transport in t*km: 136; measured

## Use advice
使用此数据集时，必须考虑生物炭的运输距离，因为它会显著影响生命周期分析中的环境影响评估。用户还应考虑场地的特定性，即中国南方珠江三角洲惠州市龚庄镇受镉污染的稻田，因为数据集是针对这一特定背景量身定做的。另外，必须注意每个阶段的输入和输出，包括材料、能源、资源、排放和碳，以确保全面的生命周期评估。

## Review details
清单： 内部审查通过几个迭代步骤完成，涉及原始数据验证、原始数据记录、代表性、完整性、与 ISO 14040 和 14044 有关的建模的一致性。

## Data sources
- Kai L ,Liping F ,Fangbai L , et al. Sustainability assessment and carbon budget of chemical stabilization based multi-objective remediation of Cd contaminated paddy field. The Science of the total environment, 2021, 819 152022-152022.
