# 炼钢;钢;转炉炼钢（Z08）

Dataset: ILCD process, Unit process, single operation
Geography: CN
Reference year: 1998
Classification: Materials production / Metals and semimetals
Generated by: 付翔, 1162850692@qq.com
Owner: 天工LCI数据工作小组
Review: Dependent internal review by 天工LCI数据工作小组
Amounts: no units in this file; such an amount is in the reference unit of its flow, which a separate flow dataset defines
copyright: false
licenseType: Free of charge for all users and uses

## General comment
来自表 4-16 Z08 钢厂生产吨材环境负荷编目表

## Time period
论文提到钢铁企业环境总体数据为1998年的吨钢环境基础数据。

## Technical purpose
此所描述的炼钢过程使用转炉炼钢方法（标记为Z08）来生产炉钢。该数据集关涉的是使用BOF方法的钢铁厂每吨钢生产的环境负荷的数据。通常，这一过程生产的钢铁会被用于多个建筑和制造部门，包括基础设施、汽车和机械工业，这些行业需要高等级的钢铁。

## Reference product
- Crude Steel: 1059.3; measured
  粗钢

## Inputs
- Energy, geothermal, converted: 1126.97; measured
- water: 12239; measured
- Molten Iron: 1061; measured
  铁水

## Outputs
All rows: measured
- Dust (unspecified, from stack): 0.153
  烟尘
- Dust (unspecified, from stack): 0.074
- sulfur dioxide: 0.003
- cyanide: 7.6e-5
- phenol: 6.8e-5
  挥发酚
- Hydrocarbons, aliphatic, alkanes, unspecified: 0.049351
  石油类
- Suspended solids, unspecified: 0.652953
- chemical oxygen demand: 0.304532
- Dust (unspecified, from stack): 1.921
  集尘
- Spoil (deposited, hibernating in ground, non elementary flow): 183.153

## Use advice
使用此生命周期评估（LCA）数据集时，用户应考虑数据的具体性，它代表了1998年转炉炼钢厂生产钢材的环境负担。重要的是要注意，这些数据可能不适用于其他钢铁生产方法，或者不反映1998年之后行业中的进步和变化。在模拟使用阶段行为时，考虑钢铁制造过程的技术差异和改进。在可能的情况下，使用当前技术数据更新数据集，以保持环境影响评估的准确性。

## Review details
清单： 内部审查通过几个迭代步骤完成，涉及原始数据验证、原始数据记录、代表性、完整性、与 ISO 14040 和 14044 有关的建模的一致性。

## Data sources
- 周和敏. 钢铁材料生产过程环境协调性评价研究. (北京工业大学, 2001).
