# 市政污泥处理与处置;干污泥;制砖

Dataset: ILCD process, Unit process, single operation
Geography: CN
Classification: Unit processes / End-of-life treatment / Waste water treatment
Functional unit: The functional unit used for GHGs in this LCA is one dry ton (DT) of sludge.
Generated by: 金思甜, 2331276@tongji.edu.cn
Owner: 天工LCI数据工作小组
Review: Dependent internal review by 天工LCI数据工作小组
Amounts: no units in this file; such an amount is in the reference unit of its flow, which a separate flow dataset defines
copyright: ['opt4ROkqig']
licenseType: Free of charge for all users and uses

## General comment
本文研究的主要数据来源如下:1)能源消耗和物质投入来源于对太湖流域的调查;2)能源利用排放因子来源于我们自己的计算、IPCC和文献。3)填埋过程中的CH4排放由文献获得，填埋、焚烧和堆肥过程中的无组织排放主要由文献研究中给出的模型和IPCC因子(2006)决定。4)理论计算数据(焚烧部分)。

## Geography
太湖流域

## Technology and included processes
在替代率为10%的情况下(1 DT污泥和其他原料生产10吨砖/水泥)，1 DT污泥中只有0.3吨灰分被纳入产品，从而替代了相同数量的原料。

## Technical purpose
本 LCA 数据集描述了来自太湖流域市政污泥处理和处置的干污泥作为砖制造的添加材料。具体而言，干污泥用以生产砖块，可能作为传统原料例如黏土的部分替代品，帮助提升砖制造的可持续性。

## Reference product
- Sludge: 1000; input; estimated
  一干吨 （DT） 污泥

## Inputs
- Electricity: 252; measured

## Use advice
在使用此数据集进行生命周期评估时，必须考虑太湖流域砖制造过程中使用的干污泥的特定属性及其应用背景。用户应根据当地实施的实践和技术考虑温室气体排放的任何变化。应关注系统边界，确保砖的使用阶段和生命周期终端阶段，包括潜在的回收利用，都依据生命周期评估标准进行一致性建模。

## Review details
清单： 内部审查通过几个迭代步骤完成，涉及原始数据验证、原始数据记录、代表性、完整性、与 ISO 14040 和 14044 有关的建模的一致性。

## Data sources
- Liu, B., Wei, Q., Zhang, B. & Bi, J. Life cycle GHG emissions of sewage sludge treatment and disposal options in Tai Lake Watershed, China. Science of The Total Environment 447, 361–369 (2013).
