# 电力生产 ; 混合电力 ; 青海

Dataset: ILCD process, Unit process, single operation
Geography: QH-CN
Reference year: 2019
Classification: Unit processes / Energy carriers and technologies / Electricity
Generated by: 熊若熙, xiongrx0126@163.com
Owner: 天工LCI数据工作小组
Review: Dependent internal review by 天工LCI数据工作小组
Amounts: no units in this file; such an amount is in the reference unit of its flow, which a separate flow dataset defines
copyright: false
licenseType: Free of charge for all users and uses

## General comment
混合电力产生形式包括火力发电、水力发电、风力发电、核能发电和太阳能发电

## Technical purpose
青海省混合电力生产旨在为各个行业提供电能，包括住宅、商业和工业活动。电力混合在来源上具有多样性，如火力、水力、风力、核能和太阳能发电，确保了能源供应的稳定性和潜在的清洁性。

## Reference product
- Electricity: 3.6; missing unimportant
  [{'text': '3.6', 'type': 'text'}]

## Inputs
All rows: missing unimportant
- electricity for thermal power: 0.425102
  [{'text': '3.6', 'type': 'text'}]
- electricity from hydroelectric power plant: 2.26079
  [{'text': '3.6', 'type': 'text'}]
- electricity for nuclear power: 0
  [{'text': '3.6', 'type': 'text'}]
- electricity from wind power: 0.269338
  [{'text': '3.6', 'type': 'text'}]
- electricity for solar power: 0.644774
  [{'text': '3.6', 'type': 'text'}]

## Use advice
使用此数据集时，用户应考虑青海电力生产中各种能源的具体组合，以便进行准确的生命周期评估。重要的是要考虑每种发电方法相关的不同环境影响。还应关注地区因素，如青海可再生资源的可用性和再生能源技术的性能。

## Review details
清单： 内部审查通过几个迭代步骤完成，涉及原始数据验证、原始数据记录、代表性、完整性、与 ISO 14040 和 14044 有关的建模的一致性。

## Data sources
- 能源统计年鉴2020
