# 畜禽养殖 ; 饲料加工阶段 ; 蛋鸡散户

Dataset: ILCD process, Unit process, single operation
Geography: CN
Reference year: 2014
Classification: Unit processes / Materials production / Agricultural production means
Functional unit: 1kg eggs
Generated by: 杨瑞, 1632707028@qq.com
Owner: 天工LCI数据工作小组
Review: Dependent internal review by 天工LCI数据工作小组
Amounts: no units in this file; such an amount is in the reference unit of its flow, which a separate flow dataset defines
copyright: false
licenseType: Free of charge for all users and uses

## General comment
畜禽饲料加工过程主要消耗电能和燃煤。

## Geography
本研究于 2014~2015 年，针对畜禽饲养周期、肉料比、饲料配方、饲料消耗 量、煤和电的消耗量等，先后对山东省高密正大种猪场、莱西市知双奶牛场、即 墨市段泊岚镇姜家坡村养猪场、即墨市刘家庄镇畜禽养殖场、日照市莒县长岭镇 上官庄村、莒县寨里河镇东兴农牧公司、莒县峤山镇东辰奶牛场、莒县峤山镇刘 家义水养猪场、诸城市外贸有限责任公司凤凰父母代种鸭场，新疆阜康宏发养殖 专业合作社、九运街镇旭鸿蛋鸡合作社、九运街镇六运村自成养殖场、中澳控股 集团有限公司、德州市庆云县洼于村、山东省庆云县四柳社区肉牛养殖基地、德 州市庆云青年鸡养殖基地、庆云县永利禽业蛋鸡育成公司、庆云县兴晨青年鸡养 殖专业合作社、庆云县东泰肉鸡养殖专业合作社、河北省盐山县博远饲料有限公 司、盐山县大华人饲料有限公司、无棣县六和饲料有限公司、中澳东方希望饲料 公司等地进行了实地调研。

## Technology and included processes
本文将畜禽养殖生命周期 分为饲料作物种植、饲料加工、畜禽饲养、粪便处理、屠宰、运输等 6 个阶段。 畜禽养殖的生命周期具体流程如图 2-1 所示。由于部分数据的缺乏和基础条件的 限制，未对农药、地膜、饲料添加剂等生产、运输、使用进行分析，其他相关的 基础设施建设、运输工具生产、人力成本所引起的环境影响也不再考虑的范畴内。

## Technical purpose
该数据集代表了蛋鸡养殖生命周期中的饲料加工阶段。该过程适用于为包括小规模零售运营在内的家禽畜牧业生产饲料。所得到的饲料对农业部门生产鸡蛋至关重要。

## Reference product
- feed: 4.67997; calculated

## Inputs
- Electricity: 0.421197; calculated
- hard coal: 0.0561596; calculated
- maize grain: 3.4; measured
- soybean: 1.36; measured
- wheat: 1.35; measured

## Outputs
- carbon dioxide (fossil),carbon dioxide (fossil): 0.23424; measured
  蛋鸡散户
- sulfur dioxide: 0.0041; measured
  蛋鸡散户
- nitrogen, total (excluding N2): 0.00065; measured
  蛋鸡散户
- carbon monoxide (fossil): 0.000106; measured
  蛋鸡散户

## Use advice
用户应注意，此数据特定于蛋鸡的饲料加工阶段，不应泛化至其他类型的家禽畜牧饲料加工。必须注意数据的地域范围和时间范围（2014-2015年），因为其他地区或时间段的结果可能有所不同。调查中的能源来源（电力和煤炭）和具体农场对数据解读至关重要。为了准确评估单独的饲料加工阶段的生命周期影响，需要排除饲料原料生产或鸡蛋加工等上游或下游过程的影响。

## Review details
清单： 内部审查通过几个迭代步骤完成，涉及原始数据验证、原始数据记录、代表性、完整性、与 ISO 14040 和 14044 有关的建模的一致性。

## Data sources
- 周景月. 基于生命周期评价的畜禽养殖环境影响分析. (青岛科技大学, 2017).
