# Soil and groundwater remediation;Ex-situ;groundwater pump and treat;Remediated groundwater

Dataset: ILCD process, Unit process, single operation
Geography: JS-CN
Reference year: 2022
Classification: Other Services / Repair and maintenance
Generated by: Wang Ning, wang_ning@caep.org.cn
Owner: Tiangong LCI Data Working Group
Review: Dependent internal review by Tiangong LCI Data Working Group
Amounts: no units in this file; such an amount is in the reference unit of its flow, which a separate flow dataset defines
copyright: false
licenseType: Free of charge for all users and uses

## General comment
Groundwater pump and treat system operation

## Geography
a closed pesticide manufacturing plant located in Jiangsu Province, China.

## Technical purpose
This dataset describes an ex-situ groundwater pump and treat system which is used for the operation of soil and groundwater remediation at a closed pesticide manufacturing plant located in Jiangsu Province, China. The system is intended to extract contaminated groundwater, treat it to remove pollutants, and ensure environmental restoration of industrial sites.

## Reference product
- Remediated groundwater: 1184.85; measured

## Inputs
- Electricity: 80293.6; measured
- contaminated groundwater: 1184.85; measured

## Use advice
When utilizing this data set, it is important to consider the specific environmental context of the remediation site. Users should apply the data within the scope of similar industrial site remediations where ex-situ groundwater treatment is applicable. Attention should be given to the system's operational parameters, spatial applicability, local environmental regulations, and any changes in the contaminants profile over time to ensure accurate modeling and assessment.

## Review details
Inventory: The internal review was done by several iteration steps concerning raw data validation, raw data documentation, representativity, completeness and consistency of modelling with regard to ISO 14040 and 14044.

## Data sources
- Ding, D. et al. Assessing the environmental impacts and costs of biochar and monitored natural attenuation for groundwater heavily contaminated with volatile organic compounds. Science of The Total Environment 846, 157316 (2022).
