# NCM 湿法回收

Dataset: ILCD process, Unit process, single operation
Geography: HUN-CN
Reference year: 2021
Classification: End-of-life treatment / Material recycling
Functional unit: Based on market data, the prismatic LFP and NMC are used as a reference, with energy densities of 120 Wh/kg and 150 Wh/kg, respectively. Values are scaled into 1 kg of battery cell.
Generated by: 马清源, m1120498928@163.com
Owner: 天工LCI数据工作小组
Review: Dependent internal review by 天工LCI数据工作小组
Amounts: no units in this file; such an amount is in the reference unit of its flow, which a separate flow dataset defines
copyright: false
licenseType: Free of charge for all users and uses

## General comment
在湿法冶金回收的早期阶段，NCM的处理过程与LFP的处理过程相似。首先，对电池组进行放电和拆卸，并在球磨机中对电池进行粉碎。然后，将粉末加热至400–600的温度◦C.铜、铝和电极材料通过物理方法分离，如浮选和磁选，然后对电极材料进行研磨和酸浸。对于NCM，电极材料与H2SO4水溶液反应，并通过添加NaOH、HCl和萃取剂进行浸出。洗涤和干燥后，分离出CoSO4、MnSO4和NiSO4晶体。最后，将Na2CO3添加到提取溶液中以获得Li2CO3晶体。

## Technical purpose
NCM湿法回收技术(HRT)用于从废弃锂离子电池中回收有价值的材料。 该工艺对于可持续废物管理和材料回收至关重要。技术支持循环经济的发展，提供可以在电池生产中再次使用的材料，有助于减少环境影响和对原材料提取的依赖。

## Reference product
- EoL NCM battery: 1; input

## Inputs
All rows: normal; measured
- sodium chloride: 0.00735
- Sulfuric acid(98%): 0.912
- P204（95%）P507（95%）: 6.47e-5
- Kerosene: 0.000324
- Hydrochloric acid (32%): 0.259
- Sodium carbonate（95%）: 0.0224
- Sodium chlorate（96%）: 0.000141
- sodium hydroxide: 0.654
- electricity mix: 0.7416, 0.9144 (2 entries)
- process steam: 1.91
- natural gas: 0.785
- water,water: 6.47
- Infrastructure: 4.6e-10, 4.6e-10 (2 entries)
- Freight rail: 2.26
- Freight Truck: 0.226

## Outputs
All rows: normal; measured
- Nickel sulfate: 0.179
- Manganese Sulfate Monohydrate: 0.179
- Cobalt Sulfate: 0.175
- Lithium carbonate: 0.209
- Copper Scrap: 0.114
- Aluminum scrap: 0.0831
- sodium sulfate: 0.5
- sodium chloride: 0.28
- Dust (unspecified, from stack),Dust (unspecified, from stack): 0.000735, 0.000135 (2 entries)
- sulphuric acid: 3.57e-5, 0.000357 (2 entries)
- hydrogen chloride: 7.09e-5, 0.000709 (2 entries)
- non-methane volatile organic compounds: 7.35e-5, 6.07e-5 (2 entries)
- Water (river water from technosphere, waste water): 0.185
- chemical oxygen demand: 5.54e-5
- Suspended solids, unspecified: 2.76e-5
- ammonia: 3.68e-6
- Residue to landfill: 0.0294, 0.613 (2 entries)

## Data selection and combination
使用自上而下的方法，在公司层面从四家公司收集一年期的材料、能源、废物和排放通量，然后通过除以吞吐量将其划分为功能单元。

## Data treatment and extrapolations
收集的蒸汽和天然气以重量和体积为单位，将其换算为MJ，换算系数为2.8 MJ/kg和35.6 MJ/kg，以匹配Ecoinvent数据库中的单位。LCI中没有列出天然气的GHG排放，因为它们是使用Ecoinvent中的燃烧过程建模的。

## Sampling procedure
被调查的公司没有监测进入废水的硫酸和盐酸的量，这些废水在处理后会排放到水体中。在这里，我们对它们进行了积极的估计，是排放到大气中的相应数量的10倍。

## Use advice
在生命周期评估(LCA)中使用此数据集时，用户应包括其分析中的所有相关上游和下游过程，以准确代表材料的整个生命周期。提供的能量转换应用于使数据与Ecoinvent数据库保持一致性。能源消耗的温室气体排放应使用特定能源类型在相关地理环境中的排放因子来计算。在污水处理中使用的假设和估计必须在LCA报告中注明并证明，以确保结果的透明度和有效性。

## Review details
清单： 内部审查通过几个迭代步骤完成，涉及原始数据验证、原始数据记录、代表性、完整性、与 ISO 14040 和 14044 有关的建模的一致性。

## Data sources
- Jiang, S. et al. Environmental impacts of hydrometallurgical recycling and reusing for manufacturing of lithium-ion traction batteries in China. Science of The Total Environment 811, 152224 (2022).
