# 架空线缆的制造 ; 内部14 km

Dataset: ILCD process, Unit process, single operation
Geography: NMG-CN
Reference year: 2017
Classification: Systems / Electrics and electronics
Functional unit: The functional unit is 1.5 MW wind turbine
LCI method principle: Attributional
LCI method approaches: Allocation
Generated by: 赵云志, ll10088@163.com
Owner: 天工LCI数据工作小组
Review: Dependent internal review by 天工LCI数据工作小组
Amounts: no units in this file; such an amount is in the reference unit of its flow, which a separate flow dataset defines
copyright: false
licenseType: Free of charge for all users and uses

## General comment
所述的14公里架空线缆是为风电场使用的，具体是为配备1.5兆瓦容量风轮机的风电场设计。这些电缆被设计用于承受内蒙古东北部地区风电装机显著的环境条件。它们用于连接风轮机和变电站，以实现由风轮机产生的电能的传输。

## Geography
风电功率参数的数据来自Wang ( 2012 )。以装有33台国产1.5兆瓦( MW )风电机组的风电场为案例，分析其环境影响及其替代效应。该风电场位于我国风电装机最多的省份- -内蒙古东北部。

## Reference product
- Steel Wire,Cable: 14000; article inperiodical

## Inputs
- aluminium: 49000; article inperiodical

## Deviations from the LCI method approaches
风电的生命周期清单如下所示。生产制造阶段包括风电机组、变电站、电缆的生产，这些设备消耗大量能源，排放污染物( Xue et al . , 2015)。

## Use advice
在使用此LCA数据集评估风电场的环境影响时，用户必须考虑架空线缆的整个生命周期，包括它们的生产、安装、使用阶段和生命周期管理。理解风电场的地区背景至关重要，因为气候和当地环境条件可能显著影响架空线缆的性能和退化。在进行评估时，用户应考虑当地的能源组合、可能的回收过程以及电缆的维护实践。

## Review details
清单： 内部审查通过几个迭代步骤完成，涉及原始数据验证、原始数据记录、代表性、完整性、与 ISO 14040 和 14044 有关的建模的一致性。

## Data sources
- Li, H., Jiang, H.-D., Dong, K.-Y., Wei, Y.-M. & Liao, H. A comparative analysis of the life cycle environmental emissions from wind and coal power: Evidence from China. Journal of Cleaner Production 248, 119192 (2020).
