# 安装 ; 风轮机（风轮机的类别: 27×3.6MW+1×5MW）

Dataset: ILCD process, Unit process, single operation
Geography: SH-CN
Reference year: 2009
Classification: Unit processes / Energy carriers and technologies / Renewable fuels
Functional unit: The functional unit is 1 kWh on-grid electricity provision.
LCI method principle: Consequential
LCI method approaches: Allocation
Generated by: 赵云志, ll10088@163.com
Owner: 天工LCI数据工作小组
Review: Dependent internal review by 天工LCI数据工作小组
Amounts: no units in this file; such an amount is in the reference unit of its flow, which a separate flow dataset defines
copyright: false
licenseType: Free of charge for all users and uses

## General comment
所述风轮机用于建设东海大桥海上风电场（DBOWF），该设施作为可再生能源发电设施。该基础设施利用风力发电，向电网供应电力。这些特定的涡轮机，共有27台3.6MW和一台5MW容量的单位，设计用于大规模能源生产，并安装在海上，以利用海上可用的风力资源。

## Geography
所研究的风电场- -东海大桥海上风电场( DBOWF )是中国在上海管辖范围内的第一个海上风电场，也是欧洲以外的第一个海上风电场。工程分两期施工，分别位于东海大桥两侧(图1 )。

## Reference product
- Wind tower foundation: 28; measured
  27 3.6-MW wind turbines and one 5-MW prototype wind turbine.

## Inputs
- Diesel: 487000; calculated
- Energy, geothermal, converted: 3.25e7; calculated

## Outputs
- carbon dioxide: 2.1962e6; calculated
- particles (PM2.5): 2300; calculated
- sulfur dioxide: 3400; calculated
- nitrous oxide: 24400; calculated

## Deviations from the LCI method approaches
本研究采用PLCA建模方法计算了中国某典型海上风电场的能源和环境排放。从摇篮到坟墓的过程包括材料和设备制造、运输和安装、操作和维护、拆解和回收4个阶段(图2 )。

## Data selection and combination
风机、基础和电缆的技术参数从DBOWF的设计文件中获得(表2)。能源和排放因子(即单位材料和构件生产的能源消耗和环境排放)来源于Ecoinvent 2.2数据集(生态发明中心, 2009)，优先参考中国实践的系数。对于关键材料和设备，其海上运输能量由运输负荷和海运能量强度计算得到。根据施工方案，对设施安装能耗和排放进行了估算。风电场的运行和维护数据，如维护的频率和工作时间，是通过与工程技术人员的现场调查获得的。与模型参数和输入数据相关的不确定性在本文的敏感性分析部分进行了说明。

## Use advice
在使用这些生命周期评价数据时，用户应考虑地区特异性，如中国独特的能源结构和环境条件，这可能会影响风电场的环境影响。同样重要的是，能源和排放因素基于Ecoinvent 2.2数据集，如果有更新或区域特定的数据可用，应予以更新。用户应考虑材料和组件的运输、DBOWF建设计划中描述的具体安装能耗和排放，并在影响分析中包括运行和维护实践。应进行敏感性分析，以理解模型参数和输入数据中不确定性的影响。

## Review details
清单： 内部审查通过几个迭代步骤完成，涉及原始数据验证、原始数据记录、代表性、完整性、与 ISO 14040 和 14044 有关的建模的一致性。

## Data sources
- Yang, J. et al. The life-cycle energy and environmental emissions of a typical offshore wind farm in China. Journal of Cleaner Production 180, 316–324 (2018).
