# 电力生产 ; 混合电力 ; 海南

Dataset: ILCD process, Unit process, single operation
Geography: HAIN-CN
Reference year: 2019
Classification: Unit processes / Energy carriers and technologies / Electricity
Generated by: 熊若熙, xiongrx0126@163.com
Owner: 天工LCI数据工作小组
Review: Dependent internal review by 天工LCI数据工作小组
Amounts: no units in this file; such an amount is in the reference unit of its flow, which a separate flow dataset defines
copyright: false
licenseType: Free of charge for all users and uses

## General comment
混合电力产生形式包括火力发电、水力发电、风力发电、核能发电和太阳能发电

## Technical purpose
该混合电力通过火力、水力、风力、核能和太阳能发电产生，用于海南省住宅、商业和工业部门的一般消费。

## Reference product
- Electricity: 3.6; missing unimportant
  [{'text': '3.6', 'type': 'text'}]

## Inputs
All rows: missing unimportant
- electricity for thermal power: 2.21402
  [{'text': '3.6', 'type': 'text'}]
- electricity from hydroelectric power plant: 0.177156
  [{'text': '3.6', 'type': 'text'}]
- electricity for nuclear power: 1.01083
  [{'text': '3.6', 'type': 'text'}]
- electricity from wind power: 0.0521028
  [{'text': '3.6', 'type': 'text'}]
- electricity for solar power: 0.145894
  [{'text': '3.6', 'type': 'text'}]

## Use advice
在使用该数据集进行生命周期评估时，需要考虑海南电网中各种发电源的具体组合。确保火力、水力、风力、核能和太阳能发电的比例准确反映了当前的能源组合。考虑发电方式的地区差异和能源组合随时间可能发生的变化。方法论考虑应包括不同发电技术的生命周期阶段及输电损失的影响。

## Review details
清单： 内部审查通过几个迭代步骤完成，涉及原始数据验证、原始数据记录、代表性、完整性、与 ISO 14040 和 14044 有关的建模的一致性。

## Data sources
- 能源统计年鉴2020
