# 光伏组件运输;废旧光伏组件;卡车运输;柴油消耗

Dataset: ILCD process, Unit process, single operation
Geography: CN
Classification: Unit processes / Transport services / Road
Generated by: 王楠, 1209824595@qq.com
Owner: 天工LCI数据工作小组
Review: Dependent internal review by 天工LCI数据工作小组
Amounts: no units in this file; such an amount is in the reference unit of its flow, which a separate flow dataset defines
copyright: false
licenseType: Free of charge for all users and uses

## General comment
收集阶段考虑从电站中移除光伏组件废弃物，不包括从支架中移除组件。运输阶段包括用柴油卡车将光伏废物组件从发电站运送到最近的废物处理厂。

## Technical purpose
所提供的数据描述了光伏模块废物的收集和运输过程。此工艺的工业应用特定于太阳能行业，在该行业中用于正确处理和处理寿命终端的光伏模块。运输仅涉及通过柴油动力卡车将光伏废组件从太阳能发电站运输到最近的废物处理设施。

## Reference product
- PV Module Waste: 1000; input; estimated

## Inputs
- Diesel: 0.02149; calculated
  单位说明1km消耗21.49kg柴油

## Outputs
All rows: software or database
- PV Module Waste: 1000
- Nitrogen oxides: 0.382
- sulfur dioxide: 1.379
- carbon dioxide: 67
- methane: 0.091
- particles (> PM10),particles (>PM10): 0.14

## Use advice
使用此数据集的用户应确保他们在其生命周期评估中准确计算光伏模块废物的收集和基于柴油的运输。重要的是要注意，数据排除了从安装结构中拆除模块所涉及的能源和过程。数据用户应考虑包括输运到废物处理设施但不包括从安装硬件上卸载的系统边界。此外，用户应意识到限制只考虑了柴油运输，并且应单独处理替代或额外的运输方式。

## Review details
清单： 内部审查通过几个迭代步骤完成，涉及原始数据验证、原始数据记录、代表性、完整性、与 ISO 14040 和 14044 有关的建模的一致性。

## Data sources
- Li, J. et al. Life cycle analysis of the economic costs and environmental benefits of photovoltaic module waste recycling in China. (2023).
