# 铜渣回收;水泥;浮选后生产水泥;铜渣

Dataset: ILCD process, Unit process, single operation
Geography: CN
Reference year: 2010
Classification: Unit processes / Materials production / Other mineralic materials
Functional unit: The functional unit was defined as the recycling of 1 ton of copper slag from copper smelting process.
LCI method principle: Attributional
LCI method approaches: Substitution
Generated by: 王鹏, 2867919560@qq.com
Owner: 天工LCI数据工作小组
Review: Dependent internal review by 天工LCI数据工作小组
Amounts: no units in this file; such an amount is in the reference unit of its flow, which a separate flow dataset defines
copyright: false
licenseType: Free of charge for all users and uses

## General comment
回收铜渣被用于不同的水泥生产过程，包括直接水泥生产、电炉处理后的水泥生产、浮选后的水泥生产，以及浮选后用于生产无烧制砖块。这显示了铜渣这一铜冶炼副产物的一系列二次应用，旨在减少废物并在建筑行业利用其材料性能。

## Geography
中国领先的铜业公司。

## Time period
摘自相关公司2010年内部报告。

## Technology and included processes
根据技术可用性，开发了四种铜渣回收方案：（1）直接生产水泥，（2）电炉处理后生产水泥，（3）浮选后生产水泥，（4）生产不烧砖浮选后。

## Reference product
- Refined copper: 1000; measured

## Inputs
All rows: measured
- hard coal,hard coal,hard coal: 650
  Hard coal
- crude oil; 42.3 MJ/kg: 19
  Crude oil
- natural gas; 44.1 MJ/kg: 14.9
  Natural gas
- Limestone: 2518.3
- clay: 504.2
  Clay
- gypsum: 155.7
  Gypsum

## Outputs
All rows: measured
- carbon dioxide (fossil): 2066.7
  CO2
- carbon monoxide,carbon monoxide (fossil): 1.4
  CO
- sulfur dioxide: 4.9
  SO2
- Nitrogen oxides: 6.8
  NOx需要补充
- particles (PM2.5 - PM10): 9.1
  Dust需要补充

## Deviations from the LCI method approaches
在分配程序之后，使用避免负担方法进行表征、归一化和加权。

## Data selection and combination
铜渣处理数据主要来源于国内某铜业龙头企业。水泥和砖的生产数据大部分来自采用先进设备和工艺的真实工厂，并辅以公开发表的文献。

## Data treatment and extrapolations
本研究中使用 GaBi 4 软件对铜回收系统进行建模并确定对环境的影响。采用生态指标99（EI99）进行生命周期影响评估

## Use advice
在使用提供的铜渣回收到水泥和砖生产的生命周期评价（LCA）数据时，实践者应使用与其研究相关的特定回收方案的数据。必须仔细遵循使用阶段行为和方法学考虑，如分配程序和避免负担方法，正如生态指标99（EI99）方法所概述的那样。评估的功能单元是铜冶炼过程中回收的1吨铜渣。确保符合所在地区标准和实践的技术适用性。

## Review details
清单： 内部审查通过几个迭代步骤完成，涉及原始数据验证、原始数据记录、代表性、完整性、与 ISO 14040 和 14044 有关的建模的一致性。

## Data sources
- Song, X. L., Yang, J. X., Wang, J. W. & Wu, W. J. Assessing the Life Cycle Environmental and Economic Performance of Copper Slag Recycling. AMR 878, 219–225 (2014).
