# cement production|cement, common portland cement|dry rotary kiln, 1000-2000 t/d|mixed solid wastes

Dataset: ILCD process, Unit process, black box
Geography: GS-CN
Classification: Materials production / Other mineralic materials
Generated by: Siqi Yang
Amounts: no units in this file; such an amount is in the reference unit of its flow, which a separate flow dataset defines
copyright: false

## General comment
Small (dry rotary kiln with a production capacity between 1000 tons and 2000 tons clinker/day).
100% cement dust was recycled. 100% wastewater was reused on site.

## Geography
Jinchang Cement Group Co., Ltd. (Gansu, China)

## Model description
The production of 1 ton common Portland cement, which accounts for approximately 98% of the total cement production in China , was selected as the functional unit.
The system boundaries of the dry rotary kiln. Three stages, namely, raw material crushing, clinker generation, and cement grinding, were generally considered. The clinker generation stage of the scenarios included homogenization, preheating and precalcining, and incineration. Raw materials, energy consumption, road transport, direct emissions (i.e., carbon dioxide, sulfur dioxide, nitrogen oxides, and particulates), and infrastructure were considered in each process.

## Reference product
- cement, common portland cement: 1000
  Common Portland cement

## Inputs
All rows: measured
- calcium carbonate: 840
  Limestone
- gypsum: 71
  Gypsum
- water: 3730
  Water
- sandstone: 76
  Sandstone
- shale: 28
  Shale
- nickel smelter slag: 18
  Nickle slag
- blast furnace slag: 41
  Blast furnace slag
- ash: 208
  Fly ash
- hard coal, run-of-mine: 113
  Coal
- electricity, medium voltage: 367.524
  Electricity

## Outputs
- carbon dioxide: 560; measured
  CO2. CO2 emission was calculated according to Eq.(Wu et al., 2006): E = 3:67a x k x Mcoal x Q + 0.38 x Mlimestone, where E, a, k, Mcoal, Q, and Mlimestone represent the amount of CO2 emission per ton of cement production, carbon oxygenation efficiency of coal (0.93, National Development and Reform Commission, 2011), carbon emission factor of coal (26.1 x 10-3, National Development and Reform Commission, 2011), mass of coal consumption per ton of cement production, caloric value of coal, and mass of limestone consumption per ton of cement production, respectively. The caloric value of coal considered in the present study was 24.48 MJ/kg.
- electricity, medium voltage: 0.04; measured
  SO2. Direct air emission data were obtained from the Hongda Cement Plant (Yunnan, China).
- Nitrogen oxides: 0.18; measured
  NOx. Direct air emission data were obtained from the Hongda Cement Plant (Yunnan, China).
- particles (> PM10): 0.16; measured
  Particulates. The particle size is not specified. Here we treat it as PM>10. Direct air emission data were obtained from the Hongda Cement Plant (Yunnan, China).

## Data selection and combination
For the small-production scenario, annual statistics and monitoring data from the Jinchang Cement Group Co., Ltd. (Gansu, China) were used.
Direct air emission data were obtained from the Hongda Cement Plant (Yunnan, China) because of lack of information from the former.

## Data sources
- Wei Chen, Jinglan Hong, & Changqing Xu. (2015). Pollutants generated by cement production in China, their impacts, and the potential for environmental improvement. JOURNAL OF CLEANER PRODUCTION, 103, 61–69.
