# 柑橘生产

Dataset: ILCD process, Unit process, black box
Geography: IR
Reference year: 2019
Valid until: 2020
Classification: Unit processes / Materials production / Agricultural production means
Functional unit: One hectare of citrus orchard
Generated by: 朱娴, zzhu0918@163.com
Owner: 天工LCI数据工作小组
Review: Dependent internal review by 天工LCI数据工作小组
Amounts: no units in this file; such an amount is in the reference unit of its flow, which a separate flow dataset defines
copyright: false
licenseType: Free of charge for all users and uses

## General comment
培育柑橘树苗，进行农药、化肥、农家肥及水的施用，使用人工和机器配合收获柑橘产品，并且分别对空气、土壤和水中产生排放物。

## Geography
在伊朗的马赞德兰省

## Technical purpose
所描述的柑橘生产过程旨在对一公顷柑橘园进行种植和收获。其中包括柑橘树苗繁殖、施用农药、化肥和农家肥，以及灌溉。收获工作由人工和机械配合完成。此过程适用于为食品工业提供柑橘果实，以及市场上鲜果的消费。

## Reference product
- Citrus: 150; measured

## Inputs
All rows: measured
- diesel oil: 0.1628
- Nitrogenous fertilizer: 86.6
- Phosphate fertilizer: 47.1
- Potassium fertilizer: 30.8
- Pesticide: 39
- Electricity: 326.88
- water: 359.6
- Labor: 4.2
- Farmyard manure: 600

## Outputs
All rows: measured
- carbon dioxide (biogenic): 772.54
  原文未区分bio和fossil，根据专家判断此处为biogenic。
- dinitrogen: 0.801
- methane (biogenic): 0.029
  原文未区分bio和fossil，根据专家判断此处为biogenic。
- sulfur dioxide: 3.848
- ammonia: 11.022
- particles (PM10): 0.981
- carbon monoxide (biogenic): 1.375
- nitrate: 58.486
- phosphate: 0.196

## Use advice
本生命周期评估(LCA)数据集的用户应当注意数据的地理特定性，因为它代表了伊朗马赞德兰省的柑橘生产。应特别关注数据中概述的当地农业实践和环境条件。此外，将此数据整合到更广泛的LCA研究时，用户应考虑任何后续过程，如运输、加工、包装及其相关的环境影响。根据研究的目标与范围，决定是否包括来自循环过程的排放。将此数据与其他数据集结合时，保持方法论的一致性是至关重要的。

## Review details
清单： 内部审查通过几个迭代步骤完成，涉及原始数据验证、原始数据记录、代表性、完整性、与 ISO 14040 和 14044 有关的建模的一致性。
