# Basin Modeling|Source rock and crude oil samples|Rock–Eval pyrolysis, GC/GC–MS, vitrinite reflectance measurements, and basin modeling

Dataset: ILCD process, Unit process, single operation
Geography: CN
Reference year: 2023
Classification: Materials production / Other mineralic materials
LCI method principle: Attributional
LCI method approaches: Consequential
Generated by: Shikang Kang, 908798159@qq.com
Review: Dependent internal review by Tiangong LCI Data Working Group
Amounts: no units in this file; such an amount is in the reference unit of its flow, which a separate flow dataset defines
copyright: false

## General comment
Evaluate pyrolysis of rocks by GC/GC-MS, vitrinite reflectivity measurement and basin simulation

## Geography
Regions of China

## Time period
Publication time of literature

## Technology and included processes
using analytical techniques such as Rock–Eval pyrolysis, GC/GC–MS, vitrinite reflectance measurements, and basin modeling

## Reference product
- natural gas: 216000; max 216000; uniform; article inperiodical
  峰值60mW/m2

## Data selection and combination
Results indicate that the Upper Cretaceous (Donga and Yogou formations) and the Eocene Sokor-1 Formation have oil and gas generation potential with II/III and III type kerogens.

## Review details
Inventory: The internal review was done by several iteration steps concerning raw data validation, raw data documentation, representativity, completeness and consistency of modelling with regard to ISO 14040 and 14044.; Documentation: The review of the documentation was performed by Ecobilan and is in compliance with ISO 14040 and 14044. The data set documentation is correct in view of the appropriateness of the information provided. It includes all relevant information in view of data quality and scope of application of the respective LCI result.

## Data sources
- Moussa, H. A., Bohari, A. D., Ahmed, K. S. & Harouna, M. Thermal maturity evolution and hydrocarbon generation in the Dibeilla oil field, Termit Basin, Eastern Niger: an organic geochemical and basin modeling approach. Arab J Geosci 16, 338 (2023).
