# Electricity production ; Electricity ; Thermal power (84.8%) + hydropower (0.5%) + wind power (9.5%) + solar power (5.3%)

Dataset: ILCD process, Partly terminated system
Geography: HEB-CN
Reference year: 2019
Classification: Energy carriers and technologies / Electricity
LCI method principle: Other
Generated by: Ruoxi Xiong, xiongrx0126@163.com
Owner: Tiangong LCI Data Working Group
Review: Dependent internal review by Tiangong LCI Data Working Group
Amounts: no units in this file; such an amount is in the reference unit of its flow, which a separate flow dataset defines
copyright: false
licenseType: Free of charge for all users and uses

## General comment
Forms of electricity generation include thermal power, hydropower, wind power and solar power

## Time period
Calculated based on data from the 2019 Energy Statistics Yearbook

## Technical purpose
This data set describes a mix of electricity generation processes including thermal power (84.8%), hydropower (0.5%), wind power (9.5%), and solar power (5.3%). Electricity produced from this mix is used for a variety of applications, serving residential, commercial, industrial, and transportation sectors. The electricity generation process can include large-scale grid operations and smaller distributed energy resources.

## Reference product
- Electricity: 3.6; calculated

## Outputs
- carbon dioxide: 0.863; calculated
- sulfur dioxide: 0.000129; calculated
- Nitrogen oxides: 0.000220917; calculated
- Dust (unspecified, from stack): 3.2267e-5; calculated

## Data treatment and extrapolations
For the accounting method, please refer to the "Enterprise Greenhouse Gas Emissions Accounting Methods and Reporting Guidelines for Power Generation Facilities". Different forms of power generation and fuel consumption come from Chapter 3 (Energy Production) and Chapter 6 (Regional Energy Balance Sheet) in the "China Energy Statistical Yearbook 2020". The fuel parameters such as low calorific value and carbon content per unit calorific value used to calculate the carbon dioxide emission factor come from the "2019 China Regional Power Grid Carbon Dioxide Baseline Emission Factor Calculation Instructions OM" and the "Enterprise Greenhouse Gas Emission Accounting Method and Reporting Guide for Power Generation Facilities" 》

## Use advice
When utilizing this data set for Life Cycle Assessment or carbon footprint calculations, users should consider the specific mix of electricity sources, as the proportions significantly affect the results. For accurate calculations, apply the carbon emission factors provided, which are based on the 2019 Energy Statistics Yearbook, and accounting methods from the 'Enterprise Greenhouse Gas Emissions Accounting Methods and Reporting Guidelines for Power Generation Facilities'. It is important to ensure that the method chosen is consistent with the regional energy balance and the specific form of electricity used. Additional attention should be given to methodological updates or changes in energy mix over time.

## Review details
Inventory: The internal review was done by several iteration steps concerning raw data validation, raw data documentation, representativity, completeness and consistency of modelling with regard to ISO 14040 and 14044.

## Data sources
- 熊若熙. 中国电力生产和消费二氧化碳与污染物排放因子核算. (清华大学, 2023).
