# 土壤和地下水修复;原位;土壤生物通风;到达现场的设备和材料

Dataset: ILCD process, Unit process, single operation
Geography: US
Reference year: 2009
Classification: Other Services / Engineering and consulting
Generated by: 王宁, wang_ning@caep.org.cn
Owner: 天工LCI数据工作小组
Review: Dependent internal review by 天工LCI数据工作小组
Amounts: no units in this file; such an amount is in the reference unit of its flow, which a separate flow dataset defines
copyright: false
licenseType: Free of charge for all users and uses

## General comment
将材料设备运输至现场

## Technology and included processes
经过3300km路程，将设备和材料运输至现场

## Technical purpose
该工业流程数据集代表了原位土壤生物通风所需的设备和材料的运输，这是一种用于修复被污染土壤和地下水的方法。这一过程在旨在恢复污染地点和防止进一步环境退化的环境工程项目中至关重要。所指定的材料和设备预计将部署在通过控制生物活性剂的通风来修复土壤的现场操作中。

## Reference product
- Equipment and Materials Arriving on Site: 1; estimated

## Inputs
- Equipment and Materials Arriving on Site: 3.3e7; estimated
  各种材料设备达到现场距离

## Use advice
使用此数据集时，从业者必须将特定运输距离作为一个变量因素考虑。数据反映了一个单元过程，在3300km的距离上运输设备和材料。为了进行准确的生命周期评估（LCA）建模，从业者应调整运输距离以匹配实际项目要求。数据集涵盖了运输材料和设备的环境影响，但没有包括设备操作或材料上游生产。使用者应确保这些方面在整体LCA框架内分别得到计算。

## Review details
清单： 内部审查通过几个迭代步骤完成，涉及原始数据验证、原始数据记录、代表性、完整性、与 ISO 14040 和 14044 有关的建模的一致性。
