# 原生铝合金白车身生产和使用 ; 原生铝合金白车身 ; 铝土矿

Dataset: ILCD process, Unit process, single operation
Geography: CN
Reference year: 2011
Classification: Unit processes / Materials production / Metals and semimetals
Generated by: 常慧敏, huiminchang@tsinghua.edu.cn
Owner: 天工LCI数据工作小组
Review: Dependent internal review by 天工LCI数据工作小组
Amounts: no units in this file; such an amount is in the reference unit of its flow, which a separate flow dataset defines
copyright: false
licenseType: Free of charge for all users and uses

## General comment
原生铝合金白车身代表了汽车涂漆前的基本金属结构，通常用于汽车工业生产车身。该材料处理源于铝土矿，主要用于新车辆的制造。

## Time period
论文发表年

## Reference product
- primary aluminum alloy body-in-white: 375.3; measured
  原生铝合金白车身

## Inputs
All rows: measured
- bauxite: 6831
  铝土矿
- soda ash, dense: 195
  (1)纯碱
- calcium carbonate: 891
  (2)石灰石
- hard coal: 128.5
  (3)无烟煤
- Sodium bicarbonate: 41
  (4)苏打粉
- redmud from bauxite digestion: 2680.88
  (5)拜耳赤泥
- anode, prebake, for aluminium electrolysis: 759
  (6)炭极
- cryolite: 22.1
  (7)冰晶石
- aluminium fluoride: 35
  (8)氟化铝
- fluorspar: 4.1
  (9)氟化钙
- Magnesium fluoride: 5.5
  (10)氟化镁
- sodium chloride, powder: 27
  (11)NaCl
- potassium chloride, industrial grade: 27
  (12)KCl
- Water, unspecified natural origin: 41068
  (13)水
- Diesel oil: 6.33
  (1)柴油
- hard coal: 950.3
  (3)大同统煤
- Petroleum Coke: 75
  (4)冶金焦
- heavy fuel oil: 561.69
  (5)重油
- natural gas, liquefied: 201.25
  (6)天然气
- electricity, high voltage, aluminium industry: 20536.5
  (9)电力
- petrol, unleaded: 16775.7
  (10)汽油

## Outputs
All rows: measured
- carbon dioxide (fossil),carbon dioxide (fossil): 60488.1
  (1)CO2kg
- carbon monoxide (fossil),carbon monoxide (fossil): 4400.76
  (2)CO
- sulfur dioxide: 116.67
  (3)SO2kg
- Nitrogen oxides: 546.85
  (4)NOxkg
- hydrocarbons (unspecified): 770.85
  (5)CxHy
- hydrocarbons (unspecified): 0.02
  (6)HC
- particles, unspecified: 0.02
  (7)PM
- hydrogen fluoride: 17.3
  (8)HF
- Dust: 42
  (9)粉尘

## Use advice
该数据集的用户应注意发表年份，并确保数据代表当前技术和行业实践。在使用数据时，应考虑自发表年份以来可能发生的技术更新和市场变化。如果将数据用于评估生命周期评价研究中的环境影响，请确保LCA范围包括铝的生产阶段及其生命周期终点阶段，并在适用的情况下包括回收过程。

## Review details
清单： 内部审查通过几个迭代步骤完成，涉及原始数据验证、原始数据记录、代表性、完整性、与 ISO 14040 和 14044 有关的建模的一致性。

## Data sources
- 刘海东. 乘用车轻量化绿色效应评价理论与方法研究. (吉林大学, 2011).
