# 土壤和地下水修复;原位;土壤冲洗;场地基础设施建设

Dataset: ILCD process, Unit process, single operation
Geography: KR
Reference year: 2023
Classification: Other Services / Repair and maintenance
Generated by: 黄悦, huangyue@caep.org.cn
Owner: 天工LCI数据工作小组
Review: Dependent internal review by 天工LCI数据工作小组
Amounts: no units in this file; such an amount is in the reference unit of its flow, which a separate flow dataset defines
copyright: false
licenseType: Free of charge for all users and uses

## General comment
包括土壤开挖、土壤和冲洗设备运输、冲洗设备安装和地基

## Geography
Incheon City, approximately 50 km east of Seoul, South Korea

## Technology and included processes
SiteWiseTM ver. 2

## Technical purpose
该过程描述了用于土壤和地下水修复的现场外土壤清洗技术，主要用于环境工程和场地修复。这个过程旨在对土壤进行去污，为新的场地基础或恢复生态系统做准备。它涉及挖掘、运输到处理现场以及使用专门的清洗设备清洗土壤。

## Reference product
- soil: 4275; input; missing unimportant

## Inputs
- Diesel: 0.1; missing unimportant
- water: 60; missing unimportant

## Outputs
- carbon dioxide: 43100; missing unimportant
- particles (PM10): 2.76; missing unimportant
- sulfur oxides: 8; missing unimportant
- nitrous oxide: 31.5; missing unimportant

## Data treatment and extrapolations
通过使用SiteWiseTM第2版分别计算每个阶段的环境足迹来分析总环境足迹

## Use advice
在使用此LCA数据时，确保您的评估范围与数据集中使用的方法学框架（SiteWiseTM ver.2）相匹配。考虑数据的地理特定性，因为所提供的信息涉及在韩国首尔以东大约50公里的仁川市进行的操作。足迹计算是特定于场地的，并且可能不代表其他地点的条件。用户需要考虑该过程的各个阶段和条件是否与他们自己项目的特点一致，当应用这些数据时。

## Review details
清单： 内部审查通过几个迭代步骤完成，涉及原始数据验证、原始数据记录、代表性、完整性、与 ISO 14040 和 14044 有关的建模的一致性。

## Data sources
- Kim, D.-H., Hwang, B.-R., Moon, D.-H., Kim, Y.-S. & Baek, K. Environmental assessment on a soil washing process of a Pb-contaminated shooting range site: a case study. ENVIRONMENTAL POLLUTION AND RISK ASSESSMENTS (2013) doi:
