# 废铝熔化和铸锭 ; 再生铝锭 ; 新铝废料

Dataset: ILCD process, Unit process, single operation
Geography: CN
Reference year: 2013
Classification: Unit processes / Materials production / Metals and semimetals
Generated by: 常慧敏, huiminchang@tsinghua.edu.cn
Owner: 天工LCI数据工作小组
Review: Dependent internal review by 天工LCI数据工作小组
Amounts: no units in this file; such an amount is in the reference unit of its flow, which a separate flow dataset defines
copyright: false
licenseType: Free of charge for all users and uses

## General comment
该工艺描述了废铝循环再利用以生产再生铝锭的过程。再生铝锭可在包括汽车、建筑和包装等各种行业中使用，用于生产不需要原铝高纯度的零部件。

## Reference product
- secondary aluminium ingot: 1000; software or database
  Aluminium ingot (secondary) [kg]

## Inputs
- electricity, high voltage, aluminium industry: 397.166; software or database
  Electricity [kWh]
- aluminium scrap, new: 1047.51; software or database
  Processed aluminium scrap [kg]
- argon, liquid: 0.4666; software or database
  Argon [kg]
- chlorine, liquid: 2.0646; estimated
  Chlorine [kg] ; EU-28 used as no specific data for CN and NO available
- quicklime, in pieces, loose: 3.9872; estimated
  Quicklime [kg] ; EU-28 used as no specific data for CN and NO available
- nitrogen, liquid: 16.2689; estimated
  Nitrogen [kg] ; EU-28 used as no specific data for CN and NO available
- oxygen, liquid: 0.1566; estimated
  Oxygen gaseous [kg] ; EU-28 used as no specific data for CN and NO available
- potassium chloride: 122.281; estimated
  Potassium chloride [kg] ; German dataset used as no specific data for CN and NO available
- sodium chloride, powder: 285.323; estimated
  Sodium chloride (salt) [kg] ; EU-28 used as no specific data for CN and NO available
- sodium hydroxide, without water, in 50% solution state: 0.1918; estimated
  Caustic soda (100%) [kg] ; EU-28 used as no specific data for CN and NO available
- sulfuric acid: 0.0303; estimated
  Sulphuric acid (96%) [kg] ; EU-28 used as no specific data for CN and NO available
- freshwater: 331.175; software or database
  Water (fresh water) [kg]
- heat, district or industrial, natural gas: 4789.42; software or database
  Thermal energy from natural gas [MJ]

## Outputs
All rows: software or database
- chloride: 0.02272
  Chloride (to fresh water) [kg]
- Chemical Oxygen Demand (COD): 0.00121
  Chemical oxygen demand (COD) [kg]
- BOD5, Biological Oxygen Demand: 0.00032
  Biological oxygen demand (BOD) [kg]
- Heavy metals to water: 5.3e-5
  Heavy metals to water [kg]
- carbon dioxide (fossil),carbon dioxide (fossil): 0.00729
  Carbon dioxide [kg]
- Chlorine: 0.00237
  Chlorine [kg]
- Dust: 0.2829
  Dust [Particles to air]
- hydrogen chloride: 0.0881
  Hydrogen chloride [kg]
- hydrogen fluoride: 0.02577
  Hydrogen fluoride [kg]
- lead: 0.00108
  Lead (+II) [kg]
- mercury: 7.96e-8
  Mercury (+II) [kg]
- methane (fossil): 0.00039
  Methane [kg] ; Methane [Organic emissions to air (group VOC)]
- Nitrogen oxides: 0.21237
  Nitrogen dioxide [kg]
- Nitrogen oxides: 0.00037
  Nitrous oxide [kg]
- sulfur dioxide: 0.02377
  Sulphur dioxide [kg]
- VOC, volatile organic compounds, unspecified origin: 0.0882
  VOC [kg]
- aluminium: 0.0763
  Aluminium [kg]
- Copper: 0.0021
  Copper (+II) [kg]
- Lead: 3.81e-5
  Lead (+II) [kg]
- Zinc: 0.00127
  Zinc (+II) [kg]

## Data selection and combination
为了获得可靠的研究结果，我们考虑了最新的和有代表性的数据。如果 GaBi "专业与推广 "数据库（SP 39）或文献中提供了特定地区或国家的数据，则使用这些数据。如果找不到特定地区的数据，则使用该国的可比数据或全球数据。为保持一致性，如果有相同来源和年份的数据，则使用相同来源和年份的数据。由于数据的可获得性，如果某些输入和背景过程在总输入质量中所占比例低于 1%，则本研究不考虑这些输入和背景过程。相反，由于许多不同的收集商、加工商和精炼商都采用了不同的回收方法，因此不存在既定的二次生产流程（Green 等人，2007 年）。本研究使用了铝业协会提供的 2013 年二次生产 LCI 数据（铝业协会，2013 年；国际铝业协会，2017a；国际铝业协会，2017b）。对一个示范案例进行了研究，以证明对特定数据集的考虑是合理的。在这项研究中，主要做了两方面的改变： 1）增加了单独的废铝收集流程；2）假定盐的投入量较高，因为许多消息来源称回收流程结束时通常会残留大量盐渣（欧洲铝业协会，2018 年；Tsakiridis，2012 年）。

## Use advice
使用此数据集时，应将其整合到涉及二次铝生产的工艺中。确保使用相同来源和年份的数据以保证方法论上的一致性。请注意，一些贡献少于总质量1%的输入和背景过程没有被考虑。对于二次生产，参考铝业协会2013年提供的数据，并在回收过程中考虑如单独的铝废料收集和增加的盐输入等变化。记住，如果有区域特定数据应优先使用；然而，如果无法获取地区数据，则可以使用国家或全球数据作为替代。

## Review details
清单： 内部审查通过几个迭代步骤完成，涉及原始数据验证、原始数据记录、代表性、完整性、与 ISO 14040 和 14044 有关的建模的一致性。

## Data sources
- Luthin, A., Backes, J. G. & Traverso, M. A framework to identify environmental-economic trade-offs by combining life cycle assessment and life cycle costing – A case study of aluminium production. Journal of Cleaner Production 321, 128902 (2021).
