# 铝再生 ; 再生铝锭 ; 废铝 ; 2009年

Dataset: ILCD process, Unit process, single operation
Geography: CN
Reference year: 2021
Classification: Unit processes / Materials production / Metals and semimetals
Generated by: 蔡梓萌, caizm6178@163.com
Owner: 天工LCI数据工作小组
Review: Dependent internal review by 天工LCI数据工作小组
Amounts: no units in this file; such an amount is in the reference unit of its flow, which a separate flow dataset defines
copyright: false
licenseType: Free of charge for all users and uses

## General comment
从该过程中获得的再生铝锭用于汽车、建筑、电子和包装工业等多个领域。这些铝锭是通过回收操作从废铝中制成的，作为生产铝产品的原料，与原铝生产相比，其能耗较低。

## Time period
文献发表日期

## Reference product
- secondary aluminium ingot: 1000; missing unimportant
  ingot

## Inputs
- electricity, high voltage, aluminium industry: 925.2; missing unimportant
  electricity
- aluminium scrap, unspecified: 1350; missing unimportant
  aluminum scrap

## Data selection and combination
本研究的数据参考了PA、SA、电力等背景数据的LCA数据。PA数据来自统计数据源，SA数据主要来自文献。背景数据主要来自中国科学院生态环境研究中心CASRCEES 2018建立的中国本地化LCA数据库，涵盖能源、材料、交通、废物管理等LCA数据。

## Use advice
在使用此LCA数据集时，请确保所有建模均符合数据集提供的技术范围，并考虑2009年的技术使用情况。由于PA和SA数据分别来自统计来源和文献，建议核实数据的相关性，并在必要时更新数据以反映当前实践。应理解CAS RCEES 2018数据库的区域背景并特定于中国，所以使用背景数据时需特别注意。必须严格遵循提供的方法论指导，特别是在系统边界、分摊程序以及生命周期分析中回收处理的建议。

## Review details
清单： 内部审查通过几个迭代步骤完成，涉及原始数据验证、原始数据记录、代表性、完整性、与 ISO 14040 和 14044 有关的建模的一致性。

## Data sources
- Ding, N., Liu, N., Lu, B. & Yang, J. Life cycle greenhouse gas emissions of aluminum based on regional industrial transfer in China. J. Ind. Ecol. 25, 1657–1672 (2021).
