# Existing hydrometallurgy process fo ternary lithium batteries

Dataset: ILCD process, Unit process, single operation
Geography: CN
Reference year: 2018
Classification: Materials production / Metals and semimetals
Functional unit: using 1 kWh as the functionalunit
Generated by: Pengfei, pengfei24@email.ncu.edu.cn
Review: Dependent internal review by Tiangong LCI Data Working Group
Amounts: no units in this file; such an amount is in the reference unit of its flow, which a separate flow dataset defines
copyright: false

## General comment
First, the EoL LFP batteries were disassembled and crushed. The processed battery material was then dissolved in an acid-base solution to extract some of the valuable metal elements. Finally, decontamination and purification were performed to obtain Li(NixCoyMn1-x-y)O2.

## Reference product
- EoL NCM battery: 3.6; input; article inperiodical

## Inputs
All rows: article inperiodical
- Sulphuric acid: 9.54
- sodium hydroxide: 5.79
- Hydrogen peroxide (30%): 3.25
  Hydrogen peroxide production mix/DE
- Lithium carbonate: 0.39
  Lithium carbonate, production mix/CN
- Electricity: 11.83
- natural gas: 6.81, 6.81 (2 entries)

## Outputs
- carbon dioxide: 0.18; article inperiodical
- copper: 0.04; article inperiodical
- Ni-rich NMC: 2.63; article inperiodical
- aluminium: 0.14; article inperiodical

## Data selection and combination
The data come from multiple papers and are difficult to distinguish.

## Review details
Inventory: The internal review was done by several iteration steps concerning raw data validation, raw data documentation, representativity, completeness and consistency of modelling with regard to ISO 14040 and 14044.

## Data sources
- Wang, Y. et al. Environmental impact assessment of second life and recycling for LiFePO4 power batteries in China. Journal of Environmental Management 314, 115083 (2022).
