# Electricity production ; Electricity ; Thermal power (80.0%) + hydropower (12.2%) + wind power (3.7%) + solar power (4.1%)

Dataset: ILCD process, Partly terminated system
Geography: JX-CN
Reference year: 2019
Classification: Energy carriers and technologies / Electricity
LCI method principle: Other
Generated by: Ruoxi Xiong, xiongrx0126@163.com
Owner: Tiangong LCI Data Working Group
Review: Dependent internal review by Tiangong LCI Data Working Group
Amounts: no units in this file; such an amount is in the reference unit of its flow, which a separate flow dataset defines
copyright: false
licenseType: Free of charge for all users and uses

## General comment
Forms of electricity generation include thermal power, hydropower, wind power and solar power

## Time period
Calculated based on data from the 2019 Energy Statistics Yearbook

## Technical purpose
This dataset describes the mixture of electricity generation comprising thermal power (80.0%), hydropower (12.2%), wind power (3.7%), and solar power (4.1%), which is used in a wide array of applications from residential electricity supply to industrial power demands. The electricity produced can supply various sectors, including household, commercial, industrial, and agricultural sectors requiring electrical power for operation.

## Reference product
- Electricity: 3.6; calculated

## Outputs
- carbon dioxide: 0.632; calculated
- sulfur dioxide: 0.000105; calculated
- Nitrogen oxides: 0.000169235; calculated
- Dust (unspecified, from stack): 2.1779e-5; calculated

## Data treatment and extrapolations
For the accounting method, please refer to the "Enterprise Greenhouse Gas Emissions Accounting Methods and Reporting Guidelines for Power Generation Facilities". Different forms of power generation and fuel consumption come from Chapter 3 (Energy Production) and Chapter 6 (Regional Energy Balance Sheet) in the "China Energy Statistical Yearbook 2020". The fuel parameters such as low calorific value and carbon content per unit calorific value used to calculate the carbon dioxide emission factor come from the "2019 China Regional Power Grid Carbon Dioxide Baseline Emission Factor Calculation Instructions OM" and the "Enterprise Greenhouse Gas Emission Accounting Method and Reporting Guide for Power Generation Facilities" 》

## Use advice
When using this dataset for Life Cycle Assessment (LCA), users should ensure that the electricity mix is representative of the region and timeframe relevant to their assessment. The carbon emission factors provided should be interpreted cautiously as they are based on the 2019 Energy Statistics Yearbook and may not reflect current or future carbon intensities. For modeling and reporting, users should refer to the given methodological sources, specifically the 'Enterprise Greenhouse Gas Emissions Accounting Methods and Reporting Guidelines for Power Generation Facilities' and ensure that calculations are consistent with local accounting practices and guidelines.

## Review details
Inventory: The internal review was done by several iteration steps concerning raw data validation, raw data documentation, representativity, completeness and consistency of modelling with regard to ISO 14040 and 14044.

## Data sources
- 熊若熙. 中国电力生产和消费二氧化碳与污染物排放因子核算. (清华大学, 2023).
