# Wood pulp to make paper;copy paper

Dataset: ILCD process, Unit process, black box
Geography: SD-CN
Classification: Materials production / Paper and cardboards
Functional unit: 1t of copy paper.
LCI method principle: Attributional
Generated by: Yixiang Gao, 22210740040@m.fudan.edu.cn
Owner: Tiangong LCI Data Working Group
Review: Dependent internal review by Tiangong LCI Data Working Group
Amounts: no units in this file; such an amount is in the reference unit of its flow, which a separate flow dataset defines
copyright: false
licenseType: Free of charge for all users and uses

## General comment
The purpose of the life cycle assessment study of wood pulp production of copy paper is to quantify the resource consumption and environmental impacts behind the production of 1t of copy paper from wood pulp, which is divided into four parts: pulping, paper copying, transport, and waste treatment.

## Technical purpose
The data set representing wood pulp paper production for copy paper is used to quantify the resource consumption and environmental impact associated with the production of 1 ton of copy paper. The process is relevant for life cycle assessment studies and includes pulp making, paper forming, transportation, and waste treatment as its major components. Copy paper produced using wood pulp technology is significant within the paper production industry in Shandong Province, highlighting its importance and representativeness for such studies. The high standards for hardness and brightness in copy paper production justify the selection of wood pulp processes over others.

## Reference product
- copy paper: 1000; measured

## Inputs
All rows: measured
- hard coal: 6.17, 308.7 (2 entries)
  coal(pulping stage)
- natural gas: 18.4
  natural gas(pulping stage)
- water: 26.54, 1.57 (2 entries)
  water(pulping stage)
- Fuel Oil: 80.33
  Oil(pulping stage)
- Wood: 1381.72
  forest(pulping stage)
- sodium hydroxide: 18
  sodium hydroxide(pulping stage)
- Chlorine Dioxide: 10
  ClO2(pulping stage)
- hydrogen peroxide: 6, 78 (2 entries)
  hydrogen peroxide(pulping stage)
- Sodium sulfide: 1
  sodium sulfide(pulping stage)
- sulfuric acid: 12
  sulfuric acid(pulping stage)
- hard coal: 458.13
  coal(papermaking stage)
- water: 6.78
  water(papermaking stage)
- Fuel Oil: 1.25
  Oil(papermaking stage)
- Starch: 48
  starch(papermaking stage)
- Filler Material: 23
  filler(papermaking stage)
- Alkyl Ketene Dimer: 12
  AKD(papermaking stage)
- Optical Brightening Agent: 8
  Whitening agent(papermaking stage)
- Fuel Oil: 24.52
  Oil(Transportation stage)
- hard coal: 2.92
  coal(Three-waste treatment stage)
- water: 0.29
  water(Three-waste treatment stage)
- Electricity: 1425.6
  electricity(pulping stage)
- Waste paper: 1323
  waste paper(pulping stage)
- Sodium silicate: 34
  sodium silicate(pulping stage)
- sodium hydroxide: 49
  caustic soda(pulping stage)
- Saponifier: 3
  saponifier(pulping stage)

## Outputs
All rows: measured
- carbon dioxide: 300, 979 (2 entries)
  CO2(pulping stage)
- Nitrogen oxides: 1.02, 10.5 (2 entries)
  NOx(pulping stage)
- sulfur dioxide: 2.27, 6.87 (2 entries)
  SO2(pulping stage)
- methane: 0.0166
  CH4(pulping stage)
- carbon monoxide: 3.95
  CO(pulping stage)
- Total Suspended Particulate: 0.0386
  particulates(pulping stage)
- chemical oxygen demand: 9.45
  COD(pulping stage)
- biological oxygen demand: 1.01
  BOD5(pulping stage)
- Adsorbable Organic Halide: 0.062
  AOX(pulping stage)
- nitrogen, total (excluding N2): 0.15
  TN(pulping stage)
- phosphorus, total: 0.0147
  TP(pulping stage)
- nitrate: 0.00966
  nitrate(pulping stage)
- Total Suspended Particulate: 0.9
  TSP(pulping stage)
- Waste solid: 42.9
  Solid Waste(pulping stage)
- hazardous waste (unspecified): 0.075
  Hazardous Waste(pulping stage)
- carbon dioxide: 0.0893
  CO2(papermaking stage)
- Nitrogen oxides: 6.47
  NOx(papermaking stage)
- sulfur dioxide: 8.37
  SO2(papermaking stage)
- methane: 0.00435
  CH4(papermaking stage)
- carbon monoxide: 20
  CO(papermaking stage)
- Total Suspended Particulate: 0.285
  particulates(papermaking stage)
- nitrate: 0.0109
  nitrate(papermaking stage)
- Waste solid: 5.78
  Solid Waste(papermaking stage)
- hazardous waste (unspecified): 0.11
  Hazardous Waste(papermaking stage)
- carbon dioxide: 893
  CO2(Transportation stage)
- Nitrogen oxides: 0.153
  NOx(Transportation stage)
- sulfur dioxide: 0.203
  SO2(Transportation stage)
- methane: 0.00099
  CH4(Transportation stage)
- carbon monoxide: 0.153
  CO(Transportation stage)
- Total Suspended Particulate: 0.0359
  particulates(Transportation stage)
- carbon dioxide: 5.66
  CO2(Three-waste treatment stage)
- Nitrogen oxides: 0.0412
  NOx(Three-waste treatment stage)
- sulfur dioxide: 0.0531
  SO2(Three-waste treatment stage)
- methane: 2.77e-5
  CH4(Three-waste treatment stage)
- carbon monoxide: 0.127
  CO(Three-waste treatment stage)
- Total Suspended Particulate: 0.00182
  particulates(Three-waste treatment stage)
- chemical oxygen demand: 0.14
  COD(Three-waste treatment stage)
- biological oxygen demand: 0.022
  BOD5(Three-waste treatment stage)
- nitrogen, total (excluding N2): 0.00956
  TN(Three-waste treatment stage)
- phosphorus, total: 0.0011
  TP(Three-waste treatment stage)
- Total Suspended Particulate: 0.0601
  TSP(Three-waste treatment stage)

## Data selection and combination
The data sources of this paper are, on the one hand, in-depth field research of major paper-making enterprises in Shandong Province to obtain first-hand information, and on the other hand, reviewing the annual statements of major paper-making enterprises in Shandong Province, the China Paper Yearbook and the annual report of the China Paper Association, as well as relevant literature and other means.

## Use advice
When using this data set for life cycle assessment of wood pulp paper production for copy paper, care should be taken to account for all chemistries involved in the pulping and paper-making processes, regardless of their quantities. While typical cutoff thresholds for considering chemicals in assessments are those which mass over 1%, this data set includes all available chemical data, even for those substances used in minor quantities with significant environmental impact. This approach minimizes errors and provides a more comprehensive view of the process. It is recommended that users verify the relevance and timeliness of the data, especially given the potential variance in processes and environmental factors. Any updates on production methods or environmental regulations should be considered.

## Review details
Inventory: The internal review was done by several iteration steps concerning raw data validation, raw data documentation, representativity, completeness and consistency of modelling with regard to ISO 14040 and 14044.

## Data sources
- 葛振香. 基于LCA的山东省造纸业可持续发展研究. (山东师范大学, 2017).
