# Fattening pig production | fertilizer production

Dataset: ILCD process, Unit process, single operation
Geography: LN-CN
Reference year: 2010
Classification: Materials production / Other mineralic materials
Functional unit: The evaluation unit was 1000 fattening pigs
Generated by: Rui Yang, 1632707028@qq.com
Review: Dependent internal review by Tiangong LCI Data Working Group
Amounts: no units in this file; such an amount is in the reference unit of its flow, which a separate flow dataset defines
copyright: false

## General comment
In 2010, the yield of corn, soybean and wheat per hectare in Liaoning Province was 5 497 kg, 2 763 kg and 4 933 kg respectively. The coefficient of conversion from soybean cake to soybean was 1.19, and the coefficient of conversion from wheat bran to wheat was 6.67. Nitrogen (N), phosphorus (P2O5) and potassium (K2O) fertilizer (converted) are 153.9, 11.9 and 2.7 kg applied per hectare for corn production, and nitrogen (N), phosphorus (P2O5) and potassium (K2O) fertilizer (converted) are 24.5, 2.9 and 1.2 kg applied per hectare for soybean production. The nitrogen (N), phosphorus (P2O5) and potassium (K2O) fertilizers (converted) applied per hectare of wheat were 136.2, 19.1 and 2.3 kg, respectively.

## Geography
The yield per hectare of corn, soybean and wheat in Liaoning Province in 2010 was ··

## Time period
The yield per hectare of corn, soybean and wheat in Liaoning Province in 2010 was respectively

## Technology and included processes
The content of evaluation includes: direct gas emission and indirect pollutant emission from power consumption in the process of fertilizer production

## Reference product
- pig: 1000
  1000 pigs

## Inputs
- nitrogen: 10300; calculated
- phosphorus: 1060; calculated
  Phosphorus pentoxide
- potassium: 188; calculated
  potassium oxide
- Electricity: 64080

## Outputs
All rows: measured
- carbon dioxide (fossil): 127881
- carbon monoxide: 72.83
- nitrogen, total (excluding N2): 492.21
  1 NOx
- sulfur oxides: 513.66
  1Sulfur oxides
- methane: 46.28

## Deviations from the LCI method approaches
In this study, LCA method was applied to evaluate the environmental impact of fattening pig production on large-scale chemical fattening pig farms in Liaoning Province

## Data selection and combination
The data in this paper were collected from 36 large-scale chemical fattening pig farms in Liaoning province. The potential impacts of global warming, environmental acidification and eutrophication in the process of fattening pig production were calculated with reference to the relevant data provided by Liaoning Statistical Yearbook.

## Review details
Inventory: The internal review was done by several iteration steps concerning raw data validation, raw data documentation, representativity, completeness and consistency of modelling with regard to ISO 14040 and 14044.; Documentation: The review of the documentation was performed by Ecobilan and is in compliance with ISO 14040 and 14044. The data set documentation is correct in view of the appropriateness of the information provided. It includes all relevant information in view of data quality and scope of application of the respective LCI result.

## Data sources
- 刘鸣达, 赵妍, 刘显军, & 王耀晶. 辽宁省育肥猪生产环境影响的生命周期评价. 农业环境科学学报 31, 1250–1255 (2012).
