# 土壤和地下水修复;原位;土壤生物通风;注汽井

Dataset: ILCD process, Unit process, single operation
Geography: US
Reference year: 2009
Classification: Unit processes / Other Services / Repair and maintenance
Generated by: 王宁, wang_ning@caep.org.cn
Owner: 天工LCI数据工作小组
Review: Dependent internal review by 天工LCI数据工作小组
Amounts: no units in this file; such an amount is in the reference unit of its flow, which a separate flow dataset defines
copyright: false
licenseType: Free of charge for all users and uses

## General comment
使用聚氯乙烯、膨润土、硅石和膨润土等建造注入井

## Technology and included processes
使用膨润土、石英砂、聚氯乙烯、混凝土建造注入井

## Technical purpose
使用聚氯乙烯、膨润土、硅石和混凝土建造注入井的过程意在环境修复过程中，具体用于土壤和地下水的修复。此处应用的修复方法是原位土壤生物通风，注入井促进土壤通风，以促进污染物的生物降解。

## Reference product
- injection well: 1; estimated

## Inputs
- bentonite: 600; estimated
- sand: 1100; estimated
- Polyvinyl chloride: 16; estimated
- cement, unspecified: 150; estimated

## Use advice
当使用此数据集对土壤和地下水修复项目进行生命周期评估时，整合者应计算与提取和加工PVC、膨润土、石英砂和混凝土等原材料相关的环境影响。建议还应考虑注入井的长期性能和潜在泄漏或故障，这些因素可能影响修复过程的有效性。

## Review details
清单： 内部审查通过几个迭代步骤完成，涉及原始数据验证、原始数据记录、代表性、完整性、与 ISO 14040 和 14044 有关的建模的一致性。

## Data sources
- Dhaliwal, H. Sustainable site remediation : a life cycle assessment approach.
