# 驱动器的制造 ; 一个1.5 MW 风轮机变桨驱动器

Dataset: ILCD process, Unit process, single operation
Geography: NMG-CN
Reference year: 2017
Classification: Unit processes / Systems / Other machines
Functional unit: The functional unit is 1.5 MW wind turbine
LCI method principle: Attributional
LCI method approaches: Allocation
Generated by: 赵云志, ll10088@163.com
Owner: 天工LCI数据工作小组
Review: Dependent internal review by 天工LCI数据工作小组
Amounts: no units in this file; such an amount is in the reference unit of its flow, which a separate flow dataset defines
copyright: false
licenseType: Free of charge for all users and uses

## General comment
该变桨驱动器专为1.5兆瓦风力发电机设计制造。这些驱动器对于调整叶片角度以控制转子速度并根据风力条件优化发电功率至关重要。变桨驱动器适用于大型风电场，特别是中国内蒙古东北部这类风电装机量大的地区。其生命周期数据在评估风力发电项目生产制造阶段的环境影响方面非常有价值。

## Geography
风电功率参数的数据来自Wang ( 2012 )。以装有33台国产1.5兆瓦( MW )风电机组的风电场为案例，分析其环境影响及其替代效应。该风电场位于我国风电装机最多的省份- -内蒙古东北部。

## Reference product
- Rotors pitch drive of wind turbine: 1; estimated

## Inputs
- iron: 2400; calculated
  Steel and iron

## Deviations from the LCI method approaches
风电的生命周期清单如下所示。生产制造阶段包括风电机组、变电站、电缆的生产，这些设备消耗大量能源，排放污染物( Xue et al . , 2015)。

## Use advice
数据集用户应考虑风力发电生命周期清单中强调的具体环境影响，包括风力发电机、变电站和电缆生产过程中的能源消耗和污染物排放。关注数据的技术适用性，确保其与类似的风力发电项目相关。建议在将此数据应用于其他地点时考虑可能的区域能源结构和环境政策差异。此外，应在评估中包括替代效应以及使用风电作为替代其他能源形式的环境效益。

## Review details
清单： 内部审查通过几个迭代步骤完成，涉及原始数据验证、原始数据记录、代表性、完整性、与 ISO 14040 和 14044 有关的建模的一致性。

## Data sources
- Li, H., Jiang, H.-D., Dong, K.-Y., Wei, Y.-M. & Liao, H. A comparative analysis of the life cycle environmental emissions from wind and coal power: Evidence from China. Journal of Cleaner Production 248, 119192 (2020).
