# 湿蒸法棉布染整加工;印染棉布;磨毛

Dataset: ILCD process, Unit process, single operation
Geography: SZ-JS-CN
Reference year: 2012
Classification: Unit processes / Energy carriers and technologies / Heat and steam
Generated by: 段颖凡, 1300925579@qq.com
Owner: 天工LCI数据工作小组
Review: Dependent internal review by 天工LCI数据工作小组
Amounts: no units in this file; such an amount is in the reference unit of its flow, which a separate flow dataset defines
copyright: false
licenseType: Free of charge for all users and uses

## General comment
磨毛是印染过程中的一种处理，旨在通过摩擦或机械磨擦，使棉布表面的纤维疏松并形成毛发。这个过程通常涉及将棉布经过特殊设备，例如毛毡辊或磨砂辊，以增加纤维的起毛度，从而提高织物的柔软度和手感。

## Geography
本研究选取江苏省某印染企业为重点调研对象，该企业位于长三角经济圈中的常熟。

## Technical purpose
该生产过程是指湿蒸法棉布染整加工，包括印染棉布和磨毛处理。这是纺织行业中用于赋予棉布所需视觉吸引力和触觉特性的专门过程。具体来说，提到的过程适用于生产高品质的印花和磨毛棉织物，可能用于时尚服装，家居纺织品和其他纺织应用。

## Reference product
- Cotton Fabric: 167; measured

## Inputs
- Electricity: 706; measured
- Standard coal: 981; measured
- Crude coal: 186; calculated
- Cleaned coal: 461; calculated
- Fuel Oil: 3.97; calculated
- heavy fuel oil: 1.2; calculated
- Diesel oil: 5.46; calculated
- Coke Oven Gas: 7.29; calculated
- natural gas: 0.0934; calculated
- process steam: 3.15e7; measured
- Softener: 69.8; measured

## Outputs
- carbon dioxide (fossil): 2900; calculated
- carbon monoxide (fossil): 0.484; calculated
- sulfur dioxide: 2.2; calculated
- methane (fossil): 13.6; calculated
- Nitrogen oxides: 0.945; calculated
- nitrous oxide: 0.0431; measured
- particles (> PM10): 1.61; calculated
- ammonia: 1.31e-5; measured
- non-methane volatile organic compounds: 0.00474; measured
- waste water - untreated: 1450; measured
- chemical oxygen demand: 1.67; calculated
- Suspended solids, unspecified,Suspended solids, unspecified: 0.23; calculated
- lead: 1.46e-5; calculated
- mercury: 3.07e-7; calculated
- fluorine: 2.77e-6; calculated
- cadmium: 5.43e-7; calculated
- arsenic: 1.25e-5; calculated

## Use advice
在生命周期评估中，应参考所调研企业提供的清洁生产报告中蒸汽与导热油锅炉的能耗比例，其中两种类型锅炉的煤消耗比为17:1。每个处理步骤如煮练、漂白、丝光、磨毛、平幅水洗、培烘和轧染等均使用蒸汽，并有不同的烘缸需求。假设每个烘干烘缸的蒸汽消耗量相同。烘干过程中使用蒸汽的比例为2:1:1:1:1:2。在核算能源消耗数值数据时，必须准确反映这些比例。研究重点是位于江苏省长三角经济圈的常熟市的一家印染企业。

## Review details
清单： 内部审查通过几个迭代步骤完成，涉及原始数据验证、原始数据记录、代表性、完整性、与 ISO 14040 和 14044 有关的建模的一致性。

## Data sources
- 朱亚楠. 棉布连续轧染工艺生命周期环境影响评价. (南京大学, 2012).
