# 基础的建设 ; 1.5 MW 风轮机铁塔基础

Dataset: ILCD process, Unit process, single operation
Geography: NMG-CN
Reference year: 2017
Classification: Systems / Construction
Functional unit: The functional unit is 1.5 MW wind turbine
LCI method principle: Attributional
LCI method approaches: Allocation
Generated by: 赵云志, ll10088@163.com
Owner: 天工LCI数据工作小组
Review: Dependent internal review by 天工LCI数据工作小组
Amounts: no units in this file; such an amount is in the reference unit of its flow, which a separate flow dataset defines
copyright: false
licenseType: Free of charge for all users and uses

## General comment
该数据集描述了1.5兆瓦风力发电机铁塔基础的建设阶段。该过程数据专门适用于制造风力发电场的阶段，在这个阶段将分析环境影响（例如，能源消耗和排放）。案例研究侧重于内蒙古的风电场和国产风力涡轮机，适用于类似气候和地理区域的可再生能源项目和大规模风电装置。

## Geography
风电功率参数的数据来自Wang ( 2012 )。以装有33台国产1.5兆瓦( MW )风电机组的风电场为案例，分析其环境影响及其替代效应。该风电场位于我国风电装机最多的省份- -内蒙古东北部。

## Reference product
- Foundation: 1; article inperiodical

## Inputs
- Concrete: 300; article inperiodical
- iron: 35000; article inperiodical

## Deviations from the LCI method approaches
风电的生命周期清单如下所示。生产制造阶段包括风电机组、变电站、电缆的生产，这些设备消耗大量能源，排放污染物( Xue et al . , 2015)。

## Use advice
使用此数据集的用户在将数据应用于其他场景时，必须考虑内蒙古风电场的地理和技术特性。与其他能源相比，考虑本地化环境影响和替代效果的方法学含义是必须的。在评估类似风力涡轮机项目的环境性能时，应使用生命周期清单，确保对区域能源组合和技术变化进行调整。

## Review details
清单： 内部审查通过几个迭代步骤完成，涉及原始数据验证、原始数据记录、代表性、完整性、与 ISO 14040 和 14044 有关的建模的一致性。

## Data sources
- Li, H., Jiang, H.-D., Dong, K.-Y., Wei, Y.-M. & Liao, H. A comparative analysis of the life cycle environmental emissions from wind and coal power: Evidence from China. Journal of Cleaner Production 248, 119192 (2020).
