# 铝电解电容器生产 ; 浸泡前的元件 ; 绕线

Dataset: ILCD process, Unit process, single operation
Geography: JS-CN
Reference year: 2020
Classification: Unit processes / Materials production / Metals and semimetals
Generated by: 常慧敏, huiminchang@tsinghua.edu.cn
Owner: 天工LCI数据工作小组
Review: Dependent internal review by 天工LCI数据工作小组
Amounts: no units in this file; such an amount is in the reference unit of its flow, which a separate flow dataset defines
copyright: false
licenseType: Free of charge for all users and uses

## General comment
绕线 ; 铝电解电容器 (AEC) 生产 ; 420V 680uf

## Time period
The investigated manufacturer produced about 1.183 billion AECs of all kinds in 2020.

## Technical purpose
420V 680uf规格的铝电解电容器（AECs）主要用于电子行业，用于电源平滑、滤波或各种设备中的能量存储，这些应用需要稳定可靠的电容器。它们适合高压和大容量需求。

## Reference product
- elements before soak (from winding): 1000; measured
  Elements(before soak) [pcs]

## Inputs
All rows: measured
- electricity, high voltage, aluminium industry: 15.9984
  Electricity [kWh]
- aluminium collector foil, for Li-ion battery: 27.226
  Anode formed foil [kg]
- cathode, for aluminium electrolysis: 9.524
  Cathode etched foil [kg]
- Separator Paper Coil,Separator Paper Coil: 7.016
  Separator paper coil [kg]
- sealing tape, aluminium/PE, 50 mm wide: 0.103
  Tape [kg]
- section bar extrusion, aluminium: 0.07
  Tab [kg] ; CN: aluminium sheet in Gabi Database

## Outputs
- aluminium collector foil, for Li-ion battery: 0.004; measured
  Scraps of anode formed foil [kg]
- cathode, for aluminium electrolysis: 0.004; measured
  Scraps of cathode etched foil [kg]
- waste paper, sorted: 0.004; measured
  Scraps of separator paper [kg]

## Data selection and combination
电容器生产的库存数据来自 AEC 位于中国江苏省的生产工厂。每道工序的 LCI 数据收集的截止标准是至少覆盖输入流和输出流 95% 的质量和能量。阳极箔生产和阴极箔生产的库存数据是根据生产工艺和相应工艺参数分析获得的。上游数据（即铝锭、分选纸、运输、电力和水）来自 Gabi 软件（版本：10.6.1.35）。具体而言，《中国电力年鉴》中的中国电网概况以 2016 年为基准年。铝锭生产的基准年为 2015 年。无法获取的柠檬酸铵、五硼酸铵、NH4H2PO4 和 HBO3 数据是根据 Gabi 软件中现有材料（反应物）的化学方程式估算的。使用和报废阶段的库存数据是通过分析和计算获得的。

## Use advice
在使用铝电解电容器生产的清单数据进行生命周期评估时，请确保包括至少占所涉及物质和能量95%的所有输入和输出流量。所提供的数据特定于参考年份2015年和2016年的铝锭生产和中国电网概况。可能需要对照不同的时间框架或技术改进进行调整。从Gabi软件获取的铝锭、隔离纸和运输等上游过程的库存数据，在使用时必须了解其背后的假设和局限性。对于无法获得的数据，基于Gabi软件中现有材料的化学方程作出估算；用户必须考虑这些估算的不确定性。对于使用和终生阶段的数据，应依赖与所提供的清单分析和计算的方法论一致性。

## Review details
清单： 内部审查通过几个迭代步骤完成，涉及原始数据验证、原始数据记录、代表性、完整性、与 ISO 14040 和 14044 有关的建模的一致性。

## Data sources
- Zhang, C., Jing, J., Yun, L., Zheng, Y. & Huang, H. A cradle-to-grave life cycle assessment of high-voltage aluminum electrolytic capacitors in China. J. Clean. Prod. 370, (2022).
