# 温室西红柿生产

Dataset: ILCD process, Unit process, black box
Geography: CA
Reference year: 2006
Valid until: 2010
Classification: Materials production / Agricultural production means
Functional unit: 1 kg of packaged tomatoes at the greenhouse gate
Generated by: 朱娴, zzhu0918@163.com
Owner: 天工LCI数据工作小组
Review: Dependent internal review by 天工LCI数据工作小组
Amounts: no units in this file; such an amount is in the reference unit of its flow, which a separate flow dataset defines
copyright: false
licenseType: Free of charge for all users and uses

## General comment
温室种植使用化石燃料和电力进行气候控制。番茄种植幼苗，施肥，浇水，农药施用。收获一公斤散装番茄后，施用纸箱和塑料箱进行番茄包装成为一公斤包装西红柿

## Geography
位于加拿大的安大略省利明顿地区。

## Time period
主要数据是通过对安大略省利明顿的8个温室生产者进行调查收集的，并通过后续沟通进行核实。调查的目的是收集作业规模、产量、作业和维护数据(即根据水电费单计算的年度能源和水消耗量、化肥、杀虫剂、培养基的年度消耗量等)。这项研究代表了2006年至2010年各类技术(例如基础设施材料和供暖和灌溉技术)和管理系统(例如综合和常规虫害管理)的平均值。

## Technical purpose
温室西红柿生产的目的是为了培养和供应新鲜番茄。该过程使用由化石燃料和电力供能的先进气候控制系统来优化番茄植物的生长条件。从幼苗开始，通过控制施肥、浇水和施用农药来确保产品质量。收获后，番茄使用纸箱和塑料箱包装，制成便于分发的1公斤装包装西红柿单位。这种农业实践被设计用于本地和更广阔市场，这些市场需求新鲜、高质量的西红柿。

## Reference product
- Biological yield: 1; measured

## Inputs
All rows: measured
- Steel sections: 0.061
- Glass (formed & finished): 0.0032
- natural gas: 28.9
- electricity: 1.0008
- secondary fuel: 4.06
- Pesticide: 0.00023
- Irrigation water: 0.0184
- corrugated board boxes: 0.105
- Nitrogenous fertilizer: 0.022038
- Potassium fertilizer: 0.0036
- Aluminum scrap: 0.00024

## Outputs
- Plastic (unspecified): 0.00235; measured
- Waste (deposited, hibernating in ground, non elementary flow): 0.1529; measured

## Use advice
此数据集代表了2006年至2010年期间温室西红柿生产过程的平均足迹，包括能源和水消耗以及化肥和农药的输入，基于实际运营数据。在使用该数据进行生命周期评估（LCA）时，考虑此时间范围和技术可变性。适用于为类似温室操作设定基线、比较研究和操作基准。数据应针对当前或不同的运营条件进行更新或地域化，并且可能不代表较新技术或实践。在将此数据集成到更广泛的LCA研究时，应注意方法论的一致性，尤其是在与其他农业实践或产品进行比较时。

## Review details
清单： 内部审查通过几个迭代步骤完成，涉及原始数据验证、原始数据记录、代表性、完整性、与 ISO 14040 和 14044 有关的建模的一致性。
