# 土壤修复;异位修复;生物堆;施工准备;基础设施建设

Dataset: ILCD process
Geography: KR
Classification: Other Services / Repair and maintenance
Generated by: Sang Chunhui, sangch@mail.bnu.edu.cn
Owner: Tiangong LCI Data Working Group
Review: Dependent internal review by Tiangong LCI Data Working Group
Amounts: no units in this file; such an amount is in the reference unit of its flow, which a separate flow dataset defines
licenseType: Free of charge for all users and uses

## General comment
The described process involves the construction of a 600 m2 hard surface impermeable area for the in-situ biological heap remediation purpose within the infrastructure construction site. The biopile method is used for soil remediation, addressing contaminated soil through controlled biological degradation. It is specifically applied to treat soils with organic contaminants on a designed and engineered temporary platform.

## Reference product
- (unnamed flow): 600; article inperiodical

## Inputs
All rows: article inperiodical
- Diesel: 0.016
- gravel: 7.8
- sand: 60
- (unnamed flow): 58, 100 (2 entries)
- HDPE: 1.2
- polypropylene fibres (PP): 600

## Use advice
When utilizing this dataset, consider the specific scenario of in situ biopile soil remediation. Ensure to account for the environmental impacts of constructing the impermeable surface and the temporary nature of the remediation process. The dataset is pertinent to projects involving the remediation of organically contaminated soils on a mid-scale temporary platform, and should be adjusted for the scale and specifics of the project in question.

## Review details
Inventory: The internal review was done by several iteration steps concerning raw data validation, raw data documentation, representativity, completeness and consistency of modelling with regard to ISO 14040 and 14044.
