# 修复后土壤;生物通风;土壤原位修复;4年;2口通风井;6口监测井

Dataset: ILCD process, Unit process, black box
Geography: UM
Reference year: 2009
Classification: Unit processes / Other Services / Repair and maintenance
Functional unit: The functional unit is defined as remediation of 5000 yd 3 of soil. The design of the treatment options is generic, and lacks parameters such as site characteristics, hydrology and efficiency of technology.
Generated by: 杨欣桐, yangxt@caep.org.cn
Owner: 天工LCI数据工作小组
Review: Dependent internal review by 天工LCI数据工作小组
Amounts: no units in this file; such an amount is in the reference unit of its flow, which a separate flow dataset defines
copyright: false
licenseType: Free of charge for all users and uses

## General comment
生物通风的设计基于美国环保局指南手册《生物通气原理与实践》。通风井和监测点的数量基于手册提供的指南进行估计。本研究生物通风的处理时间使用已有研究的统计结果，即145个位点平均生物降解速率（KB）=3.29mg/kg/天。

## Geography
本研究使用的是一个假设的场地，且没有明确场地所在位置，因此采用作者所在的区域作为场地位置，即美国Newark

## Technology and included processes
生物通风的工艺参数包括：2个通风井（7m深，直径6.25 cm），影响半径10米；6个监测点位（7m深，直径20 cm）；鼓风机的功率为500 W；用到20t自卸车一辆，修复周期4年，人员安排包含修复过程中，有一个月每日需要10名工人，趋于48个月，每月需要2名工人,对于工人的个人交通，从家到工作地点的距离假设为30km。

## Technical purpose
本工艺旨在通过生物通风方法对受污染的土壤进行原位修复。应用特定于可以实施生物通风技术的场地，在原位促进微生物活动以降解有机污染物。这一特定设置基于一种通用模型设计，可在具有类似污染问题的不同地点使用，以EPA的《生物通气原理与实践》中的标准作为指南。适用于为期4年，覆盖5000立方码（约3822.77立方米）场地体积的中到大规模环境修复项目。

## Reference product
- Remediated soil: 3822.77; estimated
  功能单元定义为5000 yd 3土壤的修复（1yd3等于0.764554857984立方米,即修复方量约为3822.77 m3）。

## Inputs
All rows: estimated
- bentonite: 600
- sand: 1100
- polyvinylchloride resin (S-PVC): 16
- Mortar: 150
- Electricity: 63072
- Road Transport,Road Transport: 3e7
- transport in t*km: 6000
  运输总距离为300km，自卸车载重20吨
- contaminated soil: 3822.77

## Use advice
在使用此数据集时，用户应考虑模型的通用性。建议根据具体场地特征（包括当地水文条件和可能不同的技术效率参数）对模型进行调整。用户还应考虑与自己所在位置相关的技术适用性和限制，并寻求收集特定场地数据进行校准。对于工人和设备的运输估计可能需要修改以反映当地情况。为了进行精确的生命周期评估，用户应考虑土壤、气候和微生物种群的潜在变异性。

## Review details
清单： 内部审查通过几个迭代步骤完成，涉及原始数据验证、原始数据记录、代表性、完整性、与 ISO 14040 和 14044 有关的建模的一致性。

## Data sources
- Dhaliwal, Harnoor, "Sustainable site remediation : a life cycle assessment approach" (2009). Theses. 296.
