# 铝电解 ; 液态原铝 ; 拜耳法-水电 ; 冶金用氧化铝

Dataset: ILCD process, Partly terminated system
Geography: CN
Reference year: 2011
Classification: Unit processes / Materials production / Metals and semimetals
Generated by: 谢金良, jinliang.research@gmail.com
Owner: 天工LCI数据工作小组
Review: Dependent internal review by 天工LCI数据工作小组
Amounts: no units in this file; such an amount is in the reference unit of its flow, which a separate flow dataset defines
copyright: false
licenseType: Free of charge for all users and uses

## General comment
此通过水电拜耳法生产的液态原铝主要用于冶金应用。它用于生产高品质铝产品，在这些产品中金属的物理和化学属性是至关重要的。包括在汽车、航空航天、电子、建筑和包装行业等领域的应用。

## Time period
学位论文完成日期

## Reference product
- aluminium, primary, liquid: 1000; missing unimportant

## Outputs
- carbon dioxide (fossil),carbon dioxide (fossil): 25328.4; missing unimportant

## Use advice
在使用此数据集进行生命周期评估时，重要的是要注意生命周期边界是从铝土矿采矿到原铝的生产。这包括铝土的开采、氧化铝的生产、阳极的生产以及铝电解过程本身。资源消耗、能源使用和废弃物排放对环境的影响在这些阶段是重大的，并且应该是主要关注点。铝产品的运输、使用和回收对环境的影响被认为较小，因此被排除在评价系统之外。如石灰石和沥青的开采、生产和运输过程等辅助材料的影响也未进行评估。

## Review details
清单： 内部审查通过几个迭代步骤完成，涉及原始数据验证、原始数据记录、代表性、完整性、与 ISO 14040 和 14044 有关的建模的一致性。

## Data sources
- 李贵奇. 基于生命周期思想的环境评估模型及其在铝工业中的应用. (中南大学, 2011).
