# copper-based mixed waste recycling|Copper slag concentrate|slag flotation process|slag flotation

Dataset: ILCD process, Unit process, single operation
Geography: JX-CN
Reference year: 2020
Classification: Materials production / Other mineralic materials
Functional unit: We consider the functional unit of the recycling of copper-based mixed waste to be 1000 kg electrolytic copper.
LCI method principle: Attributional
LCI method approaches: Allocation - market value
Generated by: Peng Wang, 2867919560@qq.com
Review: Dependent internal review by Tiangong LCI Data Working Group
Amounts: no units in this file; such an amount is in the reference unit of its flow, which a separate flow dataset defines
copyright: false

## Geography
The typical case is a metal recycling enterprise located in Jiangxi Province, China,

## Technology and included processes
In the process of slag flotation, secondary slag with a high copper content is produced by slag 2 flotation and returned to smelting.

## Reference product
- Copper concentrates: 464.4; measured
  Copper slag concentrate 20% Cu需要补充

## Inputs
All rows: measured
- Copper-containing slag: 2932.7
  Copper-containing slag 1需要补充
- sodium sulfate: 1200
- transport in t*km,transport in t*km: 61.7119
  Transport
- turpentine: 0.6
  Turpentine
- Copper-containing slag: 2467.3
  Copper-containing slag 2(20%Cu）需要补充

## Outputs
- Tailings (deposited, hibernating in ground, non elementary flow): 4935.6; measured
  Tailings (deposited)

## Deviations from the LCI method approaches
Using the LCA-ReCiPe 2016 (Heijungs et al., 2017) characterization and normalization method (the midpoint and endpoint method), the life cycle inventory is converted into impact scores in multiple fields.

## Data selection and combination
foreground data and background data.

## Data treatment and extrapolations
GaBi 9.0 software is adopted to calculate the inventory, resource consumption, and waste emissions of the various copper-based mixed-waste recovery processes per unit mass.

## Review details
Inventory: The internal review was done by several iteration steps concerning raw data validation, raw data documentation, representativity, completeness and consistency of modelling with regard to ISO 14040 and 14044.; Documentation: The review of the documentation was performed by Ecobilan and is in compliance with ISO 14040 and 14044. The data set documentation is correct in view of the appropriateness of the information provided. It includes all relevant information in view of data quality and scope of application of the respective LCI result.

## Data sources
- Zhang, W. et al. Analyzing the environmental impact of copper-based mixed waste recycling-a LCA case study in China. Journal of Cleaner Production 284, 125256 (2021).
