# 市政污泥处理与处置;湿污泥 含水率70%-75%;与垃圾掺烧发电

Dataset: ILCD process, Unit process, single operation
Geography: CN
Classification: Unit processes / End-of-life treatment / Waste water treatment
Functional unit: The life cycle study boundary starts from the wet sludge (moisture content is about 70% ~ 75%) after mechanical compression and dewatering in the sewage treatment plant to the final disposal functional unit adopts 1t wet sludge after mechanical compression.
Generated by: 金思甜, 2331276@tongji.edu.cn
Owner: 天工LCI数据工作小组
Review: Dependent internal review by 天工LCI数据工作小组
Amounts: no units in this file; such an amount is in the reference unit of its flow, which a separate flow dataset defines
copyright: ['opt4ROkqig']
licenseType: Free of charge for all users and uses

## General comment
本计算以某垃圾焚烧处理厂为案例进行分析，其日处理城市生活垃圾1040ｔ，垃圾收到基水分含量为 49.38％。

## Technology and included processes
锅炉蒸发量 48ｔ/h，炉膛温度 870～1150℃汽轮发电机组满负荷运行为 16.6ＭＷ。

## Technical purpose
本市政污泥处理和处置流程主要用于管理来自污水处理厂的湿污泥，含水率在70%-75%之间。湿污泥在工厂内部运输，并与垃圾共同焚烧产生电力。该过程适用于市政废物管理设施，特别是那些实践共同焚烧作为管理废泥和生产能源的方式的设施。

## Reference product
- Sludge: 1000; input; estimated
  1t湿污泥（水分含 量在 70％ ～75％左右 ）

## Outputs
All rows: measured
- carbon monoxide (fossil): 0.85
  原文未区分biogenic和fossil，根据专家判断此处为fossil。
- carbon dioxide (fossil): 154.59
  原文未区分biogenic和fossil，根据专家判断此处为fossil。
- Nitrogen oxides: 2.059
- sulfur oxides: 1.22474
- hydrogen chloride: 0.226
- Flue dust: 0.39
  烟尘
- Electricity: 300.312

## Use advice
在使用此数据集进行生命周期评估时，请确保正确定义系统边界，从污水处理厂机械压缩脱水后含水率为70%-75%的湿污泥开始，到最终处置结束。强调与垃圾共同焚烧进行能量回收的过程，在能量平衡和排放计算中应考虑此环节。在使用此数据时，应特别注意废物处理和能源生产之间的分配程序。

## Review details
清单： 内部审查通过几个迭代步骤完成，涉及原始数据验证、原始数据记录、代表性、完整性、与 ISO 14040 和 14044 有关的建模的一致性。

## Data sources
- 廖艳芬,漆雅庆,马晓茜.城市污水污泥焚烧处理环境影响分析[J].环境科学学报,2009,29(11):2359-2365.DOI:10.13671/j.hjkxxb.2009.11.015.
