# 高浓卤水生产 ; 高浓卤水（锂含量4.3%） ; 太阳池蒸发法 ; 阿根廷考查里盐湖（锂含量0.05%）

Dataset: ILCD process, Unit process, single operation
Geography: AR
Reference year: 2012
Classification: Unit processes / Materials production / Inorganic chemicals
Generated by: 孙鑫, xs389@cornell.edu
Owner: 天工LCI数据工作小组
Review: Dependent internal review by 天工LCI数据工作小组
Amounts: no units in this file; such an amount is in the reference unit of its flow, which a separate flow dataset defines
licenseType: Free of charge for all users and uses

## General comment
本研究审查的未来供应路线是基于从几家锂矿开采和加工公司（Lithium Americas Corp.、Minera Salar Blanco、Nemaska Lithium Inc.和Keliber Oy）的技术报告和环境影响评估报告中收集的数据，这些公司的锂资产正处于不同的开发阶段。这些锂资产正处于不同的开发阶段。预计在 5-10 年内投入运营。这些以卤水为基础的来源的锂浓度较低，也反映了当前供应路线中卤水的未来锂品位。

## Technology and included processes
基于卤水的未来锂OH⋅H2O 生产供应路线与当前供应路线类似，代表了阿根廷考查里盐湖和智利马里孔加盐湖的运营情况。这两个地方位于 "锂三角"，锂储量可观。考查里盐湖和马里昆加盐湖的平均锂浓度分别为 0.05% 和 0.09%。这影响了能源和化学品的使用，并在一定程度上影响了这些设施的技术工艺设计。Salar de Cauchari 盐湖卤水提取作业的工艺信息来自为美洲锂业公司（Lithium Americas Corporation）编写的几份技术报告（Burga 等人，2020 年；Worley Parsons，2011 年）。同样，马里孔加盐湖的开采工艺信息也来自为 Minera Salar Blanco 公司编写的技术报告（Atacama Water Consultants, 2022）。在计算这些未来供应数据集对盐水路线的影响以进行比较时，使用了特定审查来源的数据，直至生产出 Li2CO3。在该步骤之后，再次使用 Ecoinvent v3.8′ 将 Li2CO3 转化为 LiOH⋅H2O 的单元过程来模拟最后的生产步骤，从而填补完整生产过程中的数据空白，以便与本研究中模拟的其他数据集进行比较。

## Technical purpose
该高浓度卤水（锂含量6%），采用太阳能池塘蒸发法获得，专门用于生产锂化合物，这是锂离子电池制造不可或缺的原料。这些电池广泛应用于电动汽车（EVs）、便携式电子设备以及大规模能源储存系统。

## Reference product
- Concentrated brine (4.3%): 1000; measured

## Inputs
- freshwater,freshwater: 3384; measured
- Electricity: 1004.4; measured
- Diesel: 657; measured

## Outputs
- Water (evapotranspiration): 87600; measured

## Use advice
当使用该数据集进行生命周期评估时，用户需注意原材料的生产过程和能源流未包括极少量（小于1%）的数据。如果这些过程对预期应用有重大影响，推荐通过额外的数据来源来包含它们。对于电池生产，应根据方法论指导方针考虑各个阶段的潜在环境影响，包括材料提取、制造、分销、使用和处置。

## Review details
清单： 内部审查通过几个迭代步骤完成，涉及原始数据验证、原始数据记录、代表性、完整性、与 ISO 14040 和 14044 有关的建模的一致性。

## Data sources
- Chordia, M., Wickerts, S., Nordelöf, A. & Arvidsson, R. Life cycle environmental impacts of current and future battery-grade lithium supply from brine and spodumene. Resources, Conservation and Recycling 187, 106634 (2022).
