# Rare Earth Flotation|Rare Earth|In-situ leaching|neodymium iron boron (NdFeB) magnet

Dataset: ILCD process, Unit process, single operation
Geography: NMG-CN
Reference year: 2014
Classification: Materials production / Other mineralic materials
Functional unit: The functional unit is a 1 kg NdFeB magnet
LCI method principle: Attributional
LCI method approaches: Allocation - market value; Allocation - mass
Generated by: Tao Wang, twang@iue.ac.cn
Review: Dependent internal review by Tiangong LCI Data Working Group
Amounts: no units in this file; such an amount is in the reference unit of its flow, which a separate flow dataset defines
copyright: false

## Geography
Bayan Obo (China)

## Technology and included processes
The basic process for Nd and Pr production is the same at all three deposits. It is identical for Nd and Pr except for the last solvent extraction step (SX5) where both are separated.

## Reference product
- RE concentrate: 8.4; article inperiodical
  RE concentrate. Bayan Obo: input for next process, Roasting

## Inputs
- Electricity: 4.2696; article inperiodical
  Bayan Obo: included in milling
- Sodium silicate: 0.206; article inperiodical
  Sodium silicate. Bayan Obo: based on Metsc
- Fatty acid: 0.086; article inperiodical
  Fatty acid. Bayan Obo
- Chemicals, organic: 0.075; article inperiodical
  Chemicals, organic. Bayan Obo: precipitant unknown
- transport in t*km,transport in t*km: 0.134; measured
  Bayan Obo: lorry, organic chemicals 803 km, other chemicals 20 km, lorry, EURO3

## Outputs
- tailings (unspecified): 7132; article inperiodical
  Bayan Obo: calculation from experts of RWTH Aachen University

## Deviations from the LCI method approaches
In this study, an allocation method based on the market prices of REOs28 is considered. To estimate uncertainties that refer to the allocation method, a mass-based allocation is undertaken as a sensitivity analysis

## Review details
Inventory: The internal review was done by several iteration steps concerning raw data validation, raw data documentation, representativity, completeness and consistency of modelling with regard to ISO 14040 and 14044.; Documentation: The review of the documentation was performed by Ecobilan and is in compliance with ISO 14040 and 14044. The data set documentation is correct in view of the appropriateness of the information provided. It includes all relevant information in view of data quality and scope of application of the respective LCI result.

## Data sources
- Marx, J., Schreiber, A., Zapp, P. & Walachowicz, F. Comparative Life Cycle Assessment of NdFeB Permanent Magnet Production from Different Rare Earth Deposits. ACS Sustainable Chem. Eng. 6, 5858–5867 (2018).
