# 煤炭井工开采|开采煤炭

Dataset: ILCD process, Unit process, black box
Geography: CN
Reference year: 2018
Classification: Materials production / Other mineralic materials
Generated by: Linlin Yin, yinlinlin0623@163.com

## Geography
根据中国2011年7575处井工煤矿矿井CO2相对涌出量的测定数据，对中国井工煤矿开采过程的CO2逃逸排放因子进行了计算和分析。

## Technology and included processes
井工煤矿开采

## Outputs
- carbon dioxide (fossil); max 203.5; normal; article inperiodical
  井工煤矿CO2逃逸排放因子均值为6.57m3—即每开采1t煤炭释放6.57m3的CO2。将7575处矿井的CO2相对涌出量按升序排列，制出的频率分布图，显示井工煤矿CO2逃逸排放因子的分布并非严格意义上的正态分布但大体近似。
- carbon dioxide (fossil); max 93.48; normal; article inperiodical
  低瓦斯矿井CO2逃逸排放因子均值为5.41m3—即每开采1t煤炭释放5.41m3的CO2。7575处矿井中的低瓦斯矿井CO2逃逸排放因子均非正态分布但大体近似。
- carbon dioxide (fossil); max 93.14; normal; article inperiodical
  高瓦斯矿井CO2逃逸排放因子均值为9.38m3—即每开采1t煤炭释放9.38m3的CO2。7575处矿井中的高瓦斯矿井CO2逃逸排放因子均非正态分布但大体近似。
- carbon dioxide (fossil); max 203.5; normal; article inperiodical
  煤与瓦斯突出矿井CO2逃逸排放因子均值为10.50m3—即每开采1t煤炭释放10.50m3的CO2。7575处矿井中的煤与瓦斯突出矿井CO2逃逸排放因子均非正态分布但大体近似。

## Data selection and combination
梳理了井工煤矿开采过程CO2逃逸的排放来源，提出了一种基于排放因子先计算CO2排放总量，再分别考虑瓦斯气回收的减量贡献和/或火炬销毁的增量贡献的计算方法。其次根据中国2011年7575处井工煤矿矿井CO2相对涌出量的测定 数据，对中国井工煤矿开采过程的CO2逃逸排放因子进行了计算和分析。

## Data sources
- 1.于胜民, 朱松丽, & 张俊龙. 中国井工煤矿开采过程的二氧化碳逃逸排放因子研究. 中国能源 40, 10-16+33 (2018).
