# 活性炭单元;地下水抽出处理

Dataset: ILCD process, Unit process, single operation
Geography: UM
Reference year: 2009
Classification: Unit processes / Other Services / Repair and maintenance
Generated by: 杨欣桐, yangxt@caep.org.cn
Owner: 天工LCI数据工作小组
Review: Dependent internal review by 天工LCI数据工作小组
Amounts: no units in this file; such an amount is in the reference unit of its flow, which a separate flow dataset defines
copyright: false
licenseType: Free of charge for all users and uses

## General comment
PTS通过抽取和使用地上处理设施清除受污染的地下水。PTS处理导致的污染物浓度的降低在初始很快，但通常会导致长期缓慢、稳定的降低

## Geography
该案例研究使用了巴特尔为位于美国多佛空军基地

## Technology and included processes
抽出处理由五个单元系统组成：抽提井、气提单元（ASU）、催化氧化单元（COU）、颗粒活性炭单元（GAC）和处理设施。GAC单元是两个钢桶，每个钢桶含有180公斤（400磅）的GAC。

## Technical purpose
颗粒活性炭(GAC)单元和地下水抽提处理工艺通常用于环境修复中，用于抽取和处理受污染的地下水。该过程特别适用于像军事基地这样的场所，那里的地下水可能被各种污染物污染。GAC有效地吸附有机化合物，从而净化水质。整个抽提和处理系统（PTS），包括GAC单元，旨在持续降低污染物浓度，提供从快速初步清洁到长期修复受污染场地的效果。

## Reference product
- Granular active carbon unit: 1; measured

## Inputs
- Steel: 50; measured
  GAC Unit Stecl
- Activated Carbon: 180; measured
  GAC Unit GAC

## Use advice
使用此数据集进行环境影响评估或生命周期评估(LCA)时，请考虑以下几点：1）确保GAC单元建模与评估现场存在的具体场地条件和污染物类型相符。2）考虑到GAC的有效性可能随时间减弱，可能需要再生或更换，这应当纳入整体评估中。3）数据集中未包含的排放或其他环境影响应使用现有文献或基本环境工程原理来估计。4）省略的数据必须在评估报告中注明，并对假设和估算给出理由。

## Review details
清单： 内部审查通过几个迭代步骤完成，涉及原始数据验证、原始数据记录、代表性、完整性、与 ISO 14040 和 14044 有关的建模的一致性。

## Data sources
- Life-Cycle Case Study Comparison of Permeable Reactive Barrier versus Pump-and-Treat Remediation
