# Milk production | feed raw material production stage

Dataset: ILCD process, Unit process, single operation
Geography: HLJ-CN
Reference year: 2012
Classification: Materials production / Other mineralic materials
Functional unit: In this study, the functional unit was set to 1 ton FPCM (fat-protein corrected milk).
Generated by: Rui Yang, 1632707028@qq.com
Review: Dependent internal review by Tiangong LCI Data Working Group
Amounts: no units in this file; such an amount is in the reference unit of its flow, which a separate flow dataset defines
copyright: false

## General comment
It includes fertilizer production, corn, soybean, wheat and polysavone cultivation, wheat iron and soybean meal production

## Geography
In this paper, LCA method was used to assess the environmental impact of dairy farm production system in Heilongjiang Province.

## Technology and included processes
The word feed of dairy cow is composed of two parts: full price feed and coarse word feed. In the full price feed of dairy cow word feed, rice, soybean meal and wheat bran are the main components, so other components are not considered. The production stage of feed raw materials mainly includes fertilizer production stage, crop planting stage and soybean and wheat bran processing stage.

## Reference product
- milk: 1000; measured
  FPCM (fat-protein corrected milk)

## Outputs
All rows: measured
- nitrous oxide: 0.87297
- carbon monoxide: 0.17737
- nitrogen, total (excluding N2): 2.72178
  1 NOx
- carbon dioxide: 415.628
- sulfur oxides: 1.23076
  1Sulfur oxides
- ammonia: 1.80353
- nitrogen, total (excluding N2): 0.98011
  Nitrogen trioxide

## Review details
Inventory: The internal review was done by several iteration steps concerning raw data validation, raw data documentation, representativity, completeness and consistency of modelling with regard to ISO 14040 and 14044.; Documentation: The review of the documentation was performed by Ecobilan and is in compliance with ISO 14040 and 14044. The data set documentation is correct in view of the appropriateness of the information provided. It includes all relevant information in view of data quality and scope of application of the respective LCI result.

## Data sources
- 曹正纲. 黑龙江省奶牛场生命周期评价. (东北农业大学, 2012).
