# 土壤修复;原位修复;土壤气相抽提;建设阶段;井建设

Dataset: ILCD process, Unit process, single operation
Geography: KR
Reference year: 2011
Classification: Other Services / Repair and maintenance
Generated by: 雷秋霜, leiqs@caep.org.cn
Owner: 天工LCI数据工作小组
Review: Dependent internal review by 天工LCI数据工作小组
Amounts: no units in this file; such an amount is in the reference unit of its flow, which a separate flow dataset defines
copyright: false
licenseType: Free of charge for all users and uses

## General comment
该数据集描述了在施工阶段使用原位土壤气相抽提(SVE)进行土壤修复的过程，其中包括安装三口井：一口用于抽取、两口用于监测。此修复过程应用真空压力，以从污染土壤中移除挥发性污染物。它是环境工程领域内重要的技术方法，特别适用于荒地恢复和工业场地清洁。

## Reference product
- SVE well: 3; measured
  3 wells

## Inputs
All rows: measured
- polyvinylchloride resin (E-PVC): 45
- sand: 0.3
- bentonite: 211
- cement: 2291
  砂浆
- Diesel: 0.011

## Use advice
在使用此数据集进行生命周期评估（LCA）时，用户应确保所分析系统的边界包括与原位土壤气相抽提井的建设和运营相关的所有上游和下游过程。应考虑辅助材料、井钻设备和维护的能量输入以及建设期间的排放。同样需要对抽取井和监测井的不同环境影响进行核算。在可行的情况下，应采用区域数据对能耗和排放进行计算，同时考虑原位SVE系统的技术特点和区域实践。

## Review details
清单： 内部审查通过几个迭代步骤完成，涉及原始数据验证、原始数据记录、代表性、完整性、与 ISO 14040 和 14044 有关的建模的一致性。

## Data sources
- Assessment of Environmental Impacts and CO2 Emissions from Soil Remediation Technologies using Life cycle Assessment - Case Studies on SVE and Biopile Systems
