# Municipal sludge treatment and disposal;wet sludge moisture content 65%;mixed with general industrial solid waste for power generation

Dataset: ILCD process, Unit process, single operation
Geography: JS-CN
Classification: End-of-life treatment / Energy recycling
Functional unit: 1 t wet sludge with a moisture content of 65% was used as the functional unit.
Generated by: Jin Sitian, 2331276@tongji.edu.cn
Owner: Tiangong LCI Data Working Group
Review: Dependent internal review by Tiangong LCI Data Working Group
Amounts: no units in this file; such an amount is in the reference unit of its flow, which a separate flow dataset defines
licenseType: Free of charge for all users and uses

## General comment
This data set represents the treatment and disposal process of municipal sludge with a moisture content of 65%, where it is co-fired with general industrial solid waste for power generation. It is applicable to the modeling of environmental impacts in life cycle assessments for the energy sector, particularly where waste-to-energy processes are employed. The function of this data is to capture the impacts of managing municipal sludge by co-processing it in industrial waste treatment facilities for the generation of electricity.

## Geography
An industrial solid waste disposal supporting power generation company in Suqian

## Reference product
- Sludge: 1000; input; estimated

## Inputs
- Electricity: 113.328; calculated
  Upstream production: including sludge transportation and drying and general industrial solid waste transportation and pretreatment processes.
- Diesel: 8.39; calculated
  (same comment as for Electricity)
- water: 74119.3; calculated
  Production process: Mainly consider the direct or indirect emissions of gas pollutants, water pollutants and solid waste.
- Diesel: 3.68; calculated
  The downstream production mainly involves solid waste that can be used after incineration.

## Outputs
- carbon dioxide: 252.8; calculated
  (same comment as for Electricity)
- methane: 0.03; calculated
  (same comment as for Electricity)
- nitrous oxide: 0.02; calculated
  (same comment as for Electricity)
- Nitrogen oxides: 1.03; calculated
  (same comment as for Electricity)
- sulfur dioxide: 0.34; calculated
  (same comment as for Electricity)
- carbon monoxide: 1.18; calculated
  (same comment as for Electricity)
- hydrocarbons (unspecified): 0.11; calculated
  (same comment as for Electricity)
- particles (PM10): 0.15; calculated
  (same comment as for Electricity)
- Waste (solid): 0.1; calculated
  (same comment as for Electricity)
- carbon dioxide: 13722; calculated
  (same comment as for water)
- Nitrogen oxides: 3.44; calculated
  (same comment as for water)
- sulfur dioxide: 2.05; calculated
  (same comment as for water)
- carbon monoxide: 5.43; calculated
  (same comment as for water)
- particles (PM10): 0.88; calculated
  (same comment as for water)
- chemical oxygen demand: 0.93; measured
  (same comment as for water)
- ammonia: 0.02; measured
  (same comment as for water)
- Suspended solids, unspecified: 0.19; measured
  (same comment as for water)
- nitrogen, total (excluding N2): 0.03; measured
  (same comment as for water)
- phosphorus, total: 0.00186; measured
  (same comment as for water)
- Waste (solid): 1093.47; measured
  (same comment as for water)
- carbon dioxide: 11.06; calculated
  The downstream production mainly involves solid waste that can be used after incineration.
- methane: 0.012; calculated
  The downstream production mainly involves solid waste that can be used after incineration.
- nitrous oxide: 0.00084; calculated
  The downstream production mainly involves solid waste that can be used after incineration.
- Nitrogen oxides: 0.045; calculated
  The downstream production mainly involves solid waste that can be used after incineration.
- sulfur dioxide: 0.015; calculated
  The downstream production mainly involves solid waste that can be used after incineration.
- carbon monoxide: 0.052; calculated
  The downstream production mainly involves solid waste that can be used after incineration.
- hydrocarbons (unspecified): 0.0049; calculated
  The downstream production mainly involves solid waste that can be used after incineration.
- particles (PM10): 0.0064; calculated
  The downstream production mainly involves solid waste that can be used after incineration.

## Use advice
When using this data set for life cycle assessment, it is crucial to consider the specific regional context, as the process is based on an industrial solid waste treatment and power generation facility in Suqian. Ensure that the system boundaries include the transportation of sludge and waste to the facility, the treatment process, and the generation and distribution of electricity. Take into account any emissions to air, water, and soil from the co-firing process, and include the potential benefits from the displacement of conventional electricity generation. Attention should also be given to the allocation procedure between sludge treatment and waste incineration when applying the data.

## Review details
Inventory: The internal review was done by several iteration steps concerning raw data validation, raw data documentation, representativity, completeness and consistency of modelling with regard to ISO 14040 and 14044.

## Data sources
- 周钢,宋涛,马士伟等.不同污泥混燃发电工艺生命周期评价[J].洁净煤技术,2022,28(11):19-29.DOI:10.13226/j.issn.1006-6772.RE22042401.
