# Solar grade multi-Si ; improved Siemens process

Dataset: ILCD process, Unit process, single operation
Geography: CN
Reference year: 2014
Classification: Energy carriers and technologies / Other non-renewable fuels
Functional unit: The functional unit selected for this paper is a 1 kWp
LCI method principle: Attributional
LCI method approaches: Allocation
Generated by: Jinfeng Yang, yjfzfshn@163.com
Owner: Tiangong LCI Data Working Group
Review: Dependent internal review by Tiangong LCI Data Working Group
Amounts: no units in this file; such an amount is in the reference unit of its flow, which a separate flow dataset defines
copyright: false
licenseType: Free of charge for all users and uses

## General comment
Multi-Si

## Geography
Life cycle assessment of mono-Si and multi-Si photovoltaic systems produced in China

## Time period
Available online

## Technology and included processes
Improved Siemens Method

## Reference product
- Solar grade multi-Si: 1; article inperiodical
  Solar grade silicon

## Inputs
All rows: article inperiodical
- Metallurgical silicon: 1.4
  Industrial silicon
- Hydrogen: 0.133
  hydrogen
- chlorine: 1.4
  Chlorine
- Sodium hydroxide: 0.67
  sodium hydroxide
- electricity: 432
  Power consumption

## Outputs
All rows: article inperiodical
- carbon dioxide: 110
  CO2
- carbon monoxide: 0.28
- methane: 0.309
  Methane
- nitrogen dioxide: 0.766
  Nitrogen oxides
- sulfur dioxide: 1.37
- Dust (unspecified, from stack): 2
  dust
- Biochemical Oxygen Demand: 0.02
  biological oxygen demand
- chemical oxygen demand: 0.02
  Cod
- dissolved organic carbon: 0.006
  DOC
- total organic carbon: 0.006
  TOC

## Deviations from the LCI method approaches
The objective of this paper is to conduct a life cycle assessment of monocrystalline and multi-Si photovoltaic (PV) systems produced in China, and to analyze the methods of disposal and the environmental impacts of different methods of disposal.

## Data selection and combination
For material inputs, refer to Hu Runqing, Diao Zhouwei, and Fu Yinyin

## Review details
Inventory: The internal review was done by several iteration steps concerning raw data validation, raw data documentation, representativity, completeness and consistency of modelling with regard to ISO 14040 and 14044.

## Data sources
- 李鹞 & 于随然. 中国光伏系统的生命周期评价. 环境工程 32, 119–124 (2014).
