# 变压器（8）的制造 ; 外部8个大型变压器

Dataset: ILCD process, Unit process, single operation
Geography: NMG-CN
Reference year: 2017
Classification: Systems / Other machines
Functional unit: The functional unit is 1.5 MW wind turbine
LCI method principle: Attributional
LCI method approaches: Allocation
Generated by: 赵云志, ll10088@163.com
Owner: 天工LCI数据工作小组
Review: Dependent internal review by 天工LCI数据工作小组
Amounts: no units in this file; such an amount is in the reference unit of its flow, which a separate flow dataset defines
copyright: false
licenseType: Free of charge for all users and uses

## General comment
本工业过程制造的大型变压器设计用于风力发电设施。具体来说，这些变压器适用于与使用1.5兆瓦(MW)风力涡轮机的风力农场相关的变电站集成。这些变压器是将产生的电力电压升高到适合远距离传输和电网分配的水平所必需的组件。

## Geography
风电功率参数的数据来自Wang ( 2012 )。以装有33台国产1.5兆瓦( MW )风电机组的风电场为案例，分析其环境影响及其替代效应。该风电场位于我国风电装机最多的省份- -内蒙古东北部。

## Reference product
- Transformer: 8; article inperiodical

## Inputs
- copper: 72000; article inperiodical
- iron: 288000; article inperiodical
  Steel and iron

## Deviations from the LCI method approaches
风电的生命周期清单如下所示。生产制造阶段包括风电机组、变电站、电缆的生产，这些设备消耗大量能源，排放污染物( Xue et al . , 2015)。

## Use advice
在使用大型变压器生产的生命周期库存数据时，用户应确保系统边界与LCA研究的预期范围相兼容。这些数据应反映Xue等人(2015)指定的变压器生产阶段的能源消耗和污染物排放。用户应考虑这些变压器在内蒙古东北部装备有1.5 MW风力涡轮机风电场案例研究中所示的更广泛的风力发电系统背景下的环境影响和替代效应。基于Wang (2012) 和 Xia宋(2017)收集的数据做出的假设，应对当前的有效性和与特定LCA应用的相关性进行批判性评估。

## Review details
清单： 内部审查通过几个迭代步骤完成，涉及原始数据验证、原始数据记录、代表性、完整性、与 ISO 14040 和 14044 有关的建模的一致性。

## Data sources
- Li, H., Jiang, H.-D., Dong, K.-Y., Wei, Y.-M. & Liao, H. A comparative analysis of the life cycle environmental emissions from wind and coal power: Evidence from China. Journal of Cleaner Production 248, 119192 (2020).
