# raw meal preparation;raw meal;new dry process, >4000 t/d;secondary solid waste, dust recovery

Dataset: ILCD process, Unit process, single operation
Geography: CN
Reference year: 2020
Classification: Materials production / Non-energetic raw materials
Generated by: Siqi Yang, ysqsophia@gmail.com
Owner: Tiangong LCI Data Working Group
Review: Dependent internal review by Tiangong LCI Data Working Group
Amounts: no units in this file; such an amount is in the reference unit of its flow, which a separate flow dataset defines
copyright: false
licenseType: Free of charge for all users and uses

## General comment
The new dry process has a relatively large market share in the cement industry process. Secondary solid waste composite cement raw material. The contaminant in the raw material preparation process is particulate matter.

## Technical purpose
This industrial data set is intended for the life cycle assessment (LCA) of the new dry process in cement industry, particularly for processes exceeding 4000 tons per day. It describes the preparation of raw meal using secondary solid waste and dust recovery techniques, ensuring contamination by particulate matter is accounted for. This data is crucial for manufacturing high-quality P·O 42.5 type cement clinker, reflecting recent industrial practices and cleaner production standards.

## Model description
Taking P·O 42.5 type cement clinker as the research object, the functional unit and base flow are the production of 1.00 tons of cement clinker, and the base year is 2020. The system boundary is the unit process of raw meal preparation (raw material mining, raw material pretreatment and homogenization, raw meal grinding and raw meal homogenization). The real-life process ranges from raw material preprocessing and batching to raw meal homogenization.

## Reference product
- raw meal: 1000
  Raw materials

## Inputs
- calcium carbonate: 782.152
  Limestone
- shale: 141.354
  Shale
- sandstone: 61.3616
  Sandstone
- blast furnace dust, for recovery: 15.1322
  The original text refers to secondary solid waste, which refers to dust recovery. The dust collected by the bag filter is returned to the raw material homogenization stage through the return system, and the process produces solid waste that can be effectively recycled.
- electricity, medium voltage: 49.9778
  Electricity. Electricity is supplied from power plants.

## Outputs
- particles (> PM10): 0.00794092
  Particulate matter, with an unspecified particle size, is treated as PM > 10 micrometers in diameter. The particulate matter collected by the bag filter is returned to the raw material homogenization stage through the recycling system, and the solid waste generated during the process can be effectively recycled and reused.

## Deviations from the LCI method approaches
Data on limestone mining, shale mining, sandstone mining, iron powder production, coal mining, electricity and tap water production, and direct pollutant emissions were obtained from the CLCD-China-ECER 0.8 database.

## Data selection and combination
In addition to CO2, other data come from corporate reports such as Gaoan Red Lion and Jiangxi De'an Evergreen, the cement industry's cleaner production evaluation index system, and cement clinker research papers.

## Use advice
Users should apply this data following the CLCD principles and disregard upstream production data of raw materials when their weight is less than 1% of the product weight. Pay particular attention to secondary solid waste used as clinker raw material, which can bypass upstream data due to its nature as waste. Users should be aware of potential uncertainties caused by database matching and derive LCA results for cement clinker production by assessing the uncertainty through the analytical formula method, considering emissions within the pre-determined environmental impact scope.

## Review details
Inventory: The internal review was done by several iteration steps concerning raw data validation, raw data documentation, representativity, completeness and consistency of modelling with regard to ISO 14040 and 14044.

## Data sources
- 陆柳鲜. (2022). 江西省多源有色冶炼固废资源化过程生命周期评价研究 [硕士, 江西理工大学].
