# Treatment process of wet waste | Anaerobic fermentation for methane production,CN

Dataset: ILCD process
Geography: SH-CN
Classification: Materials production / Other mineralic materials
Generated by: Jiaqi Lu, wilsherelu@foxmail.com
Review: Dependent internal review by Tiangong LCI Data Working Group
Amounts: no units in this file; such an amount is in the reference unit of its flow, which a separate flow dataset defines
copyright: true

## Reference product
- Wet Waste Treatment: 1000; input; measured
  处理1t湿垃圾

## Inputs
All rows: measured
- electricity mix: 44
  维修下网电力
- process steam: 44
  蒸汽
- electricity mix: 330.084
  耗电量
- water: 0.24
  耗水量
- Gasoline (regular): 0.0053
  汽油
- Diesel: 0.038
  柴油
- carbonate: 0.052
  碳酸盐

## Outputs
All rows: measured
- carbon dioxide: 170
  填埋释放二氧化碳
- carbon dioxide (fossil): 120
  沼气燃烧＋未完全燃烧二氧化碳
- Biogas Slurry: 800
  沼液
- Biogas residue: 54
  沼渣
- electricity mix: 462.6
  产电量

## Review details
Inventory: The internal review was done by several iteration steps concerning raw data validation, raw data documentation, representativity, completeness and consistency of modelling with regard to ISO 14040 and 14044.; Documentation: The review of the documentation was performed by Ecobilan and is in compliance with ISO 14040 and 14044. The data set documentation is correct in view of the appropriateness of the information provided. It includes all relevant information in view of data quality and scope of application of the respective LCI result.

## Data sources
- 上海市市政固废调研结果
