# 电力生产 ; 混合电力 ; 北京

Dataset: ILCD process, Unit process, single operation
Geography: BJ-CN
Reference year: 2019
Classification: Unit processes / Energy carriers and technologies / Electricity
Generated by: 熊若熙, xiongrx0126@163.com
Owner: 天工LCI数据工作小组
Review: Dependent internal review by 天工LCI数据工作小组
Amounts: no units in this file; such an amount is in the reference unit of its flow, which a separate flow dataset defines
copyright: false
licenseType: Free of charge for all users and uses

## General comment
混合电力产生形式包括火力发电、水力发电、风力发电、核能发电和太阳能发电

## Technical purpose
本数据集代表北京混合电力生产，用于广泛的应用，包括从居民和商业供电到工业供电需求。该电力通过火力、水力、风力、核能和太阳能发电厂混合生成，组织可以使用它来评估他们电力消费的环境影响。

## Reference product
- Electricity: 3.6; missing unimportant
  [{'text': '3.6', 'type': 'text'}]

## Inputs
All rows: missing unimportant
- electricity for thermal power: 3.45944
  [{'text': '3.6', 'type': 'text'}]
- electricity from hydroelectric power plant: 0.0780876
  [{'text': '3.6', 'type': 'text'}]
- electricity for nuclear power: 0
  [{'text': '3.6', 'type': 'text'}]
- electricity from wind power: 0.0234252
  [{'text': '3.6', 'type': 'text'}]
- electricity for solar power: 0.0390456
  [{'text': '3.6', 'type': 'text'}]

## Use advice
使用此数据集的用户在应用此数据进行生命周期评估或计算碳足迹时，应考虑到特定的电力生成混合。应考虑数据的地理特异性到北京，因为混合电力和环境影响可能与其他地区有显著不同。用户还应注意电力混合的未来演变，例如可再生能源的增加，可能会随着时间的推移影响数据的相关性。为获得准确的结果，应定期更新地方能源统计数据，以反映当前的电力混合情况。

## Review details
清单： 内部审查通过几个迭代步骤完成，涉及原始数据验证、原始数据记录、代表性、完整性、与 ISO 14040 和 14044 有关的建模的一致性。

## Data sources
- 能源统计年鉴2020
