# 聚丙烯（PP）生产及废弃;PP材料

Dataset: ILCD process, Unit process, black box
Geography: CN
Reference year: 1995
Classification: Unit processes / Materials production / Plastics
Generated by: 郭慧娟, GHJ@email.ncu.edu.cn
Owner: 天工LCI数据工作小组
Review: Dependent internal review by 天工LCI数据工作小组
Amounts: no units in this file; such an amount is in the reference unit of its flow, which a separate flow dataset defines
copyright: false
licenseType: Free of charge for all users and uses

## General comment
本文研究的起止点放在原油的开采、原油的运输、原油的提炼、聚合体的生产、废物处置方面，而材料的使用阶段不在本文考虑之列， 废物处置则选择了有关文献中认为环境影响较大的填埋方式，而这种填埋方式也是在我国城市固 体废弃物处置中被普遍采用的．能源生产中所带来的环境排放按照各阶段的能耗比计入其中

## Geography
我国的国情出发

## Technical purpose
本工业过程生产的PP材料设计有多种应用，不包括评估中的使用阶段。可能用于从包装、纺织品、汽车部件到消费品的范围广泛的产品制造，考虑到在使用阶段考虑的缺席表明是通用生产而没有具体的最终用途应用。与该过程废物相关联的填埋处置方法表明，考虑了环境影响评估中的使用寿命终点，这是中国城市固废管理的标准。

## Reference product
- polypropylene granulate (PP): 1000; measured

## Inputs
- crude oil; 42.3 MJ/kg: 1.443; measured
  原油
- Energy,unspecified: 31114.5; measured
  能耗

## Outputs
All rows: measured
- carbon dioxide (fossil): 6081.23
  原文未区分bio和fossil，根据专家判断此处为fossil
- sulfur dioxide: 40.57
- Nitrogen oxides: 0.172
  NOx
- methane (fossil): 13
  原文未区分bio和fossil，根据专家判断此处为fossil
- hydrocarbons (unspecified): 2.774
  烃类
- waste water - untreated: 14790
  废水
- Waste (unspecified): 474.58
  废渣

## Data selection and combination
本文评价中所使用的数据来源有：企业内部实际生产数据、工艺改进的设计数据、国家环 境保护部门数据；我国相关的统计年鉴、文献等公开出版

## Data treatment and extrapolations
由于本文所研究的材料涉及到多产品系统，我们将各产品系统的输入和输出数据按照质量比例进行了分配

## Use advice
在使用这些LCA数据时，用户必须注意材料的使用阶段是故意排除的。因此，在将这些数据应用于更广泛的LCA时，确保用针对所评估产品的使用阶段数据补充它。这些数据来自多个来源，包括企业内产实际的生产数据、工艺改进设计数据、国家环保部门数据以及公开可用的统计数据和文献。多产品系统的输出和输入数据是根据质量比进行分配的，选定的评估功能单元是1000kg。遵循这些方法论考虑是维持LCA结果一致性和准确性的关键。

## Review details
清单： 内部审查通过几个迭代步骤完成，涉及原始数据验证、原始数据记录、代表性、完整性、与 ISO 14040 和 14044 有关的建模的一致性。

## Data sources
- 陈红, 郝维昌, 石凤 & 王天民. 几种典型高分子材料的生命周期评价. 环境科学学报 24, 545–549 (2004).
