# 铝电解 ; 液态原铝 ; 南方电网 ; 冶金用氧化铝

Dataset: ILCD process, Partly terminated system
Geography: CN
Reference year: 2011
Classification: Unit processes / Energy carriers and technologies / Electricity
Generated by: 谢金良, jinliang.research@gmail.com
Owner: 天工LCI数据工作小组
Review: Dependent internal review by 天工LCI数据工作小组
Amounts: no units in this file; such an amount is in the reference unit of its flow, which a separate flow dataset defines
copyright: false
licenseType: Free of charge for all users and uses

## General comment
结合不同工艺的电解铝产量分布比例所计算出的国内电解铝生产过程CO2排放因子的加权平均值。从氧化铝到铝锭。

## Geography
南方电网

## Time period
论文发表年

## Technical purpose
所述工艺的技术用途是使用南方电网进行液态原铝生产的电解过程。用于冶金的氧化铝作为原料。此原铝通常用于制造各种铝制品，如铝板、箔、线材和挤压成型品。它作为投入材料，服务于生产交通工具、包装、建筑组件和电气应用的部门，因其属性如轻质、导电性和耐腐蚀性。

## Reference product
- aluminium, primary, liquid: 1000; measured

## Outputs
- carbon dioxide (fossil),carbon dioxide (fossil): 899; measured

## Data selection and combination
在对全国 氧化铝、电解铝企业生产情况进行充分梳理的基础 上，按照覆盖所有代表性工艺、代表性产能原则，并充 分考虑产能分布、企业性质等因素，重点选择了河南、 山东、广西等典型地区的典型原铝冶炼企业，开展深入实地调研，并形成以 2011 年数据为主体的氧化铝、电解铝碳排放因子数据库。氧化铝生产数据库包括原 辅料消耗及废弃物产生、工艺技术与设备、工序物料 能源消耗、自备热电厂二次能源生产等 4 个子库。详见文献来源表1。

## Use advice
该数据集的使用者应注意电解铝过程中根据中国不同工艺的铝产量分布比例所计算出的CO2排放因子的加权平均值。特别应关注2011年的数据，因为它是氧化铝和电解铝过程碳排放因子数据库的主要来源。数据集包括原辅料消耗及废弃物产生、工艺技术与设备、工序物料能源消耗、自备热电厂二次能源生产等子库。在建模时，用户应包含电解过程中碳阳极消耗、PFCs排放和购买的电力生产过程在内。同时建议参阅文献来源表1，详细了解数据库结构，并确保包含所有相关的技术因素，以便准确进行生命周期评估。

## Review details
清单： 内部审查通过几个迭代步骤完成，涉及原始数据验证、原始数据记录、代表性、完整性、与 ISO 14040 和 14044 有关的建模的一致性。

## Data sources
- 张文娟，李会泉，陈波，李强，韩永鹏 & 孙振华. 我国原铝冶炼行业温室气体排放模型. 环境科学研究 vol. 26 1132–1138 (2013).
