# 铝电解碳阳极生产 ; 碳阳极 ; 石油焦 ; 2010年

Dataset: ILCD process, Unit process, single operation
Geography: CN
Reference year: 2021
Classification: Unit processes / Materials production / Non-energetic raw materials
Generated by: 蔡梓萌, caizm6178@163.com
Owner: 天工LCI数据工作小组
Review: Dependent internal review by 天工LCI数据工作小组
Amounts: no units in this file; such an amount is in the reference unit of its flow, which a separate flow dataset defines
copyright: false
licenseType: Free of charge for all users and uses

## General comment
通过使用石油焦的工艺生产的碳阳极主要用于铝电解操作。这些阳极是生产原铝的过程中必不可少的组成部分，它们在铝土矿的电解还原中作为关键的电极发挥作用。这个工艺专门为铝工业应用定制，这些工业应用需要使用由石油焦制成的碳阳极以实现有效和高效的金属提取。

## Time period
文献发表日期

## Reference product
- anode, for metal electrolysis: 1000; software or database
  anode

## Inputs
All rows: software or database
- electricity, high voltage, aluminium industry: 759.6
  electricty
- heavy fuel oil: 69
  fuel oil
- coal tar: 220
  coal tar pitch
- Petroleum Coke: 1140
  petroleum coak
- coal gas: 1290

## Data selection and combination
本研究的数据参考了PA、SA、电力等背景数据的LCA数据。PA数据来自统计数据源，SA数据主要来自文献。背景数据主要来自中国科学院生态环境研究中心CASRCEES 2018建立的中国本地化LCA数据库，涵盖能源、材料、交通、废物管理等LCA数据。

## Use advice
在使用本数据集进行生命周期评价时，应注意数据的适用范围和技术适用性。PA和SA数据应根据其统计来源和文献基础进行使用。用户应确保数据集代表的技术实践和时间框架（2010年）与其评估的范围一致。应考虑来自CAS RCEES 2018数据库的背景数据，以便在中国进行本地化上下文的考量，这些数据可能不适用于全球。还必须核实生命周期评估数据是否包括了对产品寿命终期回收的考虑，并相应调整使用阶段行为的建模。

## Review details
清单： 内部审查通过几个迭代步骤完成，涉及原始数据验证、原始数据记录、代表性、完整性、与 ISO 14040 和 14044 有关的建模的一致性。

## Data sources
- Ding, N., Liu, N., Lu, B. & Yang, J. Life cycle greenhouse gas emissions of aluminum based on regional industrial transfer in China. J. Ind. Ecol. 25, 1657–1672 (2021).
