# 葵花子生产

Dataset: ILCD process, Unit process, black box
Geography: PT
Reference year: 2013
Valid until: 2014
Classification: Materials production / Food and renewable raw materials
Functional unit: 1 kg of sunflower seeds
Generated by: 朱娴, zzhu0918@163.com
Owner: 天工LCI数据工作小组
Review: Dependent internal review by 天工LCI数据工作小组
Amounts: no units in this file; such an amount is in the reference unit of its flow, which a separate flow dataset defines
copyright: false
licenseType: Free of charge for all users and uses

## General comment
准备种植向日葵所需的种子、肥料、农药，使用机械方式进行播种、施肥、浇水及收获。

## Geography
位于阿连特茹

## Time period
向日葵种植数据主要来自位于阿连特茹的大型合作社。

## Technical purpose
该数据集代表了1公斤葵花子生产过程，这些葵花子主要用于提取油脂及作为食物来源。葵花子可以进一步加工成葵花油，或作为零食、鸟类饲料销售，或用于烹饪。详细过程包括准备种植向日葵所需的种子、肥料和农药，以及特定于阿连特茹地区的农业实践中的机械播种、施肥、浇水和收获。

## Reference product
- Biological yield: 3250; measured

## Inputs
All rows: measured
- Nitrogenous fertilizer: 17
- Phosphorus Pentoxide: 53
- Phosphate fertilizer: 53
- Urea: 40
- Pesticide: 0.9
- diesel oil: 0.135
- Electricity: 2160
- Seeds: 5.5
- Waste (deposited, hibernating in ground, non elementary flow): 2000

## Use advice
在使用该数据集进行生命周期评估（LCA）时，用户应考虑阿连特茹地区向日葵种植的具体情况。数据反映了区域农业实践，可能并不代表其他地区。用户在建模其LCA中的农业阶段时，应当考虑这一地理特定性，并确保与种植过程相关的所有输入和输出得到适当包含。考虑使用肥料和农药可能带来的环境影响，并在与所代表的技术和方法学特征相匹配的情境中应用此数据。

## Review details
清单： 内部审查通过几个迭代步骤完成，涉及原始数据验证、原始数据记录、代表性、完整性、与 ISO 14040 和 14044 有关的建模的一致性。
