# Shearing,crushing,screening,granulation|Biomassdensifiedformingfuel|Forestwood,straw,peanutshell,ricehusk,corncob,sawdust,wastescrapandallotherbiomassrawmaterials|Extrusionmolding|All sizes / 剪切、破碎、筛分、造粒|生物质致密成型燃料|林木、秸秆、花生壳、稻壳、玉米芯、锯末、废物废料等所有生物质原料|挤压成型|所有规模

Dataset: ILCD process, Unit process, single operation
Geography: CN
Reference year: 2019
Classification: Energy carriers and technologies / Renewable fuels
Generated by: The data was created by the Office of the Second National Pollution Source Census of the Ministry of Ecology and Environment, and the data was organized by the TianGong Plan team for ILCD format / 生态环境部第二次全国污染源普查工作办公室创建数据，天工计划团队常慧敏整理数据为ILCD格式
Owner: Tiangong LCI Data Working Group / 天工LCI数据工作小组
Amounts: no units in this file; such an amount is in the reference unit of its flow, which a separate flow dataset defines
copyright: false
licenseType: Free of charge for all users and uses

## Technology and included processes
the Technical of end-of-pipe management technology for pollution particles (PM2.5 - PM10)isBag filter，Its Technical efficiency of end-of-pipe management92

## Reference product
- Biomass briquette fuel: 1000; calculated
  源文件中描述为为生物质致密成型燃料，此处对其进行了匹配工作，将其匹配到LCAflow库里面相最符合的流，污染物指标备注为颗粒物

## Outputs
- particles (PM2.5 - PM10): 0.0669; calculated
  污染物指标颗粒物的末端治理技术是旋风除尘，其效率为90，末端治理设施实际运行率（k值）计算公式为k=废气治理设施运行时间（小时/年）/正常生产时间（小时/年）。原文件中描述污染物类别为废气，污染物指标为颗粒物，此处对其进行了匹配工作，将其匹配到LCAflow库里面相最符合的流，污染物指标备注为颗粒物
- particles (PM2.5 - PM10): 0.05352; calculated
  污染物指标颗粒物的末端治理技术是袋式除尘，其效率为92，末端治理设施实际运行率（k值）计算公式为k=废气治理设施运行时间（小时/年）/正常生产时间（小时/年）。原文件中描述污染物类别为废气，污染物指标为颗粒物，此处对其进行了匹配工作，将其匹配到LCAflow库里面相最符合的流，污染物指标备注为颗粒物

## Data sources
- 第二次全国污染源普查产排污核算系数手册（试用版）,二级代码25,四级代码2542文件，在完整版文件中第4111页
