# Electricenergy|Agriculturalandforestrybiomass|Circulating fluidized bed boiler|All sizes / 电能|农林生物质|循环流化床锅炉|所有规模

Dataset: ILCD process, Unit process, single operation
Geography: CN
Reference year: 2019
Classification: Energy carriers and technologies / Electricity
Generated by: The data was created by the Office of the Second National Pollution Source Census of the Ministry of Ecology and Environment, and the data was organized by the TianGong Plan team for ILCD format / 生态环境部第二次全国污染源普查工作办公室创建数据，天工计划团队常慧敏整理数据为ILCD格式
Owner: Tiangong LCI Data Working Group / 天工LCI数据工作小组
Review: Dependent internal review by Tiangong LCI Data Working Group / 天工LCI数据工作小组
Amounts: no units in this file; such an amount is in the reference unit of its flow, which a separate flow dataset defines
copyright: false
licenseType: Free of charge for all users and uses

## General comment
the Technical of end-of-pipe management technology for pollution particles (PM2.5 - PM10)isCyclone dust removal + bag filter，Its Technical efficiency of end-of-pipe management99.8

## Reference product
- Biomass of agriculture and forestry: 1e7; input; calculated
  源文件中描述为为农林生物质，此处对其进行了匹配工作，将其匹配到LCAflow库里面相最符合的流，污染物指标备注为二氧化硫

## Outputs
All rows: calculated
- sulfur dioxide: 2421
  污染物指标二氧化硫的末端治理技术是炉内喷钙，其效率为70，末端治理设施实际运行率（k值）计算公式为k=治理设施运行时间（小时）/生物质能发电机组实际运行时间（小时）。原文件中描述污染物类别为废气，污染物指标为二氧化硫，此处对其进行了匹配工作，将其匹配到LCAflow库里面相最符合的流，污染物指标备注为二氧化硫
- sulfur dioxide: 1614
  污染物指标二氧化硫的末端治理技术是石灰石/石膏法，其效率为80，末端治理设施实际运行率（k值）计算公式为k=治理设施运行时间（小时）/生物质能发电机组实际运行时间（小时）。原文件中描述污染物类别为废气，污染物指标为二氧化硫，此处对其进行了匹配工作，将其匹配到LCAflow库里面相最符合的流，污染物指标备注为二氧化硫
- sulfur dioxide: 4035
  污染物指标二氧化硫的末端治理技术是氨法，其效率为50，末端治理设施实际运行率（k值）计算公式为k=治理设施运行时间（小时）/生物质能发电机组实际运行时间（小时）。原文件中描述污染物类别为废气，污染物指标为二氧化硫，此处对其进行了匹配工作，将其匹配到LCAflow库里面相最符合的流，污染物指标备注为二氧化硫
- sulfur dioxide: 1129.8
  污染物指标二氧化硫的末端治理技术是烟气循环流化床法，其效率为86，末端治理设施实际运行率（k值）计算公式为k=治理设施运行时间（小时）/生物质能发电机组实际运行时间（小时）。原文件中描述污染物类别为废气，污染物指标为二氧化硫，此处对其进行了匹配工作，将其匹配到LCAflow库里面相最符合的流，污染物指标备注为二氧化硫
- Nitrogen oxides: 5816
  污染物指标氮氧化物的末端治理技术是低氮燃烧法，其效率为20，末端治理设施实际运行率（k值）计算公式为k=治理设施运行时间（小时）/生物质能发电机组实际运行时间（小时）。原文件中描述污染物类别为废气，污染物指标为氮氧化物，此处对其进行了匹配工作，将其匹配到LCAflow库里面相最符合的流，污染物指标备注为氮氧化物
- Nitrogen oxides: 3562.3
  污染物指标氮氧化物的末端治理技术是选择性非催化还原法（SNCR），其效率为51，末端治理设施实际运行率（k值）计算公式为k=治理设施运行时间（小时）/生物质能发电机组实际运行时间（小时）。原文件中描述污染物类别为废气，污染物指标为氮氧化物，此处对其进行了匹配工作，将其匹配到LCAflow库里面相最符合的流，污染物指标备注为氮氧化物
- Nitrogen oxides: 1090.5
  污染物指标氮氧化物的末端治理技术是选择性催化还原法（SCR），其效率为85，末端治理设施实际运行率（k值）计算公式为k=治理设施运行时间（小时）/生物质能发电机组实际运行时间（小时）。原文件中描述污染物类别为废气，污染物指标为氮氧化物，此处对其进行了匹配工作，将其匹配到LCAflow库里面相最符合的流，污染物指标备注为氮氧化物
- Nitrogen oxides: 2035.6
  污染物指标氮氧化物的末端治理技术是SNCR+SCR，其效率为72，末端治理设施实际运行率（k值）计算公式为k=治理设施运行时间（小时）/生物质能发电机组实际运行时间（小时）。原文件中描述污染物类别为废气，污染物指标为氮氧化物，此处对其进行了匹配工作，将其匹配到LCAflow库里面相最符合的流，污染物指标备注为氮氧化物
- particles (PM2.5 - PM10): 128100
  污染物指标颗粒物的末端治理技术是旋风除尘法，其效率为70，末端治理设施实际运行率（k值）计算公式为k=治理设施运行时间（小时）/生物质能发电机组实际运行时间（小时）。原文件中描述污染物类别为废气，污染物指标为颗粒物，此处对其进行了匹配工作，将其匹配到LCAflow库里面相最符合的流，污染物指标备注为颗粒物
- particles (PM2.5 - PM10): 1281
  污染物指标颗粒物的末端治理技术是袋式除尘法，其效率为99.7，末端治理设施实际运行率（k值）计算公式为k=治理设施运行时间（小时）/生物质能发电机组实际运行时间（小时）。原文件中描述污染物类别为废气，污染物指标为颗粒物，此处对其进行了匹配工作，将其匹配到LCAflow库里面相最符合的流，污染物指标备注为颗粒物
- particles (PM2.5 - PM10): 854
  污染物指标颗粒物的末端治理技术是旋风除尘法+袋式除尘法，其效率为99.8，末端治理设施实际运行率（k值）计算公式为k=治理设施运行时间（小时）/生物质能发电机组实际运行时间（小时）。原文件中描述污染物类别为废气，污染物指标为颗粒物，此处对其进行了匹配工作，将其匹配到LCAflow库里面相最符合的流，污染物指标备注为颗粒物

## Use advice
This dataset is derived from the Pollution Source Census Report and contains information on pollution emissions and related products. However, it does not include data on energy or chemical consumption, nor does it provide information on waste or co-product generation. When utilizing this dataset, please supplement the missing data based on actual conditions before use
该数据集来源于污染源普查报告，包含污染物排放及相关产品信息，但不包含能源或化学品消耗数据，也不提供废弃物或共生产物产生信息。在使用该数据集时，请根据实际情况补充缺失数据后再使用。

## Review details
Inventory: The internal review was done by several iteration steps concerning raw data validation, raw data documentation, representativity, completeness and consistency of modelling with regard to ISO 14040 and 14044.
清单： 内部审查通过几个迭代步骤完成，涉及原始数据验证、原始数据记录、代表性、完整性、与 ISO 14040 和 14044 有关的建模的一致性。

## Data sources
- 第二次全国污染源普查产排污核算系数手册（试用版）,四级代码4417文件，在完整版文件中第5333页
