# Mining of REE containing ore, baseline|REE containing ore

Dataset: ILCD process, Unit process, single operation
Geography: NMG-CN
Reference year: 2012
Classification: Materials production / Other mineralic materials
Functional unit: Not Mentationed
LCI method principle: Attributional
LCI method approaches: Allocation - market value
Generated by: Tao Wang, twang@iue.ac.cn
Review: Dependent internal review by Tiangong LCI Data Working Group
Amounts: no units in this file; such an amount is in the reference unit of its flow, which a separate flow dataset defines
copyright: false

## Technology and included processes
Ore is recovered from the open pit mine using conventional surface mining techniques such as drilling and blasting. The mine contains 750 million tons of ore at 4.1% REO

## Reference product
- REO: 1; software or database

## Inputs
- Iron ore: 1.7e-6; article inperiodical
  recultivation, iron mine
- blasting: 0.0005; software or database
- diesel: 1.25; software or database

## Outputs
All rows: software or database
- water: 0.0034
- Land Occupation: 0.00012
- iron: 0.3
- cerium: 0.0164
- lanthanum: 0.00984
- neodymium: 0.00541
- praseodymium: 0.00172
- europium: 8.14e-5
- samarium: 0.00041
- gadolinium: 0.000206
- waste heat: 0.00513
- radium-226: 0.01
- thorium-232: 0.0506

## Deviations from the LCI method approaches
In this section, we discuss the life cycle inventory (LCI) in detail. Each subsection discusses one process of the LCA. Section 3.1 describes the conventional method of rare earths in China from mineral sources. Section 3.2 describes the production process used to transform neodymium oxide into an NdFeB magnet. Finally, section 3.3 describes two alternative recycling processes that could be used. Detailed information on the LCI, assumptions, and allocation choices can be found in the Supporting Information.

## Review details
Inventory: The internal review was done by several iteration steps concerning raw data validation, raw data documentation, representativity, completeness and consistency of modelling with regard to ISO 14040 and 14044.; Documentation: The review of the documentation was performed by Ecobilan and is in compliance with ISO 14040 and 14044. The data set documentation is correct in view of the appropriateness of the information provided. It includes all relevant information in view of data quality and scope of application of the respective LCI result.

## Data sources
- Sprecher, B. et al. Life Cycle Inventory of the Production of Rare Earths and the Subsequent Production of NdFeB Rare Earth Permanent Magnets. Environ. Sci. Technol. 48, 3951–3958 (2014).
