# 烧结矿生产;烧结矿;烧结

Dataset: ILCD process, Unit process, single operation
Geography: CN
Reference year: 2020
Classification: Unit processes / Materials production / Other mineralic materials
Generated by: 纪伟, 1299801467@qq.com
Owner: 天工LCI数据工作小组
Review: Dependent internal review by 天工LCI数据工作小组
Amounts: no units in this file; such an amount is in the reference unit of its flow, which a separate flow dataset defines
copyright: false
licenseType: Free of charge for all users and uses

## General comment
该数据集涉及烧结矿生产过程，这是炼铁和炼钢工业中的中间步骤。烧结矿由铁矿粉、助熔剂以及冶炼废料（焦炭末或无烟煤末）混合而成。它主要用于钢铁厂，通过提供透气性更好、铁含量更高的物料，来提高高炉操作的效率。

## Time period
论文提到钢铁企业环境总体数据为1998年的吨钢环境基础数据。

## Reference product
- Sinter ore: 1131; calculated

## Inputs
All rows: calculated
- Iron ore: 1191.5
- dolomite: 9.3
- quicklime: 42.5
- freshwater,freshwater: 1100
- air: 45.3
- Electricity: 143.28
- process steam from heavy fuel oil: 166.7
- carbon: 34.3
- anthracite: 15.6
- Blast furnace gas: 12.9
- Converter gas: 16.5

## Outputs
- carbon dioxide (fossil): 154.7; calculated
  原文未区分bio和fossil，根据专家判断此处为carbon dioxide (fossil)
- sulfur dioxide: 0.43; calculated
- Nitrogen oxides: 0.69; calculated
- Sinter / Pellet Dust: 0.15; calculated

## Use advice
该数据集的用户应该注意，环境数据基于1998年的每吨钢铁的环境基础数据。自那时以来，烧结矿生产的技术和环境实践可能已经发展。因此，如果可能的话，用户应考虑使用特定场所的当前数据和技术实践，特别是在评估当前情景的影响时。此外，如果用户打算在生命周期评估中应用该数据，至关重要的是要考虑数据的时间相关性，并尽可能检查更新的数据。

## Review details
清单： 内部审查通过几个迭代步骤完成，涉及原始数据验证、原始数据记录、代表性、完整性、与 ISO 14040 和 14044 有关的建模的一致性。

## Data sources
- 梁田. 基于生命周期评价的典型钢铁企业环境影响评估及绿色发展研究. (郑州大学, 2020).
