# Plasticplates,tubesandprofiles|Resin,auxiliaries|Blending-mixing-extrusion|All sizes / 塑料板、管、型材|树脂、助剂|配料-混合-挤出|所有规模

Dataset: ILCD process, Unit process, single operation
Geography: CN
Reference year: 2019
Classification: Materials production / Plastics
Generated by: The data was created by the Office of the Second National Pollution Source Census of the Ministry of Ecology and Environment, and the data was organized by the TianGong Plan team for ILCD format / 生态环境部第二次全国污染源普查工作办公室创建数据，天工计划团队常慧敏整理数据为ILCD格式
Owner: Tiangong LCI Data Working Group / 天工LCI数据工作小组
Review: Dependent internal review by Tiangong LCI Data Working Group / 天工LCI数据工作小组
Amounts: no units in this file; such an amount is in the reference unit of its flow, which a separate flow dataset defines
copyright: false
licenseType: Free of charge for all users and uses

## General comment
the Technical of end-of-pipe management technology for pollution volatile organic compoundisOthers (direct discharge)，Its Technical efficiency of end-of-pipe management0，The formula for calculating the actual operation rate (k-value) of the end-of-pipe treatment facility is k = annual operating hours of desulfurization facilities / annual operating hours of boilers

## Reference product
- Plastic sheet, tube, profile: 1000; calculated
  源文件中描述为为塑料板、管、型材，此处对其进行了匹配工作，将其匹配到LCAflow库里面相最符合的流，污染物指标备注为工业废气量

## Outputs
All rows: calculated
- Exhaust gas: 70000
  污染物指标工业废气量的末端治理技术是/，末端治理设施实际运行率（k值）计算公式为/。原文件中描述污染物类别为废气，污染物指标为工业废气量，此处对其进行了匹配工作，将其匹配到LCAflow库里面相最符合的流，污染物指标备注为工业废气量
- particles (PM2.5 - PM10): 0.6
  污染物指标颗粒物的末端治理技术是水膜除尘，其效率为90，末端治理设施实际运行率（k值）计算公式为k=废气治理设施运行时间（小时/年）/废气产污工段正常生产时间（小时/年）。原文件中描述污染物类别为废气，污染物指标为颗粒物，此处对其进行了匹配工作，将其匹配到LCAflow库里面相最符合的流，污染物指标备注为颗粒物
- particles (PM2.5 - PM10): 0.06
  污染物指标颗粒物的末端治理技术是袋式除尘，其效率为99，末端治理设施实际运行率（k值）计算公式为k=废气治理设施运行时间（小时/年）/废气产污工段正常生产时间（小时/年）。原文件中描述污染物类别为废气，污染物指标为颗粒物，此处对其进行了匹配工作，将其匹配到LCAflow库里面相最符合的流，污染物指标备注为颗粒物
- particles (PM2.5 - PM10): 0.9
  污染物指标颗粒物的末端治理技术是旋风除尘，其效率为85，末端治理设施实际运行率（k值）计算公式为k=废气治理设施运行时间（小时/年）/废气产污工段正常生产时间（小时/年）。原文件中描述污染物类别为废气，污染物指标为颗粒物，此处对其进行了匹配工作，将其匹配到LCAflow库里面相最符合的流，污染物指标备注为颗粒物
- particles (PM2.5 - PM10): 0.6
  污染物指标颗粒物的末端治理技术是管式过滤，其效率为90，末端治理设施实际运行率（k值）计算公式为k=废气治理设施运行时间（小时/年）/废气产污工段正常生产时间（小时/年）。原文件中描述污染物类别为废气，污染物指标为颗粒物，此处对其进行了匹配工作，将其匹配到LCAflow库里面相最符合的流，污染物指标备注为颗粒物
- particles (PM2.5 - PM10): 0.3
  污染物指标颗粒物的末端治理技术是静电除尘，其效率为95，末端治理设施实际运行率（k值）计算公式为k=废气治理设施运行时间（小时/年）/废气产污工段正常生产时间（小时/年）。原文件中描述污染物类别为废气，污染物指标为颗粒物，此处对其进行了匹配工作，将其匹配到LCAflow库里面相最符合的流，污染物指标备注为颗粒物
- volatile organic compound: 0.45
  污染物指标挥发性有机物①的末端治理技术是活性炭吸附，其效率为70，末端治理设施实际运行率（k值）计算公式为k=废气治理设施运行时间（小时/年）/废气产污工段正常生产时间（小时/年）。原文件中描述污染物类别为废气，污染物指标为挥发性有机物①，此处对其进行了匹配工作，将其匹配到LCAflow库里面相最符合的流，污染物指标备注为挥发性有机物①
- volatile organic compound: 0.675
  污染物指标挥发性有机物①的末端治理技术是低温等离子体，其效率为55，末端治理设施实际运行率（k值）计算公式为k=废气治理设施运行时间（小时/年）/废气产污工段正常生产时间（小时/年）。原文件中描述污染物类别为废气，污染物指标为挥发性有机物①，此处对其进行了匹配工作，将其匹配到LCAflow库里面相最符合的流，污染物指标备注为挥发性有机物①
- volatile organic compound: 0.075
  污染物指标挥发性有机物①的末端治理技术是蓄热式热力燃烧法，其效率为95，末端治理设施实际运行率（k值）计算公式为k=废气治理设施运行时间（小时/年）/废气产污工段正常生产时间（小时/年）。原文件中描述污染物类别为废气，污染物指标为挥发性有机物①，此处对其进行了匹配工作，将其匹配到LCAflow库里面相最符合的流，污染物指标备注为挥发性有机物①
- volatile organic compound: 0.9
  污染物指标挥发性有机物①的末端治理技术是光催化，其效率为40，末端治理设施实际运行率（k值）计算公式为k=废气治理设施运行时间（小时/年）/废气产污工段正常生产时间（小时/年）。原文件中描述污染物类别为废气，污染物指标为挥发性有机物①，此处对其进行了匹配工作，将其匹配到LCAflow库里面相最符合的流，污染物指标备注为挥发性有机物①
- volatile organic compound: 0.9
  污染物指标挥发性有机物①的末端治理技术是光解，其效率为40，末端治理设施实际运行率（k值）计算公式为k=废气治理设施运行时间（小时/年）/废气产污工段正常生产时间（小时/年）。原文件中描述污染物类别为废气，污染物指标为挥发性有机物①，此处对其进行了匹配工作，将其匹配到LCAflow库里面相最符合的流，污染物指标备注为挥发性有机物①
- volatile organic compound: 0.3
  污染物指标挥发性有机物①的末端治理技术是光催化+活性炭吸附，其效率为80，末端治理设施实际运行率（k值）计算公式为k=废气治理设施运行时间（小时/年）/废气产污工段正常生产时间（小时/年）。原文件中描述污染物类别为废气，污染物指标为挥发性有机物①，此处对其进行了匹配工作，将其匹配到LCAflow库里面相最符合的流，污染物指标备注为挥发性有机物①
- volatile organic compound: 0.3
  污染物指标挥发性有机物①的末端治理技术是低温等离子体+活性炭，其效率为80，末端治理设施实际运行率（k值）计算公式为k=废气治理设施运行时间（小时/年）/废气产污工段正常生产时间（小时/年）。原文件中描述污染物类别为废气，污染物指标为挥发性有机物①，此处对其进行了匹配工作，将其匹配到LCAflow库里面相最符合的流，污染物指标备注为挥发性有机物①
- volatile organic compound: 0.45
  污染物指标挥发性有机物①的末端治理技术是光催化+低温等离子体，其效率为70，末端治理设施实际运行率（k值）计算公式为k=废气治理设施运行时间（小时/年）/废气产污工段正常生产时间（小时/年）。原文件中描述污染物类别为废气，污染物指标为挥发性有机物①，此处对其进行了匹配工作，将其匹配到LCAflow库里面相最符合的流，污染物指标备注为挥发性有机物①
- volatile organic compound: 1.5
  污染物指标挥发性有机物①的末端治理技术是其他（直排），其效率为0，末端治理设施实际运行率（k值）计算公式为k=废气治理设施运行时间（小时/年）/废气产污工段正常生产时间（小时/年）。原文件中描述污染物类别为废气，污染物指标为挥发性有机物①，此处对其进行了匹配工作，将其匹配到LCAflow库里面相最符合的流，污染物指标备注为挥发性有机物①

## Use advice
This dataset is derived from the Pollution Source Census Report and contains information on pollution emissions and related products. However, it does not include data on energy or chemical consumption, nor does it provide information on waste or co-product generation. When utilizing this dataset, please supplement the missing data based on actual conditions before use
该数据集来源于污染源普查报告，包含污染物排放及相关产品信息，但不包含能源或化学品消耗数据，也不提供废弃物或共生产物产生信息。在使用该数据集时，请根据实际情况补充缺失数据后再使用。

## Review details
Inventory: The internal review was done by several iteration steps concerning raw data validation, raw data documentation, representativity, completeness and consistency of modelling with regard to ISO 14040 and 14044.
清单： 内部审查通过几个迭代步骤完成，涉及原始数据验证、原始数据记录、代表性、完整性、与 ISO 14040 和 14044 有关的建模的一致性。

## Data sources
- 第二次全国污染源普查产排污核算系数手册（试用版）,二级代码29,四级代码2922文件，在完整版文件中第3308页
