# 土壤修复;异位修复;土壤淋洗;土柱淋洗;鼠李糖脂溶液淋洗;得到修复的土柱

Dataset: ILCD process, Unit process, single operation
Geography: CN
Reference year: 2023
Classification: Unit processes / Other Services / Repair and maintenance
Generated by: 黄悦, huangyue@caep.org.cn
Owner: 天工LCI数据工作小组
Review: Dependent internal review by 天工LCI数据工作小组
Amounts: no units in this file; such an amount is in the reference unit of its flow, which a separate flow dataset defines
copyright: false
licenseType: Free of charge for all users and uses

## General comment
使用鼠李糖脂溶液淋洗受污染土柱，得到修复后的土柱

## Technical purpose
该过程描述了异位土壤修复技术的应用，具体为使用鼠李糖脂溶液的土柱淋洗方法。该方法旨在清洁受污染的土柱，从而得到可用于环境修复项目的修复土壤。

## Reference product
- Remediated soil columns: 0.0008

## Inputs
- rhamnolipid: 0.00022
  rhamnolipid, 147858-26-2
- Electricity: 0.396
- Activated Carbon: 0.02048
- Water (evapotranspiration): 0.00528
- Contaminated soil columns: 0.0008

## Outputs
- polycyclic aromatic hydrocarbons: 0.02
  PAH gas
- polycyclic aromatic hydrocarbons: 0.0004
  PAH liquids
- quartz sand: 0.08

## Use advice
数据集用户应注意，此数据代表单一工序单元操作，涉及使用鼠李糖脂溶液淋洗受污染土柱。在使用此数据时，用户应包括过程中涉及的所有主要原材料和能源消耗。使用此数据时应注意其技术适用性，这意味着仅考虑将方法用于异位土壤修复情境，并且在没有进一步评估的情况下不将其直接应用于原位修复。

## Review details
清单： 内部审查通过几个迭代步骤完成，涉及原始数据验证、原始数据记录、代表性、完整性、与 ISO 14040 和 14044 有关的建模的一致性。

## Data sources
- 张雅鑫 et al. 基于生命周期评价的焦化污染土壤 淋洗技术环境影响研究. 安全、健康和环境 23, (2023).
