# 铝锭铸造 ; 原生铝锭 ; 液态原铝 ; 2011年

Dataset: ILCD process, Unit process, single operation
Geography: CN
Reference year: 2021
Classification: Unit processes / Materials production / Metals and semimetals
Generated by: 蔡梓萌, caizm6178@163.com
Owner: 天工LCI数据工作小组
Review: Dependent internal review by 天工LCI数据工作小组
Amounts: no units in this file; such an amount is in the reference unit of its flow, which a separate flow dataset defines
copyright: false
licenseType: Free of charge for all users and uses

## General comment
该数据集描述了2011年液态原铝铸造成原生铝锭的过程。原生铝锭通常用作各种行业的原材料，包括汽车、建筑和包装行业，在这些行业中需要铝的轻质、强度和抗腐蚀性质。

## Time period
文献发表日期

## Reference product
- aluminium, primary, ingot: 1000; software or database

## Inputs
- aluminium, primary, liquid: 1051.08; software or database

## Data selection and combination
本研究的数据参考了PA、SA、电力等背景数据的LCA数据。PA数据来自统计数据源，SA数据主要来自文献。背景数据主要来自中国科学院生态环境研究中心CASRCEES 2018建立的中国本地化LCA数据库，涵盖能源、材料、交通、废物管理等LCA数据。

## Use advice
在使用此数据集进行生命周期评估(LCA)时，用户应注意特定过程数据涉及2011年，并且可能无法准确反映当前的实践。数据用户应确保PA（原生铝）和SA（再生铝）数据适用于其具体情境，并考虑自2011年以来工业技术的改进或变化。源自2018年CAS RCEES中国本土化的背景数据应考虑其对评估过程的地理和时间相关性，谨慎使用。

## Review details
清单： 内部审查通过几个迭代步骤完成，涉及原始数据验证、原始数据记录、代表性、完整性、与 ISO 14040 和 14044 有关的建模的一致性。

## Data sources
- Ding, N., Liu, N., Lu, B. & Yang, J. Life cycle greenhouse gas emissions of aluminum based on regional industrial transfer in China. J. Ind. Ecol. 25, 1657–1672 (2021).
