# 监测井;建井;井深20m，井管内径46 mm;PRB系统

Dataset: ILCD process, Unit process, single operation
Geography: JS-CN
Reference year: 2024
Classification: Unit processes / Other Services / Repair and maintenance
Generated by: 杨欣桐, yangxt@caep.org.cn
Owner: 天工LCI数据工作小组
Review: Dependent internal review by 天工LCI数据工作小组
Amounts: no units in this file; such an amount is in the reference unit of its flow, which a separate flow dataset defines
copyright: false
licenseType: Free of charge for all users and uses

## General comment
新建用于污染地下水监测自然衰减所用监测井，钻孔直径0.22 m，管外径0.053m，井管内径0.046m，井深24 m，筛管长度20m，膨润土填充厚度4 m，共建设监测井49口

## Time period
文献发表时间

## Technical purpose
所述监测井用于监测和分析地下水系统中自然衰减的污染物。这种基础设施通常用于环境工程领域，特别是用于评估和确保原位地下水修复过程（如渗透性反应屏障系统）的有效性。

## Reference product
- Monitoring well: 49; measured

## Inputs
All rows: measured
- Polyvinyl chloride: 934.2
- bentonite: 10530
- Polyethylene,Polyethylene: 611.27
- silica sand: 52640
- Steel: 245
- Diesel,Diesel: 0.18816
- transport in t*km: 6950.05

## Use advice
在使用此数据集进行环境评估或修复计划时，应注意确保监测井的规格（如深度、直径和填充材料类型）与所关注地点的地质和水文条件相匹配。这包括承认监测井设计对于被监测的特定污染物的适用性。同样重要的是考虑地下水监测和自然衰减的时间方面，以及任何附近地下水修复活动的影响。

## Review details
清单： 内部审查通过几个迭代步骤完成，涉及原始数据验证、原始数据记录、代表性、完整性、与 ISO 14040 和 14044 有关的建模的一致性。

## Data sources
- Ding, D. et al. Assessing the environmental impacts and costs of biochar and monitored natural attenuation for groundwater heavily contaminated with volatile organic compounds. Science of The Total Environment 846, 157316 (2022).
