# 铜渣回收;水泥;直接生产水泥;铜渣

Dataset: ILCD process, Unit process, single operation
Geography: CN
Reference year: 2010
Classification: Unit processes / Materials production / Inorganic chemicals
Functional unit: The functional unit was defined as the recycling of 1 ton of copper slag from copper smelting process.
LCI method principle: Attributional
LCI method approaches: Substitution
Generated by: 王鹏, 2867919560@qq.com
Owner: 天工LCI数据工作小组
Review: Dependent internal review by 天工LCI数据工作小组
Amounts: no units in this file; such an amount is in the reference unit of its flow, which a separate flow dataset defines
copyright: false
licenseType: Free of charge for all users and uses

## General comment
该数据集代表在中国铜行业中用于制造水泥和未烧结砖的各种铜渣回收场景。开发的四种回收方法旨在用于减少废物并将铜渣作为资源直接用于水泥生产、电炉处理后、浮选后或在浮选后创造未烧结砖。这为铜冶炼副产品提供了一种环保的替代方案，支持专注于可持续制造实践的行业。

## Geography
中国领先的铜业公司。

## Time period
摘自相关公司2010年内部报告。

## Technology and included processes
根据技术可用性，开发了四种铜渣回收方案：（1）直接生产水泥，（2）电炉处理后生产水泥，（3）浮选后生产水泥，（4）生产不烧砖浮选后。

## Reference product
- Refined copper: 1000; measured

## Inputs
All rows: measured
- hard coal,hard coal,hard coal: 1613.9
  Hard coal
- crude oil; 42.3 MJ/kg: 45.6
  Crude oil
- natural gas; 44.1 MJ/kg: 37.9
  Natural gas
- Limestone: 6624.6
- clay: 1326.5
  Clay
- gypsum: 404.3
  Gypsum
- Scrap: 1000

## Outputs
All rows: measured
- carbon dioxide (fossil): 5180.2
  CO2
- carbon monoxide,carbon monoxide (fossil): 3.4
  CO
- sulfur dioxide: 10.3
  SO2
- Nitrogen oxides: 16.7
  NOx需要补充
- particles (PM2.5 - PM10): 23.5
  Dust需要补充

## Deviations from the LCI method approaches
在分配程序之后，使用避免负担方法进行表征、归一化和加权。

## Data selection and combination
铜渣处理数据主要来源于国内某铜业龙头企业。水泥和砖的生产数据大部分来自采用先进设备和工艺的真实工厂，并辅以公开发表的文献。

## Data treatment and extrapolations
本研究中使用 GaBi 4 软件对铜回收系统进行建模并确定对环境的影响。采用生态指标99（EI99）进行生命周期影响评估

## Use advice
在使用此数据集进行生命周期评估（LCA）时，用户应遵守提供的方法学建议，特别是关于使用 GaBi 4 软件和Eco-Indicator 99 (EI99) 方法的应用。分配应考虑使用避免负担方法的环境影响。功能单元应统一考虑为来自铜冶炼过程的一吨铜渣回收。用户应注意，数据基于2010年的技术背景，并可能需要调整以符合当前技术和环境标准。

## Review details
清单： 内部审查通过几个迭代步骤完成，涉及原始数据验证、原始数据记录、代表性、完整性、与 ISO 14040 和 14044 有关的建模的一致性。

## Data sources
- Song, X. L., Yang, J. X., Wang, J. W. & Wu, W. J. Assessing the Life Cycle Environmental and Economic Performance of Copper Slag Recycling. AMR 878, 219–225 (2014).
