# 氧化铝生产; 冶金用氧化铝 ; 铝土矿 ; 2009年

Dataset: ILCD process, Unit process, single operation
Geography: CN
Reference year: 2021
Classification: Unit processes / Materials production / Non-energetic raw materials
Generated by: 封羽真, fyz22
Owner: 天工LCI数据工作小组
Review: Dependent internal review by 天工LCI数据工作小组
Amounts: no units in this file; such an amount is in the reference unit of its flow, which a separate flow dataset defines
copyright: false
licenseType: Free of charge for all users and uses

## General comment
该数据代表了冶金用氧化铝生产的生命周期评估（LCA）参数。它主要从铝土矿中提取，并且是铝生产的基本原料。截至2009年，这种特定质量的氧化铝主要用于大规模的铝精炼过程，其中高纯度水平对于通过电解法生产金属铝至关重要。

## Time period
文献发表日期

## Reference product
- aluminium oxide, metallurgical: 1000; software or database
  alumina

## Inputs
All rows: software or database
- soda ash, dense: 120.87
  soda ash
- Petroleum Coke: 1313.57
  Energy sources proportion of energy consumption is coal: fuel oil: coke: natural gas: coke even gas=46.0%: 11.0%: 7.1%: 14.1%: 21.7%
- coal gas: 4014.72
  (same comment as for Petroleum Coke)
- natural gas, high pressure: 2608.64
  (same comment as for Petroleum Coke)
- fuel oil, unspecified: 2035.11
  (same comment as for Petroleum Coke)
- hard coal: 8510.46
  (same comment as for Petroleum Coke)
- Water, unspecified natural origin: 2.78
  water consumption

## Data selection and combination
本研究的数据参考了PA、SA、电力等背景数据的LCA数据。PA数据来自统计数据源，SA数据主要来自文献。背景数据主要来自中国科学院生态环境研究中心CASRCEES 2018建立的中国本地化LCA数据库，涵盖能源、材料、交通、废物管理等LCA数据。

## Use advice
在使用此LCA数据集时，用户应注意流程分析（PA）和物质分析（SA）数据是基于统计数据源和选定文献。数据集还包括源自中国本土化的LCA数据库CAS RCEES 2018的背景信息。重要的是要理解，技术适用性具体到2009年和中国背景。此外，在将这些数据与其他LCA数据集集成时，用户必须注意方法论的一致性，特别是考虑到特定于氧化铝和铝生产的回收和使用阶段行为。

## Review details
清单： 内部审查通过几个迭代步骤完成，涉及原始数据验证、原始数据记录、代表性、完整性、与 ISO 14040 和 14044 有关的建模的一致性。

## Data sources
- Ding, N., Liu, N., Lu, B. & Yang, J. Life cycle greenhouse gas emissions of aluminum based on regional industrial transfer in China. J. Ind. Ecol. 25, 1657–1672 (2021).
