# 偏航系统的制造 ; 1.5 MW 风轮机偏航系统

Dataset: ILCD process, Unit process, single operation
Geography: NMG-CN
Reference year: 2017
Classification: Unit processes / Systems / Other machines
Functional unit: The functional unit is 1.5 MW wind turbine
LCI method principle: Attributional
LCI method approaches: Allocation
Generated by: 赵云志, ll10088@163.com
Owner: 天工LCI数据工作小组
Review: Dependent internal review by 天工LCI数据工作小组
Amounts: no units in this file; such an amount is in the reference unit of its flow, which a separate flow dataset defines
copyright: false
licenseType: Free of charge for all users and uses

## General comment
1.5 MW风力涡轮机用的偏航系统是风力发电场中确保风力涡轮机转子面向风向、优化捕捉风能的关键组成部分。该偏航系统主要适用于可再生能源领域中等规模的风力涡轮机，特别适用于风能装置普遍的地区，如内蒙古东北部。

## Geography
风电功率参数的数据来自Wang ( 2012 )。以装有33台国产1.5兆瓦( MW )风电机组的风电场为案例，分析其环境影响及其替代效应。该风电场位于我国风电装机最多的省份- -内蒙古东北部。

## Reference product
- Nacelle yaw system of wind turbine: 1; estimated

## Inputs
- iron: 3500; calculated
  Steel and iron

## Deviations from the LCI method approaches
风电的生命周期清单如下所示。生产制造阶段包括风电机组、变电站、电缆的生产，这些设备消耗大量能源，排放污染物( Xue et al . , 2015)。

## Use advice
在使用1.5 MW风力涡轮机偏航系统的数据集时，需考虑到风向模式和环境影响的地区差异。务必包括生命周期清单的所有阶段，如风力涡轮机、变电站和电缆的生产和制造。在使用这些数据进行全面的环境影响分析时，仔细考虑用风能替代传统能源的环境替代效应。

## Review details
清单： 内部审查通过几个迭代步骤完成，涉及原始数据验证、原始数据记录、代表性、完整性、与 ISO 14040 和 14044 有关的建模的一致性。

## Data sources
- Li, H., Jiang, H.-D., Dong, K.-Y., Wei, Y.-M. & Liao, H. A comparative analysis of the life cycle environmental emissions from wind and coal power: Evidence from China. Journal of Cleaner Production 248, 119192 (2020).
