# Drillingoperations|Drillingfluid|Special gas wells|greater than or equal to 4 km footage / /|钻井作业|钻井液|特殊气井|大于等于4千米进尺

Dataset: ILCD process, Partly terminated system
Geography: CN
Reference year: 2019
Classification: Materials production / Other mineralic materials
Generated by: The data was created by the Office of the Second National Pollution Source Census of the Ministry of Ecology and Environment, and the data was organized by the TianGong Plan team for ILCD format / 生态环境部第二次全国污染源普查工作办公室创建数据，天工计划团队常慧敏整理数据为ILCD格式
Amounts: no units in this file; such an amount is in the reference unit of its flow, which a separate flow dataset defines
copyright: false

## Technology and included processes
the Technical of end-of-pipe management technology for pollution Drilling Operationis①Filter separation/floating separation + chemical coagulation method，Its Technical efficiency of end-of-pipe management73*①
污染物指标化学需氧量的末端治理技术是①过滤分离/上浮分离+化学混凝法，其效率为73*①，末端治理设施实际运行率（k值）计算公式为k=污水治理设施运行时间（小时/年）/正常生产时间（小时/年），①“*”表示该分类下的油田企业，当前资料没有关于使用该工艺的记录，数据为参考其他类型油气田得出。
，①“*”表示该分类下的油田企业，当前资料没有关于使用该工艺的记录，数据为参考其他类型油气田得出。

## Reference product
- Drilling Operation: 100; calculated
  原文件中描述污染物类别为Product，污染物指标为钻井作业，此处对其进行了匹配工作，将其匹配到LCAflow库里面相最符合的流，污染物指标备注为化学需氧量

## Outputs
- chemical oxygen demand: nan, 0, 0 (3 entries); calculated
  原文件中描述污染物类别为废水，污染物指标为化学需氧量，此处对其进行了匹配工作，将其匹配到LCAflow库里面相最符合的流，污染物指标备注为化学需氧量
- Petroleum-related waste: nan, 0, 0, nan, nan (5 entries); calculated
  原文件中描述污染物类别为废水，污染物指标为石油类，此处对其进行了匹配工作，将其匹配到LCAflow库里面相最符合的流，污染物指标备注为石油类
- Waste water: 56680; calculated
  原文件中描述污染物类别为废水，污染物指标为工业废水量，此处对其进行了匹配工作，将其匹配到LCAflow库里面相最符合的流，污染物指标备注为工业废水量

## Data sources
- 第二次全国污染源普查产排污核算系数手册（试用版）,二级代码11,四级代码1120文件，在完整版文件中第3413页
