# 直接还原铁生产;直接还原铁;焦炉煤气直接还原

Dataset: ILCD process, Unit process, single operation
Geography: CN
Classification: Unit processes / Materials production / Metals and semimetals
Generated by: 付翔, 1162850692@qq.com
Owner: 天工LCI数据工作小组
Review: Dependent internal review by 天工LCI数据工作小组
Amounts: no units in this file; such an amount is in the reference unit of its flow, which a separate flow dataset defines
copyright: false
licenseType: Free of charge for all users and uses

## General comment
所描述的过程涉及使用基于煤的直接还原工艺生产直接还原铁（DRI）。这种DRI生产通常是钢铁制造工业的一部分，在这里它作为传统高炉方法的更清洁的替代铁源。该过程利用焦炉产生的副产品气（焦炉煤气，COG）进行直接还原铁（DRI）生成过程。它适用于寻求减少对焦煤依赖、提高能源效率和降低温室气体排放的工业钢铁生产设施。

## Geography
The average operating data of Coal-DR, NG-DR (MID), and NG-DR (ENE) demonstration projects in China are used as the benchmark for the LCI of DR routes.

## Reference product
- Direct Reduced Iron: 1000; calculated
  DRI

## Inputs
All rows: calculated
- Pellet: 1357.3
  Pellets
- freshwater,freshwater: 900
  The average operating data of Coal-DR, NG-DR (MID), and NG-DR (ENE) demonstration projects in China are used as the benchmark for the LCI of DR routes. LCI of COG-DR and H-DR routes, which is not scaled-up in China are estimated based on Coal-DR routes combined with literature data from simulations, laboratory tests, and process modeling in
- oxygen: 25
  (same comment as for freshwater,freshwater)
- Coke oven gas: 589.7
  COG
- Electricity: 733.32
  (same comment as for freshwater,freshwater)

## Outputs
- particles (> PM10): 0.1; calculated
  (same comment as for freshwater,freshwater)
- carbon dioxide (fossil): 170; calculated
  原文未区分bio和fossil，根据专家判断此处为fossil

## Data treatment and extrapolations
LCI of COG-DR and H-DR routes, which is not scaled-up in China are estimated based on Coal-DR routes combined with literature data from simulations, laboratory tests, and process modeling in Table 9 [49,50]. The LCI of Coal-DR is obtai

## Use advice
使用直接还原铁（DRI）路线的LCI数据时，必须参考中国相关示范项目的平均操作数据。方法学建议包括确保建模反映了为COG-DR和H-DR路线概述的特定技术应用和能量输入，并考虑中国语境下的可扩展性。数据应注意到它包括了来自模拟、实验室测试和过程建模的估计，并且可能需要调整，以便应用于所研究之外的情境或技术设置。此外，在考虑将LCI数据纳入全面的环境评估时，确保正确定义系统边界，特别是关于随后的循环利用过程的包含或排除。

## Review details
清单： 内部审查通过几个迭代步骤完成，涉及原始数据验证、原始数据记录、代表性、完整性、与 ISO 14040 和 14044 有关的建模的一致性。

## Data sources
- The carbon reduction potential of hydrogen in the low carbon transition of the iron and steel industry: The case of China
