# municipal wastewater treatment | wastewater | Filter-press dewatering

Dataset: ILCD process, Unit process, single operation
Geography: SH-CN
Classification: Materials production / Other mineralic materials
Generated by: YU Chenyang, yuchenyang0506@foxmail.com
Review: Dependent internal review by Tiangong LCI Data Working Group
Amounts: no units in this file; such an amount is in the reference unit of its flow, which a separate flow dataset defines

## Inputs
- Electricity: 570.96
  (kWh/t DS)
- Chemicals (unspecified): 5.3
  PAM (kg/t DS)
- Chemicals (unspecified): 72.3
  PAC (kg/t DS)

## Review details
Inventory: The internal review was done by several iteration steps concerning raw data validation, raw data documentation, representativity, completeness and consistency of modelling with regard to ISO 14040 and 14044.; Documentation: The review of the documentation was performed by Ecobilan and is in compliance with ISO 14040 and 14044. The data set documentation is correct in view of the appropriateness of the information provided. It includes all relevant information in view of data quality and scope of application of the respective LCI result.

## Data sources
- A Megacity-Scale Analysis of Sludge Management and Carbon Footprint in China
