# Soil remediation;soil vapor extraction;in-situ;operation;SVE operation;

Dataset: ILCD process, Unit process, single operation
Geography: KR
Classification: Other Services / Repair and maintenance
Generated by: Lei Qiushuang, leiqs@caep.org.cn
Owner: Tiangong LCI Data Working Group
Review: Dependent internal review by Tiangong LCI Data Working Group
Amounts: no units in this file; such an amount is in the reference unit of its flow, which a separate flow dataset defines
licenseType: Free of charge for all users and uses

## General comment
This soil remediation system is designed for in-situ soil vapor extraction (SVE) during the operational phase. It is intended for cleansing soil environments by removing volatile contaminants through the application of SVE techniques as a unit process within a sequence of operations aimed at soil purification.

## Inputs
- Electricity: 535493; article inperiodical

## Use advice
When utilizing this data set for life cycle assessment, it is important to consider only the operational phase of soil vapor extraction (SVE) process for in-situ soil remediation. Pay attention to the unit process boundaries and ensure that upstream and downstream processes such as setup, dismantling, and monitoring stages are accounted for separately. Incorporate region-specific parameters if available to match the local environmental conditions and pollution profiles.

## Review details
Inventory: The internal review was done by several iteration steps concerning raw data validation, raw data documentation, representativity, completeness and consistency of modelling with regard to ISO 14040 and 14044.

## Data sources
- Assessment of Environmental Impacts and CO2 Emissions from Soil Remediation Technologies using Life cycle Assessment - Case Studies on SVE and Biopile Systems
