# 钢铁生产 ; 整个风电场

Dataset: ILCD process, Unit process, single operation
Geography: NMG-CN
Reference year: 2017
Classification: Unit processes / Materials production / Metals and semimetals
Functional unit: The functional unit is 1.5 MW wind turbine
LCI method principle: Attributional
LCI method approaches: Allocation
Generated by: 赵云志, ll10088@163.com
Owner: 天工LCI数据工作小组
Review: Dependent internal review by 天工LCI数据工作小组
Amounts: no units in this file; such an amount is in the reference unit of its flow, which a separate flow dataset defines
copyright: false
licenseType: Free of charge for all users and uses

## General comment
该数据集描述了配备33台1.5兆瓦（MW）国产风力涡轮机的风电场的环境影响和替代效应，适用于大规模风电发电。作为案例研究的风电场位于中国主要风电区域之一的内蒙古东北部。它代表了风力发电的可持续发展，用于可再生能源生产。

## Geography
风电功率参数的数据来自Wang ( 2012 )。以装有33台国产1.5兆瓦( MW )风电机组的风电场为案例，分析其环境影响及其替代效应。该风电场位于我国风电装机最多的省份- -内蒙古东北部。

## Reference product
- Steel,Steel: 1; measured
  steel and iron

## Inputs
- Energy, geothermal, converted: 40.5661; calculated

## Outputs
- carbon dioxide (fossil): 2061.88; calculated
- sulfur dioxide: 2.01; calculated
- nitrous oxide: 5.77; calculated
- particles (PM2.5 - PM10): 0.39; calculated
  PM

## Deviations from the LCI method approaches
风电的生命周期清单如下所示。生产制造阶段包括风电机组、变电站、电缆的生产，这些设备消耗大量能源，排放污染物( Xue et al . , 2015)。

## Use advice
在使用该数据集进行生命周期评估（LCA）时，必须考虑所研究风电场的具体条件和位置，以进行准确的环境影响分析。在将数据推广到具有不同特性的风电场或位于具有不同风力特征的不同地理位置的风电场时应谨慎行事。用户还必须考虑生产和制造阶段，涉及显著的能源消耗和污染物排放，正如该数据集所表示的。

## Review details
清单： 内部审查通过几个迭代步骤完成，涉及原始数据验证、原始数据记录、代表性、完整性、与 ISO 14040 和 14044 有关的建模的一致性。

## Data sources
- Li, H., Jiang, H.-D., Dong, K.-Y., Wei, Y.-M. & Liao, H. A comparative analysis of the life cycle environmental emissions from wind and coal power: Evidence from China. Journal of Cleaner Production 248, 119192 (2020).
