# cement production|cement, portland fly-ash cement, 52.5MPa|dry rotary kiln

Dataset: ILCD process, Unit process, black box
Geography: BJ-CN
Classification: Materials production / Other mineralic materials
Generated by: Siqi Yang
Amounts: no units in this file; such an amount is in the reference unit of its flow, which a separate flow dataset defines
copyright: false

## General comment
Dry rotary kiln scenarios with 100% cement kiln dust recycling technology were considered.

## Model description
Management of 1 ton Portland fly ash cement (P.F 52.5) was chosen.
Dry rotary kiln scenarios with 100% cement kiln dust recycling technology were considered. Processes of infrastructure of each scenario, road transport of raw material to cement production site, direct emissions, sewage treatment, raw material and energy production, and electricity recovery from dry rotary kiln scenarios are included.

## Reference product
- cement, portland fly-ash cement, 52.5MPa: 1000
  Portland cement P.F 52.5

## Inputs
All rows: article inperiodical
- limestone, crushed, for mill: 1160
  Limestone
- hard coal: 111.73
  Bituminous coal
- iron, powder: 1.7
  lron powder
- gypsum (desulphurized): 50
  Gypsum
- ash: 170
  Coal ash, namely fly ash.
- sandstone: 6.1
  Sandstone
- electricity, medium voltage: 372.204
  Electricity
- Water (fresh water): 180
  Fresh water consumption
- crude oil; 42.3 MJ/kg: 0.35
  Oil

## Outputs
All rows: article inperiodical
- sulfur dioxide: 0.004
  SO2
- hydrogen chloride: 0.000436
  HCI
- carbon dioxide: 810
  CO2
- hydrogen fluoride: 0.00047
  HF
- Nitrogen oxides: 1.88
  NOx
- zinc: 0.00015
  Zn
- arsenic: 5.1e-6
  As
- nickel: 5e-5
  Ni
- cadmium: 8.7e-5
  Cd
- lead: 0.00012
  Pb
- mercury: 2.2e-6
  Hg
- chromium: 3.4e-5
  Cr
- copper: 3.4e-6
  Cu
- particles (> PM10): 0.012
  Particulates. The particle size is not specified. Here we treat it as PM>10.

## Data selection and combination
China data have been used as much as possible. Where China data were not available, data and relevant background data from Europe were used (Ecoinvent centre, 2007). Based on the data from China, the average yearly monitoring data of cement production processes (including energy, water, and raw material consumption, direct emissions) of Beijing cement production site in China were used(http://www.jiancai.hk/news/show/265/).
Data on heavy metal gas emissions from general cement in Beijing cement production site is coming from report (2007).

## Sampling procedure
The actual annual production of cement was around 2000,000 ton.

## Data sources
- Jinglan Hong & Xiangzhi Li. (2011). Environmental assessment of sewage sludge as secondary raw material in cement production – A case study in China. Waste Management 31, 1364–1371.
