# 通用聚苯乙烯（GPPS）生产

Dataset: ILCD process, Unit process, black box
Geography: BR
Reference year: 2010
Valid until: 2011
Classification: Unit processes / Materials production / Plastics
Functional unit: 1 ton of GPPS
Generated by: 李智伟,
Owner: 天工LCI数据工作小组
Review: Dependent internal review by 天工LCI数据工作小组
Amounts: no units in this file; such an amount is in the reference unit of its flow, which a separate flow dataset defines
licenseType: Free of charge for all users and uses

## General comment
C6H6 is mainly obtained through catalytic reforming based on crude oil.C6H6 and C2H4 are converted into C8H10 by catalytic alkylation with a synthetic zeolite.

## Geography
巴西南部/东南地区工厂

## Time period
2010-2011年在巴西南部/东南部地区的工厂中收集了初级和次级数据。

## Technical purpose
聚苯乙烯树脂，包括通用聚苯乙烯（GPPS）和高冲击聚苯乙烯（HIPS），主要用于生产包装行业、电子、家用电器、建筑材料等需要坚固、可模塑塑料材料的产品。

## Reference product
- polystyrene (general purpose) granulate (GPPS): 1000

## Inputs
- benzene: 289
- ethylene: 840
- nitrogen: 6.82
- water: 10400
- Electricity: 1195.2
- heat: 10200
- light fuel oil: 101

## Outputs
- carbon dioxide (fossil): 0.452
  原文未区分bio和fossil，根据专家判断此处为fossil
- methane (fossil): 0.0019
  原文未区分bio和fossil，根据专家判断此处为fossil
- Volatile Organic Compounds (VOCs): 0.0024
- Suspended solids, unspecified,Suspended solids, unspecified: 7.9
- chemical oxygen demand: 0.00428

## Data selection and combination
Process-based data from Brazilian were used

## Data treatment and extrapolations
ReCiPe method (Europe H/H) was used as the assessment method for consistency.

## Use advice
在使用此数据集进行生命周期评估（LCA）时，确保影响评估的范围与地区数据一致，该数据涉及2010-2011年巴西南部/东南部地区的工厂。数据集特别适用于与2010-2011年有关的分析，LCA实践者应考虑数据的时间相关性。影响评估应使用ReCiPe方法（欧洲H/H版）以保持与初始数据收集和处理过程的一致性。

## Review details
清单： 内部审查通过几个迭代步骤完成，涉及原始数据验证、原始数据记录、代表性、完整性、与 ISO 14040 和 14044 有关的建模的一致性。

## Data sources
- Hansen, A. P.; da Silva, G. A.; Kulay, L. Evaluation of the Environmental Performance of Alternatives for Polystyrene Production in Brazil. Science of The Total Environment 2015, 532, 655–668.
