# 规模生猪生产 ; 5W JTS 猪场

Dataset: ILCD process, Unit process, black box
Geography: HUB-CN
Reference year: 2012
Classification: Unit processes / Materials production / Agricultural production means
Functional unit: The application coefficient (100/ field weight) was corrected to the standard functional unit weight of 100kg due to inconsistent field weight.
Generated by: 杨瑞, 1632707028@qq.com
Owner: 天工LCI数据工作小组
Review: Dependent internal review by 天工LCI数据工作小组
Amounts: no units in this file; such an amount is in the reference unit of its flow, which a separate flow dataset defines
copyright: false
licenseType: Free of charge for all users and uses

## General comment
规模集约化养猪与传统养猪相区别的一个重要特征是生产过程中实现流水式均 衡生产，产品批量化、规格化。由于不同猪舍类型、不同的管理措施、不同的饲料 来源及配方技术、粪污处理采取不同方法等，不同规模生猪生产系统整体及关键节 点导致的环境影响并没有确切认识，本章结合第二章构建的生猪生产系统模型进行 系统地研究。

## Geography
通过实地调研归纳了湖北省集约化生猪养殖的特点，即生猪生产工艺多为自繁 自养采用全进全出分阶段饲养方式。建有各种类型猪舍。一般猪舍内采用机械通风， 进行防暑降温驱寒保暖及舍内小环境控制；母猪与仔猪采用限位栏和高床饲养，平 均更新率一般在 35%-40%，种猪使用年限在 3-4 年。日粮依据生理阶段的营养需要 配制成全价饲料，以玉米等谷物为主，饲料原料从外部购买。品种多数为洋三元杂 交猪（如 DLY），年出栏商品猪 10000 头以上；日常管理中采用干清粪、水泡粪方 式，以利干湿分离；粪污处理方式采用干粪堆肥，污水进行厌氧发酵工艺生产沼气。 万头猪场为一点分布，五万头以上集约化猪场采取多点布局，繁育场+育肥场，断奶 仔猪使用卡车运输周转。

## Time period
按照 2012 年《中国畜牧业年鉴》的划分，生猪养殖模式可分为年出栏生猪 1 头至 49 头的散户 养殖；年出栏生猪 50 头至 499 头的小规模养殖；年出栏生猪 500 头至 9999 头的中 规模养殖；年出栏生猪 10000 头以上的大规模养殖四种模式。

## Technology and included processes
本文确立的商品猪 LCA 的研究对象是商品猪产品系统，因此商品猪 LCA 的目 标应包含以下几个方面：1）依照商品猪的生产流程，阐明商品猪生产工艺中的关键 环节或过程的环境影响类型；2）依据商品猪的不同生产系统特点阐明不同生产系统 的环境影响评分，并通过影响评分评价不同产品系统的环境友好程度；3）依据对生 猪生产系统的环境影响评价结果提出改善或优化途径以及建议。

## Technical purpose
此数据集描述了 5W JTS猪场的大规模集约化养猪作业，是农业过程的一部分，专为高容量猪生产进行优化。这一生产模式涵盖了均衡流水式生产以及规格化繁殖和喂养实践的使用，适用于每年超过 10,000 头猪的繁殖与育肥。该农场采用自繁自养、分阶段全进全出喂养策略，并配备了适用于环境控制的各种类型猪舍。主要饲养的品种包括外国三元杂交猪，粪便通过干堆肥和厌氧发酵用于生产沼气。

## Reference product
- pig: 100; measured
  由于出栏体重不一致运用系数（100/出栏体重）校正为 100kg 的标准功能单元体重。

## Inputs
All rows: measured
- sand: 1.8646
  sands，取自5W JTS 猪场数据
- Glass (formed & finished): 0.0528
  glasses，取自5W JTS 猪场数据
- Steel: 1.0834
  steel，取自5W JTS 猪场数据
- polystyrene expandable granulate (EPS): 0.054
  EPS，取自5W JTS 猪场数据
- water: 2729.1
  取自5W JTS 猪场数据
- feed: 276.85
  取自5W JTS 猪场数据

## Outputs
All rows: measured
- manure: 264.4
  猪粪便，取自5W JTS 猪场数据
- carbon dioxide (fossil),carbon dioxide (fossil): 262.29
  取自5W JTS 猪场数据
- ammonia: 1.0893
  取自5W JTS 猪场数据
- methane (biogenic): 0.81716
  取自5W JTS 猪场数据
- nitrous oxide: 0.05495
  一氧化二氮，取自5W JTS 猪场数据

## Deviations from the LCI method approaches
依据生产工艺连续性、功能性、相对独立性及生猪生产阶段主要特点及相应物 质输入类型划分为建材投入、仔猪生产、饲料消耗、日常管理、粪污处理五个重点 环节，同时依据生命周期思想，把仔猪生产环节中饲养母猪的输入与输出物质以断 奶仔猪作为载体分担相应的环境影响，饲料消耗环节包括土地需求、作物种植、化 肥、农药与农用机械投入。日常管理环节包含水电投入及舍内氨气、甲烷、氧化亚 氮、二氧化碳排放。粪污处理包括干粪堆肥与污水厌氧发酵过程。

## Data selection and combination
采取实地测量及收集猪 场原始记录数据，实地测量是指测定猪舍栋数，类型，规格，建材类别等。收集猪 场月报表数据，含猪群存栏结构、母猪繁殖性能、生猪生长性能、生猪销售、饲料 进出清单，饲料类别，不同阶段饲料的大料配方、猪场水电消耗原始记录资料。猪 舍空气中有害气体浓度，粪污排量查阅文献，饲料运输、作物种植方式、农资使用 量等查阅国家和湖北省统计年鉴。收集这些记录资料目的是确定不同阶段猪只的能 源资源及相应的排放数据。部分数据通过查阅文献资料获得，如国家统计局的统计 年鉴，湖北省统计局的年鉴资料，其他学者相关的研究数据。现场调研了 62 个猪场， 精选 30 个规模猪场数据进行建模。

## Data treatment and extrapolations
本文采用的气体产生系数为母猪阶段 NH3：8.2g/d.pig，CO2：2.6kg/d.pig，N2O： 0.48g/d.pig，CH4：3.5g/d.pig；育肥阶段 NH3：6.9 g/d.pigCO2：1585g/d.pigN2O 83 0.34g/d.pig，CH4：5.5g/d.pig。

## Use advice
此数据集应用于理解大规模养猪操作的环境影响。用户应当在解释数据时考量猪舍设计、喂养策略和粪便处理方法的技术变化。生命周期评估模型必须考虑跨建筑材料、仔猪生产、饲料消耗和粪便处理等阶段的材料投入划分。评估还应包括对日常管理实践引起的功耗和设施排放的考虑。需要特别注意的是，标准化输出到功能重量单位的应用系数，以及来自国家和省级年鉴或现场调查结果等其他来源的数据集对于全面理解至关重要。

## Review details
清单： 内部审查通过几个迭代步骤完成，涉及原始数据验证、原始数据记录、代表性、完整性、与 ISO 14040 和 14044 有关的建模的一致性。

## Data sources
- 惠晓红. 运用生命周期评价与生态效率法评估湖北省生猪养殖系统研究. (华中农业大学, 2017).
