# 开采阶段;石油;油藏提取处理分离

Dataset: ILCD process, Unit process, single operation
Geography: UM
Reference year: 2001
Classification: Unit processes / Energy carriers and technologies / Crude oil based fuels
LCI method principle: Attributional
LCI method approaches: Consequential
Generated by: 李梓萌, 1577978537@qq.com
Owner: 天工LCI数据工作小组
Review: Dependent internal review by 天工LCI数据工作小组
Amounts: no units in this file; such an amount is in the reference unit of its flow, which a separate flow dataset defines
copyright: false
licenseType: Free of charge for all users and uses

## General comment
该过程涉及二叠纪盆地、特别是圣安德烈斯白云岩的石油提取、处理与分离。它在石油行业中用于增强油气回收操作，包括在该地区典型深度的注水和二氧化碳注入，以及伴生气体处理以用于组分分离和长期储存的二氧化碳再注入。

## Geography
德克萨斯州西部的二叠纪盆地,这是一种层状白云岩，平均孔隙度为8.5%，平均渗透率为1.5 md。产层来自圣安德烈斯白云岩，平均深度为1585 m，产层厚度为15 ~ 70 m。该单元占地13130英亩，已经进行了水驱，

## Technology and included processes
油藏提取处理分离是指从地下油气藏中开采出来的混合物，经过一系列的处理和分离工艺，将其中的油、气和水等组分分离出来，以便进一步加工利用气液分离：气液分离技术包括重力分离、压力分离、膜分离等多种方式。常见的分离设备包括气液分离器、膜分离装置等。化学处理：化学处理技术需要根据混合物的组成和性质选择适当的处理剂和反应条件，通过化学反应将混合物中的目标组分分离出来。油气水分离：常见的分离设备包括三相分离器、旋流器、离心分离器等，通过调整分离设备的操作参数，如压力、温度和流速等，实现油、气、水的有效分离。

## Reference product
- LPG - liquefied petroleum gas: 1; uniform; missing unimportant
  生产石油量,气体密度为0.8吨/1000立方米和热值为1000 BTU/scf

## Inputs
- Hard coal, at consumer EU-27: 0.0065; uniform; missing unimportant
  消耗的煤碳量
- natural gas: 0.065; uniform; missing unimportant
  消耗的天然气量

## Use advice
该生命周期评估数据限定在设施的运营边界内，重点关注增强油气回收生产期间的温室气体排放。使用这些数据时，用户必须包括与提取和处理阶段相关的所有排放和排放物。还必须核算为额外的石油开采和储存而进行的二氧化碳的运输和注入。按照研究的要求，必须维持二氧化碳注入的最低混溶压力。该数据不应用于评估石油生产的整个生命周期影响，因为它仅限于某些排放和过程。

## Review details
清单： 内部审查通过几个迭代步骤完成，涉及原始数据验证、原始数据记录、代表性、完整性、与 ISO 14040 和 14044 有关的建模的一致性。

## Data sources
- Aycaguer, A.-C., Lev-On, M., & Winer, A. M. (2001). Reducing Carbon Dioxide Emissions with Enhanced Oil Recovery Projects: A Life Cycle Assessment Approach. Energy & Fuels, 15(2), 303–308.
