# 直接还原铁生产;直接还原铁;氢基还原（部分）

Dataset: ILCD process, Unit process, single operation
Geography: CN
Classification: Energy carriers and technologies / Other non-renewable fuels
Generated by: 付翔, 1162850692@qq.com
Owner: 天工LCI数据工作小组
Review: Dependent internal review by 天工LCI数据工作小组
Amounts: no units in this file; such an amount is in the reference unit of its flow, which a separate flow dataset defines
copyright: false
licenseType: Free of charge for all users and uses

## General comment
使用氢基还原的直接还原铁（DRI）生产（部分）代表了一种用于制造低碳足迹铁的单元过程。这种方法特别适合需要具有特定冶金属性的铁的行业，如钢铁制造行业。在需要清洁和更可持续的传统高炉方法的替代方案的过程中，可以应用这种方法。

## Geography
The average operating data of Coal-DR, NG-DR (MID), and NG-DR (ENE) demonstration projects in China are used as the benchmark for the LCI of DR routes.

## Reference product
- Direct Reduced Iron: 1000; calculated
  DRI

## Inputs
All rows: calculated
- Pellet: 1357.3
  Pellets
- Water (fresh water): 200
  The average operating data of Coal-DR, NG-DR (MID), and NG-DR (ENE) demonstration projects in China are used as the benchmark for the LCI of DR routes. LCI of COG-DR and H-DR routes, which is not scaled-up in China are estimated based on Coal-DR routes combined with literature data from simulations, laboratory tests, and process modeling in
- Natural gas, at consumer EU-27: 16
  (same comment as for Water (fresh water))
- hydrogen: 550
  (same comment as for Water (fresh water))
- Electricity: 356.4
  (same comment as for Water (fresh water))

## Outputs
- Dust (unspecified, from stack): 0.1; calculated
  (same comment as for Water (fresh water))

## Data treatment and extrapolations
LCI of COG-DR and H-DR routes, which is not scaled-up in China are estimated based on Coal-DR routes combined with literature data from simulations, laboratory tests, and process modeling in Table 9 [49,50]. The LCI of Coal-DR is obtai

## Use advice
在使用直接还原铁生产过程的生命周期清单（LCI）数据时，用户应注意数据是根据中国煤基还原铁（Coal-DR）、天然气基还原铁（NG-DR（MID）和NG-DR（ENE））示范项目的平均操作数据进行标定的。对于在中国没有放大的COG-DR和H-DR路线的LCI数据，估计是基于Coal-DR路线与模拟、实验室测试和过程建模数据相结合的。在采用这些路线的LCI数据时，需注意文献中所述的方法论（表9，[49,50]）。确保在使用阶段建模和任何环境影响评估中充分考虑到系统边界、假设和数据的特定背景。

## Review details
清单： 内部审查通过几个迭代步骤完成，涉及原始数据验证、原始数据记录、代表性、完整性、与 ISO 14040 和 14044 有关的建模的一致性。

## Data sources
- The carbon reduction potential of hydrogen in the low carbon transition of the iron and steel industry: The case of China
