# 环氧丙烷生产;通用环氧丙烷;离子膜电解工艺

Dataset: ILCD process
Geography: CN
Reference year: 2009
Classification: Unit processes / Materials production / Organic chemicals
Functional unit: production of 1kg propylene oxide by chlorohydrin process
Generated by: 刘晓华, lxh01311@163.com
Owner: 天工LCI数据工作小组
Review: Dependent internal review by 天工LCI数据工作小组
Amounts: no units in this file; such an amount is in the reference unit of its flow, which a separate flow dataset defines
copyright: false
licenseType: Free of charge for all users and uses

## General comment
生产的环氧丙烷（丙烯醚）是一种多用途化学中间体，用于制造聚氨酯、二醇和塑料。它适用于生产泡沫，涂层，粘合剂，密封剂和弹性体等广泛的产品。

## Inputs
- Chlorine: 1350; measured
  氯气
- Quicklime: 807; measured
  石灰
- Electricity: 360; measured
  电
- Steam: 2000; measured
  蒸汽

## Outputs
- Wastewater: 50000; measured
  废水
- Solid Waste: 2000; measured
  废渣

## Use advice
在进行生命周期评估时，确保在使用此数据时考虑与氯醇法制造过程相关的环境影响。这包括对能源使用、原材料消耗和产生的废物进行核算。在适用的情况下考虑回收废物流的潜力。注意这一工艺的技术适用性，因为它与现代工业标准有关，可能不代表环氧丙烷所有的生产方法。

## Review details
清单： 内部审查通过几个迭代步骤完成，涉及原始数据验证、原始数据记录、代表性、完整性、与 ISO 14040 和 14044 有关的建模的一致性。

## Data sources
- 聚碳酸酯和聚乳酸的生命周期评价
