# 再生聚氯乙烯（PVC）生产;再生聚氯乙烯 ;物理法处 174003. 8t/a ;废旧聚氯乙烯

Dataset: ILCD process, Unit process, black box
Geography: HA-JS-CN
Reference year: 2010
Classification: Unit processes / End-of-life treatment / Material recycling
Functional unit: Dispose of 1 ton of waste polyvinyl chloride
Generated by: 程晓宇, xiaoyucheng@email.ncu.edu.cn
Owner: 天工LCI数据工作小组
Review: Dependent internal review by 天工LCI数据工作小组
Amounts: no units in this file; such an amount is in the reference unit of its flow, which a separate flow dataset defines
copyright: false
licenseType: Free of charge for all users and uses

## General comment
再生工艺的主要技术环节包括废旧聚氯乙烯的破碎、漂洗和干燥、磁力分选、造粒及再生。

## Geography
金湖县

## Time period
文献发表时间

## Technical purpose
通过物理回收工艺生产的再生聚氯乙烯用于制造各种PVC产品。这包括在建筑行业用于管道、配件、型材和电缆，以及在生产消费品如鞋类、包装和地板。

## Reference product
- Waste Polyvinyl Chloride: 1000; input; missing unimportant

## Inputs
- Gasoline (regular): 2929.6; missing unimportant
- Diesel: 1938.4; missing unimportant
- Electricity: 206.89; missing unimportant

## Outputs
All rows: missing unimportant
- carbon dioxide (fossil): 84.6
  原文未区分bio和fossil，根据专家判断此处为fossil
- carbon monoxide (fossil): 2.365
  原文未区分bio和fossil，根据专家判断此处为fossil
- Nitrogen oxides: 0.911
- sulfur oxides: 0.739
- Flue dust: 0.57
- hydrocarbons (unspecified): 0.273
- Alcohols, C6-12: 0.0696
- hydrogen chloride: 0.00764
- Volatile Organic Compounds (VOCs): 0.274
- chemical oxygen demand: 0.00179
- Divalent lead ion: 5.32e-6
- Suspended solids, unspecified,Suspended solids, unspecified: 0.0113
- Petroleum: 0.00057309
- Divalent mercury ion: 1.1e-7
- Ash: 1.66
- Dregs: 0.977
- Sediment and Sludge: 18
- Waste Impurities: 26.1

## Use advice
在使用这些数据进行生命周期评估时，需要考虑包括收集、运输和整个再生过程在内的废旧聚氯乙烯回收的单元过程。能源消耗以及废气和固体废物的产生必须纳入评估。然而，由于公司回收并重用其所有废水，因此不需要为废水排放进行调整。确保研究的技术边界与来源文献中所述的金湖县的操作一致。

## Review details
清单： 内部审查通过几个迭代步骤完成，涉及原始数据验证、原始数据记录、代表性、完整性、与 ISO 14040 和 14044 有关的建模的一致性。

## Data sources
- 伍跃辉, 陈爱燕, 柏丽梅, 王震 & 孙德智. 废旧聚氯乙烯再生过程生命周期评价. 环境科学研究 805–810 (2010) doi:
