# Production of secondary and primary copper|Secondary copper|collection & transportation, mechanical processing (sorting & dismantling, recycling), secondary smelting and refining|copper waste

Dataset: ILCD process, Unit process, single operation
Geography: CN
Reference year: 2017
Classification: Materials production / Other mineralic materials
Functional unit: the functional unit is 1 kg secondary copper produced from six types of waste streams in China.
LCI method principle: Attributional
LCI method approaches: Allocation - market value
Generated by: Peng Wang, 2867919560@qq.com
Review: Dependent internal review by Tiangong LCI Data Working Group
Amounts: no units in this file; such an amount is in the reference unit of its flow, which a separate flow dataset defines
copyright: false

## Geography
depicts the historical (2005–2017) copper waste management and secondary copper production in China

## Time period
depicts the historical (2005–2017) copper waste management and secondary copper production in China,

## Technology and included processes
Secondary copper is produced from the aforementioned EoL scrap (old scrap, including imported waste) and new scrap generated during the fabrication and manufacturing of copper products.

## Reference product
- copper: 0.92; software or database
  Secondary copper

## Inputs
All rows: software or database
- process steam: 1.58
  steam, in chemical industry_steam production, in chemical industry
- silica sand: 0.0619
  silica sand需要补充
- Lime: 0.0732
  lime
- Light fuel oil: 0.0675
  light fuel oil
- Hard coal, at consumer EU-27: 0.154
  hard coal
- oxygen: 0.0905
- water: 1.16
  tap water
- copper scrap: 1
  copper scrap需要补充
- Electricity: 0.407
  electricity

## Outputs
All rows: software or database
- antimony: 3e-6
  Antimony
- carbon monoxide: 0.002
  Carbon monoxide
- nitrogen dioxide: 0.001
  Nitrogen oxides
- sulfur dioxide: 0.003
  Sulfur dioxide
- zinc: 0.000375
- water: 0.000176

## Deviations from the LCI method approaches
The environmental impacts were conducted using the CMLCA 6.0 software.

## Data selection and combination
The historical copper waste generation from end-of-life (EoL) copper products in Chinawas explored using a stock-driven MFA method, which was estimated based on in-use stocks and lifespans of copper-containing products.

## Data treatment and extrapolations
the methods of dynamic MFA and prospective LCA are combined to model the copper stock-flow dynamics,

## Review details
Inventory: The internal review was done by several iteration steps concerning raw data validation, raw data documentation, representativity, completeness and consistency of modelling with regard to ISO 14040 and 14044.; Documentation: The review of the documentation was performed by Ecobilan and is in compliance with ISO 14040 and 14044. The data set documentation is correct in view of the appropriateness of the information provided. It includes all relevant information in view of data quality and scope of application of the respective LCI result.

## Data sources
- Dong, D. et al. Assessing China’s potential for reducing primary copper demand and associated environmental impacts in the context of energy transition and “Zero waste” policies. Waste Management 144, 454–467 (2022).
