# Soil remediation;in-situ;electrokinetic remediation;remedial investigations;Polyethylene;

Dataset: ILCD process, Unit process, single operation
Geography: KR
Reference year: 2021
Classification: Other Services / Repair and maintenance
Generated by: Wang Yipeng, wangyp@caep.org.cn
Owner: Tiangong LCI Data Working Group
Review: Dependent internal review by Tiangong LCI Data Working Group
Amounts: no units in this file; such an amount is in the reference unit of its flow, which a separate flow dataset defines
copyright: false
licenseType: Free of charge for all users and uses

## General comment
Soil quality sampling survey, including drilling, column transportation, sampling, etc.

## Technical purpose
The data set represents the application of in-situ electrokinetic remediation as a technique for soil decontamination. It's specifically applicable for treating contaminated soils on-site by applying an electric current that causes ions and fluids to move through the soils, aiding in the removal of pollutants. This process is suitable for sites where conventional remediation methods are less effective or impractical.

## Reference product
- Polyethylene: 1.39; input; measured
  Manual sampling equipment (liner)

## Inputs
- Diesel: 0.0386; measured
  Vehicle (five times, 19.3 km, 10 km/1 L)

## Outputs
- Greenhouse Gases: 320; measured
- Nitrogen oxides: 0.0438; measured
- SOx: 0.000789; measured
- particles (> PM10): 0.00179; measured

## Use advice
Users of this data set must take into account the specific site conditions, as electrokinetic remediation efficiency can be highly dependent on factors such as soil type, pH, contaminant properties, and moisture content. It is important for users to adapt the data to reflect the unique conditions of the site and to ensure about the energy consumption and potential secondary pollution during the remediation process. Additionally, the extent to which the remediation process affects the site should be considered in the life cycle assessment.

## Review details
Inventory: The internal review was done by several iteration steps concerning raw data validation, raw data documentation, representativity, completeness and consistency of modelling with regard to ISO 14040 and 14044.

## Data sources
- Environmental assessment on electrokinetic remediation of multimetal-contaminated site: a case study
