# RawMaterialDrying|Particleboard,otherman-madeboards(non-woodman-madeboards,joineryboards,plywood,reconstituteddecorativematerials,veneerman-madeboards,etc.)|Woodchips,substrates,cores,veneers|Drying|All sizes / 原料干燥|刨花板、其他人造板（非木质人造板、细工木板、胶合木、重组装饰材、饰面人造板等）|木制碎料、基材、板芯、单板|烘干|所有规模

Dataset: ILCD process, Partly terminated system
Geography: CN
Reference year: 2019
Classification: Materials production / Other mineralic materials
Generated by: The data was created by the Office of the Second National Pollution Source Census of the Ministry of Ecology and Environment, and the data was organized by the TianGong Plan team for ILCD format / 生态环境部第二次全国污染源普查工作办公室创建数据，天工计划团队常慧敏整理数据为ILCD格式
Amounts: no units in this file; such an amount is in the reference unit of its flow, which a separate flow dataset defines
copyright: false

## Technology and included processes
the treatment technology for the pollution of Particle Boarddidn't offered，The formula for calculating the actual operation rate (k-value) of the end-of-pipe treatment facility is k = power consumption of dust removal equipment (kWh) / (rated power of dust removal equipment (kW) × dust removal equipment operating time (hours))
污染物指标工业废气量的末端治理技术未说明

## Reference product
- Particle Board: 1; calculated
  原文件中描述污染物类别为Product，污染物指标为刨花板、其他人造板（非木质人造板、细工木板、胶合木、重组装饰材、饰面人造板等），此处对其进行了匹配工作，将其匹配到LCAflow库里面相最符合的流

## Outputs
- Exhaust gas: 232; calculated
  原文件中描述污染物类别为废气，污染物指标为工业废气量，此处对其进行了匹配工作，将其匹配到LCAflow库里面相最符合的流
- volatile organic compound: 0.0002, 8e-5, 6e-5, 0.000376, 0.00028, 0.00032, 0.0004 (7 entries); calculated
  原文件中描述污染物类别为废气，污染物指标为挥发性有机物，此处对其进行了匹配工作，将其匹配到LCAflow库里面相最符合的流

## Data sources
- 第二次全国污染源普查产排污核算系数手册（试用版）,二级代码20,三级代码202.0文件，在完整版文件中第345页
