# 石油焦煅烧-铝电解碳阳极生产 ; 煅烧焦 ; 石油焦

Dataset: ILCD process, Unit process, single operation
Geography: CN
Reference year: 2019
Classification: Unit processes / Energy carriers and technologies / Crude oil based fuels
Generated by: 傅晨玲, fu-chenling@tsinghua.edu.cn
Owner: 天工LCI数据工作小组
Review: Dependent internal review by 天工LCI数据工作小组
Amounts: no units in this file; such an amount is in the reference unit of its flow, which a separate flow dataset defines
copyright: false
licenseType: Free of charge for all users and uses

## General comment
该数据集描述了石油焦煅烧至铝电解碳阳极生产的工业过程。煅烧焦通常作为原料用于生产铝熔炼行业不可或缺的碳阳极。煅烧焦为铝生产中的电解过程提供必需的碳。

## Time period
文献发表日期

## Reference product
- calcined coke: 1000; software or database
  Calcined coke

## Inputs
- electricity, high voltage, aluminium industry: 22.788; software or database
  natural gas
- Petroleum Coke: 1330; software or database
  Packaging/box clamp
- Water, unspecified natural origin: 2800; software or database

## Outputs
All rows: software or database
- carbon dioxide (fossil),carbon dioxide (fossil): 45.5
- municipal solid waste: 3.06
- particles, unspecified: 2.22
- chemical oxygen demand: 0.27
- sulfur dioxide: 0.00051
- carbon monoxide (fossil),carbon monoxide (fossil): 0.0153
- Nitrogen oxides: 0.0235
- methane (fossil): 5e-5

## Use advice
在使用本数据集进行生命周期评价时，请确保它准确反映了特定地理区域和所使用技术的生产过程。考虑煅烧过程中的能源来源和排放。如果作为产品生命周期的一部分进行建模，还应考虑产品使用寿命的终末阶段，包括材料的潜在回收。注意与评估中使用的其他数据保持方法论上的一致性。

## Review details
清单： 内部审查通过几个迭代步骤完成，涉及原始数据验证、原始数据记录、代表性、完整性、与 ISO 14040 和 14044 有关的建模的一致性。

## Data sources
- YANG, Y., GUO, Y.-Q., ZHU, W.-S. & HUANG, J.-B. Environmental impact assessment of China’s primary aluminum based on life cycle assessment. Trans Nonferrous Met Soc China 29, 1784–1792 (2019).
