# 修复后土壤;原位修复;多相抽提

Dataset: ILCD process, Unit process, black box
Geography: BE
Reference year: 2015
Classification: Unit processes / Other Services / Repair and maintenance
Functional unit: The functional unit in this study is the removal of approximately 80% of the estimated 500 metric tons of contaminant mass from a subsurface soil volume of approximately 40,000 cubic meters and can be achieved.
Generated by: 杨欣桐, yangxt@caep.org.cn
Owner: 天工LCI数据工作小组
Review: Dependent internal review by 天工LCI数据工作小组
Amounts: no units in this file; such an amount is in the reference unit of its flow, which a separate flow dataset defines
copyright: false
licenseType: Free of charge for all users and uses

## General comment
多相抽提是一种同时提取土壤蒸气、非水相液体和地下水的修复技术。由于地下水向下抽取的压力梯度增加，真空抽取允许抽取井周围的液体流速增加。降低地下井周围的压力也允许非水相液体更容易挥发。挥发的污染物通过提取井从地下去除。提取的土壤蒸汽、非水相液体和地下水通过气体和液体处理系统在地表进行处理。

## Geography
SRI Biochim是一个2公顷的场地，位于布鲁塞尔东北部Vilvorde Machelen 250公顷的工业区。

## Time period
文献发表时间

## Technology and included processes
MPE系统的治疗持续时间和总能量预算是根据在SRI Biochim现场进行的试点研究计算的。MPE系统需要运行15年，这是一个保守的估计。构成土壤蒸汽和地下水处理机组的一些现场部件将需要在15年内更换。

## Technical purpose
所描述的工业过程的技术用途主要用于原位土壤修复。具体来说，多相抽提方法被应用到被污染的土地区域。它有效地从大量的地下土壤中提取出污染物质量，如土壤蒸汽和非水相液体，从而使土地恢复到适合未来使用或再开发的非危险状态。

## Reference product
- Remediated soil: 7.708e7; measured

## Inputs
All rows: measured
- Polyethylene,Polyethylene: 3930.25
  For 3m Extraction wells, the amount of original useage is3.95t. Percentage of service life consumedis 0.995
- Polyethylene,Polyethylene: 4185.57
  For 5m Extraction wells, the amount of original useage is4.2066t. Percentage of service life consumedis 0.995
- Polyethylene,Polyethylene: 167.16
  For Well screens, the amount of original useage is0.168t. Percentage of service life consumedis 0.995
- bentonite: 1057.09
  For Well caps, the amount of original useage is1.0624t. Percentage of service life consumedis 0.995
- polyvinylchloride resin (S-PVC): 5.68642e8
  For piping, the amount of original useage is571500t. Percentage of service life consumedis 0.995
- Cast Iron: 0
  For Pump and knockout tank unit Type A (2 rotary vane pumps per unit), the amount of original useage is0.41t. Percentage of service life consumedis 0
- Cast Iron: 0
  For Pump and knockout tank unit Type B (2 rotary vane pumps per unit), the amount of original useage is0.5t. Percentage of service life consumedis 0
- Stainless Steel: 6666
  For Catalytic Oxidation Unit (CATOX), the amount of original useage is20t. Percentage of service life consumedis 0.3333
- Stainless Steel: 3832.95
  For Gas Washer, the amount of original useage is11.5t. Percentage of service life consumedis 0.3333
- Stainless Steel: 833.25
  For Quencher, the amount of original useage is2.5t. Percentage of service life consumedis 0.3333
- Cast Iron: 64.9935
  For Blower, the amount of original useage is0.195t. Percentage of service life consumedis 0.3333
- Stainless Steel: 0
  For Droplet Separator, the amount of original useage is0.1687t. Percentage of service life consumedis 0
- Cast Iron: 0
  For Pump on droplet separator, the amount of original useage is0.0185t. Percentage of service life consumedis 0
- Galvanized Corrugated Iron: 1610
  For Oil and water separator (including coalesces), the amount of original useage is3.22t. Percentage of service life consumedis 0.5
- Steel: 149.985
  For Double walled storage tank, the amount of original useage is0.45t. Percentage of service life consumedis 0.3333
- Cast Iron: 543.946
  For Granular Activated Carbon (GAC) vessel for gas-phase treatment, the amount of original useage is1.632t. Percentage of service life consumedis 0.3333
- Cast Iron: 371.963
  For Granular Activated Carbon vessel (GAC) for liquid-phase treatment, the amount of original useage is1.116t. Percentage of service life consumedis 0.3333
- Polyethylene,Polyethylene: 691.264
  For Stripping tower (including packing material), the amount of original useage is2.074t. Percentage of service life consumedis 0.3333
- Activated Carbon: 1.042e6
- Aluminum oxide (alumina): 810
- sodium hydroxide: 375.72
  Sodium Hydroxide used as 20% solution is 1 .8786 ton
- transport in t*km: 143871
  The assembly transported to the site from various manufacturers
- transport in t*km: 668
  Transport of NAPL sludge in double walled storage tank
- Electricity: 1.29329e7
- Diesel,Diesel: 0.24
- contaminated soil: 7.708e7

## Use advice
在使用原位多相抽提过程的生命周期评价数据时，必须计入 MPE 系统的运行持续时间，保守估计为 15 年。注意这一时间段内某些组件的替换需求。在输入输出流计算中，必须计入所有主要原材料和必要的能源消耗。该数据集的功能单位是从大约 40,000 立方米的地下土壤中去除估计 80% 的污染物，这应该被纳入整体评估中。

## Review details
清单： 内部审查通过几个迭代步骤完成，涉及原始数据验证、原始数据记录、代表性、完整性、与 ISO 14040 和 14044 有关的建模的一致性。

## Data sources
- Beames B., et al. Accounting for land-use efficiency and temporal variations between brownfield remediation alternatives in life-cycle assessment. Journal of Cleaner Production 101 (2015) 109e117
