# Sludge treatment and disposal|gravity thickening

Dataset: ILCD process, Unit process, single operation
Geography: CN
Classification: Materials production / Other mineralic materials
Functional unit: The functional unit is the base for the treatment comparison in the life-cycle inventory. The management of one tone of dry sludge (DS) is selected.
Generated by: Jin Sitian, 2331276@tongji.edu.cn
Review: Dependent internal review by Tiangong LCI Data Working Group
Amounts: no units in this file; such an amount is in the reference unit of its flow, which a separate flow dataset defines

## Reference product
- Sludge: 1000; input; estimated
  one tone of dry sludge (DS)

## Inputs
- Electricity: 142.2; article inperiodical
- Polyacrylamide: 4; article inperiodical
  PAM

## Outputs
- waste water - untreated: 3.56; article inperiodical

## Review details
Inventory: The internal review was done by several iteration steps concerning raw data validation, raw data documentation, representativity, completeness and consistency of modelling with regard to ISO 14040 and 14044.

## Data sources
- Life-cycle environmental and economic assessment of sewage sludge treatment in China
