# Wind turbine manufacture

Dataset: ILCD process, Unit process, black box
Geography: CN
Reference year: 2018
Classification: Materials production / Other mineralic materials
Functional unit: 2 MW wind turbine.
LCI method principle: Attributional
LCI method approaches: Allocation
Generated by: Yunzhi Zhao, ll10088@163.com
Amounts: no units in this file; such an amount is in the reference unit of its flow, which a separate flow dataset defines
copyright: false

## Geography
In this study, an onshore 40 MW wind farm with 20 2WM wind turbines in North China was selected as the researchobject

## Reference product
- Turbine: 20; measured
  20 × 2 MW wind turbine

## Inputs
All rows: measured
- Steel: 5.928e6
  Ground surface and Underground
- iron: 787000
  Ground surface and Underground
- copper: 48000
- Resin: 200000
- Plastic (unspecified): 48000
- Fiber glass: 486000
- Concrete: 2.328e7

## Deviations from the LCI method approaches
The life cycle assessment (LCA) approach is an effective way to quantify the environmental impacts of wind energy technology

## Data selection and combination
According to data released by the Global Wind Energy Council [5], as of the end of 2018, the cumulative installed capacity of global wind power amounted to 519 gigawatts (GW). In addition, wind power has become an important part of new power supplies in some countries.

## Data sources
- Chen, J. et al. Green development strategy of offshore wind farm in China guided by life cycle assessment. Resources, Conservation and Recycling 188, 106652 (2023).
