# raw meal preparation|raw meal, portland cement raw meal|new dry process, ≥4000 t/d|copper tailings 16%

Dataset: ILCD process, Unit process, single operation
Geography: CN
Reference year: 2019
Classification: Materials production / Other mineralic materials
Generated by: Siqi Yang
Amounts: no units in this file; such an amount is in the reference unit of its flow, which a separate flow dataset defines
copyright: false

## General comment
New dry process for cement raw meal production. Copper tailings content is 16%.

## Model description
The system boundary of the Life Cycle Assessment (LCA) is the raw meal preparation unit process.

## Reference product
- raw meal: 1000
  Ordinary portlant cement raw material

## Inputs
- iron, powder: 30.7; measured
  Iron powder. Upstream data source: CLCD-China-ECER 0.8.1.
- electricity, medium voltage: 64.8; measured
  Electricity. Upstream data source: CLCD-China-ECER 0.8.1.
- limestone, crushed, for mill: 807.1; measured
  Limestone. Upstream data source: CLCD-China-ECER 0.8.1.
- copper slag: 162.2; measured
  Copper tailings. Upstream data source: Not considered.

## Outputs
- Clean gas: 814.2; measured
  Waste gas [emitted to atmosphere]
- particles (> PM10): 0.039; measured
  Total particulate matter [emitted to atmosphere], with an unspecified particle size, is treated as PM > 10 micrometers in diameter.

## Deviations from the LCI method approaches
A cement clinker lifecycle model was developed using eFootprint software system from Integrated Knowledge for our Environment, combined with CLCD quality assessment method, and LCA results were calculated.

## Cut-off and completeness
The data selection principle in this study adopts the cut-off principle recommended in the ISO140 series of international standards. The principle is based on the ratio of raw and auxiliary material input to product quality in the production process. The specific trade-off principle is as follows: (1) When the input weight of each ordinary raw material is less than 1% of the total input weight of process raw materials, and the weight of the raw material containing high-purity substances is less than 0.1% of the total input weight of process raw materials, the upstream production data of the material can be ignored. Additionally, the total mass of the ordinary material ignored should not exceed 5% of the total weight of the raw material input. In the case of system environmental emissions data, its contribution to the relevant LCA result can be calculated to determine whether the data should be ignored. (2) Low-value wastes generated in other production processes, such as tailings, can ignore their upstream production data and use them as raw materials.

## Data selection and combination
The inventory data for each raw material involved in the raw meal preparation stage is provided by the background database.

## Data sources
- 李畅. (2020). 江西省某铜尾矿资源化过程生命周期评价研究 [硕士, 江西理工大学].
