# 水泥生产|水泥, 普通硅酸盐水泥|干法旋窑

Dataset: ILCD process, LCI结果
Geography: CQ-CN
Reference year: 2005
Classification: Materials production / Other mineralic materials
Generated by: 杨思琪
Amounts: no units in this file; such an amount is in the reference unit of its flow, which a separate flow dataset defines
copyright: false

## General comment
小南海水泥厂干法旋窑生产工艺生产普通硅酸盐水泥。重庆小南海水泥厂普通硅酸盐水泥的生产原料采用石灰石、粘土、铁矿及石膏，1t普通硅酸盐水泥料耗为石灰石0.615t、粘土0.283t、铁矿0.213t、石膏0.286t，不考虑工业废渣的利用。

## Geography
重庆小南海水泥厂

## Model description
系统边界为原料开采到水泥制造。功能单位为1m3混凝土所需要的普通硅酸盐水泥的量。1m3标准混凝土配比为：365kg水泥、601.2kg砂、1378.9kg集料。

## Reference product
- cement, ordinary portland cement: 1000
  普通硅酸盐水泥

## Inputs
All rows: measured
- calcium carbonate: 643.836
  石灰石
- clay: 279.452
  粘土
- iron ore: 221.918
  铁矿
- gypsum: 282.192
  石膏
- hard coal: 225.616
  原煤
- crude oil; 42.3 MJ/kg: 12.7397
  原油
- natural gas; 44.1 MJ/kg: 1.08767
  天然气

## Outputs
- carbon dioxide: 711.644; measured
  CO2
- sulfur dioxide: 1.54795; measured
  SO2
- Nitrogen oxides: 1.47945; measured
  NOX
- carbon monoxide: 1.74247; measured
  CO

## Data treatment and extrapolations
原料开采与水泥制造单元过程数据累加。

## Sampling procedure
重庆小南海水泥厂是 2005年重庆市经委确定的首批清洁生产试点企业之一，拥用3条3X11m机立窑水泥生产线，2条35万t新型干法旋窑生产线。产品为普通硅酸盐水泥及复合硅酸盐水泥。

## Data sources
- 熊文强 & 王熙. (2007). 生命周期评价在水泥企业清洁生产审核中的应用. 环境科学导刊, 2, 15–17.
