# 水泥生产 ; 集中在原料开采、加工、燃料获取、烧结、水泥生产

Dataset: ILCD process, Unit process, single operation
Geography: YL-GX-CN
Reference year: 2012
Classification: Unit processes / Materials production / Other mineralic materials
Functional unit: For example, the generation of 1 kW h (kW h) of electricity is adapted as the functional unit in this study, and the corresponding amounts of CO2 emissions and air pollutants (SO2,NOX and PM10)perkWh of electricity are chosen as the indicators for environmental performances, and the monetary value (US$) of per kW h of electricity is chosen as the indicator for cost-effectiveness evaluation.
LCI method principle: Attributional
LCI method approaches: Allocation
Generated by: 赵云志, ll10088@163.com
Owner: 天工LCI数据工作小组
Review: Dependent internal review by 天工LCI数据工作小组
Amounts: no units in this file; such an amount is in the reference unit of its flow, which a separate flow dataset defines
copyright: false
licenseType: Free of charge for all users and uses

## General comment
文献里只提供了部分污染物排放数据，未提供原材料和能源消耗清单

## Geography
本研究选取中国广西壮族自治区玉林市的典型风电场系统作为案例研究地点。开发商即中国华电股份有限公司，是一家国有企业，通过提供风力发电设备及相关服务，致力于在中国发展风力发电[ 37 ]。

## Technical purpose
该生命周期评价(LCA)数据集描述了风力发电系统的生命周期，包括风力涡轮机的生产、运输和安装、发电、维护以及报废回收和处置。该数据集的技术用途旨在通过评估每千瓦时电力产生的CO2排放、空气污染物(SO2、NOX和PM10)以及经济价值，将风力发电的环境影响和成本效益与其他能源生产形式（如火力发电）进行比较。

## Reference product
- Concrete: 1000; calculated
  文献里只提供了部分污染物排放数据，未提供原材料和能源消耗清单

## Outputs
- carbon dioxide (fossil): 1280; calculated
- sulfur dioxide: 2.31; calculated
- nitrous oxide: 2.81; calculated
- particles (PM10): 3.17; calculated

## Deviations from the LCI method approaches
根据引入的生命周期评价方法[ 34、35 ]，首先确定了风能和火力发电的系统边界。然后，提出了评价环境和经济效益的方法，以量化共同利益，并从共同利益的角度介绍了环境和经济影响评价的方法。

## Data selection and combination
该风电场装有24台风电机组，每台机组的生产能力为1.25 MW，预计每台机组的运行寿命为20年。风电系统的生命周期可分为5个阶段： (1)生产制造、 (2)运输和安装、 (3)发电、 (4)维护和 (5)报废回收和处置。不可再生能源的投入在各个阶段都有所体现。在这项研究中，原材料、化石燃料的消耗和相应的排放都考虑了一个生命周期过程。同时，考虑风电场的成本效益，因为成本在风电场运营中扮演着非常重要的角色[38]。考虑到数据的可靠性和可获得性，该风电场的成本数据主要取自辽宁省康平县某风电场(设计容量为49.5 MW)的可行性报告[39]

## Use advice
当使用这个LCA数据集时，用户应当考虑风力发电系统的整个生命周期，从资源开采到处置。重要的是要考虑每个阶段相关的能量和排放，同时也要考虑系统的整体成本效益。作为方法学的指导，用户应当考虑数据的可靠性和可获得性，特别是当从类似项目的可行性报告中提取成本数据时。所呈现的环境和经济影响评估是基于1千瓦时电力生成的功能单位。确保与规定的风能和火力发电的系统边界保持一致。

## Review details
清单： 内部审查通过几个迭代步骤完成，涉及原始数据验证、原始数据记录、代表性、完整性、与 ISO 14040 和 14044 有关的建模的一致性。
