# 铝锭铸造 ; 原生铝锭 ; 液态原铝 ; 2016年

Dataset: ILCD process, Unit process, single operation
Geography: CN
Reference year: 2021
Classification: Unit processes / Materials production / Metals and semimetals
Generated by: 蔡梓萌, caizm6178@163.com
Owner: 天工LCI数据工作小组
Review: Dependent internal review by 天工LCI数据工作小组
Amounts: no units in this file; such an amount is in the reference unit of its flow, which a separate flow dataset defines
copyright: false
licenseType: Free of charge for all users and uses

## General comment
该数据集描述了2017年铸造原生铝锭的过程，该过程涉及将液态原铝转换成铝锭的常见工序。铸造而成的原生铝锭广泛应用于各种工业应用，包括交通运输车辆制造、建筑材料、包装以及电气行业的导体。在评估主要由铸铝制成的产品或组件的环境影响时，此数据具有关联性。

## Time period
文献发表日期

## Reference product
- aluminium, primary, ingot: 1000; missing unimportant

## Inputs
- aluminium, primary, liquid: 1025.67; missing unimportant
  EA/liquid Al

## Data selection and combination
本研究的数据参考了PA、SA、电力等背景数据的LCA数据。PA数据来自统计数据源，SA数据主要来自文献。背景数据主要来自中国科学院生态环境研究中心CASRCEES 2018建立的中国本地化LCA数据库，涵盖能源、材料、交通、废物管理等LCA数据。

## Use advice
使用此生命周期评估（LCA）数据时，用户应仔细关注所评估过程的范围，确保它与其环境影响研究中数据的预期应用相对应。此数据涵盖2017年的数据，并应考虑到当时流行的技术实践。如果用于不同地区或年份的分析，应调整数据以反映技术和实践的变化。此外，使用诸如能源、材料、运输和废物管理等背景数据时，应当考虑数据的具体情境和来源，主要来自中国本土化生命周期评估数据库CAS RCEES 2018。当应用于非中国或更现代的上下文时，可能需要进行数据调整，以解决技术和方法学的差异。

## Review details
清单： 内部审查通过几个迭代步骤完成，涉及原始数据验证、原始数据记录、代表性、完整性、与 ISO 14040 和 14044 有关的建模的一致性。

## Data sources
- Ding, N., Liu, N., Lu, B. & Yang, J. Life cycle greenhouse gas emissions of aluminum based on regional industrial transfer in China. J. Ind. Ecol. 25, 1657–1672 (2021).
