# Aluminum powder production | CN

Dataset: ILCD process
Geography: CN
Classification: Materials production / Other mineralic materials
Generated by: Jiaqi Lu, wilsherelu@foxmail.com
Review: Dependent internal review by Tiangong LCI Data Working Group
Amounts: no units in this file; such an amount is in the reference unit of its flow, which a separate flow dataset defines
copyright: false

## Reference product
- Powdered Aluminium: 1000; missing unimportant
  铝粉产品

## Inputs
- aluminium: 1470; missing unimportant
  铝原料
- light fuel oil: 0.000647; missing unimportant
  机油（设备消耗）
- electricity mix: 36.108; missing unimportant
- water: 450; missing unimportant

## Outputs
- sulfur dioxide: 0.00118; missing unimportant
  二氧化硫[排放到大气（未指定类型）]
- Particles (PM0.2 - PM2.5): 0.288; missing unimportant
  总颗粒物[排放到大气（未指定类型）]
- municipal solid waste deposition: 0.642; missing unimportant
  生活垃圾
- waste water - untreated: 50; missing unimportant
  生活废水

## Review details
Inventory: The internal review was done by several iteration steps concerning raw data validation, raw data documentation, representativity, completeness and consistency of modelling with regard to ISO 14040 and 14044.; Documentation: The review of the documentation was performed by Ecobilan and is in compliance with ISO 14040 and 14044. The data set documentation is correct in view of the appropriateness of the information provided. It includes all relevant information in view of data quality and scope of application of the respective LCI result.

## Data sources
- 垣曲金华铝粉加工环评报告
