# 凸缘的制造 ; 1.5 MW 风轮机凸缘的制造（风轮机凸缘--风轮机与铁塔的连接器）

Dataset: ILCD process, Unit process, single operation
Geography: NMG-CN
Reference year: 2017
Classification: Unit processes / Materials production / Metals and semimetals
Functional unit: The functional unit is 1.5 MW wind turbine
LCI method principle: Attributional
LCI method approaches: Allocation
Generated by: 赵云志, ll10088@163.com
Owner: 天工LCI数据工作小组
Review: Dependent internal review by 天工LCI数据工作小组
Amounts: no units in this file; such an amount is in the reference unit of its flow, which a separate flow dataset defines
copyright: false
licenseType: Free of charge for all users and uses

## General comment
1.5 MW风力发电机凸缘是连接风力发电机和支撑塔之间的重要组件。这种特别制造的凸缘对于风能系统的结构完整性和操作至关重要。它专门用于组装标称功率为1.5 MW的风力发电机，通常安装在大型风电场中用于商业发电。

## Geography
风电功率参数的数据来自Wang ( 2012 )。以装有33台国产1.5兆瓦( MW )风电机组的风电场为案例，分析其环境影响及其替代效应。该风电场位于我国风电装机最多的省份- -内蒙古东北部。

## Reference product
- Wind turbine flange: 1; estimated

## Inputs
- iron: 12000; calculated
  Steel and iron

## Deviations from the LCI method approaches
风电的生命周期清单如下所示。生产制造阶段包括风电机组、变电站、电缆的生产，这些设备消耗大量能源，排放污染物( Xue et al . , 2015)。

## Use advice
使用1.5 MW风力发电机凸缘制造的生命周期评估(LCA)数据集时，用户应考虑数据的技术适用性。确保数据与特定风力发电机型号及其预期用途对齐，以准确评估环境影响。应考虑到制造实践的区域差异和环境影响的潜在变化。未经适当调整，不应将数据概括用于其他类型或规模的风力发电机。确保考虑自2012年数据收集以来发生的任何更新或风力发电机生产的技术进步。

## Review details
清单： 内部审查通过几个迭代步骤完成，涉及原始数据验证、原始数据记录、代表性、完整性、与 ISO 14040 和 14044 有关的建模的一致性。

## Data sources
- Li, H., Jiang, H.-D., Dong, K.-Y., Wei, Y.-M. & Liao, H. A comparative analysis of the life cycle environmental emissions from wind and coal power: Evidence from China. Journal of Cleaner Production 248, 119192 (2020).
