# 焦化;焦炭;焦化（Z11）

Dataset: ILCD process, Unit process, single operation
Geography: CN
Reference year: 1998
Classification: Energy carriers and technologies / Hard coal based fuels
Generated by: 付翔, 1162850692@qq.com
Owner: 天工LCI数据工作小组
Review: Dependent internal review by 天工LCI数据工作小组
Amounts: no units in this file; such an amount is in the reference unit of its flow, which a separate flow dataset defines
copyright: false
licenseType: Free of charge for all users and uses

## General comment
来自表 4-15 Z11 钢厂生产吨材环境负荷编目表

## Time period
论文提到钢铁企业环境总体数据为1998年的吨钢环境基础数据。

## Technical purpose
焦化或焦炭生产（Z11）是钢铁制造业中将煤转换成焦炭的过程，焦炭是高炉作业所必需的原料。所产生的焦炭主要用于钢铁的生产，并且有时也用于其他需要高能量密度碳源的工业应用。

## Reference product
- coke,Coke: 684; measured
  焦炭

## Inputs
- Energy, geothermal, converted: 3420.93; measured
- water: 19282; measured

## Outputs
All rows: measured
- Dust (unspecified, from stack): 0.103
  烟尘
- Dust (unspecified, from stack): 0.342
- sulfur dioxide: 1.71
- cyanide: 0.002289
- phenol: 0.00106
  挥发酚
- Suspended solids, unspecified: 0.432972
- chemical oxygen demand: 0.272437
- Dust (unspecified, from stack): 3.42
  集尘
- Spoil (deposited, hibernating in ground, non elementary flow): 3.352

## Use advice
此数据集反映了来自一项特定研究的钢材每吨生产环境负荷，基于论文中讨论1998年钢铁公司环境总体数据的表格（4-15 Z11）。使用此数据的用户应确保它适用于他们的时间和地理背景，并且还应该考虑自1998年以来的技术进步。如果数据用于当前的应用，可能需要进行调整，以考虑技术、法规和环境影响因素的变化。

## Review details
清单： 内部审查通过几个迭代步骤完成，涉及原始数据验证、原始数据记录、代表性、完整性、与 ISO 14040 和 14044 有关的建模的一致性。

## Data sources
- 周和敏. 钢铁材料生产过程环境协调性评价研究. (北京工业大学, 2001).
