# 硅生产 ; 工业硅来源于硅矿

Dataset: ILCD process, Unit process, single operation
Geography: YL-GX-CN
Reference year: 2012
Classification: Unit processes / Materials production / Inorganic chemicals
Functional unit: For example, the generation of 1 kW h (kW h) of electricity is adapted as the functional unit in this study, and the corresponding amounts of CO2 emissions and air pollutants (SO2,NOX and PM10)perkWh of electricity are chosen as the indicators for environmental performances, and the monetary value (US$) of per kW h of electricity is chosen as the indicator for cost-effectiveness evaluation.
LCI method principle: Attributional
LCI method approaches: Allocation
Generated by: 赵云志, ll10088@163.com
Owner: 天工LCI数据工作小组
Review: Dependent internal review by 天工LCI数据工作小组
Amounts: no units in this file; such an amount is in the reference unit of its flow, which a separate flow dataset defines
copyright: false
licenseType: Free of charge for all users and uses

## General comment
文献里只提供了部分污染物排放数据，未提供原材料和能源消耗清单

## Geography
本研究选取中国广西壮族自治区玉林市的典型风电场系统作为案例研究地点。开发商即中国华电股份有限公司，是一家国有企业，通过提供风力发电设备及相关服务，致力于在中国发展风力发电[ 37 ]。

## Technical purpose
所述工艺涉及中国广西壮族自治区玉林市风电场系统的生命周期，主要用于生产可再生能源，特别是风力发电。该过程考虑了从生产到生命周期末端阶段的风力涡轮机的全部生命周期。系统生命周期分为五个阶段：生产、运输与安装、发电、维护和报废回收处理。该风电场配备了24台风力涡轮机，每台容量为1.25 MW，旨在环保发电，注重经济可行性和成本效益。关注CO2、SO2、NOX和PM10排放量以及每千瓦时电力成本，表明该数据集在测量和分析与传统火力发电相比风能系统的环境影响和经济性能方面的应用。

## Reference product
- silicon: 1; calculated
  文献里只提供了部分污染物排放数据，未提供原材料和能源消耗清单

## Outputs
- carbon dioxide (fossil): 0.904; calculated
- sulfur dioxide: 0.0006; calculated
- nitrous oxide: 0.0005; calculated
- particles (PM10): 8.4e-5; calculated

## Deviations from the LCI method approaches
根据引入的生命周期评价方法[ 34、35 ]，首先确定了风能和火力发电的系统边界。然后，提出了评价环境和经济效益的方法，以量化共同利益，并从共同利益的角度介绍了环境和经济影响评价的方法。

## Data selection and combination
该风电场装有24台风电机组，每台机组的生产能力为1.25 MW，预计每台机组的运行寿命为20年。风电系统的生命周期可分为5个阶段： (1)生产制造、 (2)运输和安装、 (3)发电、 (4)维护和 (5)报废回收和处置。不可再生能源的投入在各个阶段都有所体现。在这项研究中，原材料、化石燃料的消耗和相应的排放都考虑了一个生命周期过程。同时，考虑风电场的成本效益，因为成本在风电场运营中扮演着非常重要的角色[38]。考虑到数据的可靠性和可获得性，该风电场的成本数据主要取自辽宁省康平县某风电场(设计容量为49.5 MW)的可行性报告[39]

## Use advice
在使用该生命周期评价(LCA)数据集时，用户应遵循所概述的系统边界，并考虑风力发电系统的完整生命周期，包括原材料采购、生产、运作和生命周期末端管理。用户应通过测量CO2、SO2、NOX和PM10的排放来考虑环境方面，以及通过考虑每千瓦时发电的成本来考虑经济方面。关键是要整合来自类似风电场的可靠来源如可行性报告的成本数据。分析师可以将该系统的环境和经济性能与传统的发电方法进行比较，以突出风能的共同利益。始终确保数据的一致性和与当前生命周期评价标准和实践的正确方法论对齐。这些信息对于寻求投资、开发或以可持续性和经济性为重点改善风力发电基础设施的利益相关者至关重要。

## Review details
清单： 内部审查通过几个迭代步骤完成，涉及原始数据验证、原始数据记录、代表性、完整性、与 ISO 14040 和 14044 有关的建模的一致性。
