# Biological Medium ; Groundwater in-situ remediation ; Enhanced bioremediation ; Biological medium production

Dataset: ILCD process, Unit process, single operation
Geography: SH-CN
Reference year: 2020
Classification: Unit processes / Other Services / Repair and maintenance
Generated by: Xiao Meng, xiaomeng@mail
Owner: Tiangong LCI Data Working Group
Review: Dependent internal review by Tiangong LCI Data Working Group
Amounts: no units in this file; such an amount is in the reference unit of its flow, which a separate flow dataset defines
copyright: false
licenseType: Free of charge for all users and uses

## General comment
CHC+ISB is used for site remediation, and during the construction preparation phase, the biomass culture medium is prepared.

## Geography
The aquifer in a certain area in Shanghai, China, is uniformly contaminated with chlorinated volatile organic compounds (CVOCs), with a surface area of 20,000 m2 and a depth of 50 m, with the water table located at a depth of 30 m.

## Technical purpose
The biological medium prepared via the CHC+ISB process is specifically designed for enhanced bioremediation applications for groundwater in-situ remediation. It is used during site remediation projects to facilitate the breakdown of chlorinated volatile organic compounds (CVOCs) present within the aquifer.

## Reference product
- Biological Medium: 523.53; measured
  Biological medium（生物培养基），数据来源于文章补充材料Table S9. The materials used in the operation phase of CHC+ISB

## Inputs
- Tap Water: 1.32705e6; measured
- Saccharum officinarum: 2.76183e6; software or database
  Sugarcane（甘蔗）
- triethylamine: 7860; software or database
- Calcium carbonate (> 63 microns): 17420; software or database
- ethanol: 4430; software or database
- Fodder yeast: 49140; software or database
  Fodder yeast（饲料酵母）
- process steam from heavy fuel oil: 102540; software or database
- process steam from light fuel oil: 138280; software or database
- Electricity: 39895.2; software or database
- sodium hydroxide: 143990; software or database

## Use advice
When using this dataset for environmental assessment, ensure accurate border conditions by considering local site characteristics and the specific contaminants. Factor in the depth of contamination, substance distribution, and water table depth. Model the effectiveness of the bioremediation process accurately, taking into account the biomass medium's preparation and application specific to the site's requirements.

## Review details
Inventory: The internal review was done by several iteration steps concerning raw data validation, raw data documentation, representativity, completeness and consistency of modelling with regard to ISO 14040 and 14044.

## Data sources
- Ni, Z. et al. Comparative Life-Cycle Assessment of Aquifer Thermal Energy Storage Integrated with in Situ Bioremediation of Chlorinated Volatile Organic Compounds. Environ. Sci. Technol. 54, 3039–3049 (2020).
