# 修复后地下水;PRB系统;地下水原位修复;墙体注入生物炭悬浊液

Dataset: ILCD process, Unit process, single operation
Geography: JS-CN
Reference year: 2024
Classification: Unit processes / Other Services / Repair and maintenance
Generated by: 杨欣桐, yangxt@caep.org.cn
Owner: 天工LCI数据工作小组
Review: Dependent internal review by 天工LCI数据工作小组
Amounts: no units in this file; such an amount is in the reference unit of its flow, which a separate flow dataset defines
copyright: false
licenseType: Free of charge for all users and uses

## General comment
将生物质炭与水混合制备成为BC悬浊液，采用注入井注入地下水含水层，地下水流过生物质炭填充区域时，污染物被吸附，从而得到净化。

## Time period
文献发表时间

## Technical purpose
该生物修复工艺涉及应用渗透性反应屏障（PRB）进行原位地下水净化。具体来说，将生物质炭（BC）悬浊液制备并注入含水层以吸附污染物，使地下水流经时被净化。适用于具有地下水污染区域的环境管理和污染控制。

## Reference product
- Remediated groundwater: 1184.85; missing unimportant

## Inputs
All rows: missing unimportant
- Biochar: 96990
- transport in t*km: 9699
- injection well: 48
- contaminated groundwater: 1184.85
- Tap Water: 3.23299e6
- Electricity: 2909.7, 11638.8 (2 entries)

## Use advice
所提供的数据集描述了使用BC作为填充材料的PRB系统内的生物吸附过程，用于地下水修复。用户应结合当地水质标准和水文地质特性使用这些数据。必须仔细考虑生物质炭的吸附能力、屏障的持久性以及当地地下水系统的流速。还重要的是要考虑随时间变化的污染物浓度变化，以准确模拟使用阶段的行为。

## Review details
清单： 内部审查通过几个迭代步骤完成，涉及原始数据验证、原始数据记录、代表性、完整性、与 ISO 14040 和 14044 有关的建模的一致性。

## Data sources
- Ding, D. et al. Assessing the environmental impacts and costs of biochar and monitored natural attenuation for groundwater heavily contaminated with volatile organic compounds. Science of The Total Environment 846, 157316 (2022).
