# clinker production|clinker|suspension preheater kiln, cyclone preheater kiln

Dataset: ILCD process, Unit process, single operation
Geography: CN
Classification: Materials production / Other mineralic materials
Generated by: Siqi Yang
Amounts: no units in this file; such an amount is in the reference unit of its flow, which a separate flow dataset defines
copyright: false

## General comment
The suspension preheater kiln is taken as the research object.

## Model description
The functional unit is 1 ton of cement clinker. The scope of the study is cement calcination.

## Reference product
- clinker: 1000
  Clinker

## Inputs
- limestone, crushed, for mill: 1216.5; missing unimportant
  Limestone
- clay: 273.7; missing unimportant
  Clay
- iron, powder: 25.5; missing unimportant
  Iron powder
- hard coal, run-of-mine: 183.3; article inperiodical
  Coal-fired. The energy consumption data comes from the literature. The coal -fired thermal value is calculated at 5500kcal/kg, and the fixed carbon is calculated at 50%.
- electricity, medium voltage: 297.18; article inperiodical
  Electric. The energy consumption data comes from the literature.

## Outputs
- carbon dioxide: 854.45; calculated
  CO2. Coal-generated CO2 is calculated based on fixed carbon, while raw material CO2 is calculated based on calcium carbonate (CaO) content at 50%.
- carbon monoxide: 4.5
  CO. Due to lack of sources, other pollution data is obtained by reference to coal-fired power plants converted by energy consumption.
- sulfur dioxide: 0.2409; calculated
  SO2. NOx and SO2 levels are calculated based on average emission factors in the building materials industry.
- Nitrogen oxides: 1.8482; calculated
  NOx. NOx and SO2 levels are calculated based on average emission factors in the building materials industry.
- hydrocarbons (unspecified): 0.0311
  CxHy. Due to lack of sources, other pollution data is obtained by reference to coal-fired power plants converted by energy consumption.

## Data sources
- 刘顺妮. (2003). 水泥-混凝土体系环境影响评价及其应用研究 [博士, 武汉理工大学].
