# 高铝飞灰利用 ; 莫来石陶瓷（主要产品）和硅酸钙（副产品） ; 高铝飞灰 (HAFA)

Dataset: ILCD process, Unit process, single operation
Geography: NMG-CN
Reference year: 2017
Classification: Unit processes / Materials production / Other mineralic materials
Generated by: 徐常青, xcq@bit.edu.cn
Owner: 天工LCI数据工作小组
Review: Dependent internal review by 天工LCI数据工作小组
Amounts: no units in this file; such an amount is in the reference unit of its flow, which a separate flow dataset defines
copyright: false
licenseType: Free of charge for all users and uses

## General comment
高铝粉煤灰应用-情景1，主要产物Mullite ceramics，副产物CaSiO3

## Time period
文献发表年

## Technical purpose
该工艺的主要产品莫来石陶瓷通常用于各种高温应用，因其具有高热稳定性、低热膨胀和良好的机械强度。潜在应用包括工业炉的耐火材料、金属的保护涂层以及在电子和航空航天工业中的结构组件。副产品硅酸钙通常用作建筑材料，特别是在绝缘和防火方面，由于其热绝缘性能和耐火性。

## Reference product
- ash: 1000; input; measured
  功能单位是应用1000kg高铝粉煤灰

## Inputs
- electricity, high voltage, aluminium industry: 246.564; software or database
- Sodium hydroxide: 190.41; measured
- hydrogen chloride: 513.7; measured
- carbon dioxide, in chemical industry: 0; measured
- quicklime, in pieces, loose: 254.79; measured
  CaO,生石灰
- freshwater: 2800.68; measured
  fresh water
- hard coal: 500; software or database

## Outputs
All rows: measured
- sanitary ceramics: 684.93
  主要产品Mullite ceramics
- Calcium silicate: 479.45
  副产品硅酸钙CaSiO3，无条目
- silica fume, densified: 0
  副产品fume silica
- aluminium hydroxide: 0
  副产品high-white aluminum hydroxide (HWAH)
- chemical oxygen demand: 0.0212
- carbon dioxide (fossil),carbon dioxide (fossil): 1143.84
- sulfur dioxide: 0.11
- Nitrogen oxides: 0.11
- municipal solid waste: 450

## Use advice
在使用此数据集进行生命周期评估（LCA）时，确保其适用性对于所分析的特定产品系统至关重要。考虑数据的地理和技术相关性，匹配莫来石陶瓷和硅酸钙的技术质量水平与预期的最终用途。如果此数据集的地理背景与产品部署地区不同，用户应考虑运输影响。方法论方面的考虑，如明确定义系统边界关于上游和下游过程（例如，原材料提取，废物管理）的包括或排除，应与LCA标准一致。

## Review details
清单： 内部审查通过几个迭代步骤完成，涉及原始数据验证、原始数据记录、代表性、完整性、与 ISO 14040 和 14044 有关的建模的一致性。

## Data sources
- Yang, S. et al. Assessment and comparison of three high-aluminum fly ash utilization scenarios in Inner Mongolia, China using an eco-efficiency indicator. Waste Manag. Res. 35, 515–524 (2017).
