# 铝锭铸造 ; 原生铝锭 ; 液态原铝 ; 2012年

Dataset: ILCD process, Unit process, single operation
Geography: CN
Reference year: 2021
Classification: Unit processes / Materials production / Metals and semimetals
Generated by: 蔡梓萌, caizm6178@163.com
Owner: 天工LCI数据工作小组
Review: Dependent internal review by 天工LCI数据工作小组
Amounts: no units in this file; such an amount is in the reference unit of its flow, which a separate flow dataset defines
copyright: false
licenseType: Free of charge for all users and uses

## General comment
本LCA数据集描述的铝锭铸造过程主要涉及从液态原铝生产原生铝锭。这一过程对于铝基产品的创建至关重要，适用于包括但不限于汽车、航空航天、建筑和包装行业在内的各种行业。生产的铝锭可以进一步加工成不同形式，如板材、棒材或型材，用于特定的最终用途。

## Time period
文献发表日期

## Reference product
- aluminium, primary, ingot: 1000; software or database

## Inputs
- aluminium, primary, liquid: 1094.09; software or database

## Data selection and combination
本研究的数据参考了PA、SA、电力等背景数据的LCA数据。PA数据来自统计数据源，SA数据主要来自文献。背景数据主要来自中国科学院生态环境研究中心CASRCEES 2018建立的中国本地化LCA数据库，涵盖能源、材料、交通、废物管理等LCA数据。

## Use advice
提供的LCA数据应在研究范围内注意方法论的一致性使用。用户应确保数据的地理和技术相关性，考虑原铝的来源和铝锭的预期用途。将此数据与更广泛的LCA模型集成时，应考虑自2012年发表日期以来技术发展和可能的变化。为了准确建模，用户可能需要更新数据以反映当前的生产实践和区域能源概况。

## Review details
清单： 内部审查通过几个迭代步骤完成，涉及原始数据验证、原始数据记录、代表性、完整性、与 ISO 14040 和 14044 有关的建模的一致性。

## Data sources
- Ding, N., Liu, N., Lu, B. & Yang, J. Life cycle greenhouse gas emissions of aluminum based on regional industrial transfer in China. J. Ind. Ecol. 25, 1657–1672 (2021).
