# 水泥生产|水泥, 通用硅酸盐水泥|中国平均

Dataset: ILCD process, LCI结果
Geography: CN
Reference year: 2010
Classification: Materials production / Other mineralic materials
LCI method principle: Other
Generated by: 杨思琪
Amounts: no units in this file; such an amount is in the reference unit of its flow, which a separate flow dataset defines
copyright: false

## General comment
中国的平均数据是基于各水泥生产工艺技术和规模的市场份额以及各自的原材料消耗计算获得。水泥生产工艺技术和规模的市场份额：大型新型干法（>4000吨-熟料/日），29.32%；中型新型干法（2000~4000吨-熟料/日），23.21%；小型新型干法（<2000吨-熟料/日），9.29%；立窑（<2000吨-熟料/日），38.18%。

## Model description
取中国生产1t熟料含量为70%的通用水泥作为功能单元。系统边界的范围界定为：原材料的开采和加工、能源的生产、水泥的制造和销售，以及中间涉及到的运输过程。

## Reference product
- cement, common portland cement: 1000
  熟料含量为70%的通用水泥

## Inputs
All rows: calculated
- calcium carbonate: 1600
  石灰岩
- clay: 130
  粘土
- sandstone: 0.339
  砂岩
- gypsum: 50.5
  石膏
- Water (fresh water): 369
  新鲜水
- hard coal, run-of-mine: 192
  煤。注：文献中前面均用“原煤”表达，在LCI中是“煤"。由于无法确定具体种类，仍沿用前文中的“原煤”。
- crude oil; 42.3 MJ/kg: 8.25
  石油
- natural gas; 44.1 MJ/kg: 0.00047
  天然气

## Outputs
All rows: calculated
- carbon dioxide: 698
  CO2
- carbon monoxide: 0.126
  CO
- methane: 0.897
  CH4
- Nitrogen oxides: 1.38
  NOX
- sulfur dioxide: 0.813
  SO2
- chemical oxygen demand: 0.242
  COD
- particles (> PM10): 0.218
  PM10
- particles (PM2.5 - PM10): 0.196
  PM2.5-10
- particles (PM2.5): 0.41
  PM2.5
- particles (> PM10): 0.207
  PM，未标明粒径，按PM>10处理。

## Deviations from the LCI method approaches
运用SimaPro7.1软件，连接水泥生产各子系统，建立中国水泥工业的生命周期评价（LCA） 模型，并计算出功能单元水泥产品的生命周期清单（LCI）。

## Data selection and combination
电力生产和煤炭开采的生命周期清单来自于四川大学前期的数据收集；公路运输的生命周期清单来自于马丽萍的硕士论文；对于石灰石开采和石膏生产，由于数据缺乏，采用欧洲Ecoinvent数据库中的清单数据近似替代。考虑到水泥生产过程原材料和最终产品的运输，假设运输里程如下：石灰石、粘土等原材料公路运输3km；煤炭公路运输50km；水泥产品公路运输200km。

## Data sources
- 姜睿 & 王洪涛. (2010). 中国水泥工业的生命周期评价. 化学工程与装备, 4, 183–187.
