# 土壤和地下水修复;原位;地下水抽出处理;施工;设备和材料运输

Dataset: ILCD process, Unit process, single operation
Geography: JS-CN
Reference year: 2022
Classification: Other Services / Repair and maintenance
Generated by: 王宁, wang_ning@caep.org.cn
Owner: 天工LCI数据工作小组
Review: Dependent internal review by 天工LCI数据工作小组
Amounts: no units in this file; such an amount is in the reference unit of its flow, which a separate flow dataset defines
licenseType: Free of charge for all users and uses

## General comment
假设距离 100 公里，运输 GeoProbe 4.65 吨，外加其他建筑材料。

## Geography
a closed pesticide manufacturing plant located in Jiangsu Province, China.

## Technical purpose
所述工业过程用于中国江苏省一个已关闭的农药制造厂的土壤和地下水污染修复。原位地下水抽出处理方法包括提取地下水以去除污染物。施工阶段包括运输修复设备，如重量为4.65吨的GeoProbe装置，以及额外的建筑材料，假定运输距离为100公里。

## Reference product
- Equipment and Materials Arriving on Site: 1; article inperiodical
  到达场地的 GeoProbe和其他材料

## Inputs
- transport in t*km: 445926; article inperiodical

## Use advice
在生命周期评估（LCA）中应用此数据集时，请确保所评估的场景与地理背景和技术适用性相匹配。根据假定的100公里距离，计算所有设备和材料的运输。特定的使用阶段行为，如修复的持续时间和强度，应根据现场和污染概况的特征进行建模。此外，在LCA中考虑设备的终生阶段以及任何可能的回收或处置影响。

## Review details
清单： 内部审查通过几个迭代步骤完成，涉及原始数据验证、原始数据记录、代表性、完整性、与 ISO 14040 和 14044 有关的建模的一致性。

## Data sources
- Ding, D. et al. Assessing the environmental impacts and costs of biochar and monitored natural attenuation for groundwater heavily contaminated with volatile organic compounds. Science of The Total Environment 846, 157316 (2022).
