# 铝电解电容器生产 ; 铝电解电容器（25V 1000uf）

Dataset: ILCD process, Unit process, black box
Geography: NT-JS-CN
Reference year: 2020
Classification: Unit processes / Materials production / Metals and semimetals
Generated by: 谢金良, jinliang.research@gmail.com
Owner: 天工LCI数据工作小组
Review: Dependent internal review by 天工LCI数据工作小组
Amounts: no units in this file; such an amount is in the reference unit of its flow, which a separate flow dataset defines
copyright: false
licenseType: Free of charge for all users and uses

## General comment
本数据集所描述的铝电解电容器（额定值为25V 1000uf）通常被用于需要稳定和长期能量储存解决方案的电子设备中。它们的应用包括在消费类电子产品（如音响设备、计算机和通信设备）中的电源平滑、滤波或储能，以及在工业和汽车电子领域，常常需要更高电压和更大电容量。

## Time period
数据来自于在2020年进行的调研

## Reference product
- Aluminum Electrolytic Capacitors: 10000; measured
  aluminum electrolytic capacitors (qualified) (10000 pcs)

## Inputs
All rows: measured
- electricity, high voltage, aluminium industry: 3526.38
- Aluminum ingots(anode): 71.9
  Al ingots (anode) ; Al smelting preparation (anode)
- Aluminum ingots(cathode): 41.04
  Al ingots (cathode)
- Lead, in ground: 10.33
  Lead from assembly (including sleeving)
- Ferrite Beads, Cores and Sleeves: 242.86
  case from assembly (including sleeving)
- Sleeve: 14.45
  sleeve from assembly (including sleeving)
- polysulfide, sealing compound: 64.14
  Sealing cover from assembly (including sleeving)
- Armature Winding: 10.33
  tab from winding ; 绕组接线片
- sealing tape, aluminium/PE, 50 mm wide: 1.87
  tape from winding
- Separator Paper Coil,Separator Paper Coil: 28.56
  Separator paper coil
- water, deionised: 18533.9
  deionized water
- tap water: 10363.5
  tape water
- electrolyte, KOH, LiOH additive: 85.81
  Electrolyte (soak); The complete composition of electrolyte is 69% main solvent (1,4-butyrolactone), 26% auxiliary solvent (ammonium tetramethylsuccinate), and 5% solute (water). The electrolyte here is assumed to consist of 95% the main solvent and 5% solutes to simplify the analysis of environmental impacts.
- phosphoric acid, industrial grade, without water, in 85% solution state: 19.37
- Perboric acid: 3.52
  perboric acid; HBO3; 过硼酸
- hydrochloric acid, without water, in 30% solution state: 27.54
  HCl (31%)
- Nitrogen: 0.14
  N2 gas (final annealing)
- sodium hydroxide, without water, in 50% solution state: 30.99
  NaOH (30%)
- ammonium nitrate: 0.31
  Ammonium nitrate; 硝酸氢铵; NH4NO3
- nitric acid, without water, in 50% solution state: 8.26
  HNO3 (98%)
- Cold Rolling Oil: 2.73
  rolling oil (cold rolling)
- Ammonium Citrate: 6.78
  Ammonium citrate (formation process); 柠檬酸铵
- Ammonium Pentaborate: 1.86
  Ammonium pentaborate (formation process); 五硼酸铵
- Argon-40: 0.02
  Ar gas (Al smelting preparation)

## Outputs
All rows: measured
- Aluminium Phosphate: 2.5
  Aluminium phosphate (AlPO4) (production of anode formed foil); The environmental impacts from the production stage are all allocated to the capacitors. The by-product AlPO4 in production of anode formed foil is taken as an economical treatment method to address the production waste because of the limited amount and the simplified analysis.
- aluminium scrap, new: 7.09
  Al scraps; The environmental impacts on the specialized recycling processing of the flows are ignored.
- Scraps of Separator Paper: 0.4
  Scraps of separator paper; The environmental impacts on the specialized recycling processing of the flows are ignored.
- Sludge (Sewage Treatment): 2.348
  sludge (Sewage treatment); The environmental impacts on the specialized landfill of the sludge are ignored.
- wastewater, average: 15855.1
  wastewater
- Total Phosphorus (TP): 0.006
  total phosphorous (TP) (production of anode formed foil); 总磷 (污染物);
- total nitrogen: 0.028
  total nitrogen (TN); 总氮 (污染物)
- Suspended solids, unspecified: 0.23
- chemical oxygen demand: 0.687
- Biochemical Oxygen Demand: 0.088
  Biochemical Oxygen Demand (BOD) (Production of Al blank foil); 生化需氧量 (水体污染物)
- ammonia: 0.07
  Ammonia nitrogen (NH3-N)
- Dust: 0.042
  dust (Al smelting preparation)
- Hydrochloric acid: 0.135
- Sulfuric acid: 0.015
- Nitrogen oxides: 0.015
- ammonia: 0.015
- Aluminum Electrolytic Capacitors (Waste): 6281.67
  aluminum electrolytic capacitors (waste) ; The environmental impacts on the specialized recycling processing of the flows are ignored.

## Data selection and combination
三种 AEC 的材料信息和性能参数均来自被调查的制造商。此外，通过对 AEC 行业的几家工厂进行实地调研，获得了铝坯箔制造（由铝锭制成）、阳极/阴极箔制造（由铝坯箔制成）和电容器制造的原始数据。由于技术保密原因，无法直接从供应商处获得 PHAEC 阴极箔制造的 LCI 数据。因此，考虑到两者的相似性，根据 PAECs 阴极箔的涂层工艺数据调整 PHAECs 阴极铝箔的制造 LCI。在运输阶段，主要原材料从材料产地到电容器制造商的数据以及电容器制成品从制造商到客户的数据均来自制造商的供应链系统。使用阶段的能耗是根据 AEC 的物理方程和电气参数计算得出的。为确保分析的完整性，在分析和计算的基础上获得报废阶段的数据。基本数据的参考年份约为 2016 年。基本数据（即铝锭、分离纸、运输、电力和水）来自 Gabi 数据库（版本：10.6.1.35）。此外，一些背景数据，包括 3，4-乙烯二氧噻吩（EDOT）、己二酸铵、柠檬酸铵等，在 Gabi 数据库中无法获得。它们是根据 Gabi 数据库中现有原材料在材料制备过程中发生的化学反应估算出来的。用于制造 PHAECs 的分散溶液（PEDOT:PSS，1%wt）的制备过程数据是根据实验室数据按比例计算的。三种 AEC 的详细 LCI 数据和物质流的单位影响见辅助信息 B 的第 5-7 张和第 2 张。

## Use advice
使用铝电解电容器生产生命周期评估（LCA）数据集的用户在解释环境影响时应谨慎，由于生命周期清单（LCI）中忽略了生产废物的专业处理过程。由于基于估计的LCI数据和未考虑的副反应，某些化学物质环境影响的低估应予以认可。在使用此LCA数据时，评估者应考虑这些限制，并可能相应调整评估，特别是如果这些条件与被评估环境中的常见条件不同。此外，由于在电解液成分的简化假设下，数据用户应注意环境效应可能被低估，并且他们应当在可行的情况下寻找更详细的数据以提高准确性。

## Review details
清单： 内部审查通过几个迭代步骤完成，涉及原始数据验证、原始数据记录、代表性、完整性、与 ISO 14040 和 14044 有关的建模的一致性。

## Data sources
- Zhang, C., Zheng, Y., Huang, H., Liu, Z. & Jing, J. Environmental impact assessment of aluminum electrolytic capacitors in a product family from the manufacturer’s perspective. Int. J. Life Cycle Assess. (2022)
