# 氧化铝生产; 冶金用氧化铝 ; 铝土矿 ; 2012年

Dataset: ILCD process, Unit process, single operation
Geography: CN
Reference year: 2021
Classification: Unit processes / Materials production / Non-energetic raw materials
Generated by: 封羽真, fyz22
Owner: 天工LCI数据工作小组
Review: Dependent internal review by 天工LCI数据工作小组
Amounts: no units in this file; such an amount is in the reference unit of its flow, which a separate flow dataset defines
copyright: false
licenseType: Free of charge for all users and uses

## General comment
本数据集描述的氧化铝生产专门用于冶金目的。它涉及2012年将铝土矿加工成氧化铝的过程。这种氧化铝通常用于通过霍尔-埃鲁法生产铝金属。它作为铝工业的关键原料，用于制造各种铝制品，如箔、结构材料、汽车零部件和电导线。

## Time period
文献发表日期

## Reference product
- aluminium oxide, metallurgical: 1000; software or database
  alumina

## Inputs
All rows: software or database
- soda ash, dense: 152.6
  soda ash
- Petroleum Coke: 1129.52
  Energy sources proportion of energy consumption is coal: fuel oil: coke: natural gas: coke even gas=46.0%: 11.0%: 7.1%: 14.1%: 21.7%
- coal gas: 3452.2
  (same comment as for Petroleum Coke)
- natural gas, high pressure: 2243.13
  (same comment as for Petroleum Coke)
- fuel oil, unspecified: 1749.96
  (same comment as for Petroleum Coke)
- hard coal: 7318.03
  (same comment as for Petroleum Coke)
- Water, unspecified natural origin: 2.95
  water consumption

## Data selection and combination
本研究的数据参考了PA、SA、电力等背景数据的LCA数据。PA数据来自统计数据源，SA数据主要来自文献。背景数据主要来自中国科学院生态环境研究中心CASRCEES 2018建立的中国本地化LCA数据库，涵盖能源、材料、交通、废物管理等LCA数据。

## Use advice
在使用本数据集进行生命周期评估(LCA)时，用户应考虑以下事项：确保您的LCA范围与氧化铝的冶金应用相对应。数据集提供了2012年的一级铝(PA)、二级铝(SA)、电力和其他相关的背景信息，应用于历史评估或作为随时间过程改进的基准。请注意，SA数据主要来自已发表的文献，而PA数据来自统计来源。背景数据取自CAS RCEES 2018数据库，其中包括中国本地化的LCA数据。应遵循上述数据来源中提到的方法论，并且技术适用性应反映2012年中国铝行业的标准和实践。

## Review details
清单： 内部审查通过几个迭代步骤完成，涉及原始数据验证、原始数据记录、代表性、完整性、与 ISO 14040 和 14044 有关的建模的一致性。

## Data sources
- Ding, N., Liu, N., Lu, B. & Yang, J. Life cycle greenhouse gas emissions of aluminum based on regional industrial transfer in China. J. Ind. Ecol. 25, 1657–1672 (2021).
