# Saltedvegetables,pickles,sweetandsourpickles,shrimpoilpickles,branpickles|Mustard,leafyvegetables,beans,onionsandgarlic,rootsandtubers,squashheads|Washing + pickling/salting + desalting + dehydration + soaking|All sizes / /|盐渍菜、泡菜、糖醋渍菜、虾油渍菜、糟糠渍菜|芥菜类、叶菜类、豆类、葱蒜类、根茎类、榨菜头|水洗+腌制/盐渍+脱盐+脱水+渍制|所有规模

Dataset: ILCD process, Partly terminated system
Geography: CN
Reference year: 2019
Classification: Materials production / Other mineralic materials
Generated by: The data was created by the Office of the Second National Pollution Source Census of the Ministry of Ecology and Environment, and the data was organized by the TianGong Plan team for ILCD format / 生态环境部第二次全国污染源普查工作办公室创建数据，天工计划团队常慧敏整理数据为ILCD格式
Amounts: no units in this file; such an amount is in the reference unit of its flow, which a separate flow dataset defines
copyright: false

## Technology and included processes
the Technical of end-of-pipe management technology for pollution phosphorus, totalisChemical coagulation + aerobic biological treatment，Its Technical efficiency of end-of-pipe management60，The formula for calculating the actual operation rate (k-value) of the end-of-pipe treatment facility is k = operating time of waste gas treatment facilities (hours/year) / normal production time of waste gas pollution production section (hours/year)
污染物指标总磷的末端治理技术是化学混凝+好氧生物处理法，其效率为60，末端治理设施实际运行率（k值）计算公式为k=污水治理设施耗电量（千瓦时/年）/污水治理设施运行时间（小时/年）/污水治理设施总功率（千瓦）

## Reference product
- Western Pickled Vegetables: 1000; calculated
  原文件中描述污染物类别为Product，污染物指标为盐渍菜、泡菜、糖醋渍菜、虾油渍菜、糟糠渍菜，此处对其进行了匹配工作，将其匹配到LCAflow库里面相最符合的流

## Outputs
- chemical oxygen demand: 1.225, 0.98, 0.1225, 0.18375, 0.18375, 0.18375 (6 entries); calculated
  原文件中描述污染物类别为废水，污染物指标为化学需氧量，此处对其进行了匹配工作，将其匹配到LCAflow库里面相最符合的流
- Ammonia Nitrogen: 0.01, 0.009, 0.0025, 0.0025, 0.0015, 0.0015 (6 entries); calculated
  原文件中描述污染物类别为废水，污染物指标为氨氮，此处对其进行了匹配工作，将其匹配到LCAflow库里面相最符合的流
- Nitrogen, organic bound: 0.072, 0.0648, 0.0216, 0.0216, 0.018, 0.036 (6 entries); calculated
  原文件中描述污染物类别为废水，污染物指标为总氮，此处对其进行了匹配工作，将其匹配到LCAflow库里面相最符合的流
- phosphorus, total: 0.083, 0.0747, 0.0332, 0.0332, 0.0415, 0.0332 (6 entries); calculated
  原文件中描述污染物类别为废水，污染物指标为总磷，此处对其进行了匹配工作，将其匹配到LCAflow库里面相最符合的流

## Data sources
- 第二次全国污染源普查产排污核算系数手册（试用版）,四级代码1371文件，在完整版文件中第2635页
