# 西北（张掖林泽）玉米生产 ; 种植

Dataset: ILCD process, Unit process, single operation
Geography: ZY-GS-CN
Reference year: 2012
Valid until: 2012
Classification: Unit processes / Materials production / Agricultural production means
Functional unit: 1 t
LCI method principle: Attributional
LCI method approaches: Consequential
Generated by: Haoran Zhang, hrzhang@whu.edu.cn
Owner: 天工LCI数据工作小组
Review: Dependent internal review by 天工LCI数据工作小组
Amounts: no units in this file; such an amount is in the reference unit of its flow, which a separate flow dataset defines
copyright: false
licenseType: Free of charge for all users and uses

## General comment
文章基于农户调研数据,运用农业碳足迹理论及生命周期法定量研究长江下游地区稻麦轮作系统碳足迹大小及组成,并进一步分析碳足迹影响因素

## Geography
临泽县

## Technology and included processes
用 LCA 方法评估制种玉米农业系统，是把产品 从投入到最终产出的处理的整个过程作为研究对象， 进行量化分析和比较，以评价制种玉米环境影响[13]。本 文使用制种玉米质量 1 t 作为功能单元，系统边界从化 肥和电力的生产开始，终止边界为作物种植过程输出 农产品和污染物，即存在两个生产系统，分别是农资生 产系统和作物生产系统

## Technical purpose
本数据描述了中国西北张掖临泽地区的玉米生产过程，主要用于研究农作物生产系统的农业碳足迹和生命周期评估。这些数据可以应用于评价与种植性农业实践相关的环境影响，特别关注作为主要作物的玉米。该信息对于监控和管理农业实践以减少碳足迹和制定可持续农业政策非常有价值。

## Reference product
- maize grain: 1; measured

## Inputs
All rows: measured
- nitrogen: 180.79
- potassium chloride: 43.39
- phosphorus: 49.18
- Fertilizer: 578.53
- Electricity: 367.596
- Rice Seeds: 20.67
- water: 978.88

## Outputs
All rows: measured
- water: 978.88
- carbon dioxide (fossil),carbon dioxide (fossil): 1795.17
- carbon monoxide (fossil): 0.84
- nitrous oxide: 11.12, 6.91 (2 entries)
- Hydrocarbons, aliphatic, alkanes, unspecified: 0.11
- particles (PM10): 0.97
- sulfide: 6.08
- ammonium: 78.93
- nitrate: 11.75
- Phosphate Anion: 0.43
- atrazine: 0.16
- Methyl-1650,Methyl-1650: 0.12
- dimethoate: 0.09
- copper: 0.0002
- cadmium: 1e-5
- lead: 5e-5
- zinc: 8e-5

## Deviations from the LCI method approaches
系统边界从化肥和电力的生产开始，终止边界为作物种植过程输出农产品和污染物，即存在两个生产系统，分别是农资生产系统和作物生产系统

## Data selection and combination
本文数据来源于张掖市统计抽样调查 2012年投 入产出表时，增加专项调查所获得的数据。甘州区选择碱滩镇、党寨村和小满村三个村镇，临泽县选择沙河镇和平川镇，高台县选择宣化镇、巷道村和骆驼城乡三个村镇， 剔除其中不完整的数据，共得到 72户农户的有效数 据

## Data treatment and extrapolations
，采用分层随机抽样和典型样本选择 法结合，问卷调查和典型样本结构化访谈的方式收集 数据。。调查内容围 绕所有投入的生产要素和经济成本以及资源性消耗 等，产出主要关注产品产量和当期的经济价值 ，以及 产生的废弃物量和处理方式等。

## Sampling procedure
确定张掖市三县区调 查样本量需补充人户调查 80户。样本的构成保持与 当地农业增加值比例相同的原则，按照农业增加值比 例 7：5：8确定相应调查户数，即三县区分别抽取28、 20、32户

## Use advice
2012年的数据集应谨慎使用并验证，以确保其对张掖地区当前玉米生产的生命周期评估研究的相关性和准确性。使用这个数据集时，必须考虑系统边界，它们从化肥和电力的生产开始，并在作物种植过程中农产品和污染物输出结束。用户应该注意数据收集使用的方法，如分层随机抽样和典型样本选择，以了解数据的代表性。还应考虑地理和技术适用性，以确保结果适用于类似的农业环境。

## Review details
清单： 内部审查通过几个迭代步骤完成，涉及原始数据验证、原始数据记录、代表性、完整性、与 ISO 14040 和 14044 有关的建模的一致性。

## Data sources
- 杨肖,钟方雷,郭爱君,王琼.干旱区绿洲制种玉米生命周期环境影响评价——以张掖市为例[J].农业环境科学学报,2017,36(8):1664-1671
