# 修复后土壤;连续阻隔;土壤风险管控;钢板墙维护+水力梯度控制

Dataset: ILCD process, Unit process, black box
Geography: DK
Reference year: 2017
Classification: Unit processes / Other Services / Repair and maintenance
Functional unit: The functional units include steel pile walls that have been installed in a pesticide contaminated site covering an area of approximately 20000 square meters, 100 years of maintenance work, and related hydraulic control engineering.
Generated by: 杨欣桐, yangxt@caep.org.cn
Owner: 天工LCI数据工作小组
Review: Dependent internal review by 天工LCI数据工作小组
Amounts: no units in this file; such an amount is in the reference unit of its flow, which a separate flow dataset defines
copyright: false
licenseType: Free of charge for all users and uses

## General comment
一种对污染土壤的风险管控策略，该风险管控策略不能消除污染，且该场地已安装钢板连续墙，该过程只涉及对已安装钢板墙的维护。

## Geography
BGroyne 42号污染场地位于丹麦西海岸。该场地是丹麦最大的污染场地之一，占地面积约20000平方米。

## Technology and included processes
持续阻隔包括对已经安装的钢板桩墙进行无限期的维护。从污染区域抽取地下水，以去除渗透水，并保持水力梯度方向为朝向场地内部。抽取的污染地下水在场地附近通过活性炭过滤进行处理。假设时间框架为100年。

## Technical purpose
该过程描述了一种特定于丹麦最大受污染场地之一的土壤污染控制和控制的风险管理策略。该过程不消除污染，而是专注于使用连续钢板墙进行无限期的维护和隔离。水力控制组件涉及使用活性炭过滤处理污染地下水，以管理受污染区域内的污染风险。这一策略用于防止土壤中的农药在假定的100年时间范围内进一步环境扩散。

## Reference product
- Remediated groundwater: 20000; missing unimportant

## Inputs
All rows: missing unimportant
- Electricity: 7.92e6
  Electricity: 22 MWh/year, in total 2200 MWh
- Activated Carbon: 200000
  Activated carbon: 2 tons/year, in total 200 tons
- Steel: 2.7e6
  Steel: 900 tons per renewal, in total 2700 tons
- Diesel,Diesel: 0.0247
- contaminated groundwater: 20000

## Use advice
数据用户应在关注原位、不透水屏障（如所述钢板墙）的土壤污染控制策略的生命周期评估中考虑此数据集。数据包括这些控制技术的长期维护以及现场的能源和材料消耗，而不考虑任何运输或最终材料处置过程。关于技术适用性的考虑应包括基础设施的无限期维护时间以及水力干预的当地条件。假定抽取和处理设施至少运行100年，尽管实际运行时间无限期。

## Review details
清单： 内部审查通过几个迭代步骤完成，涉及原始数据验证、原始数据记录、代表性、完整性、与 ISO 14040 和 14044 有关的建模的一致性。

## Data sources
- Lemming G S ,John P B ,Morten B , et al. Multi-criteria assessment tool for sustainability appraisal of remediation alternatives for a contaminated site. Journal of Soils and Sediments, 2018, 18 (11): 3334-3348.
