# cement production|cement, ordinary portland cement, 42.5MPa|new dry process rotary kiln, 2000 t-cl/d|blast furnace slag

Dataset: ILCD process, Unit process, black box
Geography: SC-CN
Reference year: 2007
Classification: Materials production / Other mineralic materials
Generated by: Siqi Yang
Amounts: no units in this file; such an amount is in the reference unit of its flow, which a separate flow dataset defines
copyright: false

## General comment
A F4.0x58 m of a cement manufacturer in Sichuan Province, new dry process rotary kiln cement production line with limestone as the main raw material and a daily production capacity of 2000 tons of cement clinker.

## Geography
A cement manufacturer in Sichuan Province

## Model description
One functional unit is equivalent to 42.5 kilograms of ordinary portland cement, that is, 1 Fu = 1 kg of P·O42.5 ordinary portland cement. The research scope includes cement raw material extraction, energy production, raw meal preparation, clinker calcination and grinding, and cement storage. The main focus is on the cement production process and the environmental impact related to the extraction and transportation of raw materials, electricity and coal production, and cement production process.

## Reference product
- cement, ordinary portland cement, 42.5MPa: 1000
  Limestone cement. P.O 42.5 Ordinary silicate cement.

## Inputs
All rows: measured
- limestone, crushed, for mill: 933.7
  Limestone. Transported by truck for 15km.
- sandstone: 151.2
  Sandstone. Transported by truck for 15km.
- mudstone, unprocessed: 68.72
  Mudstone. Transported by truck for 30km.
- gypsum (desulphurized): 33.24
  Gypsum. Transported by truck for 45km.
- iron, powder: 41.19
  Iron powder. Transported by truck for 190km.
- blast furnace slag: 74.09
  Slag. Transported by truck for 15km.
- hard coal, run-of-mine: 134.6
  Coal. Transported by truck for 34km.
- electricity, medium voltage: 469.08
  Electricity.

## Outputs
- carbon dioxide: 855.9; calculated
  CO2. Only involves the production stage (calculation).
- sulfur dioxide: 0.053; measured
  SO2. Only involves the production stage (measured).
- Nitrogen oxides: 2.2; measured
  NOx. Only involves the production stage (measured).
- particles (> PM10): 3.045; measured
  Dust. Only involves the production stage (calculation: data after dust removal treatment divided by dust removal efficiency).

## Sampling procedure
The focus of the research is the limestone cement produced by a new dry rotary kiln cement production line with a daily output of 2000 tons of cement clinker, using a single F4.0x58m and mainly made of limestone as the main raw material.

## Data sources
- 王超. (2007). 电石渣水泥和石灰石水泥生命周期评价的比较研究 [硕士, 西南交通大学].
