# 氧化铝生产; 冶金用氧化铝 ; 铝土矿 ; 2008年

Dataset: ILCD process, Unit process, single operation
Geography: CN
Reference year: 2021
Classification: Unit processes / Materials production / Non-energetic raw materials
Generated by: 封羽真, fyz22
Owner: 天工LCI数据工作小组
Review: Dependent internal review by 天工LCI数据工作小组
Amounts: no units in this file; such an amount is in the reference unit of its flow, which a separate flow dataset defines
copyright: false
licenseType: Free of charge for all users and uses

## General comment
通过该工艺生产的氧化铝主要用于冶金应用。它作为铝生产行业中一个关键的原材料，在通过霍尔-埃鲁法将铝土矿转化为铝金属的过程中发挥作用。这种氧化铝确保了适合电解的特性，并适用于铝行业的大规模生产。

## Time period
文献发表日期

## Reference product
- aluminium oxide, metallurgical: 1000; software or database
  alumina

## Inputs
All rows: software or database
- soda ash, dense: 123.21
  soda ash
- Petroleum Coke: 1653.04
  Energy sources proportion of energy consumption is coal: fuel oil: coke: natural gas: coke even gas=46.0%: 11.0%: 7.1%: 14.1%: 21.7%
- coal gas: 5052.25
  (same comment as for Petroleum Coke)
- natural gas, high pressure: 3282.8
  (same comment as for Petroleum Coke)
- fuel oil, unspecified: 2561.05
  (same comment as for Petroleum Coke)
- hard coal: 10709.8
  (same comment as for Petroleum Coke)
- Water, unspecified natural origin: 3.49
  water consumption

## Data selection and combination
本研究的数据参考了PA、SA、电力等背景数据的LCA数据。PA数据来自统计数据源，SA数据主要来自文献。背景数据主要来自中国科学院生态环境研究中心CASRCEES 2018建立的中国本地化LCA数据库，涵盖能源、材料、交通、废物管理等LCA数据。

## Use advice
使用此LCA数据集的用户需知，该数据专门适用于以铝土矿为前体，用于冶金目的的氧化铝生产，并代表2008年的技术实践。在进行生命周期评估时，应考虑潜在的更新或技术变化，这可能在2008年之后发生过。背景数据来源于中国特定的LCA数据库，仅关注PA，SA，电力和其他如所述的背景数据。在区域背景下确保数据适用性，以及与评估的目标和范围保持一致是重要的，并且在处理国际比较或与全球数据集整合时需要注意方法论的一致性。

## Review details
清单： 内部审查通过几个迭代步骤完成，涉及原始数据验证、原始数据记录、代表性、完整性、与 ISO 14040 和 14044 有关的建模的一致性。

## Data sources
- Ding, N., Liu, N., Lu, B. & Yang, J. Life cycle greenhouse gas emissions of aluminum based on regional industrial transfer in China. J. Ind. Ecol. 25, 1657–1672 (2021).
