# 湿蒸法棉布染整加工|印染棉布|退浆

Dataset: ILCD process, Unit process, single operation
Geography: SZ-JS-CN
Reference year: 2012
Classification: Materials production / Other mineralic materials
Generated by: Yingfan Duan, 1300925579@qq.com
Review: Dependent internal review by Tiangong LCI Data Working Group
Amounts: no units in this file; such an amount is in the reference unit of its flow, which a separate flow dataset defines
copyright: false

## Geography
本研究选取江苏省某印染企业为重点调研对象，该企业位于长三角经济圈中的常熟。

## Inputs
- Electricity: 200; measured
- Crude coal: 236; calculated
- Fuel Oil: 5.04
- heavy fuel oil: 1.52
- Diesel: 6.93
- Coke Oven Gas: 9.24
- natural gas: 0.118
- Cotton: 167; measured
- sodium chloride: 50
- Amylase: 13.3
- Penetrant: 5
- river water: 31900
- Water (fresh water): 3.13; measured

## Outputs
- carbon dioxide: 64.9; calculated
- carbon monoxide: 0.158
- sulfur dioxide: 0.0575; estimated
- methane: 2.81e-5; calculated
- Nitrogen oxides: 0.305
- nitrous oxide: 2.63e-5; calculated
- Dust (unspecified, from stack): 0.532; estimated
- ammonia: 1.01e-5
- non-methane volatile organic compounds: 0.00114
- waste water - untreated: 32000
- chemical oxygen demand: 36.5; measured
- Suspended solids, unspecified: 3.92; measured
- lead: 5.15e-6
- mercury: 1.08e-7
- fluorine: 9.74e-7
- cadmium: 1.91e-7
- arsenic: 4.41e-6

## Review details
Inventory: The internal review was done by several iteration steps concerning raw data validation, raw data documentation, representativity, completeness and consistency of modelling with regard to ISO 14040 and 14044.; Documentation: The review of the documentation was performed by Ecobilan and is in compliance with ISO 14040 and 14044. The data set documentation is correct in view of the appropriateness of the information provided. It includes all relevant information in view of data quality and scope of application of the respective LCI result.

## Data sources
- 朱亚楠. 棉布连续轧染工艺生命周期环境影响评价. (南京大学, 2012).
