# EVA separation;EVA

Dataset: ILCD process, Unit process, single operation
Geography: CN
Classification: Materials production / Plastics
Generated by: Nan Wang, 1209824595@qq.com
Owner: Tiangong LCI Data Working Group
Review: Dependent internal review by Tiangong LCI Data Working Group
Amounts: no units in this file; such an amount is in the reference unit of its flow, which a separate flow dataset defines
copyright: false
licenseType: Free of charge for all users and uses

## General comment
EVA separation process that isolates ethylene-vinyl acetate for further use in applications such as the production of photovoltaic panels, adhesive manufacturing, and the creation of various consumer goods such as sports equipment.

## Reference product
- Laminate: 745.833; input; article inperiodical
  PV laminates

## Inputs
- Electricity: 128.52; article inperiodical
- nitrogen: 154.22; article inperiodical
- Oxidant: 165.98; article inperiodical
  oxidant
- Standard coal: 60.7143; article inperiodical
  standard coal

## Outputs
All rows: article inperiodical
- Ethylene-vinyl acetate copolymer: 45.9
  EVA
- Glass for recovery (shards): 665
- Multi-Si solar cell: 38.91
- Backsheet: 14.5
  backplane
- municipal solid waste deposition: 96.75
- carbon dioxide: 32.25
- methane: 50.69
- nitrogen dioxide: 30.94
- sulfur dioxide: 51.17

## Use advice
When utilizing this data set, consider the scope of the separation process including the specific energy consumption, emissions associated with the separation technique, and potential losses of EVA during the process. Evaluate the environmental impact of the EVA separation process in the context of its entire lifecycle, considering potential recycling and reusability scenarios for the post-use EVA.

## Review details
Inventory: The internal review was done by several iteration steps concerning raw data validation, raw data documentation, representativity, completeness and consistency of modelling with regard to ISO 14040 and 14044.

## Data sources
- Li, J. et al. Life cycle analysis of the economic costs and environmental benefits of photovoltaic module waste recycling in China. (2023).
