# 秸秆运输｜秸秆｜卡车（无卡车运载量数据）

Dataset: ILCD process, Unit process, single operation
Geography: CN
Reference year: 2020
Classification: Unit processes / Transport services / Road
Functional unit: Taking 1 ton of straw as the functional unit
LCI method principle: Consequential
Generated by: 刘超硕, liucs22@mails.jlu.edu.cn
Owner: 天工LCI数据工作小组
Review: Dependent internal review by 天工LCI数据工作小组
Amounts: no units in this file; such an amount is in the reference unit of its flow, which a separate flow dataset defines
copyright: false
licenseType: Free of charge for all users and uses

## General comment
该数据集涉及秸秆运输，通常指的是水稻小麦等作物种植的副产品。秸秆通过卡车进行运输，但该数据集并未提供这些运输车辆的容量数据。此过程与处理和利用农业副产品的行业相关，可能用于动物饲料、生物能源生产、工业过程中的有机物料或作为蘑菇栽培的底物。

## Reference product
- Crop straw: 1000; measured

## Inputs
- Diesel: 694; measured

## Outputs
All rows: measured
- carbon dioxide (fossil): 51.5
  原文未区分排放源为生物源或化石源，根据专家判断此处为化石源。
- methane (fossil): 0.0069
  原文未区分排放源为生物源或化石源，根据专家判断此处为化石源。
- nitrous oxide: 0.00042
- sulfur dioxide: 0.033
- nitrogen dioxide: 0.663
- particles (> PM10),particles (> PM10): 0.228
- Crop straw: 1000

## Use advice
使用该数据集的用户应注意，它缺少卡车运载量数据，这对于计算每单位运输秸秆的环境影响至关重要。为了保持准确性，用户需要从其他来源估计或获取卡车容量信息以进行全面评估。此数据集定义了1吨秸秆的运输阶段；如果考虑更大或更小的数量，用户应相应地调整数据。用户还应了解技术适用性，如所使用的卡车类型及所覆盖的距离，以确保数据对其特定情况的相关性和代表性。

## Review details
清单： 内部审查通过几个迭代步骤完成，涉及原始数据验证、原始数据记录、代表性、完整性、与 ISO 14040 和 14044 有关的建模的一致性。

## Data sources
- Dai, Y., Zheng, H., Jiang, Z. & Xing, B. Comparison of different crop residue-based technologies for their energy production and air pollutant emission. Science of The Total Environment 707, 136122 (2020).
