# 土壤修复;异位修复;土壤淋洗;案例2;污染土挖掘;挖掘出的土壤

Dataset: ILCD process, Unit process, single operation
Geography: SD-CN
Reference year: 2017
Classification: Unit processes / Other Services / Repair and maintenance
Generated by: 王宁, wang_ning@caep.org.cn
Owner: 天工LCI数据工作小组
Review: Dependent internal review by 天工LCI数据工作小组
Amounts: no units in this file; such an amount is in the reference unit of its flow, which a separate flow dataset defines
copyright: false
licenseType: Free of charge for all users and uses

## General comment
使用挖掘机将污染土壤挖掘出来

## Technology and included processes
场地污染无土壤方量为210000m3，挖掘机效率为44.6 m3/ h，耗油量为22l/h

## Technical purpose
该工业过程用于通过土壤修复进行污染场地的环境管理。具体来说，它描述了使用重型机械挖掘污染土壤，以便异位土壤淋洗，即在现场处理污染材料以去除或中和污染物。该过程适用于土壤污染严重且挖掘是可行的修复技术方法的情况。

## Reference product
- Excavated soil,Excavated soil: 210000; measured

## Inputs
- Diesel,Diesel: 103.587; measured

## Use advice
在使用此数据集进行生命周期评估时，重要的是要考虑土壤修复过程的具体环境和位置，以确保在环境影响评估中的准确性。用户需要考虑的变量包括所涉及的污染物类型、污染浓度和当地环境法规。此外，至关重要的是要包括数据集中定义的所有主要原材料和能源消耗的输入和输出，并且要计入挖掘设备的操作特定信息，如容量、效率和燃油使用量。

## Review details
清单： 内部审查通过几个迭代步骤完成，涉及原始数据验证、原始数据记录、代表性、完整性、与 ISO 14040 和 14044 有关的建模的一致性。

## Data sources
- Song, Y. et al. Environmental and socio-economic sustainability appraisal of contaminated land remediation strategies: A case study at a mega-site in China. Science of The Total Environment 610–611, 391–401 (2018).
