# 石墨负极浆料生产;石墨负极材料;合成石墨、粘结剂

Dataset: ILCD process, Unit process, single operation
Classification: Materials production / Non-energetic raw materials
Functional unit: Produce 1kg graphite anode slurry
Generated by: 陈鑫, xinchen@mail.nankai.edu.cn
Owner: 天工LCI数据工作小组
Review: Dependent internal review by 天工LCI数据工作小组
Amounts: no units in this file; such an amount is in the reference unit of its flow, which a separate flow dataset defines
copyright: false
licenseType: Free of charge for all users and uses

## General comment
将天然石墨进行粉碎处理后，和粘结剂混合、成型、压制、烘干、石墨化

## Technology and included processes
将石墨粉碎处理使其颗粒大小均匀，和PTEE混合后进行成型压制，接着进行烘干处理去除水分和挥发有机物，再进行高温石墨化处理，最后对其进行表面处理，以提高与电解液的接触性和稳定性

## Reference product
- 1-methyl-2-pyrrolidone: 0.28; estimated
  假设情景，数据基于估计

## Inputs
- Graphite (anode and melting pot): 0.95; estimated
  假设情景，数据基于估计
- heat: 5; estimated
  假设情景，数据基于估计
- waste heat: 5; estimated
  假设情景，数据基于估计

## Outputs
- 1-methyl-2-pyrrolidone: 1; estimated
  石墨电极材料flow缺//假设情景，数据基于估计

## Data selection and combination
数据基于假设

## Data treatment and extrapolations
由于缺乏惰性或还原性数据故不包含烘焙过程所需的气氛，能源的需求基于估算。

## Review details
清单： 内部审查通过几个迭代步骤完成，涉及原始数据验证、原始数据记录、代表性、完整性、与 ISO 14040 和 14044 有关的建模的一致性。

## Data sources
- Majeau-Bettez, G., Hawkins, T. R. & Strømman, A. H. Life Cycle Environmental Assessment of Lithium-Ion and Nickel Metal Hydride Batteries for Plug-In Hybrid and Battery Electric Vehicles. Environ. Sci. Technol. 45, 4548–4554 (2011).
