# 轮胎生产;橡胶轮胎;硫化和测试;混合化合物

Dataset: ILCD process, Unit process, single operation
Geography: CN
Reference year: 2014
Classification: Unit processes / Materials production / Other materials
Generated by: Cui, di, 2806553850@qq.com
Owner: 天工LCI数据工作小组
Review: Dependent internal review by 天工LCI数据工作小组
Amounts: no units in this file; such an amount is in the reference unit of its flow, which a separate flow dataset defines
copyright: false
licenseType: Free of charge for all users and uses

## General comment
生产阶段相当复杂，包括复合共混、轧制、挤出、包环生产、切割成型、硫化和测试等工艺。我们将密切相关的流程与避免分配。确定了以下四种主要生产工艺：复合共混、轧制和挤出，切割成型，硫化成型。

## Time period
”评估中使用了中国最大的轮胎公司之一在2014年现场收集的数据“。文章中已说明数据调研与2014年，但没有具体时间，所以该时间定位2014年1月1日。

## Technical purpose
此工业流程涉及橡胶轮胎的生产，包含多个复杂阶段。这些轮胎主要应用于汽车领域，为各种从小型乘用车到大型商用卡车的车辆提供必要的牵引力和车辆支持。生产过程包括复合共混，这对于实现期望的物理特性是至关重要的。轧制和挤出将轮胎成型为初步形态，而切割成型为硫化作准备。硫化是一种化学过程，可以增强橡胶的弹性和强度。最后的测试阶段确保轮胎符合严格的质量和安全标准。

## Reference product
- Tire: 9.497; measured

## Inputs
- Electricity: 3.01; measured
- steam: 15.89; measured

## Outputs
- Waste cord thread ,Waste tire: 0.073; measured
- Waste wire cord fabric,Waste steel wire: 0.001; measured
- Waste rubber,Waste fiber fabric: 0.001; measured

## Data selection and combination
调查轮胎产品中使用的原材料数据来源于中国最大轮胎公司之一的现场调查。这些数据是在2014年目标轮胎产品制造期间收集的。还考虑了其他材料，如活性粘土、氧化锌、硬脂酸、加工剂和润滑油。

## Use advice
在使用此数据集进行生命周期评估（LCA）时，重要的是注意数据是2014年的具体情况，并反映了当时中国最大轮胎公司的做法。用户应该意识到，随着时间的推移，制造技术或原料获取的变化可能会影响这些数据集对当前做法的适用性。此外，数据用户应考虑到数据涉及未分配产生的生产过程，即每个阶段的影响没有在相关流程中分配。建议检查更新或更近期的数据，可能代表当前生产技术，相应地使用此数据集进行回顾性分析。

## Review details
清单： 内部审查通过几个迭代步骤完成，涉及原始数据验证、原始数据记录、代表性、完整性、与 ISO 14040 和 14044 有关的建模的一致性。

## Data sources
- Sun X, Liu J, Hong J, et al. Life cycle assessment of Chinese radial passenger vehicle tire[J]. The International Journal of Life Cycle Assessment, 2016, 21: 1749-1758.
