# 乙烯生产 | 乙烯 | 石脑油路线 | 石脑油

Dataset: ILCD process, Unit process, black box
Geography: CN
Reference year: 2002
Classification: Materials production / Other mineralic materials
Functional unit: The functional unit determined by the research is 1t of ethylene product
LCI method principle: Attributional
LCI method approaches: Allocation - mass
Generated by: 任亚楠, renyn15@tsinghua.org.cn
Review: Dependent internal review by Tiangong LCI Data Working Group
Amounts: no units in this file; such an amount is in the reference unit of its flow, which a separate flow dataset defines
copyright: false

## General comment
乙烯联合装置，副产丙烯和碳四

## Geography
2002年我国某乙烯生产装置

## Reference product
- ethene (ethylene): 1000; measured
  乙烯

## Inputs
All rows: measured
- naphtha: 1185.91
  石脑油
- diesel: 558.07
  轻柴油
- light fuel oil: 84.04
  燃料油
- Refinery Gas: 171.04
  炼厂干气
- electricity mix: 135.684
  电力

## Outputs
All rows: measured
- carbon dioxide: 1306.89
  CO2
- sulfur dioxide: 3.12
  SO2
- nitrous oxide: 7.07
  NOx
- carbon monoxide: 6.19
  CO
- ethylene: 2.89
  乙烯
- Dust (unspecified, from stack): 4.48
  烟尘
- waste water - untreated: 179.82
  废水总量
- Oils, unspecified: 0.02
  石油类
- chemical oxygen demand: 2.57
  COD
- Production residues (unspecified): 3.1
  废渣

## Deviations from the LCI method approaches
由于产品输出不仅是乙烯，还包括丙烯和碳四，因此无论是裂解料和能源消耗，还是污染物排放，都需要在各个产品间进行环境负荷分配，以得到乙烯产品所应当承担的环境负荷。研究采用产品质量作为清单数据的分配原则，并根据表1 的数据可计算得到乙烯、丙烯和碳四的环境负荷分配系数分别为0.54、0.26 和0.19（有运算误差，但对本研究工作无影响）

## Data selection and combination
对乙烯联合装置生产工艺的运行状况和环境负荷等进行了实地调研和数据采集

## Data treatment and extrapolations
由乙烯联合生产装置的烟气排放量和CO2排放浓度，根据某生产线的年开工率，估算1t乙烯生产过程中，CO2排放量为1516.65kg。由于未能得到某生产线所耗裂解料的准确成分，研究取裂解料主要成分的平均值。其中，石脑油为68.0%，轻柴油为32.0%。

## Review details
Inventory: The internal review was done by several iteration steps concerning raw data validation, raw data documentation, representativity, completeness and consistency of modelling with regard to ISO 14040 and 14044.; Documentation: The review of the documentation was performed by Ecobilan and is in compliance with ISO 14040 and 14044. The data set documentation is correct in view of the appropriateness of the information provided. It includes all relevant information in view of data quality and scope of application of the respective LCI result.

## Data sources
- 袁宝荣, 聂祚仁, 狄向华, & 左铁镛. 乙烯生产的生命周期评价(Ⅰ)——目标与范围的确定和清单分析. 化工进展 334–336 (2006).
