# copper production|Primary copper|Pyrometallurgy|sulfide copper concentrates

Dataset: ILCD process, Unit process, single operation
Geography: CN
Reference year: 2010
Classification: Materials production / Other mineralic materials
Functional unit: Functional unit: 1 kg copper
LCI method principle: Attributional
LCI method approaches: Allocation - market value
Generated by: Peng Wang, 2867919560@qq.com
Review: Dependent internal review by Tiangong LCI Data Working Group
Amounts: no units in this file; such an amount is in the reference unit of its flow, which a separate flow dataset defines
copyright: false

## Geography
the present study included the data of imported copper and statistical data that represents China’s average situation instead of a typical enterprise for each constituent process of the three copper production routes, especially with respect to energy and resource use in foreground processes and electricity production in background processes.

## Time period
Chinese copper demand projections from 2010 to 2050.

## Reference product
- copper: 1; software or database
  Refined copper

## Inputs
All rows: software or database
- Electricity: 5.94
- Diesel: 1.23
- Limestone: 1.11
- sulphuric acid: 0.0111
- natural gas; 44.1 MJ/kg: 0.0444
- oxygen: 0.263
- Xanthate: 0.0167
  Xanthate需要补充
- Heavy fuel oil (1.0 wt.% S): 0.0205
- copper: 110
  Environmental resources |Copper ore
- copper: 2.41
  Imported-copper concentrate
- molybdenum: 2.64
  Molybdenum ore
- water: 1.17
  Water

## Outputs
All rows: software or database
- molybdenum: 0.00411
  Molybdenum concentrate
- Sulfidic tailing: 97
  Sulfidic tailing需要补充
- sulfur dioxide: 0.445, 0.228 (2 entries)
  Sulfur dioxide
- sulphuric acid: 1.2
  Sulfuric acid
- waste water - untreated: 0.00568
  Waste water
- carbon dioxide: 5.88
  Carbon dioxide
- antimony: 4.49e-9
  Antimony
- carbon monoxide: 2.94e-8
  Carbon monoxide
- particles (PM2.5 - PM10): 0.0114
  Particulates
- water: 0.0652
- zinc: 4.26e-6

## Deviations from the LCI method approaches
The life cycle environmental impacts were conducted using the CMLCA 6.0 software and the CML2001 impact categories

## Data selection and combination
Data sources were summarized in Tables 2 and 3 The data on electricity production and other processes related to copper production in the background system were derived from the ecoinvent v3.4 database,

## Data treatment and extrapolations
Ecoinvent v3.4 database-cradle to gate

## Review details
Inventory: The internal review was done by several iteration steps concerning raw data validation, raw data documentation, representativity, completeness and consistency of modelling with regard to ISO 14040 and 14044.; Documentation: The review of the documentation was performed by Ecobilan and is in compliance with ISO 14040 and 14044. The data set documentation is correct in view of the appropriateness of the information provided. It includes all relevant information in view of data quality and scope of application of the respective LCI result.

## Data sources
- Dong, D., Van Oers, L., Tukker, A. & Van Der Voet, E. Assessing the future environmental impacts of copper production in China: Implications of the energy transition. Journal of Cleaner Production 274, 122825 (2020).
