# Adult abalone culture | Adult abalone | Cage culture

Dataset: ILCD process, Unit process, black box
Geography: ND-FJ-CN
Classification: Materials production / Other mineralic materials
Functional unit: 1 live-weight ton of abalone
Generated by: Kangni Wu
Amounts: no units in this file; such an amount is in the reference unit of its flow, which a separate flow dataset defines

## General comment
The system includes energy production (red), feed production (green), the main chain of aquaculture production (blue), and the production of other inputs (purple).

## Geography
The prefecture-level city of Ningde comprises a group of districts and counties, of which Fuding city (A), Xiapu County (B), Fu’an city (C), and Jiaocheng district (D) are next to the sea and were included in our assessment. A total of 321 households were randomly sampled in the area in August 2017 and January 2018, and we analyzed the data from 292 households that had mariculture production during 2016.

## Reference product
- Abalone: 1; article inperiodical

## Inputs
- Big juveniles of Large Yellow Croake: 1273.7; article inperiodical
- Fuel: 58.5; article inperiodical
- laminaria: 3154.2, 18627.1 (2 entries); article inperiodical

## Data sources
- Marín, T. et al. Resource Use in Mariculture: A Case Study in Southeastern China. Sustainability 11, (2019).
