# 水泥生产;水泥, 通用硅酸盐水泥;大型新型干法, >4000 t-cl/d

Dataset: ILCD process, Unit process, black box
Geography: CN
Reference year: 2010
Classification: Materials production / Other mineralic materials
Generated by: 郭静, jingguo92@gmail.com
Owner: 天工LCI数据工作小组
Review: Dependent internal review by 天工LCI数据工作小组
Amounts: no units in this file; such an amount is in the reference unit of its flow, which a separate flow dataset defines
copyright: false
licenseType: Free of charge for all users and uses

## General comment
新型干法，市场份额占61.82%；>4000吨-熟料/日，规模份额占29.32%。为反应现阶段中国水泥工业的环境影响，结合近年来中国水泥工业结构调整和发展现状，考虑到水泥生产技术水平的高低以及不同规模水泥企业的差异，将中国水泥工业分为以下四类：大型新型干法（>4000吨-熟料/日）、中型新型干法（2000~4000吨-熟料/日）、小型新型干法（<2000吨-熟料/日）和立窑（<2000吨-熟料/日）。

## Technology and included processes
新型干法，市场份额占61.82%；>4000 吨-熟料/日，规模份额占29.32%。为反应现阶段中国水泥工业的环境影响，结合近年来中国水泥工业结构调整和发展现状，考虑到水泥生产技术水平的高低以及不同规模水泥企业的差异，本研究将中国水泥工业分为以下四类：大 型新型干法（>4000 吨-熟料/日）、中型新型干法 （2000~4000 吨-熟料/日）、小型新型干法（<2000 吨-熟料/日）和立窑（<2000 吨-熟料/日）。

## Technical purpose
此数据集描述中国大型新型干法通用硅酸盐水泥生产过程，日产熟料能力超过4000吨。该生产方法适用于大规模水泥制造设施，并可供建筑行业利益相关者理解大规模水泥生产的环境影响。通用硅酸盐水泥广泛用于建筑物、基础设施、高速公路以及其他形式的混凝土结构的建设。

## Model description
取中国生产1t熟料含量为70%的通用水泥作为功能单元。水泥生产包括生料制备、熟料煅烧和水泥磨粉。

## Reference product
- cement, common portland cement: 1000
  熟料含量为70%的通用水泥。

## Inputs
- limestone, crushed, for mill: 930
  石灰石
- clay: 130
  粘土
- gypsum stone (CaSO4-dihydrate): 50
  石膏
- hard coal; 26.3 MJ/kg: 111.38
  熟料烧成阶段原煤消耗。烧成煤耗按不同生产工艺和规模的吨熟料标煤耗折算。
- hard coal; 26.3 MJ/kg: 3.5
  原料烘干阶段原煤消耗。本研究取烘干原煤耗为3.50kg/t-水泥。
- electricity, medium voltage: 163.584
  烧成电耗。电力消耗按不同生产工艺和规模的综合电耗计算。
- electricity, medium voltage: 167.4
  其他电耗。电力主要用于原料破碎、生料磨、水泥磨、除尘设备等机械的驱动，电力消耗按不同生产工艺和规模的综合电耗计算。

## Outputs
- carbon dioxide: 573.4
  CO2的排放量来自于理论计算，包括两方面：一方面来源于煅烧熟料燃煤的使用，另一方面来源于煅烧石灰石（CaCO3）等原料生成石灰（CaO）过程碳酸盐的分解。
- sulfur dioxide: 0.25
  SO2。SO2、NOx和COD排放量来自于近年中国水泥工业污染源普查统计结果。
- Nitrogen oxides: 1.11
  NOx。SO2、NOx和COD排放量来自于近年中国水泥工业污染源普查统计结果。
- particles (PM2.5): 0.2328
  <PM2.5。本研究根据污染源普查对不同水泥生产工艺和规模的颗粒物产污系数的调查，以及不同水泥生产设备产生的颗粒物比例和除尘技术的应用份额及分级除尘效率，计算功能单元水泥产品的颗粒物分级排放量。
- particles (PM2.5 - PM10): 0.0347
  PM2.5-10。本研究根据污染源普查对不同水泥生产工艺和规模的颗粒物产污系数的调查，以及不同水泥生产设备产生的颗粒物比例和除尘技术的应用份额及分级除尘效率，计算功能单元水泥产品的颗粒物分级排放量。
- chemical oxygen demand: 0.00012
  COD。SO2、NOx和COD排放量来自于近年中国水泥工业污染源普查统计结果。

## Use advice
使用此数据集时，用户应特别考虑大规模生产环境（>4000 吨-熟料/日），该环境代表了中国水泥行业的重要部分。数据集内的进一步细分应考虑到技术差异和不同水泥公司的结构。在专注于环境影响的生命周期评价研究中应用此数据至关重要，尤其是考虑到新型干法在行业内的显著市场份额。用户还应考虑将此数据与水泥使用的其他生命周期阶段整合，包括回收潜力和产品末期处理情景。

## Review details
清单： 内部审查通过几个迭代步骤完成，涉及原始数据验证、原始数据记录、代表性、完整性、与 ISO 14040 和 14044 有关的建模的一致性。

## Data sources
- 姜睿 & 王洪涛. (2010). 中国水泥工业的生命周期评价. 化学工程与装备, 4, 183–187.
