# Ethylene Production | Ethylene | Naphtha Route | Naphtha

Dataset: ILCD process, Unit process, black box
Geography: DL-LN-CN
Reference year: 2021
Classification: Materials production / Other mineralic materials
Functional unit: Define 1t of industrial grade ethylene product as a functional unit
LCI method principle: Attributional
LCI method approaches: Allocation - mass
Generated by: Yanan Ren, renyn15@tsinghua.org.cn
Review: Dependent internal review by Tiangong LCI Data Working Group
Amounts: no units in this file; such an amount is in the reference unit of its flow, which a separate flow dataset defines
copyright: false

## General comment
Hengli Petrochemical Chemical Ethylene Project, 1.5 million tons/year ethylene, steam cracking technology

## Geography
Dalian Changxing Island Petrochemical Park

## Time period
Not mentioned, replaced by the publication time of the document

## Technology and included processes
A typical steam cracking process is adopted in the model of naphtha route to ethylene. The upstream power source of the ethylene project is the power station of the refining project, which will meet the steam demand of the ethylene project by adjusting steam and power generation, and will not lead to an increase in pollution emissions. The scale of the ethylene plant is 1.5 million tons per year. Assuming that the annual operating time of the process plant is 8000 hours, the steam cracking process includes ethylene steam thermal cracking unit, dry gas recovery unit (abbreviated as ROG), spent alkali oxidation unit (referred to as WAO), pressure swing adsorption Hydrogen production (PSA for short) unit and ethylene cryogenic storage tank area.

## Reference product
- ethene (ethylene): 1000; measured
  乙烯

## Inputs
All rows: measured
- naphtha: 630
  石脑油
- C4 Hydrocarbon Mixture: 130
  混合C4
- Ethane: 170
  乙烷
- Methane: 150
  甲烷
- Propane: 40
  丙烷
- benzene: 330
  苯
- Cooling water: 290
  工艺冷凝水
- Water (fresh water): 2290
  新鲜水
- Water for industrial use: 1850
  生产用水
- process steam: 50
  高压蒸汽
- Water (desalinated; deionized): 0.8
  除盐水
- electricity mix: 2.808
  电

## Outputs
All rows: measured
- nitrous oxide: 0.48
  NOx
- Dust (unspecified, from stack): 0.06
  颗粒物
- carbon monoxide: 0.28
  CO
- sulfur dioxide: 0.06
  SO2
- volatile organic compound: 0.06
  VOCs
- carbon dioxide: 1.39
  CO2
- water vapour: 118.48
  蒸汽排污
- Water (groundwater from technosphere, waste water): 7.56
  锅炉废水
- Production residues (unspecified): 23.13
  焦油残渣
- Waste Alkaline Liquor: 46.27
  废碱液带水

## Deviations from the LCI method approaches
This study chooses quality assignment

## Data selection and combination
The data of naphtha route to ethylene comes from the research data of Hengli Petrochemical Company.

## Review details
Inventory: The internal review was done by several iteration steps concerning raw data validation, raw data documentation, representativity, completeness and consistency of modelling with regard to ISO 14040 and 14044.; Documentation: The review of the documentation was performed by Ecobilan and is in compliance with ISO 14040 and 14044. The data set documentation is correct in view of the appropriateness of the information provided. It includes all relevant information in view of data quality and scope of application of the respective LCI result.

## Data sources
- 赵悦如. 基于生命周期方法的乙烯生产环境影响分析. (大连理工大学, 2021).
