# 钢筋生产 ; 外露钢表面涂覆耐腐蚀材料进行防护 ; 整个风电场

Dataset: ILCD process, Unit process, single operation
Geography: SH-CN
Reference year: 2009
Classification: Materials production / Metals and semimetals
Functional unit: The functional unit is 1 kWh on-grid electricity provision.
LCI method principle: Attributional
LCI method approaches: Allocation
Generated by: 赵云志, ll10088@163.com
Owner: 天工LCI数据工作小组
Review: Dependent internal review by 天工LCI数据工作小组
Amounts: no units in this file; such an amount is in the reference unit of its flow, which a separate flow dataset defines
copyright: false
licenseType: Free of charge for all users and uses

## General comment
数据集中描述的耐腐蚀涂层钢筋专门用于东海大桥海上风电场（DBOWF）等海上风电场的建设和维护。它适用于结构组件暴露于海水并需要防腐蚀保护的海洋环境。这些钢筋对风电场内如风力涡轮、基础及支撑元件等结构的耐用性和寿命至关重要。

## Geography
所研究的风电场- -东海大桥海上风电场( DBOWF )是中国在上海管辖范围内的第一个海上风电场，也是欧洲以外的第一个海上风电场。工程分两期施工，分别位于东海大桥两侧(图1 )。

## Reference product
- steel rebar: 5.1e6; article inperiodical

## Inputs
- Energy, geothermal, converted: 1.04e7; software or database

## Outputs
- carbon dioxide: 999000; software or database
- particles (PM2.5): 200; software or database
- sulfur dioxide: 1600; software or database
- nitrous oxide: 1060; software or database

## Deviations from the LCI method approaches
本研究采用PLCA建模方法计算了中国某典型海上风电场的能源和环境排放。从摇篮到坟墓的过程包括材料和设备制造、运输和安装、操作和维护、拆解和回收4个阶段(图2 )。

## Data selection and combination
风机、基础和电缆的技术参数从DBOWF的设计文件中获得(表2)。能源和排放因子(即单位材料和构件生产的能源消耗和环境排放)来源于Ecoinvent 2.2数据集(生态发明中心, 2009)，优先参考中国实践的系数。对于关键材料和设备，其海上运输能量由运输负荷和海运能量强度计算得到。根据施工方案，对设施安装能耗和排放进行了估算。风电场的运行和维护数据，如维护的频率和工作时间，是通过与工程技术人员的现场调查获得的。与模型参数和输入数据相关的不确定性在本文的敏感性分析部分进行了说明。

## Use advice
使用此数据集的用户应根据中国海上风电场实践的具体环境，注意应用能源和排放因子，因为这些因子来源于 Ecoinvent 2.2 数据集，并优先考虑本地系数。必须全面考虑从摇篮到坟墓的生命周期阶段，并且在使用此数据进行比较评估或其他 LCA 研究时，应注意施工安装、维护实践和拆除方法论，因为它们对整体能源消耗和排放贡献显著。敏感性分析中详述的潜在不确定性应仔细评估，因为它们可能影响环境影响评估的结果。

## Review details
清单： 内部审查通过几个迭代步骤完成，涉及原始数据验证、原始数据记录、代表性、完整性、与 ISO 14040 和 14044 有关的建模的一致性。

## Data sources
- Yang, J. et al. The life-cycle energy and environmental emissions of a typical offshore wind farm in China. Journal of Cleaner Production 180, 316–324 (2018).
