# 修复后土壤;农田汞污染土壤修复;高温热解析

Dataset: ILCD process, Unit process, black box
Geography: GZ-CN
Reference year: 2016
Classification: Unit processes / Other Services / Repair and maintenance
Functional unit: The functional unit in this study is the treatment of 1 tonne of mercury contaminated top soil in agricultural land to meet regulatory standards. The average initial mercury concentration is 134 mg/kg.
Generated by: 杨欣桐, yangxt@caep.org.cn
Owner: 天工LCI数据工作小组
Review: Dependent internal review by 天工LCI数据工作小组
Amounts: no units in this file; such an amount is in the reference unit of its flow, which a separate flow dataset defines
copyright: false
licenseType: Free of charge for all users and uses

## General comment
根据实验室规模的可行性研究，可以通过在700°C下加热30分钟或在400°C下添加柠檬酸加热60分钟来修复受汞污染的土壤

## Geography
研究地点位于中国南方贵州省，为受汞污染的农田。这一特殊案例代表了农业用地被附近的采矿和冶炼作业污染的典型规模和情景。

## Technology and included processes
在HTD中，受污染的土壤被挖掘并堆放在现场。对土壤进行粉碎和筛选，以清除包括塑料、橡胶、岩石等在内的大碎片。然后将预筛选的土壤装入窑中。在700°C下加热30分钟以达到1.5 mg/kg的清理目标后，通过向土壤喷水来冷却土壤。冷却后，将土壤堆放在现场，然后运到附近的位置进行堆放（即非有益用途）。在热处理过程中，大气通过真空泵连续吸入窑中，蒸发的汞与废气一起进行。然后使用水冷系统并随后使用空气-空气热交换器来冷却排气。大多数汞化合物在两个分液罐中通过冷凝去除。然后，废气流经两个空气相、硫浸渍的活性炭容器，以满足中国新排放源12 mg/m3的空气排放阈值。冷凝水用金属清除剂、氢氧化钙和聚氯化铝凝结，污泥脱水。污泥被集装箱化并运输到永久储存设施进行长期汞处理。上清液由两个液相、硫浸渍的活性炭容器处理。在HTD中，由于高温加热显著增加了土壤pH值，降低了土壤有机质含量，并改变了土壤颜色，因此处理后的土壤被认为不适合现场再利用。因此，从附近地区的取土坑中进口表土，以覆盖挖掘的农业用地区域。

## Technical purpose
高温解吸（HTD）工艺用于修复受汞污染的农业土壤，尤其针对靠近采矿和冶炼作业的污染。由于PH值、有机物含量和土壤颜色的显著改变，得到的处理后土壤被认为不适合现场再利用。修复后的土壤可能用于景观填充、建筑活动或其他土壤品质被认为可接受的非农业用途。

## Reference product
- Remediated soil: 1000; missing unimportant

## Inputs
All rows: missing unimportant
- coal-based powdered activated carbon: 1.1
- Plastic (unspecified): 0.25
- Steel: 1.6
- Concrete: 0.02
- Metal scavengers: 1.78
- hydrated lime dry slaked: 1.78
- Tap Water: 0.1
- transport in t*km: 51
- Electricity: 853.2
- Waste (solid): 3.6
  Mercury sludge for permanent storage
- Waste (solid): 1.1
  PAC with mercury residual for landilling
- contaminated soil: 1000

## Use advice
在使用高温解吸土壤修复工业过程的数据集时，必须特别注意过程有效性的特定条件，尤其是温度制度和持续时间（700°C加热30分钟或400°C加入柠檬酸加热60分钟）。使用者也应考虑该过程的地理和操作范围，该研究在中国南方贵州省汞污染的农业用地进行，受到附近汞源的污染。这些数据不应泛化适用于所有类型的土壤污染，而主要适用于类似的汞污染情景。此外，还必须认识到治疗对土壤属性的影响，特别是在考虑潜在再利用应用时。预期输出（包括汞浓度降低到1.5 mg/kg的水平）必须考虑，以确保符合监管要求和环境安全。

## Review details
清单： 内部审查通过几个迭代步骤完成，涉及原始数据验证、原始数据记录、代表性、完整性、与 ISO 14040 和 14044 有关的建模的一致性。

## Data sources
- Hou D ,Gu Q ,Ma F , et al. Life cycle assessment comparison of thermal desorption and stabilization/solidification of mercury contaminated soil on agricultural land [J]. Journal of Cleaner Production, 2016, 139 949-956.
