# Municipal sludge treatment and disposal;wet sludge moisture content 65%;Co-incneration with bituminous coal for power generation

Dataset: ILCD process, Unit process, single operation
Geography: SZ-JS-CN
Classification: End-of-life treatment / Energy recycling
Functional unit: 1 t wet sludge with a moisture content of 65% was used as the functional unit.
Generated by: Jin Sitian, 2331276@tongji.edu.cn
Owner: Tiangong LCI Data Working Group
Review: Dependent internal review by Tiangong LCI Data Working Group
Amounts: no units in this file; such an amount is in the reference unit of its flow, which a separate flow dataset defines
licenseType: Free of charge for all users and uses

## General comment
This industrial process data represents the treatment and disposal of municipal sludge with a moisture content of 65% through co-incineration with bituminous coal for the purposes of power generation. It is tailored for the evaluation of environmental impacts related to a sludge co-combustion co-power generation facility located in Kunshan, Suzhou. This process is primarily applicable to energy recovery operations from waste management within the environmental services industry.

## Geography
A sludge co-combustion co-power generation company in Kunshan, Suzhou

## Reference product
- Sludge: 1000; input; estimated
  1 t moisture content 65% wet sludge

## Inputs
- Electricity: 113.328; measured
  Production upstream: coal mining and transportation process and sludge transportation and drying process.
- water: 747; measured
  (same comment as for Electricity)
- Diesel: 8.51; measured
  (same comment as for Electricity)
- hard coal; 26.3 MJ/kg: 4.14; measured
  (same comment as for Electricity)
- water: 5013; calculated
  production process
- hard coal; 26.3 MJ/kg: 446.7; calculated
  production process
- Diesel: 0.17; calculated
  Production downstream: mainly involves solid waste that can be used after incineration. Solid waste mainly includes boiler fly ash, bottom slag, desulfurization gypsum, etc. Among them, boiler bottom slag, desulfurization gypsum, etc. are sent to nearby building materials manufacturers for use as raw materials to achieve resource utilization.

## Outputs
- carbon dioxide: 37.48; measured
  (same comment as for Electricity)
- methane: 0.614; measured
  (same comment as for Electricity)
- nitrous oxide: 0.002; measured
  (same comment as for Electricity)
- Nitrogen oxides: 0.19; measured
  (same comment as for Electricity)
- sulfur dioxide: 0.095; measured
  (same comment as for Electricity)
- carbon monoxide: 0.14; measured
  (same comment as for Electricity)
- hydrocarbons (unspecified): 0.017; measured
  (same comment as for Electricity)
- particles (PM10): 0.019; measured
  (same comment as for Electricity)
- chemical oxygen demand: 13.93; measured
  (same comment as for Electricity)
- ammonia: 0.027; measured
  (same comment as for Electricity)
- Suspended solids, unspecified: 0.19; measured
  (same comment as for Electricity)
- nitrogen, total (excluding N2): 0.001; measured
  (same comment as for Electricity)
- phosphorus, total: 0.0008; measured
  (same comment as for Electricity)
- Waste (solid): 30.02; measured
  (same comment as for Electricity)
- carbon dioxide: 1492; calculated
  production process
- Nitrogen oxides: 0.52; calculated
  production process
- sulfur dioxide: 0.28; calculated
  production process
- carbon monoxide: 0.1; calculated
  production process
- particles (PM10): 0.052; calculated
  production process
- chemical oxygen demand: 0.01; article inperiodical
  production process
- ammonia: 0.0006; article inperiodical
  production process
- Suspended solids, unspecified: 0.005; article inperiodical
  production process
- nitrogen, total (excluding N2): 0.0009; article inperiodical
  production process
- phosphorus, total: 8e-5; article inperiodical
  production process
- Waste (solid): 238.3; calculated
  production process
- carbon dioxide: 0.61; calculated
  (same comment as for Diesel)
- methane: 6e-5; calculated
  (same comment as for Diesel)
- nitrous oxide: 4e-5; calculated
  (same comment as for Diesel)
- Nitrogen oxides: 0.002; calculated
  (same comment as for Diesel)
- sulfur dioxide: 0.0008; calculated
  (same comment as for Diesel)
- carbon monoxide: 0.002; calculated
  (same comment as for Diesel)
- hydrocarbons (unspecified): 0.0002; calculated
  (same comment as for Diesel)
- particles (PM10): 0.0003; calculated
  Downstream production: mainly involves solid waste that can be utilized after incineration. Solid waste mainly includes boiler fly ash, bottom slag, desulfurization gypsum, etc. Among them, boiler bottom slag, desulfurization gypsum, etc. are sent to nearby building materials manufacturers for use as raw materials to achieve resource utilization.

## Use advice
Users who apply this dataset for Life Cycle Assessment should carefully consider the specific technological and geographical context of the process, ensuring that methodological assumptions such as system boundaries and allocation methods are consistent with their study's goals. Users should account for regional differences that may affect emissions and resource consumption. Additionally, users must adjust for any discrepancies between the functional unit of this process (1 tonne of 65% moisture content wet sludge) and their study's functional units. Attention should be paid to the potential emissions associated with co-incineration and the relative proportion of sludge to coal used in the process.

## Review details
Inventory: The internal review was done by several iteration steps concerning raw data validation, raw data documentation, representativity, completeness and consistency of modelling with regard to ISO 14040 and 14044.

## Data sources
- 周钢,宋涛,马士伟等.不同污泥混燃发电工艺生命周期评价[J].洁净煤技术,2022,28(11):19-29.DOI:10.13226/j.issn.1006-6772.RE22042401.
