# North China (Gaomi) Wheat Production | Agricultural Cultivation

Dataset: ILCD process, Unit process, single operation
Geography: WF-SD-CN
Reference year: 2016
Valid until: 2017
Classification: Materials production / Other mineralic materials
Functional unit: 1t
LCI method principle: Attributional
LCI method approaches: Consequential
Generated by: Haoran Zhang, hrzhang@whu.edu.cn
Review: Dependent internal review by Tiangong LCI Data Working Group
Amounts: no units in this file; such an amount is in the reference unit of its flow, which a separate flow dataset defines
copyright: false

## Geography
high density

## Reference product
- wheat: 7564.02

## Inputs
All rows: measured
- nitrogen: 316.49
- phosphorus: 162.07
- potassium: 161.55
- Bactericide: 0.67
- Rice Seeds: 1.99
- Insecticide: 2.77
- Diesel: 210.47
- Electricity: 2875.93

## Deviations from the LCI method approaches
The accounting system boundary includes: greenhouse gas emissions from agricultural input (such as seeds, pesticides, fertilizers, etc.); greenhouse gas emissions from the use of agricultural machinery during operations (tilling, sowing, harvesting, and grain transportation); greenhouse gas emissions from N2O during fertilizer application; greenhouse gas emissions from irrigation energy consumption, etc.

## Data selection and combination
Because this study is based on survey data, it is impossible to obtain the baseline condition of soil carbon from the farmers. Due to different management methods of different farmers, the baseline condition of their soil carbon is different, so the change in soil carbon has not been accounted for. The functional unit chosen in this study is the carbon footprint per unit area and per unit yield.

## Data treatment and extrapolations
Greenhouse gas emission accounting uses the methodology recommended in the '2006 IPCC National Greenhouse Gas Inventory Guidelines' and follows the international standard 'ISO/DIS 14067'.

## Sampling procedure
The questionnaire includes inputs and outputs during the grain production process: (1) grain yield; (2) agricultural input such as seeds, fertilizers, herbicides, fungicides, and insecticides; (3) energy consumption of agricultural machinery, including fuel consumption for processes like sowing, ploughing, and grain transportation; (4) irrigation energy consumption.

## Review details
Inventory: The internal review was done by several iteration steps concerning raw data validation, raw data documentation, representativity, completeness and consistency of modelling with regard to ISO 14040 and 14044.; Documentation: The review of the documentation was performed by Ecobilan and is in compliance with ISO 14040 and 14044. The data set documentation is correct in view of the appropriateness of the information provided. It includes all relevant information in view of data quality and scope of application of the respective LCI result.

## Data sources
- 朱永昶,李玉娥,姜德锋等.基于生命周期评估的冬小麦-夏玉米种植系统碳足迹核算——以山东省高密地区为例[J].农业资源与环境学报,2017,34(05):473-482.
