# Vegetable Production ; Transportation (Conventional)

Dataset: ILCD process, Unit process, single operation
Geography: HD-HEB-CN
Reference year: 2002
Valid until: 2017
Classification: Materials production / Food and renewable raw materials
Functional unit: 1T eggplant
Generated by: Haoran Zhang, hrzhang@whu.edu.cn
Owner: Tiangong LCI Data Working Group
Review: Dependent internal review by Tiangong LCI Data Working Group
Amounts: no units in this file; such an amount is in the reference unit of its flow, which a separate flow dataset defines
copyright: false
licenseType: Free of charge for all users and uses

## General comment
The greenhouses in Quzhou, used for the vegetable production process, facilitate the cultivation of various vegetables with a focus on eggplants, employing a crop rotation system that provides two harvests per year. This process is applicable to providing fresh produce for local markets, assesses the most ecologically sustainable cultivation methods (conventional, integrated, and organic), and forms part of a supply chain that includes transportation of the produce. The data may relate to the supply chains for food processing companies or retailers looking to understand and improve the sustainability of their products.

## Geography
Quzhou

## Time period
The long-term positioning experiment for greenhouse vegetables started in March 2002.

## Technology and included processes
The experiment used a 60 m long and 7 m wide arched greenhouse for the cultivation of various vegetables in rotation (two crops per year). The study focused on the growth of eggplants from March to August each year, conducting a 4-year experiment from 2013 to 2016. Three treatments were applied: conventional, integrated, and organic.

## Reference product
- eggplant: 1000; calculated
  conventional

## Inputs
- Electricity: 133.4; calculated
  conventional

## Outputs
All rows: calculated
- Hydrocarbons, aliphatic, alkanes, unspecified: 0.0007
  conventional
- carbon monoxide: 0.056
  conventional
- carbon dioxide (fossil): 82.67
  conventional
- nitrous oxide: 0.0005
  conventional
- Nitrogen oxides: 0.1236
  conventional
- sulfide: 0.1016
  conventional
- methane: 0.0007
  conventional

## Deviations from the LCI method approaches
Life cycle assessment includes the following 4 steps: goal definition and scope delineation, inventory analysis, impact assessment, and result interpretation. Brief descriptions of the main steps are given below.

## Data selection and combination
The inventory analysis includes the collection of data and quantitative processing of the data. In the agricultural input production subsystem, the pollutants produced by fertilizers, organic fertilizers, insecticides, mulching films, and diesel, etc., (including CO, CO2, NOx, SO2, CH4, N2O, and COD, etc.) and energy consumption are calculated referring to the research results of Liang Long [22].

## Data treatment and extrapolations
Nitrous oxide collection uses the static chamber method [19], and the measurement is conducted using the Agilent 7890A gas chromatograph. Soil nitrate nitrogen (NO3-N) and total phosphorus leaching are collected using a free-flow underground leaching collection device in agricultural fields, and after each irrigation, leachate is extracted using a pump within 3 to 5 days, and measured with a flow analyzer (TRAACS2000). The extraction of heavy metals (mainly considering Cu, Zn, Pb, and Cd) in organic fertilizers uses the nitric acid-hydrochloric acid-hydrofluoric acid digestion method, and the test liquid is measured by ICP-MS. When the crops are harvested, each harvest is weighed and recorded, taking the average of three times. Detailed measurement processes for each indicator are referenced in the literature [19].

## Use advice
When utilizing this data set, users should take into consideration that the Life Cycle Assessment covers the period from cradle to farm gate and does not encompass infrastructure construction, agricultural machinery production, vegetable consumption, or waste emissions. Due consideration should be given to the local relevance of the data and the time-specific nature of the agricultural practices detailed, from 2013 to 2016. Users should reference the research results of Liang Long [22] for the underlying emissions and energy consumption calculations, and also consider the methodologies outlined, such as the static chamber method and ICP-MS measurements, to ensure consistency in data interpretation.

## Review details
Inventory: The internal review was done by several iteration steps concerning raw data validation, raw data documentation, representativity, completeness and consistency of modelling with regard to ISO 14040 and 14044.

## Data sources
- 徐强,胡克林,李季等.华北平原不同生产模式设施蔬菜生命周期环境影响评价[J].环境科学,2018,39(05):2480-2488.
