# High Ice Nickel Production | Nickel-Copper Mixed Concentrates | Pyrometallurgy | Nickel-Copper-Cobalt Ore in Xinjiang Province

Dataset: ILCD process, Unit process, single operation
Geography: GS-CN
Reference year: 2018
Classification: Materials production / Other mineralic materials
Generated by: Sun Xin, x.i.n.s@foxmail.com
Review: Dependent internal review by Tiangong LCI Data Working Group
Amounts: no units in this file; such an amount is in the reference unit of its flow, which a separate flow dataset defines

## Reference product
- Nickel matte: 1000

## Inputs
- Nickel concentrate (8.6% Ni): 11794
- water: 30410
- sand: 1370
- Heavy fuel oil (1.0 wt.% S): 20
- oxygen: 1060
- sodium hydroxide: 0.74
- Calcium Oxide: 25.71
- Aluminum oxide (alumina): 0.03
- Sodium sulfide: 9.46
- transport in t*km: 16.67
- Electricity: 1980.5
- Diesel: 13.53
- process steam: 170
- Refractory material: 13.42
- Cathode Material: 13.42
- Polyacrylamide: 1.41

## Outputs
- particles (PM2.5 - PM10): 0.12
- sulfur dioxide: 0.51
- nitrous oxide: 2.26
- hydrogen sulfide: 0.00113
- sulphuric acid: 0.00038
- nickel: 7.5e-6, 0.00475 (2 entries)
- cadmium: 1.75e-11, 7e-5 (2 entries)
- lead: 8.3e-7, 0.00137 (2 entries)
- arsenic: 7.64e-9, 0.00604 (2 entries)
- mercury: 3.74e-10, 0.00012 (2 entries)
- cobalt: 0.00024
- chromium: 0.00058
- copper: 0.00094
- zinc: 0.07604
- waste water - untreated: 3740
- municipal solid waste deposition: 100
- Hazardous waste (unspec.): 9.37

## Review details
Inventory: The internal review was done by several iteration steps concerning raw data validation, raw data documentation, representativity, completeness and consistency of modelling with regard to ISO 14040 and 14044.; Documentation: The review of the documentation was performed by Ecobilan and is in compliance with ISO 14040 and 14044. The data set documentation is correct in view of the appropriateness of the information provided. It includes all relevant information in view of data quality and scope of application of the respective LCI result.

## Data sources
- Bai, Y. et al. Strategies for improving the environmental performance of nickel production in China: Insight into a life cycle assessment. Journal of Environmental Management 312, 114949 (2022).
