# 铝锭铸造 ; 原生铝锭 ; 华北电网 ; 液态原铝

Dataset: ILCD process, Partly terminated system
Geography: CN
Reference year: 2011
Classification: Unit processes / Materials production / Metals and semimetals
Generated by: 谢金良, jinliang.research@gmail.com
Owner: 天工LCI数据工作小组
Review: Dependent internal review by 天工LCI数据工作小组
Amounts: no units in this file; such an amount is in the reference unit of its flow, which a separate flow dataset defines
copyright: false
licenseType: Free of charge for all users and uses

## General comment
结合不同工艺的电解铝产量分布比例所计算出的国内电解铝生产过程CO2排放因子的加权平均值。从氧化铝到铝锭。

## Geography
南方电网

## Time period
论文发表年

## Technical purpose
此处描述的原生铝锭铸造工艺专用于华北电网地区使用液态原铝生产原生铝锭。此工业过程是创建铝锭的核心部分，铝锭作为多种下游铝产品的原材料。所生产的铝锭适用于需要高纯度铝的应用，诸如航空航天、汽车、包装、建筑和电子行业。

## Reference product
- aluminium, primary, ingot: 1000; measured

## Outputs
- carbon dioxide (fossil),carbon dioxide (fossil): 1284.4; measured

## Data selection and combination
在对全国 氧化铝、电解铝企业生产情况进行充分梳理的基础 上，按照覆盖所有代表性工艺、代表性产能原则，并充 分考虑产能分布、企业性质等因素，重点选择了河南、 山东、广西等典型地区的典型原铝冶炼企业，开展深入实地调研，并形成以 2011 年数据为主体的氧化铝、电解铝碳排放因子数据库。氧化铝生产数据库包括原 辅料消耗及废弃物产生、工艺技术与设备、工序物料 能源消耗、自备热电厂二次能源生产等 4 个子库。详见文献来源表1。

## Use advice
在使用铝锭铸造过程的生命周期评估数据时，必须考虑根据不同工艺电解铝产量分布比例计算出的CO2排放因子加权平均值。此环境反映了中国氧化铝和原生铝企业在2011年基年的全面概况。用户应参考所引文献中的表1，了解原材料和辅材消耗、废物生成、工艺技术与设备、物料过程能源消耗以及自备热电厂的二次能源生产的具体细节。电解铝生产过程的碳核算范围包括碳阳极消耗、PFCs排放以及外购电力生产过程。

## Review details
清单： 内部审查通过几个迭代步骤完成，涉及原始数据验证、原始数据记录、代表性、完整性、与 ISO 14040 和 14044 有关的建模的一致性。

## Data sources
- 张文娟，李会泉，陈波，李强，韩永鹏 & 孙振华. 我国原铝冶炼行业温室气体排放模型. 环境科学研究 vol. 26 1132–1138 (2013).
