# 种植｜农作物｜无工艺流程参数

Dataset: ILCD process, Unit process, single operation
Geography: CN
Reference year: 2020
Classification: Unit processes / Materials production / Agricultural production means
Functional unit: Taking the production of 10,000KWh of electric energy as the functional unit (consumption of straw is 1.4kg/kwh)
LCI method principle: Consequential
Generated by: 刘超硕, liucs22@mails.jlu.edu.cn
Owner: 天工LCI数据工作小组
Review: Dependent internal review by 天工LCI数据工作小组
Amounts: no units in this file; such an amount is in the reference unit of its flow, which a separate flow dataset defines
copyright: false
licenseType: Free of charge for all users and uses

## General comment
本研究系统边界包含了作物种植过程、秸秆收集过程、运输过程和燃烧发电过程。此为作物种植过程。

## Technical purpose
作物种植过程旨在生产生物质能源，具体为秸秆，该秸秆用于燃烧发电。该过程的目标是生产将被用于燃烧以产生电能的秸秆，以此为能源行业做出贡献。

## Reference product
- Crop straw: 14000; measured

## Outputs
All rows: measured
- carbon dioxide (fossil): 1527.48
  原文未区分排放源为生物源或化石源，根据专家判断此处为化石源。
- carbon monoxide,carbon monoxide (fossil): 0.83358
  原文未区分排放源为生物源或化石源，根据专家判断此处为化石源。
- nitrous oxide: 1.8243, 0.02592 (2 entries)
- sulfur dioxide: 1.57374
- particles (> PM10),particles (> PM10): 0.16596
- methane (fossil): 3.35016
  原文未区分排放源为生物源或化石源，根据专家判断此处为化石源。

## Use advice
使用此数据时，请确保它与作为功能单元的10000KWh电能生产相符。秸秆消耗量应以每千瓦时1.4公斤计算。用户必须将导致燃烧发电的作物种植、秸秆收集和运输过程包括在其生命周期评估的系统边界中。LCA实践者必须相应地建模使用阶段，并包括运输和燃烧排放等因素的考虑。

## Review details
清单： 内部审查通过几个迭代步骤完成，涉及原始数据验证、原始数据记录、代表性、完整性、与 ISO 14040 和 14044 有关的建模的一致性。

## Data sources
- Wang, Z. et al. Sustainability assessment of straw direct combustion power generation in China: From the environmental and economic perspectives of straw substitute to coal. Journal of Cleaner Production 273, 122890 (2020).
