# 修复后土壤;土壤修复;原位热处理;原位热脱附

Dataset: ILCD process, Unit process, black box
Geography: DK
Reference year: 2013
Classification: Unit processes / Other Services / Repair and maintenance
Functional unit: Results are presented per unit volume (1 m3 ) of soil remediated in order to compare results for each site.
Generated by: 杨欣桐, yangxt@caep.org.cn
Owner: 天工LCI数据工作小组
Review: Dependent internal review by 天工LCI数据工作小组
Amounts: no units in this file; such an amount is in the reference unit of its flow, which a separate flow dataset defines
copyright: false
licenseType: Free of charge for all users and uses

## General comment
从数据来源文献 表1（作为数据收集基础的试验场地概述）中可以看出,所修复的小型场地的面积和方量分别为180 m2和1175 m3。污染物的质量为400千克PCE。

## Geography
LCA的数据收集是针对一个较小（180 m2）的场地进行的，该场地代表了使用ISTD进行修复的典型丹麦场地。

## Technology and included processes
ISTD适用于低渗透性地层，安装多个井来加热土壤，ISTD使用放置在加热井中的专用加热器修复原理为将土壤加热到100°C左右，以增强PCE的挥发，使用真空在地表以下对热蒸汽进行提取，活性炭空气过滤装置安装在地表以上，冷凝水在单独的活性炭水过滤装置中处理。在加热区上方安装一个40 cm混凝土盖，以防止雨水侵入，并形成不透气的密封表面，减少对大气的热损失

## Technical purpose
本工业过程描述了使用原位热脱附（ISTD）技术进行土壤修复的应用。这一过程特别设计用于低渗透性土壤层被四氯乙烯（PCE）等氯化溶剂污染的场地的治理。它用于修复小型场地，如提及的典型丹麦场地，面积为180平方米，体积为1175立方米。该过程包括将土壤加热至约100°C以增强污染物的挥发性，随后通过真空抽取蒸气，并通过活性炭过滤单元对空气和水污染物进行处理。当精确性和控制在城市地区或敏感环境中至关重要时，这种修复技术是适用的。

## Reference product
- Remediated soil: 1175; estimated

## Inputs
All rows: estimated
- Road Transport,Road Transport: 1.3035e7
  Travel by car （personkm）
- transport in t*km: 56, 5760, 1234, 4476 (4 entries)
- Road Transport,Road Transport: 90000, 4.5e6 (2 entries)
- Electricity: 2.7576e6
- Diesel,Diesel: 4.619
- sand: 3872
- Mortar: 1633
- Concrete: 41600
- Activated Carbon: 2646, 405 (2 entries)
- Carbon Steel: 10530
- Stainless Steel: 1508, 178 (2 entries)
- nickel: 22
- Copper and copper alloys: 312
- Fiber glass: 45
- Polyethylene,Polyethylene: 782
- contaminated soil: 1175

## Use advice
在使用ISTD过程的LCA数据集时，重要的是要考虑被污染地点的具体情况，如土壤特性、污染物种类和浓度。LCA数据适用于典型的丹麦小型土壤修复项目场地，用户应将该基线适配到项目的实际情况。用户还应注意数据收集的方法，并确保其分析模型包括井场的建立和建设、井盖、空气和水处理系统、电力消耗和物流。如果将结果应用到更大或不同的场地，可能需要进行比例缩放或调整，以反映能源和材料投入的差异，以及设备运作和运输活动。

## Review details
清单： 内部审查通过几个迭代步骤完成，涉及原始数据验证、原始数据记录、代表性、完整性、与 ISO 14040 和 14044 有关的建模的一致性。

## Data sources
- Lemming G ,Nielsen G S ,Weber K , et al. Optimizing the Environmental Performance of In Situ Thermal Remediation Technologies Using Life Cycle Assessment [J]. Groundwater Monitoring & Remediation, 2013, 33 (3): 38-51.
