# 土壤修复;异位修复;土壤淋洗;案例1;运行;得到修复的土壤

Dataset: ILCD process, Unit process, single operation
Geography: BJ-CN
Reference year: 2017
Classification: Unit processes / Other Services / Repair and maintenance
Generated by: 王宁, wang_ning@caep.org.cn
Owner: 天工LCI数据工作小组
Review: Dependent internal review by 天工LCI数据工作小组
Amounts: no units in this file; such an amount is in the reference unit of its flow, which a separate flow dataset defines
copyright: false
licenseType: Free of charge for all users and uses

## General comment
将挖掘出的污染土投入淋洗设备，同时使用化学药剂配置化学药剂进行淋洗

## Technology and included processes
挖掘出污染无土壤方量为350000m3，淋洗设备功耗为714 kw/ h，每天运行23h，共运行278d，同时消耗了大量药剂

## Technical purpose
该数据集描述的土壤修复工艺用于异位（场外）土壤淋洗，适用于环境工程中处理大量受污染土壤。此案例研究涉及挖掘土壤并进行化学处理以去除污染物和实现土壤修复的操作场景。

## Reference product
- Remediated soil: 350000; measured

## Inputs
All rows: measured
- Excavated soil,Excavated soil: 350000
- Electricity: 1.64351e7
- Activated Carbon: 25298
- Tap Water: 4539.74
- Sulfuric acid: 536.54
- sodium hydroxide: 22.24
- Sodium sulfide: 80.62

## Use advice
在使用该数据集进行生命周期评估时，需考虑操作规模以及能源和化学品的具体消耗量。该数据集代表土壤修复的单元过程，提供了处理的土壤总量、淋洗设备能耗和药剂使用量。用户在将此数据应用于其他案例时，需要考虑类似的操作条件，例如土壤体积和处理过程的持续时间。确保在技术层面上，其他应用中的土壤处理过程可以等同于此案例。在方法论上，重要的是要处理系统边界考虑，特别是关于化学产品生产的上游影响和处理土壤的下游效应。

## Review details
清单： 内部审查通过几个迭代步骤完成，涉及原始数据验证、原始数据记录、代表性、完整性、与 ISO 14040 和 14044 有关的建模的一致性。

## Data sources
- Song, Y. et al. Environmental and socio-economic sustainability appraisal of contaminated land remediation strategies: A case study at a mega-site in China. Science of The Total Environment 610–611, 391–401 (2018).
