# 铝电解 ; 液态原铝 ; 预焙 ; 冶金用氧化铝

Dataset: ILCD process, Unit process, single operation
Geography: TC-SAX-CN
Reference year: 2010
Classification: Unit processes / Materials production / Metals and semimetals
Generated by: 谢金良, jinliang.research@gmail.com
Owner: 天工LCI数据工作小组
Review: Dependent internal review by 天工LCI数据工作小组
Amounts: no units in this file; such an amount is in the reference unit of its flow, which a separate flow dataset defines
copyright: false
licenseType: Free of charge for all users and uses

## General comment
通常，铝电解是通过霍尔-埃鲁过程在电解槽中进行的，这一过程涉及在高温下通过电解熔融铝土矿（氧化铝）来制造金属铝。Life cycle inventory data in operation processes (including energy and raw material consumption) undertaken in Tongchuanxinguang aluminum production site of Tongchuan City in China were mainly collected from reference. Also, coal based electricity generation was used in this study. In addition, in case that China data were not available, data and relevant background data from European were used, including data on infrastructure, anode, and chemicals production. The life time of building and equipment considered in this study is 40 and 8 years, respectively.

## Technical purpose
该数据集描述了通过霍尔-埃鲁过程生产初级铝，该过程涉及电解熔融铝土矿（氧化铝）以制造金属铝。通过预焙电解槽获得的液态原铝，用于冶金。因此，它适用于需要高等级铝材的行业，包括航空、汽车、建筑和电子行业，在这些行业中铝的纯度和出色的特性至关重要。

## Reference product
- aluminium, primary, liquid: 1000; measured
  原文并未明确给出（原文中仅为aluminum），根据所引用文献以及铝工业常见工艺得出

## Inputs
- electricity, high voltage, aluminium industry: 47952; measured
- aluminium fluoride: 27; measured
- anode, prebake, for aluminium electrolysis: 435; software or database
  Ecoinvent data v2.0 Final Reports Ecoinvent 2000 No.1-15, Swiss Centre for Life Cycle Inventories, Dubendorf, CH (2007) www.ecoinvent.ch
- cryolite: 5; measured
- Water, unspecified natural origin: 7; measured
  water
- aluminium oxide, metallurgical: 1930; measured
- buildings, unspecified: 0.134; measured
  buildings
- aluminium electrolysis facility: 3690.75; measured
  Units of currency 2000

## Outputs
All rows: measured
- Solid Waste: 14.5
  solid waste
- hydrogen fluoride: 3.6
- particles, unspecified: 7.6
- wastewater, average: 4.91
- carbon dioxide (fossil),carbon dioxide (fossil): 1000
- carbon monoxide (fossil),carbon monoxide (fossil): 200

## Use advice
该数据集的用户应考虑初级铝的技术适用性，确保材料的属性满足所需标准。数据包括应考虑本研究中使用的基于煤炭的电力生成所关联的能耗和排放。在中国以外应用此数据时，用户应考虑铝生产过程及相关环境影响的地区差异。基础设施、阳极和化学品生产数据应进行审查，并在必要时调整至当地条件。建筑和设备的使用寿命分别为40年和8年，应将此信息通知用户的生命周期模型中的折旧及更换计划。

## Review details
清单： 内部审查通过几个迭代步骤完成，涉及原始数据验证、原始数据记录、代表性、完整性、与 ISO 14040 和 14044 有关的建模的一致性。

## Data sources
- Min, H. J., Z, I. Z. & Lan, H. J. Environmental and Economic Assessment of Pre-Training Electrolytic Aluminum Production - A Case Study of China. Advanced Materials Research 146–147, (2010).
