# 砖生产;非烧结砖;压制工艺

Dataset: ILCD process, Unit process, single operation
Geography: MY-SC-CN
Reference year: 2020
Classification: Unit processes / Materials production / Other mineralic materials
Functional unit: 1t WDC were chosen as the functional unit
Generated by: 王湘锦, r99rt4@163.com
Owner: 天工LCI数据工作小组
Review: Dependent internal review by 天工LCI数据工作小组
Amounts: no units in this file; such an amount is in the reference unit of its flow, which a separate flow dataset defines
copyright: false
licenseType: Free of charge for all users and uses

## General comment
以人造沙、水泥以及水基钻屑为原材料

## Technology and included processes
包括在 WDC 粉碎预处理后加入适量骨料（即人造砂），制备免烧砖。整个生产过程包括搅拌（时间为 2 分钟）、压制（压力为 3 兆帕；尺寸为 240 × 115 × 53 毫米）和维护步骤

## Technical purpose
采用压制工艺生产的非烧结砖主要用于建筑行业。这些砖块采用人造砂作为WDC粉碎预处理后的骨料，适用于各种建筑应用，包括传统使用烧结砖的墙体和铺路工程。

## Reference product
- brickbat aggregate: 4152; input; measured

## Inputs
- freshwater: 500; measured
- Electricity: 234; measured

## Outputs
- green brick: 4402; measured
  砖坯

## Deviations from the LCI method approaches
作为生命周期评估的一部分，亿科环境技术有限公司开发的 eFootprint 在线分析平台用于对整个生命周期过程进行定量分析。

## Data selection and combination
有关原材料、能源投入和污染物排放数据的信息来自绵阳建材制造有限公司。

## Sampling procedure
此外，选择 1t WDC 作为功能单位，并按照功能单位计算所有原材料、辅助材料、能耗、运输和直接排放的输入参数。

## Use advice
在使用此数据集进行生命周期评估时，请注意，已将1吨WDC确定为功能单元。所有输入参数，包括原材料、辅助材料、能源消耗、运输和直接排放，都应对应于该功能单元进行计算。数据基于绵阳建材制造有限公司提供的清单，必须考虑其区域特性。已采用截断规则，因此重量不到最终产品1%的低价值材料如粉煤灰可以从清单中排除。始终确保使用此数据集与方法学建议一致，并且适用于研究的技术背景。

## Review details
清单： 内部审查通过几个迭代步骤完成，涉及原始数据验证、原始数据记录、代表性、完整性、与 ISO 14040 和 14044 有关的建模的一致性。

## Data sources
- Liu, W. et al. Comparative life cycle assessment of cement, sintered bricks and non-sintered bricks manufacturing using water-based drilling cuttings from shale gas production in the Sichuan Basin, China. J. Environ. Manage. 314, 115135 (2022).
