# 稀土氧化物开采;稀土氧化物;稀土氧化物加工;白云鄂博

Dataset: ILCD process, Unit process, single operation
Geography: NMG-CN
Reference year: 2014
Classification: Unit processes / Materials production / Non-energetic raw materials
Functional unit: The scope of the LCA is cradle-to-gate and the functional unit was chosen as 1 kg of REO.
LCI method principle: Attributional
LCI method approaches: Allocation - market value; Allocation - exergetic content
Generated by: 汪涛, twang@iue.ac.cn
Owner: 天工LCI数据工作小组
Review: Dependent internal review by 天工LCI数据工作小组
Amounts: no units in this file; such an amount is in the reference unit of its flow, which a separate flow dataset defines
copyright: false
licenseType: Free of charge for all users and uses

## General comment
白云鄂博矿产的稀土氧化物（REO）主要用于生产风力涡轮机和电动汽车的磁铁、电子和照明的荧光粉、车辆排放控制系统的催化剂等高价值技术产品。它们在电子行业、军事应用、以及可再生能源和电动交通等绿色技术领域的先进材料中起着关键作用。

## Geography
Bayan Obo (China)

## Technology and included processes
REO 生产的工艺链包括采矿，然后是选矿、煅烧、提取和焙烧阶段，见图 2。REO 生产的第一步是采矿，其中原矿石被爆破并运输以进一步精炼。从白云鄂博矿开采的原矿石由独居石和氟碳铈矿组成。

## Reference product
- particles (PM10): 0.15; measured

## Inputs
All rows: measured
- blasting: 76.336
  Blasting (crude ore)
- Electricity: 0.329
  crushing
- Electricity: 6.749
  Grinding
- Electricity: 0.001
  Conveying
- Electricity: 0.08
  Flotation
- Electricity: 0.053
  Dewatering
- Drilling sludge: 0.533

## Deviations from the LCI method approaches
Life cycle data was obtained from the Ecoinvent database, and mass-based-allocation was performed to partition the environmental impacts among crude ore and REO, as well as allocate the environmental impact among light, medium, heavy, and neodymium REOs. Two alternative allocations schemes, (I) market-based and (II) exegetic-based allocation, were considered as a means to partition the environmental impacts among REOs. The results for market- as well as exergetic-based allocation are provided in the Supporting Information. It is important to note that allocation based on market-value is the preferred method of the metals industry.23 When possible, Chinese-specificlifecycledatawas considered in the analysis; otherwise, European life cycle inventory (LCI) databases were used. The LCA results for REO production presented in this study provide a conservative benchmark for the environmental profile of REE. Furthermore, the LCI and LCA results can be extended/applied to evaluate the production of individual REE and REE-based technologies and products.

## Use advice
LCA 数据的用户应使用市场价值为基础的分配方法，以评估REO生产的环境影响。该数据集专为中国中心的评估而设计；然而，在本地数据不可用的情况下，可使用欧洲的LCI数据集替代。用户应注意，LCA范围是从摇篮到大门，功能单位为1公斤REO。结果应作为对稀土元素（REE）生产环境概况的保守估计，并可推广应用于评估单独的REE及基于REE的技术和产品的环境影响。

## Review details
清单： 内部审查通过几个迭代步骤完成，涉及原始数据验证、原始数据记录、代表性、完整性、与 ISO 14040 和 14044 有关的建模的一致性。

## Data sources
- Zaimes, G. G., Hubler, B. J., Wang, S. & Khanna, V. Environmental Life Cycle Perspective on Rare Earth Oxide Production. ACS Sustainable Chem. Eng. 3, 237–244 (2015).
