# coal washing| Separation of coal, gangue and clean coal washing

Dataset: ILCD process, Unit process, black box
Geography: SQ-HEN-CN
Reference year: 2015
Classification: Materials production / Other mineralic materials
Generated by: Linlin Yin, yinlinlin0623@163.com
Review: Dependent internal review by Tiangong LCI Data Working Group
Amounts: no units in this file; such an amount is in the reference unit of its flow, which a separate flow dataset defines

## Geography
The resource reserves and storage-production ratio of Yongcheng mining area have higher advantages than other mining areas in the province. At present, there are five exploration coal mining areas and two coal prospecting prediction areas. The occurrence of coal seams in Yongcheng mining area is relatively stable, and the mining technical conditions are relatively simple. The dip angle of the minable coal seam is relatively flat, which is suitable for mechanized mining.

## Technology and included processes
Coal washing process includes raw coal preparation, raw coal separation, drying after washing, dehydration and slime water treatment.

## Inputs
- Diesel: 25830; uniform; article inperiodical
  2013年新桥煤矿洗煤厂煤炭洗选过程中“柴油”消耗活动水平数据。
- Gasoline (regular): 28190; uniform; article inperiodical
  2013年新桥煤矿洗煤厂煤炭洗选过程中“汽油”消耗活动水平数据。
- Electricity: 7.24872e7; uniform; article inperiodical
  2013年新桥煤矿洗煤厂煤炭洗选过程中“电”消耗活动水平数据。
- water: 573215; uniform; article inperiodical
  2013年新桥煤矿洗煤厂煤炭洗选过程中“水”消耗活动水平数据。

## Review details
Inventory: The internal review was done by several iteration steps concerning raw data validation, raw data documentation, representativity, completeness and consistency of modelling with regard to ISO 14040 and 14044.; Documentation: The review of the documentation was performed by Ecobilan and is in compliance with ISO 14040 and 14044. The data set documentation is correct in view of the appropriateness of the information provided. It includes all relevant information in view of data quality and scope of application of the respective LCI result.
