# Groundwater remediation;In-situ;Permeable Reactive Barriers; Funnel construction

Dataset: ILCD process, Unit process, single operation
Geography: US
Reference year: 2011
Classification: Other Services / Repair and maintenance
Generated by: Zhang Jianbin, zhangjb@caep.org.cn
Owner: Tiangong LCI Data Working Group
Review: Dependent internal review by Tiangong LCI Data Working Group
Amounts: no units in this file; such an amount is in the reference unit of its flow, which a separate flow dataset defines
copyright: false
licenseType: Free of charge for all users and uses

## General comment
Installing sheet piles

## Geography
in Dover Air Force Base.

## Technology and included processes
A 36.6 m length of funnel

## Technical purpose
This dataset describes an in-situ groundwater remediation process involving the construction of a permeable reactive barrier (PRB) with a funnel shape created by installing sheet piles. This environmental engineering process is specifically applied at locations like the Dover Air Force Base to contain and treat contaminated groundwater or prevent the spread of contaminants.

## Reference product
- Impermeable funnel: 1; measured

## Inputs
- Steel sections: 47800; measured
- cement: 10300; measured
- Primary energy: 241000; measured

## Use advice
Users of this dataset should consider the specific geological and hydrogeological conditions of the site when applying the data to other locations. The effectiveness and design parameters of the PRB can vary greatly depending on the local contamination profiles. Additionally, users should take into account the life cycle of the barrier, maintenance requirements, and potential environmental impacts associated with the construction and operation of the sheet piles.

## Review details
Inventory: The internal review was done by several iteration steps concerning raw data validation, raw data documentation, representativity, completeness and consistency of modelling with regard to ISO 14040 and 14044.

## Data sources
- Mark S. H. Mak and Irene M. C. Lo.Environmental Life Cycle Assessment of Permeable Reactive Barriers: Effects of Construction Methods, Reactive Materials and Groundwater Constituents[J].Environmental Science & Technology 2011, 45, 23, 10148-10154
