# SoG-Si manufacturing

Dataset: ILCD process, Unit process, single operation
Geography: CN
Reference year: 2016
Classification: Materials production / Other mineralic materials
Functional unit: Grid-connected electricity generation from a 1 MWp multi-Si PV system, whose lifespan is 30 years of a 10 MWp power station has been taken as the research object and the functional unit
LCI method principle: Attributional
LCI method approaches: Allocation
Generated by: Jinfeng Yang, yjfzfshn@163.com
Review: Dependent internal review by Tiangong LCI Data Working Group
Amounts: no units in this file; such an amount is in the reference unit of its flow, which a separate flow dataset defines
copyright: false

## General comment
Multi-Si

## Geography
The power station is located in the central region of Ningxia, China, where the average annual solar radiation is approximately 5955.80 MJ m2 a-1, and the annual average number of peak sunshine hours are 1718 h.

## Time period
Available online

## Technology and included processes
Among the above processes, the SoG-Si is manufactured by metal-lurgical route, which is an integrated method rather than a single preparation method. In order to remove various impurities in silicon, several independent and random ordered processes are combined for mixed use.

## Reference product
- Solar grade multi-Si: 1000; measured
  SoG-Si

## Inputs
All rows: measured
- electricity: 147921
  Electricity
- Metallurgical silicon: 1227.72
- quartz sand: 41.19
  Quartz sand
- fluorspar: 8.22
  Fluorite powder
- Hydrochloric acid: 356.44
  Hydrochloric acid (31%)
- Hydrofluoric acid: 151.49
  Hydrofluoric acid (55%)
- Water (fresh water): 12376.2
  Fresh water
- Lime: 379.21
- Quartz Crucible: 207.92
  Quartz crucible
- Silicon nitride: 0.97
- Cooling water: 4158.42
  Circulating water

## Outputs
- industrial waste (unspecified): 164.36; measured
  Waste residue
- waste water - untreated: 13162.4; measured
  Waste water
- Calcium fluoride waste: 162.38; measured
  Calcium fluoride
- Waste (solid): 209.69; measured
  Waste quartz crucible

## Deviations from the LCI method approaches
A life cycle assessment (LCA) has been performed for the grid-connected electricity generation from a metallurgical route multi-crystalline silicon (multi-Si) photovoltaic (PV) system in China.

## Data selection and combination
Survery of factories in Yunnan and Ningxia

## Review details
Inventory: The internal review was done by several iteration steps concerning raw data validation, raw data documentation, representativity, completeness and consistency of modelling with regard to ISO 14040 and 14044.; Documentation: The review of the documentation was performed by Ecobilan and is in compliance with ISO 14040 and 14044. The data set documentation is correct in view of the appropriateness of the information provided. It includes all relevant information in view of data quality and scope of application of the respective LCI result.

## Data sources
- Yu, Z. et al. Life cycle assessment of grid-connected power generation from metallurgical route multi-crystalline silicon photovoltaic system in China. Applied Energy 185, 68–81 (2017).
