# Lithium Carbonate Production | Battery Grade Lithium Carbonate | Sulfuric Acid | Australia Exports Lithium Spodumene Concentrate

Dataset: ILCD process, Unit process, single operation
Geography: SN-SC-CN
Reference year: 2017
Classification: Materials production / Other mineralic materials
Generated by: Sun Xin, xs389@cornell.edu
Review: Dependent internal review by Tiangong LCI Data Working Group
Amounts: no units in this file; such an amount is in the reference unit of its flow, which a separate flow dataset defines

## Geography
遂宁管辖的射洪市

## Reference product
- Lithium carbonate,Lithium carbonate: 1000; article inperiodical

## Inputs
All rows: article inperiodical
- Spodumene concentrate (6% Li2O): 7300
- freshwater: 40
- Sulfuric acid: 1710
- sodium hydroxide: 50
- Electricity: 6480
- hard coal; 26.3 MJ/kg: 82893
  For direct combustion heating
- hard coal; 26.3 MJ/kg: 52997
  used to produce steam
- calcium carbonate: 700
- sodium carbonate: 2050

## Outputs
- sodium sulfate: 1920; article inperiodical

## Review details
Inventory: The internal review was done by several iteration steps concerning raw data validation, raw data documentation, representativity, completeness and consistency of modelling with regard to ISO 14040 and 14044.

## Data sources
- Kelly, J. C., Wang, M., Dai, Q. & Winjobi, O. Energy, greenhouse gas, and water life cycle analysis of lithium carbonate and lithium hydroxide monohydrate from brine and ore resources and their use in lithium ion battery cathodes and lithium ion batteries. Resources, Conservation and Recycling 174, 105762 (2021).
