# High-carbonferrochrome|Chromite,coke,silica|Submerged arc furnace method|All sizes / 高碳铬铁|铬矿、焦炭、硅石|矿热炉法|所有规模

Dataset: ILCD process, Unit process, single operation
Geography: CN
Reference year: 2019
Classification: Materials production / Metals and semimetals
Generated by: The data was created by the Office of the Second National Pollution Source Census of the Ministry of Ecology and Environment, and the data was organized by the TianGong Plan team for ILCD format / 生态环境部第二次全国污染源普查工作办公室创建数据，天工计划团队常慧敏整理数据为ILCD格式
Owner: Tiangong LCI Data Working Group / 天工LCI数据工作小组
Amounts: no units in this file; such an amount is in the reference unit of its flow, which a separate flow dataset defines
copyright: false
licenseType: Free of charge for all users and uses

## Technology and included processes
the Technical of end-of-pipe management technology for pollution ChromiumisBag filter，Its Technical efficiency of end-of-pipe management97

## Reference product
- High Carbon Chromium Steel: 1000; calculated
  源文件中描述为为高碳铬铁，此处对其进行了匹配工作，将其匹配到LCAflow库里面相最符合的流，污染物指标备注为工业废水量

## Outputs
All rows: calculated
- Waste water: 1500
  污染物指标工业废水量的末端治理技术是/，其效率为0。原文件中描述污染物类别为废水，污染物指标为工业废水量，此处对其进行了匹配工作，将其匹配到LCAflow库里面相最符合的流，污染物指标备注为工业废水量
- chemical oxygen demand: 0.04422
  污染物指标化学需氧量的末端治理技术是沉淀分离+好氧生物处理法，其效率为67，末端治理设施实际运行率（k值）计算公式为k=废水治理设备年正常运行时间（小时）/生产系统年运行时间（小时）。原文件中描述污染物类别为废水，污染物指标为化学需氧量，此处对其进行了匹配工作，将其匹配到LCAflow库里面相最符合的流，污染物指标备注为化学需氧量
- Chromium: 4.48e-5
  污染物指标铬的末端治理技术是沉淀分离，其效率为86，末端治理设施实际运行率（k值）计算公式为k=废水治理设备年正常运行时间（小时）/生产系统年运行时间（小时）。原文件中描述污染物类别为废水，污染物指标为铬，此处对其进行了匹配工作，将其匹配到LCAflow库里面相最符合的流，污染物指标备注为铬
- Exhaust gas: nan
  污染物指标工业废气量的末端治理技术是/，其效率为0。原文件中描述污染物类别为废气，污染物指标为工业废气量，此处对其进行了匹配工作，将其匹配到LCAflow库里面相最符合的流，污染物指标备注为工业废气量，产污系数备注为为全封闭矿热炉污染物指标
- Exhaust gas: nan
  污染物指标工业废气量的末端治理技术是/，其效率为0。原文件中描述污染物类别为废气，污染物指标为工业废气量，此处对其进行了匹配工作，将其匹配到LCAflow库里面相最符合的流，污染物指标备注为工业废气量，产污系数备注为为半封闭矿热炉污染物指标
- particles (PM2.5 - PM10): nan
  污染物指标颗粒物的末端治理技术是袋式除尘，其效率为99.6，末端治理设施实际运行率（k值）计算公式为k=除尘设备年正常运行时间（小时）/生产系统年生产运行时间（小时）。原文件中描述污染物类别为废气，污染物指标为颗粒物，此处对其进行了匹配工作，将其匹配到LCAflow库里面相最符合的流，污染物指标备注为颗粒物，产污系数备注为为全封闭矿热炉污染物指标
- particles (PM2.5 - PM10): nan
  污染物指标颗粒物的末端治理技术是袋式除尘，其效率为98，末端治理设施实际运行率（k值）计算公式为k=除尘设备年正常运行时间（小时）/生产系统年生产运行时间（小时）。原文件中描述污染物类别为废气，污染物指标为颗粒物，此处对其进行了匹配工作，将其匹配到LCAflow库里面相最符合的流，污染物指标备注为颗粒物，产污系数备注为为半封闭矿热炉污染物指标
- Nitrogen oxides: nan
  污染物指标氮氧化物的末端治理技术是直排，其效率为0，末端治理设施实际运行率（k值）计算公式为/。原文件中描述污染物类别为废气，污染物指标为氮氧化物，此处对其进行了匹配工作，将其匹配到LCAflow库里面相最符合的流，污染物指标备注为氮氧化物，产污系数备注为为全封闭矿热炉污染物指标
- Nitrogen oxides: nan
  污染物指标氮氧化物的末端治理技术是直排，其效率为0，末端治理设施实际运行率（k值）计算公式为/。原文件中描述污染物类别为废气，污染物指标为氮氧化物，此处对其进行了匹配工作，将其匹配到LCAflow库里面相最符合的流，污染物指标备注为氮氧化物，产污系数备注为为半封闭矿热炉污染物指标
- sulfur dioxide: 1.27
  污染物指标二氧化硫的末端治理技术是直排，其效率为0，末端治理设施实际运行率（k值）计算公式为/。原文件中描述污染物类别为废气，污染物指标为二氧化硫，此处对其进行了匹配工作，将其匹配到LCAflow库里面相最符合的流，污染物指标备注为二氧化硫
- Chromium: nan
  污染物指标铬的末端治理技术是袋式除尘，其效率为99.6，末端治理设施实际运行率（k值）计算公式为k=除尘设备年正常运行时间（小时）/生产系统年生产运行时间（小时）。原文件中描述污染物类别为废气，污染物指标为铬，此处对其进行了匹配工作，将其匹配到LCAflow库里面相最符合的流，污染物指标备注为铬，产污系数备注为为全封闭矿热炉污染物指标
- Chromium: nan
  污染物指标铬的末端治理技术是袋式除尘，其效率为97，末端治理设施实际运行率（k值）计算公式为k=除尘设备年正常运行时间（小时）/生产系统年生产运行时间（小时）。原文件中描述污染物类别为废气，污染物指标为铬，此处对其进行了匹配工作，将其匹配到LCAflow库里面相最符合的流，污染物指标备注为铬，产污系数备注为为半封闭矿热炉污染物指标

## Data sources
- 第二次全国污染源普查产排污核算系数手册（试用版）,四级代码3140文件，在完整版文件中第4822页
