# 阳极成型箔生产 ; 0.12 mm阳极成箔的铝线圈 ; 铝锭

Dataset: ILCD process, Unit process, single operation
Geography: JS-CN
Reference year: 2020
Classification: Unit processes / Materials production / Metals and semimetals
Generated by: 常慧敏, huiminchang@tsinghua.edu.cn
Owner: 天工LCI数据工作小组
Review: Dependent internal review by 天工LCI数据工作小组
Amounts: no units in this file; such an amount is in the reference unit of its flow, which a separate flow dataset defines
copyright: false
licenseType: Free of charge for all users and uses

## General comment
阳极成型箔生产 ; 铝电解电容器 (AEC) 生产 ; 420V 680uf

## Technical purpose
通过该工业过程生产的阳极氧化铝箔专门用于制造铝电解电容器（AECs）。这些电容器通常用于各种电子设备中，以储存电荷，供电暂时中断时使用，并过滤不需要的频率信号。箔材厚度为0.12毫米，适用于高压应用，例如420V 680uf电容器。数据集代表了工业规模的生产能力，标志着它在大规模电子制造中的重要性。

## Reference product
- Al coil of 0.12mm anode formed foil: 449.811; measured
  Al coil of 0.12 mm anode formed foil [kg] ; Production of anode formed foil

## Inputs
All rows: measured
- electricity, high voltage, aluminium industry: 432.166
  Electricity [kWh] ; Production of anode etched foil
- electricity, high voltage, aluminium industry: 290.977
  Electricity [kWh] ; Hydration
- electricity, high voltage, aluminium industry: 204985
- 0.12mm Al blank coil: 518
  0.12mm Al blank coil [kg] ; Preparation of sulfuric acid (anode)
- water, deionised: 107187
- tap water: 63287.3
  Tap water [kg] ; Waste gas treatment (anode)
- sulfuric acid: 470.708
  Sulfur acid（98%）[kg] ; Corrosion reaction (anode)
- nitric acid, without water, in 50% solution state: 23.693
  Nitric acid（98%）[kg] ; Corrosion reaction (anode)
- hydrochloric acid, without water, in 30% solution state: 78.978
  Hydrochloric acid（31%）[kg] ; Corrosion reaction (anode)
- sodium hydroxide, without water, in 50% solution state: 78.978
  NaOH solution (30%) [kg] ; Corrosion reaction (anode)
- water, deionised: 967.606
  Deionized water [kg] ; Hydration
- boric acid, anhydrous, powder: 21.98
  HBO3 [kg] ; Formation process
- Ammonium Citrate: 42.333
  Ammonium citrate [kg] ; Formation process
- Ammonium Pentaborate: 11.611
  Ammonium pentaborate [kg] ; Formation process
- phosphoric acid, industrial grade, without water, in 85% solution state: 120.951
  H3PO4 [kg] ; Passivation
- Ammonium dihydrogen phosphate: 1.935
  NH4H2PO4 [kg] ; Phosphating

## Outputs
All rows: measured
- Aluminium Phosphate: 15.578
  AlPO4 [kg] ; Production of anode formed foil
- aluminium scrap, post-consumer: 12.865
  Waste Al foil [kg] ; Production of anode formed foil
- wastewater, average: 80795.1
  Wastewater [kg] ; Production of anode formed foil
- Chemical Oxygen Demand (COD): 2.141
  COD [kg] ; Production of anode formed foil
- ammonia: 0.372
  NH3-N [kg] ; Production of anode formed foil
- Phosphorus: 0.036
  TP [kg] ; Production of anode formed foil
- sewage sludge: 14.661
  Sludge [kg] ; Sewage treatment
- wastewater, average: 7786.27
  Wastewater [kg] ; Production of anode etched foil
- hydrogen chloride: 0.388
  HCl gas [kg] ; Production of anode etched foil
- Sulfuric acid: 0.042
  H2SO4 gas [kg] ; Production of anode etched foil
- Nitrogen oxides: 0.048
  NOx [kg] ; Production of anode etched foil
- ammonia: 0.044
  NH3 gas [kg] ; Sewage treatment
- Chemical Oxygen Demand (COD): 0.947
  COD [kg] ; Production of anode etched foil
- Suspended solids, unspecified: 0.62
  SS [kg] ; Production of anode etched foil
- ammonia: 0.02
  NH3-N [kg] ; Production of anode etched foil
- Nitrogen: 0.079
  TN [kg] ; Production of anode etched foil

## Data selection and combination
电容器生产的库存数据来自 AEC 位于中国江苏省的生产工厂。每道工序的 LCI 数据收集的截止标准是至少覆盖输入流和输出流 95% 的质量和能量。阳极箔生产和阴极箔生产的库存数据是根据生产工艺和相应工艺参数分析获得的。上游数据（即铝锭、分选纸、运输、电力和水）来自 Gabi 软件（版本：10.6.1.35）。具体而言，《中国电力年鉴》中的中国电网概况以 2016 年为基准年。铝锭生产的基准年为 2015 年。无法获取的柠檬酸铵、五硼酸铵、NH4H2PO4 和 HBO3 数据是根据 Gabi 软件中现有材料（反应物）的化学方程式估算的。使用和报废阶段的库存数据是通过分析和计算获得的。

## Use advice
使用此LCA数据集时，必须遵守既定的系统边界和截止标准。具体而言，生命周期清单（LCI）数据覆盖率应至少占输入和输出总质量和能量的95%。用户应注意，电容器生产的库存数据特定于中国江苏省的一个工厂。在模拟电容器的使用阶段行为和生命周期尾期场景时，对于某些化学品的不可获取数据是在Gabi软件内使用现有材料根据化学方程估算的。中国电网能源概况的参考年份为2016年，铝锭生产的参考年份为2015年。任何电网组合或铝生产技术改进的更新都应考虑以确保数据的相关性。

## Review details
清单： 内部审查通过几个迭代步骤完成，涉及原始数据验证、原始数据记录、代表性、完整性、与 ISO 14040 和 14044 有关的建模的一致性。

## Data sources
- Zhang, C., Jing, J., Yun, L., Zheng, Y. & Huang, H. A cradle-to-grave life cycle assessment of high-voltage aluminum electrolytic capacitors in China. J. Clean. Prod. 370, (2022).
