# 修复后土壤;农药污染土壤;异位热脱附;不含土壤挖掘过程

Dataset: ILCD process, Unit process, single operation
Geography: JS-CN
Reference year: 2022
Classification: Unit processes / Other Services / Repair and maintenance
Functional unit: we defined the functional unit as the remediation of 1 ton of organically contaminated soil
Generated by: 杨欣桐, yangxt@caep.org.cn
Owner: 天工LCI数据工作小组
Review: Dependent internal review by 天工LCI数据工作小组
Amounts: no units in this file; such an amount is in the reference unit of its flow, which a separate flow dataset defines
copyright: false
licenseType: Free of charge for all users and uses

## General comment
场外异位热解附方案将要求将受污染的土壤运输到热脱附厂。

## Geography
研究场地是中国东部江苏省的一个废弃橡胶厂。需要修复的受污染土壤的现场总体积为29313 m3

## Technology and included processes
受污染的土壤在一个可移动的棚中破碎和筛分，以清除大块碎片和岩石，然后将其送入窑中。为了达到修复目标，受污染土壤需要在回转窑中保持30分钟。热处理后的土壤喷水冷却，然后堆放在现场待检，最终用作回填土。通常，热处理系统需要尾气处置以去除有害气体、颗粒和其他副产品。尾气处置模块由活性炭吸附罐组成。活性炭必须定期更新，用过的活性炭必须作为危险废物处理。

## Technical purpose
场外异位热脱附处理用于修复废弃橡胶厂的农药污染土壤。经处理的土壤将作为填充材料用于修复现场，确保废弃地块的土地再利用。

## Reference product
- Remediated soil: 1000; missing unimportant

## Inputs
All rows: missing unimportant
- Tap Water: 0.44
- Activated Carbon: 1.1
- Electricity: 87.336
- transport in t*km: 60
- Excavated soil,Excavated soil: 1000
  与大多数从污染土壤挖掘开始的污染土壤修复LCA不同，我们将系统边界设置为在污染土壤被挖掘和筛分后，但仍留在场地内后开始。

## Outputs
- hazardous waste (unspecified): 1.26; missing unimportant
  尾气处置模块由活性炭吸附罐组成。活性炭必须定期更新，用过的活性炭必须作为危险废物处理。

## Use advice
此数据集主要适用于未包括土壤挖掘阶段的场外异位热脱附土壤修复过程的生命周期评估研究。确保计算土壤到脱附厂的运输、热处理中使用的能源、在回转窑内的停留时间、用水喷洒冷却过程、处理后土壤的安全性检测以及废气处理中使用的废活性炭等废物材料的管理。

## Review details
清单： 内部审查通过几个迭代步骤完成，涉及原始数据验证、原始数据记录、代表性、完整性、与 ISO 14040 和 14044 有关的建模的一致性。

## Data sources
- Tian L ,Mingchao H ,Lu Y , et al. Life cycle assessment-based decision-making for thermal remediation of contaminated soil in a regional perspective [J]. Journal of Cleaner Production, 2023, 392
