# 华东水稻-冬小麦生产 ; 农作生产(小麦)

Dataset: ILCD process, Unit process, single operation
Geography: NJ-JS-CN
Reference year: 2015
Valid until: 2015
Classification: Unit processes / Materials production / Agricultural production means
Functional unit: 1 ton of rice and 1 ton of winter wheat
LCI method principle: Attributional
LCI method approaches: Consequential
Generated by: Haoran Zhang, hrzhang@whu.edu.cn
Owner: 天工LCI数据工作小组
Review: Dependent internal review by 天工LCI数据工作小组
Amounts: no units in this file; such an amount is in the reference unit of its flow, which a separate flow dataset defines
copyright: false
licenseType: Free of charge for all users and uses

## General comment
农作生产系统的能源消耗则主要计算柴油、 农药使用产生的能源消耗。本研究中，农资和农 作生产系统的能源消耗主要通过公式 1 进 行 运 算 ， 农 资 生 产 阶 段 的 柴 油 、 电力资源消耗量参见McDougall［22］等 研 究 ( 表 2 和 表 3 ) ; 依 据 刘 洪 涛 等［23］的研 究 ( 表 4) ，可 以 计 算 出 1t 尿 素 ( 纯 N) 的耗能 情 况，根据单位作物产量所消耗的尿素 ( 纯 N) ，可得出农资生产系统的氮肥生产产生的 能耗; 农作阶段的柴油、农药等折能系数参见袁 包荣等［24］研究成果( 柴油和农药( kg·hm－2 ) 的折 能系数分别 42. 55 和 100. 5 MJ·kg－1)

## Technology and included processes
以 1t 水稻和 1t 冬小麦为 功能单位，研究该地区稻麦轮作系统生产 1t 水稻 和 1t 冬小麦的资源能耗与环境影响。农产品生命 周期的起始边界为与稻麦生命周期相关的能源原 料开采，终止边界为经过农作物种植栽培至收获 输出农作物产品和排放废气，具体包括农资生产 和农作生产两个系统

## Technical purpose
该生命周期评估(LCA)数据专门针对江苏省南京市江宁区的水稻和冬小麦农业生产过程。数据集反映了栽培这些主食作物所涉及的资源投入和产出，并遵循该地区的农业实践。这些数据可用于类似地理和气候条件下的作物生产环境影响研究、过程优化和可持续性评估。所涉及的材料，如复合肥、尿素、吡虫啉、氯�苯�磷、丁草胺和华星草克，是该地区农业化学品使用的指标。同样突出的是机械秸秆粉碎和还田的做法，这对土壤健康和碳循环研究可能具有相关性。

## Reference product
- wheat: 4670; measured
  小麦

## Inputs
All rows: measured
- Diesel: 17.5
  小麦
- heavy fuel oil: 18.8
  小麦
- nitrogen: 270
  小麦
- phosphorus: 67.5
  小麦
- potassium chloride: 67.5
  小麦
- Insecticide: 3.7
  小麦

## Deviations from the LCI method approaches
农产品生命周期的起始边界为与稻麦生命周期相关的能源原料开采, 终止边界为经过农作物种植栽培至收获输出农作物产品和排放废气

## Data selection and combination
江苏省南京市江宁区82户农户近2年的投入产出抽样调查结果。化肥主要包括复合肥和尿素, 杀虫剂为氧化乐果和辛硫磷, 除草剂为丁草胺和华星草克等。田间秸秆全部采用机械粉碎还田

## Data treatment and extrapolations
对产品系统整个生命周期所有输入与输出的过程及进行运算的过程, 一般包括分类和特征化、标准化和加权评估

## Sampling procedure
江苏省南京市江宁区82户农户近2年的投入产出抽样调查结果

## Use advice
在使用该数据集进行生命周期评估时，用户应注意特定的区域背景和农业实践，因为这些因素显著影响数据的适用性和随后的分析结果。所采用的方法论，如机械秸秆粉碎和特定农药的使用，在与其他地区或农业系统比较时应予以考虑。用户还应意识到生命周期的定义边界——从能源原料的开采到作物的收获和废气的排放。将此数据整合到更广泛的研究或评估中时，应保持这些边界以保持其相关性和准确性。

## Review details
清单： 内部审查通过几个迭代步骤完成，涉及原始数据验证、原始数据记录、代表性、完整性、与 ISO 14040 和 14044 有关的建模的一致性。

## Data sources
- 胡乃娟,陈倩,朱利群.长江中下游稻-麦轮作系统生命周期环境影响评价——以江苏南京为例[J].长江流域资源与环境,2019,28(05):1111-1120.
