# 褐煤生产;褐煤;褐煤生产

Dataset: ILCD process, Unit process, single operation
Geography: CN
Classification: Energy carriers and technologies / Lignite based fuels
Generated by: 付翔, 1162850692@qq.com
Owner: 天工LCI数据工作小组
Review: Dependent internal review by 天工LCI数据工作小组
Amounts: no units in this file; such an amount is in the reference unit of its flow, which a separate flow dataset defines
copyright: false
licenseType: Free of charge for all users and uses

## General comment
褐煤生产数据集代表了在钢铁制造行业中使用褐煤（又称棕煤）的情况。具体来说，它涉及使用褐煤作为还原剂的直接还原铁（DRI）过程。该数据在评估使用褐煤的Coal-Direct Reduction（Coal-DR）路线在钢铁生产中的环境影响时有应用。这种路线是Coke Oven Gas-Direct Reduction（COG-DR）和Hydrogen-Direct Reduction（H-DR）路线的替代过程，这两种路线在中国尚未大规模推广。

## Geography
The LCI of Coal-DR is obtained, as shown in Table 9, based on the statistics of the demonstration project in China.

## Reference product
- lignite: 625.1; calculated

## Inputs
- Raw coal: 7.9; calculated
- Natural gas, at consumer EU-27: 6.2; calculated

## Data treatment and extrapolations
LCI of COG-DR and H-DR routes, which is not scaled-up in China are estimated based on Coal-DR routes combined with literature data from simulations, laboratory tests, and process modeling in Table 9 [49,50]. The LCI of Coal-DR is obtai

## Use advice
使用该褐煤生产生命周期清单（LCI）数据集的用户应注意，该数据集基于中国示范项目的统计数据，并结合了包括模拟、实验室测试和针对Coal-Direct Reduction（Coal-DR）路线的过程模型在内的文献数据估算。该数据集未按全球标准规范化，可能不代表更大规模运作或其他地理环境。在使用该数据进行决策或与其他过程进行比较分析时，应考虑其方法论和规模限制。

## Review details
清单： 内部审查通过几个迭代步骤完成，涉及原始数据验证、原始数据记录、代表性、完整性、与 ISO 14040 和 14044 有关的建模的一致性。

## Data sources
- The carbon reduction potential of hydrogen in the low carbon transition of the iron and steel industry: The case of China
