# Blistering|Chinesemusicalinstruments|Animalleather|Blistering|All sizes / 泡皮|中乐器|动物皮革|泡皮|所有规模

Dataset: ILCD process, Unit process, single operation
Geography: CN
Reference year: 2019
Classification: Materials production / Other materials
Generated by: The data was created by the Office of the Second National Pollution Source Census of the Ministry of Ecology and Environment, and the data was organized by the TianGong Plan team for ILCD format / 生态环境部第二次全国污染源普查工作办公室创建数据，天工计划团队常慧敏整理数据为ILCD格式
Owner: Tiangong LCI Data Working Group / 天工LCI数据工作小组
Amounts: no units in this file; such an amount is in the reference unit of its flow, which a separate flow dataset defines
copyright: false
licenseType: Free of charge for all users and uses

## Technology and included processes
the Technical of end-of-pipe management technology for pollution phosphorus, totalis/，The formula for calculating the actual operation rate (k-value) of the end-of-pipe treatment facility is k = annual power consumption of wastewater treatment facilities (kWh) / (total rated power (kW) × annual operating time (hours))

## Reference product
- Animal Leather: 1000; input; calculated
  源文件中描述为为动物皮革，此处对其进行了匹配工作，将其匹配到LCAflow库里面相最符合的流，污染物指标备注为工业废水量

## Outputs
All rows: calculated
- Waste water: 4690
  污染物指标工业废水量的末端治理技术是/，末端治理设施实际运行率（k值）计算公式为（废水直接排放进入相关污水管网后，由工业园区或相关市政污水处理厂统一处理）。原文件中描述污染物类别为废水，污染物指标为工业废水量，此处对其进行了匹配工作，将其匹配到LCAflow库里面相最符合的流，污染物指标备注为工业废水量
- chemical oxygen demand: 3.61
  污染物指标化学需氧量的末端治理技术是/，末端治理设施实际运行率（k值）计算公式为（废水直接排放进入相关污水管网后，由工业园区或相关市政污水处理厂统一处理）。原文件中描述污染物类别为废水，污染物指标为化学需氧量，此处对其进行了匹配工作，将其匹配到LCAflow库里面相最符合的流，污染物指标备注为化学需氧量
- Ammonia Nitrogen: 0.055
  污染物指标氨氮的末端治理技术是/，末端治理设施实际运行率（k值）计算公式为（废水直接排放进入相关污水管网后，由工业园区或相关市政污水处理厂统一处理）。原文件中描述污染物类别为废水，污染物指标为氨氮，此处对其进行了匹配工作，将其匹配到LCAflow库里面相最符合的流，污染物指标备注为氨氮
- Nitrogen, organic bound: 0.077
  污染物指标总氮的末端治理技术是/，末端治理设施实际运行率（k值）计算公式为（废水直接排放进入相关污水管网后，由工业园区或相关市政污水处理厂统一处理）。原文件中描述污染物类别为废水，污染物指标为总氮，此处对其进行了匹配工作，将其匹配到LCAflow库里面相最符合的流，污染物指标备注为总氮
- phosphorus, total: 0.37
  污染物指标总磷的末端治理技术是/，末端治理设施实际运行率（k值）计算公式为（废水直接排放进入相关污水管网后，由工业园区或相关市政污水处理厂统一处理）。原文件中描述污染物类别为废水，污染物指标为总磷，此处对其进行了匹配工作，将其匹配到LCAflow库里面相最符合的流，污染物指标备注为总磷

## Data sources
- 第二次全国污染源普查产排污核算系数手册（试用版）,二级代码24,四级代码2421文件，在完整版文件中第2826页
