# Vegetable Production ; Crop Production (Cucumbers)

Dataset: ILCD process, Unit process, single operation
Geography: CN
Classification: Materials production / Agricultural production means
Functional unit: hm2
Generated by: Haoran Zhang, hrzhang@whu.edu.cn
Owner: Tiangong LCI Data Working Group
Review: Dependent internal review by Tiangong LCI Data Working Group
Amounts: no units in this file; such an amount is in the reference unit of its flow, which a separate flow dataset defines
copyright: false
licenseType: Free of charge for all users and uses

## General comment
This dataset characterizes greenhouse gas emissions across the entire lifecycle of open-field vegetable production, with an emphasis on cucumbers. It is applicable for environmental impact assessments in agricultural contexts, especially for stakeholders involved in crop production and policy development focused on sustainability and climate change mitigation within the agricultural sector.

## Technology and included processes
Based on national agricultural statistical data, using the life cycle assessment (LCA) method, the net greenhouse gas emissions (NGHGE) of four typical field vegetable productions in China, including open-field tomatoes, cucumbers, Chinese cabbage, and radishes, were quantified. The study compared the differences in net greenhouse gas emissions among vegetable types and provinces, and analyzed emission reduction measures.

## Reference product
- cucumbers: 61000; software or database
  cucumber

## Inputs
All rows: software or database
- nitrogen: 371, 329, 42 (3 entries)
  cucumber
- phosphorus: 215, 189, 26.7 (3 entries)
  cucumber
- potassium: 210, 181, 29.5 (3 entries)
  cucumber
- Diesel: 0.0037
  cucumber
- Rice Seeds: 83
  cucumber
- Agricultural film: 60.1
  cucumber
- Labor: 570
  cucumber

## Deviations from the LCI method approaches
The process is divided into two phases: agricultural input and farming. The agricultural input phase mainly focuses on the greenhouse gas emissions produced and transported during the production of fertilizers (chemical and organic), pesticides, and agricultural films. The farming phase primarily concentrates on the greenhouse gas emissions from the application of fertilizers and pesticides, agricultural operations (such as plowing and irrigation), diesel consumption, and the energy consumed by human labor. Additionally, this phase considers the carbon sequestration in vegetables through net primary productivity and the fixation of soil organic carbon caused by the input of organic fertilizers.

## Data selection and combination
Based on the types of vegetables and the planting distribution information available in the database, four typical open-field vegetables were selected, namely fruit vegetables (tomatoes, cucumbers), leafy vegetables (Chinese cabbage), and root vegetables (radishes). The related planting production data from various provinces across the country for these four types of open-field vegetables were collected and organized for the year 2016 (data from Taiwan, China is temporarily unavailable).

## Data treatment and extrapolations
Various vegetables’ fertilizer application rates, diesel consumption, agricultural film usage, labor employment, and yield data are obtained from the literature. Diesel cost is calculated using the formula [18]: Diesel cost = (mechanical operation fee + irrigation fee - water fee) x 21% + fuel power fee, and the diesel price data comes from China's oil price network database [19]. Pesticide input data refer to Luo Wei’s [20] study results on the big data analysis of pesticide application in open-field vegetables across the country. The planting areas of various types of vegetables in different provinces were retrieved from the literature [15].

## Use advice
When utilizing this data for lifecycle assessments, ensure that you account for all inputs and emissions associated with both the agricultural input and farming phases. This includes, but is not limited to, the production and transport of fertilizers and pesticides, the usage of agricultural films, and the operations involved in plowing, irrigation, and labor. Consider the provisions for carbon captured by the crop’s net primary productivity and soil organic carbon sequestration. Verify that the geographical scope of your study matches the data, which excludes Taiwan and may require regional adjustments based on local practices.

## Review details
Inventory: The internal review was done by several iteration steps concerning raw data validation, raw data documentation, representativity, completeness and consistency of modelling with regard to ISO 14040 and 14044.

## Data sources
- 张芬,程泰鸿,陈新平,王孝忠.我国典型露地蔬菜生产中的温室气体排放[J].环境科学,2020,41(07):3410-3417.
