# Milk production | Dairy raising

Dataset: ILCD process, Unit process, single operation
Geography: ZY-GS-CN
Reference year: 2012
Classification: Materials production / Other mineralic materials
Functional unit: 1kg milk as functional unit (FU)
Generated by: Rui Yang, 1632707028@qq.com
Review: Dependent internal review by Tiangong LCI Data Working Group
Amounts: no units in this file; such an amount is in the reference unit of its flow, which a separate flow dataset defines
copyright: false

## General comment
The feed of dairy cows is composed of roughage and concentrate feed. Concentrate feed is composed of corn, soybean meal and wheat bran as the main raw materials, and other components account for a small proportion, so other components are ignored. Dairy cows have different feed consumption in different feeding stages, and their production can be divided into four stages: calf stage, growing stage, lactation stage and dry milk stage.

## Geography
The average water consumption per cow was 70kg per day, according to the investigation of Shigangdun pasture of Qianjin Animal Husbandry in Zhangye City

## Time period
Main Ingredients of concentrate feed (Cao Zhenggang, 2012)

## Reference product
- milk: 1
  牛奶

## Inputs
All rows: article inperiodical
- maize: 0.34
  玉米
- wheat: 0.46
  小麦
- soybean: 0.21
  大豆
- alfalfa: 2.55
  苜蓿
- silage corn: 15.7
  玉米青贮
- water: 4.2

## Outputs
All rows: article inperiodical
- carbon monoxide: 0.00022
- nitrogen, total (excluding N2): 0.00128
- carbon dioxide: 0.56973
- nitrous oxide: 0.00013
- methane: 0.01795
- sulfur oxides: 0.00077
- ammonia: 0.00062

## Data selection and combination
曹正纲根据荷斯坦奶牛的四个时期，统计奶牛生产中四个时期精饲料成分，根据作者对张掖市前进牧业石岗墩牧场调查得到平均每头奶牛每天耗水 70kg，再根据曹正纲对奶牛场作物消耗的实地调查与统计，推算出每生产 1kg 牛 奶的农作物消耗量与耗水量

## Review details
Inventory: The internal review was done by several iteration steps concerning raw data validation, raw data documentation, representativity, completeness and consistency of modelling with regard to ISO 14040 and 14044.; Documentation: The review of the documentation was performed by Ecobilan and is in compliance with ISO 14040 and 14044. The data set documentation is correct in view of the appropriateness of the information provided. It includes all relevant information in view of data quality and scope of application of the respective LCI result.

## Data sources
- 魏云. 基于生命周期评价的禽畜产品环境影响评价及对策探讨. (兰州大学, 2016).
