# 天然气制氢;天然气;SMR技术

Dataset: ILCD process
Geography: US
Reference year: 2022
Classification: Unit processes / Energy carriers and technologies / Natural gas based fuels
Functional unit: Production of 1kg hydrogen gas
Generated by: 刘晓华, lxh01311@163.com
Owner: 天工LCI数据工作小组
Review: Dependent internal review by 天工LCI数据工作小组
Amounts: no units in this file; such an amount is in the reference unit of its flow, which a separate flow dataset defines
copyright: false
licenseType: Free of charge for all users and uses

## General comment
此数据集代表使用水蒸气甲烷重整（SMR）技术的天然气制氢工艺。这种工业过程通常用于生产大量的氢气，这对于燃料电池、精炼过程、肥料的氨生产、甲醇生产以及作为金属精炼中的还原剂等各种应用至关重要。

## Reference product
- Grey Hydrogen: 1; measured
  灰氢

## Inputs
- natural gas,natural gas: 4.85; measured
  天然气
- water: 6600; measured
  水

## Outputs
- Electricity: 3.96; measured
  电
- carbon dioxide (fossil): 9; measured
  二氧化碳直接排放 原文未区分bio和fossil，根据专家判断此处为fossil
- nitrogen: 16; measured
  氮气

## Use advice
此数据集的用户应考虑SMR技术的特定特征，包括使用天然气所产生的碳排放。该数据集适用于氢是主要输入的产品或服务的生命周期评估（LCA）模型。如果实际氢气生产量与1kg基线不符，用户必须考虑缩放影响。在LCA模型中准确地纳入系统边界以避免截断错误，考虑数据对模型系统的地理和技术相关性也是十分必要的，尤其是关于能源组合和所使用的SMR工艺的效率。

## Review details
清单： 内部审查通过几个迭代步骤完成，涉及原始数据验证、原始数据记录、代表性、完整性、与 ISO 14040 和 14044 有关的建模的一致性。

## Data sources
- Climate change performance of hydrogen production based on life cycle assess
