# Electricity production ; Electricity ; Thermal power (71.2%) + hydropower (2.1%) + nuclear power (15.8%) + wind power (8.8%) + solar power (2.0%)

Dataset: ILCD process, Partly terminated system
Geography: LN-CN
Reference year: 2019
Classification: Energy carriers and technologies / Electricity
LCI method principle: Other
Generated by: Ruoxi Xiong, xiongrx0126@163.com
Owner: Tiangong LCI Data Working Group
Review: Dependent internal review by Tiangong LCI Data Working Group
Amounts: no units in this file; such an amount is in the reference unit of its flow, which a separate flow dataset defines
copyright: false
licenseType: Free of charge for all users and uses

## General comment
Forms of electricity generation include thermal power generation, hydropower generation, nuclear power generation, wind power generation and solar power generation.

## Time period
Calculated based on data from the 2019 Energy Statistics Yearbook

## Technical purpose
This dataset represents the processes of electricity production involving thermal power, hydropower, nuclear power, wind power, and solar power generation. The electricity mix composed of 71.2% thermal power, 2.1% hydropower, 15.8% nuclear power, 8.8% wind power, and 2.0% solar power is used for residential, commercial, industrial purposes, and as supply power for various infrastructures.

## Reference product
- Electricity: 3.6; calculated

## Outputs
- carbon dioxide: 0.726; calculated
- sulfur dioxide: 0.00012; calculated
- Nitrogen oxides: 0.000193479; calculated
- Dust (unspecified, from stack): 2.5157e-5; calculated

## Data treatment and extrapolations
For the accounting method, please refer to the "Enterprise Greenhouse Gas Emissions Accounting Methods and Reporting Guidelines for Power Generation Facilities". Different forms of power generation and fuel consumption come from Chapter 3 (Energy Production) and Chapter 6 (Regional Energy Balance Sheet) in the "China Energy Statistical Yearbook 2020". The fuel parameters such as low calorific value and carbon content per unit calorific value used to calculate the carbon dioxide emission factor come from the "2019 China Regional Power Grid Carbon Dioxide Baseline Emission Factor Calculation Instructions OM" and the "Enterprise Greenhouse Gas Emission Accounting Method and Reporting Guide for Power Generation Facilities" 》

## Use advice
Users of this dataset should refer to the 'Enterprise Greenhouse Gas Emissions Accounting Methods and Reporting Guidelines for Power Generation Facilities' and the 'China Energy Statistical Yearbook 2020' for methodological details regarding power generation and fuel consumption statistics. The CO2 emission factors are pertinent for the inclusion in life cycle assessments and should take into account the regional variations and technological specifications provided by the '2019 China Regional Power Grid Carbon Dioxide Baseline Emission Factor Calculation Instructions OM'. When using this data for modeling, it is crucial to accurately represent the mix of electricity generation sources and to ensure that CO2 emissions are calculated based on the specific energy consumption and emissions data provided.

## Review details
Inventory: The internal review was done by several iteration steps concerning raw data validation, raw data documentation, representativity, completeness and consistency of modelling with regard to ISO 14040 and 14044.

## Data sources
- 熊若熙. 中国电力生产和消费二氧化碳与污染物排放因子核算. (清华大学, 2023).
