# Lithium Hydroxide Production | Battery Grade Lithium Hydroxide Monohydrate | Lithium Sulfate | Australia Exports Lithium Spodumene Concentrate

Dataset: ILCD process, Unit process, single operation
Geography: SN-SC-CN
Reference year: 2017
Classification: Materials production / Other mineralic materials
Generated by: Sun Xin, xs389@cornell.edu
Review: Dependent internal review by Tiangong LCI Data Working Group
Amounts: no units in this file; such an amount is in the reference unit of its flow, which a separate flow dataset defines

## Geography
遂宁管辖的射洪市

## Reference product
- Lithium Hydroxide Monohydrate: 1000; article inperiodical

## Inputs
All rows: article inperiodical
- Spodumene concentrate (6% Li2O): 6420
- freshwater: 11.24
- Electricity: 12600
- Sulfuric acid: 1520
- sodium carbonate: 25
- sodium hydroxide: 1180
- hard coal; 26.3 MJ/kg: 32818
  For direct combustion heating
- hard coal; 26.3 MJ/kg: 38525
  used to produce steam
- calcium carbonate: 600

## Outputs
- sodium sulfate: 1720; article inperiodical

## Review details
Inventory: The internal review was done by several iteration steps concerning raw data validation, raw data documentation, representativity, completeness and consistency of modelling with regard to ISO 14040 and 14044.

## Data sources
- Kelly, J. C., Wang, M., Dai, Q. & Winjobi, O. Energy, greenhouse gas, and water life cycle analysis of lithium carbonate and lithium hydroxide monohydrate from brine and ore resources and their use in lithium ion battery cathodes and lithium ion batteries. Resources, Conservation and Recycling 174, 105762 (2021).
