# 铝生产 ; 整个风电场

Dataset: ILCD process, Unit process, single operation
Geography: NMG-CN
Reference year: 2017
Classification: Materials production / Metals and semimetals
Functional unit: The functional unit is 1.5 MW wind turbine
LCI method principle: Attributional
LCI method approaches: Allocation
Generated by: 赵云志, ll10088@163.com
Owner: 天工LCI数据工作小组
Review: Dependent internal review by 天工LCI数据工作小组
Amounts: no units in this file; such an amount is in the reference unit of its flow, which a separate flow dataset defines
copyright: false
licenseType: Free of charge for all users and uses

## General comment
该数据集涉及风能领域的铝生产过程。这些铝料很可能被用于制造风力发电产业中的风力涡轮机、变电站和电缆等组件。通过内蒙古东北部一个装有33台国产1.5兆瓦（MW）涡轮机的特定风电场的例子来展示其功能性用途，该风电场用于风力发电。

## Geography
风电功率参数的数据来自Wang ( 2012 )。以装有33台国产1.5兆瓦( MW )风电机组的风电场为案例，分析其环境影响及其替代效应。该风电场位于我国风电装机最多的省份- -内蒙古东北部。

## Reference product
- aluminium: 1; article inperiodical

## Inputs
- Energy, geothermal, converted: 15.5056; article inperiodical

## Outputs
All rows: article inperiodical
- carbon dioxide: 8566
- sulfur dioxide: 34.2
- nitrous oxide: 14
- carbon monoxide: 3.08
- particles (PM2.5 - PM10): 0.88

## Deviations from the LCI method approaches
风电的生命周期清单如下所示。生产制造阶段包括风电机组、变电站、电缆的生产，这些设备消耗大量能源，排放污染物( Xue et al . , 2015)。

## Use advice
在使用该数据集进行生命周期评估或环境影响分析时，用户应注意功能单元被定义为1.5兆瓦风力涡轮机。生产数据涵盖了风力涡轮机、变电站和电缆的制造，包括能源消耗和污染物排放。在广泛的风电生命周期清单背景下，考虑生产和制造阶段的环境影响至关重要。在方法学上应准确考虑任何替代效应，因为所讨论的风电安装有助于替代非可再生能源。

## Review details
清单： 内部审查通过几个迭代步骤完成，涉及原始数据验证、原始数据记录、代表性、完整性、与 ISO 14040 和 14044 有关的建模的一致性。

## Data sources
- Li, H., Jiang, H.-D., Dong, K.-Y., Wei, Y.-M. & Liao, H. A comparative analysis of the life cycle environmental emissions from wind and coal power: Evidence from China. Journal of Cleaner Production 248, 119192 (2020).
