# 砖块生产 ;页岩空心砖生产 ;制坯工艺

Dataset: ILCD process, Unit process, single operation
Geography: GZ-JX-CN
Reference year: 2020
Classification: Unit processes / Materials production / Other mineralic materials
Generated by: 王湘锦, r99rt4@163.com
Owner: 天工LCI数据工作小组
Review: Dependent internal review by 天工LCI数据工作小组
Amounts: no units in this file; such an amount is in the reference unit of its flow, which a separate flow dataset defines
copyright: false
licenseType: Free of charge for all users and uses

## General comment
传统页岩空心砖生产工艺

## Technical purpose
该数据集对应的是页岩空心砖的生产，特别是砖块生产中的制坯工艺。由于页岩空心砖具有重量轻、隔热、隔音的特点，它通常被应用在建筑行业，用于建造墙体、外观和隔断结构。该过程适用于大批量制造，如年生产量达8000万块砖所示。

## Reference product
- Clay Body: 1520; measured
  粗坯

## Inputs
- brickbat aggregate: 1550; measured
- Electricity: 11.196; measured

## Deviations from the LCI method approaches
环境影响评估报告基于砖的年产量（8000万块砖），出于统计目的，数据已根据其中所述的尺寸规格进行转换，即每吨生产的砖

## Data selection and combination
采用根据《第一次全国污染源普查工业污染源产排污系数手册 第七分册》中 3131 烧结类砖瓦及建筑砌块制造业产排污系数表的相关数据。

## Sampling procedure
该环评报告的数据来源于工厂的实时数据

## Use advice
使用此数据集时，用户必须考虑页岩空心砖制造过程的具体背景，尤其是制坯阶段。该数据应用于需要针对烧结砖块和建筑砌块行业定制的生产和排放系数的生命周期评价研究中。在将数据应用于既定评估范围时（例如，适用的地理边界、时间框架和技术相关性），应谨慎行事。在与其他数据集比较或进行涉及物料吞吐量的计算时，应使用环评报告中提供的每吨砖块的转换比率。

## Review details
清单： 内部审查通过几个迭代步骤完成，涉及原始数据验证、原始数据记录、代表性、完整性、与 ISO 14040 和 14044 有关的建模的一致性。

## Data sources
- 年产 8000 万块页岩标砖项目环评报告公示
