# Weldingandpolishing|Fitnessequipment|Metalparts|Weldingandpolishing|All sizes / 焊接打磨|健身器材|金属件②|焊接打磨|所有规模

Dataset: ILCD process, Unit process, single operation
Geography: CN
Reference year: 2019
Classification: Systems / Other machines
Generated by: The data was created by the Office of the Second National Pollution Source Census of the Ministry of Ecology and Environment, and the data was organized by the TianGong Plan team for ILCD format / 生态环境部第二次全国污染源普查工作办公室创建数据，天工计划团队常慧敏整理数据为ILCD格式
Owner: Tiangong LCI Data Working Group / 天工LCI数据工作小组
Amounts: no units in this file; such an amount is in the reference unit of its flow, which a separate flow dataset defines
copyright: false
licenseType: Free of charge for all users and uses

## Technology and included processes
the Technical of end-of-pipe management technology for pollution particles (PM2.5 - PM10)isElectrostatic precipitation，Its Technical efficiency of end-of-pipe management95，The formula for calculating the actual operation rate (k-value) of the end-of-pipe treatment facility is k = annual power consumption of wastewater treatment facilities (kWh) / (total rated power (kW) × annual operating time (hours))

## Reference product
- Metal Parts: 1000; input; calculated
  源文件中描述为为金属件②，此处对其进行了匹配工作，将其匹配到LCAflow库里面相最符合的流，污染物指标备注为工业废气量

## Outputs
All rows: calculated
- Exhaust gas: 107000
  污染物指标工业废气量的末端治理技术是/，末端治理设施实际运行率（k值）计算公式为/，②采用染毒活体或培养基粉碎、植物粉碎、萃取等工艺生产的其他生物农药如下：棉铃虫核型多角体病毒、草原毛虫核多角体病毒、茶尺蠖核多角体病毒等。。原文件中描述污染物类别为废气，污染物指标为工业废气量，此处对其进行了匹配工作，将其匹配到LCAflow库里面相最符合的流，污染物指标备注为工业废气量
- particles (PM2.5 - PM10): 0.0078
  污染物指标颗粒物③的末端治理技术是袋式除尘，其效率为99，末端治理设施实际运行率（k值）计算公式为k=废气治理设施运行时间（小时）/废气产污核算环节正常生产时间（小时），②采用染毒活体或培养基粉碎、植物粉碎、萃取等工艺生产的其他生物农药如下：棉铃虫核型多角体病毒、草原毛虫核多角体病毒、茶尺蠖核多角体病毒等。。原文件中描述污染物类别为废气，污染物指标为颗粒物③，此处对其进行了匹配工作，将其匹配到LCAflow库里面相最符合的流，污染物指标备注为颗粒物③
- particles (PM2.5 - PM10): 0.078
  污染物指标颗粒物③的末端治理技术是管式过滤，其效率为90，末端治理设施实际运行率（k值）计算公式为k=废气治理设施运行时间（小时）/废气产污核算环节正常生产时间（小时），②采用染毒活体或培养基粉碎、植物粉碎、萃取等工艺生产的其他生物农药如下：棉铃虫核型多角体病毒、草原毛虫核多角体病毒、茶尺蠖核多角体病毒等。。原文件中描述污染物类别为废气，污染物指标为颗粒物③，此处对其进行了匹配工作，将其匹配到LCAflow库里面相最符合的流，污染物指标备注为颗粒物③
- particles (PM2.5 - PM10): 0.117
  污染物指标颗粒物③的末端治理技术是多管旋风除尘，其效率为85，末端治理设施实际运行率（k值）计算公式为k=废气治理设施运行时间（小时）/废气产污核算环节正常生产时间（小时），②采用染毒活体或培养基粉碎、植物粉碎、萃取等工艺生产的其他生物农药如下：棉铃虫核型多角体病毒、草原毛虫核多角体病毒、茶尺蠖核多角体病毒等。。原文件中描述污染物类别为废气，污染物指标为颗粒物③，此处对其进行了匹配工作，将其匹配到LCAflow库里面相最符合的流，污染物指标备注为颗粒物③
- particles (PM2.5 - PM10): 0.039
  污染物指标颗粒物③的末端治理技术是静电除尘，其效率为95，末端治理设施实际运行率（k值）计算公式为k=废气治理设施运行时间（小时）/废气产污核算环节正常生产时间（小时），②采用染毒活体或培养基粉碎、植物粉碎、萃取等工艺生产的其他生物农药如下：棉铃虫核型多角体病毒、草原毛虫核多角体病毒、茶尺蠖核多角体病毒等。。原文件中描述污染物类别为废气，污染物指标为颗粒物③，此处对其进行了匹配工作，将其匹配到LCAflow库里面相最符合的流，污染物指标备注为颗粒物③

## Data sources
- 第二次全国污染源普查产排污核算系数手册（试用版）,二级代码24,四级代码2443文件，在完整版文件中第2861页
