# clinker production|clinker, portland cement clinker|new dry process, ≥4000 t/d

Dataset: ILCD process, Unit process, single operation
Geography: CN
Reference year: 2019
Classification: Materials production / Other mineralic materials
Generated by: Siqi Yang
Amounts: no units in this file; such an amount is in the reference unit of its flow, which a separate flow dataset defines
copyright: false

## General comment
New dry process for cement clinker production. End-of-pipe treatment: Baghouse dust collector with an efficiency of 85%.

## Model description
The system boundary of the Life Cycle Assessment (LCA) is the clinker calcination unit process in the cement production process.

## Reference product
- clinker, portland cement clinker: 1000
  Ordinary portland cement clinker

## Inputs
- coal, powder: 137.4; measured
  Coal powder
- tap water: 300; measured
  Tap water
- raw meal: 1410; measured
  Ordinary portlant cement raw material
- electricity, medium voltage: 103.86; measured
  Electricity. Upstream data source: CLCD-China-ECER 0.8.1.

## Outputs
All rows: measured
- mercury: 6e-5
  Mercury [emissions to the atmosphere]
- particles (> PM10): 0.389
  Total particulate matter [emissions to the atmosphere], with an unspecified particle size, is treated as PM > 10 micrometers in diameter.
- Nitrogen oxides: 1.584
  Nitrogen oxides [emissions to the atmosphere]
- chemical oxygen demand: 6e-5
  Chemical oxygen demand [emissions to water bodies]
- wastewater, unpolluted: 2
  Wastewater [emissions to water bodies]
- fluorene: 0.002551
  Fluoride [emissions to the atmosphere]
- Clean gas: 3964
  Waste gas [emissions to the atmosphere]
- sulfur dioxide: 0.385
  Sulfur dioxide [emissions to the atmosphere]
- carbon dioxide (fossil): 748.1
  Carbon dioxide (fossil source) [emissions to the atmosphere]
- ammonia: 0.03964
  Ammonia [emissions to the atmosphere]

## Deviations from the LCI method approaches
A cement clinker lifecycle model was developed using eFootprint software system from Integrated Knowledge for our Environment, combined with CLCD quality assessment method, and LCA results were calculated.

## Cut-off and completeness
The data selection principle in this study adopts the cut-off principle recommended in the ISO140 series of international standards. The principle is based on the ratio of raw and auxiliary material input to product quality in the production process. The specific cut-off principle is as follows: (1) When the input weight of each ordinary raw material is less than 1% of the total input weight of process raw materials, and the weight of the raw material containing high-purity substances is less than 0.1% of the total input weight of process raw materials, the upstream production data of the material can be ignored. Additionally, the total mass of the ordinary material ignored should not exceed 5% of the total weight of the raw material input. In the case of system environmental emission data, the value of its contribution to the relevant LCA results can be calculated before deciding whether to ignore this data; (2) Upstream production data of low-value waste materials generated from other production processes as raw materials, such as tailings, can be ignored.

## Data selection and combination
Main data sources: representative production data from enterprises and supply chains. From actual data of enterprises and environmental impact assessment reports.

## Data sources
- 李畅. (2020). 江西省某铜尾矿资源化过程生命周期评价研究 [硕士, 江西理工大学].
