# Curedfishproducts,crustaceancuredproducts,cephalopodcuredproducts,algaecuredproducts|Freshfish,freshcrustaceans,freshcephalopods,algae|Salting/pickling/fermenting|All sizes / /|鱼腌制品、甲壳类腌制品、头足类腌制品、藻类腌制品|鲜鱼、鲜甲壳类、鲜头足类、藻类|盐渍/糟腌/发酵腌|所有规模

Dataset: ILCD process, Partly terminated system
Geography: CN
Reference year: 2019
Classification: Materials production / Other mineralic materials
Generated by: The data was created by the Office of the Second National Pollution Source Census of the Ministry of Ecology and Environment, and the data was organized by the TianGong Plan team for ILCD format / 生态环境部第二次全国污染源普查工作办公室创建数据，天工计划团队常慧敏整理数据为ILCD格式
Amounts: no units in this file; such an amount is in the reference unit of its flow, which a separate flow dataset defines
copyright: false

## Technology and included processes
the Technical of end-of-pipe management technology for pollution phosphorus, totalisFloating separation + aerobic biological treatment，Its Technical efficiency of end-of-pipe management50，The formula for calculating the actual operation rate (k-value) of the end-of-pipe treatment facility is k = opreating time of treatment facilities (days) / normal production time (days)
污染物指标总磷的末端治理技术是上浮分离+好氧生物处理法，其效率为50，末端治理设施实际运行率（k值）计算公式为k=污水治理设施耗电量（千瓦时/年）/污水治理设施运行时间（小时/年）/污水治理设施总功率（千瓦

## Reference product
- Fish, preserved: 1000; calculated
  原文件中描述污染物类别为Product，污染物指标为鱼腌制品、甲壳类腌制品、头足类腌制品、藻类腌制品，此处对其进行了匹配工作，将其匹配到LCAflow库里面相最符合的流

## Outputs
All rows: calculated
- Waste water: 32000
  原文件中描述污染物类别为废水，污染物指标为工业废水量，此处对其进行了匹配工作，将其匹配到LCAflow库里面相最符合的流
- chemical oxygen demand: 70.392, 56.3136, 42.2352, 1.40784, 10.5588, 10.5588, 10.5588 (7 entries)
  原文件中描述污染物类别为废水，污染物指标为化学需氧量，此处对其进行了匹配工作，将其匹配到LCAflow库里面相最符合的流
- Ammonia Nitrogen: 1.136, 1.0224, 0.9088, 0.02272, 0.2272, 0.284, 0.2272 (7 entries)
  原文件中描述污染物类别为废水，污染物指标为氨氮，此处对其进行了匹配工作，将其匹配到LCAflow库里面相最符合的流
- Nitrogen, organic bound: 3.48, 3.132, 2.784, 1.392, 1.392, 0.8004, 1.044 (7 entries)
  原文件中描述污染物类别为废水，污染物指标为总氮，此处对其进行了匹配工作，将其匹配到LCAflow库里面相最符合的流
- phosphorus, total: 0.696, 0.6264, 0.4176, 0.1044, 0.348, 0.348, 0.348 (7 entries)
  原文件中描述污染物类别为废水，污染物指标为总磷，此处对其进行了匹配工作，将其匹配到LCAflow库里面相最符合的流

## Data sources
- 第二次全国污染源普查产排污核算系数手册（试用版）,四级代码1362文件，在完整版文件中第2606页
