# 原铝生产 ; 原生铝锭 ; 铝土矿 ; 2006

Dataset: ILCD process, Unit process, single operation
Geography: CN
Reference year: 2014
Classification: Unit processes / Materials production / Metals and semimetals
Generated by: 封羽真, fyz22
Owner: 天工LCI数据工作小组
Review: Dependent internal review by 天工LCI数据工作小组
Amounts: no units in this file; such an amount is in the reference unit of its flow, which a separate flow dataset defines
copyright: false
licenseType: Free of charge for all users and uses

## General comment
通过该工艺生产的原生铝锭适用于广泛的应用场景。它们作为各种铝产品和组件制造的基本原料。包括但不限于建筑材料、汽车零件、航空航天构件、包装材料、电导体以及消费电子产品。

## Time period
文献发表日期

## Reference product
- aluminium, primary, ingot: 1000; missing unimportant

## Inputs
All rows: missing unimportant
- electricity, high voltage, aluminium industry: 54723.6
  电力
- hard coal: 482
  煤炭
- Petroleum Coke: 54.7
  焦炭
- drying, natural gas: 116
  天然气
- coal gas: 905
  煤气
- light fuel oil: 109
  燃料油

## Data selection and combination
原铝生产的资源和能耗数据，均 以《有 色 金 图 1 原铝生产的系统边界 Fig． 1 System boundary of primary aluminum production 属工业 年 鉴》 中的统计数据作为主要参考依 据。对于一些非统计性工艺数据，则来源于典型企 业生产工艺及技术指标的调研和公开发表的文献。

## Use advice
在使用原铝生产的生命周期评估数据时，重要的是要根据《有色金属工业年鉴》中呈现的统计数据来计算资源和能源消耗。对于非统计性工艺数据，应参考关于典型企业生产工艺和技术指标的调研和已公开发表的文献。此外，应注意考虑图1所示的原铝生产的系统边界。任何生产技术或效率的更新变化都应该在评估中体现，以保持准确性。

## Review details
清单： 内部审查通过几个迭代步骤完成，涉及原始数据验证、原始数据记录、代表性、完整性、与 ISO 14040 和 14044 有关的建模的一致性。

## Data sources
- 郭杰, 高峰, 王志宏, 刘宇, & 龚先政. 原铝生产流程温室气体排放主要影响因素的关联度分析. 环境工程学报 8, 4858–4863 (2014).
