# cement production|cement, ordinary portland cement, 42.5MPa|wet rotary kiln

Dataset: ILCD process, Unit process, black box
Geography: CN
Reference year: 2005
Classification: Materials production / Other mineralic materials
Generated by: Siqi Yang
Amounts: no units in this file; such an amount is in the reference unit of its flow, which a separate flow dataset defines
copyright: false

## General comment
Wet rotary kiln production process.
The raw material limestone is crushed by crusher, and the raw materials were crushed and washed into a slurry. The limestone, clay (slurry), iron powder, and appropriate amount of water are fed into the mill for grinding at the grinding head of raw material mill. The ground raw material slurry is pumped into the slurry storage by slurry pump, and then fed into the wet rotary kiln for calcination after evenly blending and meeting the requirements. The clinker from the kiln is cooled by the clinker cooling equipment and then sent to the clinker storage, then mixed with mixed materials and gypsum in a certain ratio, ground by the cement mill and then into the cement warehouse, packaged by the packaging machine and shipped out of the factory or in bulk.

## Model description
Taking the usage performance of cement with a compressive strength of 42.5 MPa at 28 days per 1 kg as the functional unit, that is IFu=42.5 kgMPa. The research scope is defined as: raw material pretreatment, raw material grinding, clinker calcination, clinker grinding, cement homogenization, and cement storage.

## Reference product
- cement, ordinary portland cement, 42.5MPa: 1000
  P.O. IFu=42.5kg MPa

## Inputs
All rows: measured
- limestone, crushed, for mill: 1246.3
  Limestone
- clay: 142.1
  Clay
- gypsum (desulphurized): 44.4
  Gupsum
- hard coal: 194.487
  Standard coal. The original data is 0.1807kg standard coal, here converted to hard coal, the conversion formula is 1kg hard coal = 0.929kg standard coal.
- electricity, medium voltage: 400.32
  Electricity

## Outputs
- particles (> PM10): 0.3; measured
  Dust, with an unspecified particle size, is treated as PM > 10 micrometers in diameter.
- sulfur dioxide: 0.9033; measured
  Sulfur dioxide. Considering the actual operating conditions of domestic cement plants and the development trend for the foreseeable future, the statistical average of measured data is adopted for this evaluation.
- Nitrogen oxides: 2.262; measured
  Nitrogen oxides. Considering the actual operating conditions of domestic cement plants and the development trend for the foreseeable future, the statistical average of measured data is adopted for this evaluation.
- carbon dioxide: 1127; measured
  Carbon dioxide. Considering the actual operating conditions of domestic cement plants and the development trend for the foreseeable future, the statistical average of measured data is adopted for this evaluation.

## Data sources
- 曹晓润. (2005). 低环境负荷型水泥的生态环境评价 [硕士, 武汉理工大学].
