# 底泥修复;异位修复;异位热解析;工程实施;干化

Dataset: ILCD process, Unit process, single operation
Geography: CN
Classification: Other Services / Repair and maintenance
Generated by: 王枫, wangfeng@caep.org.cn
Owner: 天工LCI数据工作小组
Review: Dependent internal review by 天工LCI数据工作小组
Amounts: no units in this file; such an amount is in the reference unit of its flow, which a separate flow dataset defines
copyright: false
licenseType: Free of charge for all users and uses

## General comment
以处理1 t 污泥为功能单位。1）运输环节采用载重5t卡车，运输距离2 km；2）干化环节采用空心桨叶干化机，功率55 kW，整个干化系统规模为50 t/d，24 h工作制；3）热解环节管式炉额定功率4 kW，空载功率1.4 kW，反应前通入2~3 分钟N2以保证无氧环境，热解终温选定350℃；4）热解所产气体首先经过冷却装置，冷凝收集液体成分主要为可以回收利用的生物油，回收分离出的可燃性气体，固体半焦可用作吸附剂。

## Technical purpose
所描述的工业过程是涉及异位（场外）热解析的底泥修复技术，用以处理1吨污泥。修复过程中使用功率为55 kW的空心桨叶干化机作为预处理步骤对污泥进行干化。干化系统的处理能力为每天50吨，连续操作24小时。运输环节涉及2公里的运距使用5吨卡车。热解析步骤在管式炉中进行，额定功率为4 kW，待机功率为1.4 kW。为确保无氧环境，在反应前用氮气冲洗2至3分钟。热解结束温度设定为350°C，热解所产生的气体首先通过冷却装置，冷凝收集的液体部分主要为具有较高热值的生物油，可收集用于能源回收。

## Reference product
- sediment: 840; calculated

## Inputs
- Electricity: 332.604; calculated

## Use advice
在使用此数据集进行生命周期评估时，重要的是要将运输和预处理步骤包括在系统边界内。用户应确保评估中包括氮气冲洗步骤，因为其能耗和潜在的环境影响。考虑生物油的热值至关重要，因为它代表了能源回收的潜力，因此可能会补偿系统中的其他能源需求。由于该过程是连续操作的，用户在计算年度影响时应计入运行时间。技术适用性应根据当地的法规要求以及干化污泥对热解析过程的兼容性进行核实。

## Review details
清单： 内部审查通过几个迭代步骤完成，涉及原始数据验证、原始数据记录、代表性、完整性、与 ISO 14040 和 14044 有关的建模的一致性。

## Data sources
- 王久兵.污泥热解反应机制及其能源化工艺的全生命周期评价研究[D].浙江工业大学,2016.
