# 阻隔层;混凝土水平阻隔;土壤修复;原位生物通风

Dataset: ILCD process, Unit process, black box
Geography: CN
Reference year: 2022
Classification: Unit processes / Other Services / Repair and maintenance
Generated by: 杨欣桐, yangxt@caep.org.cn
Owner: 天工LCI数据工作小组
Review: Dependent internal review by 天工LCI数据工作小组
Amounts: no units in this file; such an amount is in the reference unit of its flow, which a separate flow dataset defines
copyright: false
licenseType: Free of charge for all users and uses

## General comment
通过在地面铺设混凝土材料，形成水平阻隔层

## Time period
文章投稿日期

## Technical purpose
本数据集中描述的混凝土水平阻隔层用于土壤修复应用，特别是作为原位生物通风过程的一部分。通过在地面铺设混凝土材料，它充当物理障碍，以包含污染并为污染物的生物降解创造一个受控环境。

## Reference product
- Barrier layer: 1; measured
  文中没有给出具体的阻隔层的面积及厚度，所以这里采用项目为计量单位

## Inputs
All rows: measured
- Electricity: 8748
- Diesel,Diesel: 18.79
- Tap Water: 95
- Concrete: 22743
- cement, unspecified: 2374
- Diesel,Diesel: 11.555
  用于材料、设备和人员运输，但文中没有给出设备总重、运输距离、人员往返次数等信息，故无法采用tkm为运输单位

## Use advice
在使用此数据集进行生命周期评估时，请考虑原位生物通风过程的具体特点。在建模系统时，包括混凝土屏障的功能寿命，并评估其使用期间的潜在环境影响。核算生产和铺设屏障所关联的混凝土组成和环境负担。在修复项目的背景下，评估屏障的维护或更换频率。

## Review details
清单： 内部审查通过几个迭代步骤完成，涉及原始数据验证、原始数据记录、代表性、完整性、与 ISO 14040 和 14044 有关的建模的一致性。

## Data sources
- 刘文晓等.基于修复效果的污染土壤修复工程环境足迹分析[J].环境科学研究 35,2367-2377（2022）.
