# 凡纳滨对虾养成及综合利用|凡纳滨对虾加工产品|工厂化养殖与综合利用

Dataset: ILCD process, Unit process, black box
Geography: ZJ-GD-CN
Classification: Materials production / Other mineralic materials
Generated by: Kangni Wu, wukangni@xmu.stu.edu.cn
Review: Dependent internal review by Tiangong LCI Data Working Group
Amounts: no units in this file; such an amount is in the reference unit of its flow, which a separate flow dataset defines

## General comment
根据凡纳滨对虾养成和综合利用的实际情况，考虑与研究目的和功能单位直接相关的过程，不考虑工厂以外产生环境负荷的各个阶段；数 据采集为2011年年均数 据。功能单位为加工1000kg凡纳滨对虾。 养 殖过程中凡纳滨对虾的 成活率按70%计算，成 品虾规格按70头/kg，则养殖阶段的功能单位为养殖10万尾凡纳滨对虾虾苗。 繁殖阶段按照20%的成活率计算 ，则功能单位为繁殖50万尾无节幼体 。

## Geography
广东省湛江市的A企业，选择其中的对虾虾苗繁育基地、虾苗养殖基地、综合加工利用工厂

## Reference product
- Litopenaeus vannamei: 1000; article inperiodical

## Inputs
All rows: article inperiodical
- South American White Shrimp Juvenile: 500000
  无节幼体对虾
- hydrogen chloride gas: 0.15
- Formalin: 2.5
- Potassium Permanganate: 0.6
- chlorine disinfectant: 16.64
- EDTA: 0.015
  EDTA-2Na
- Assorted Feed: 1.5
- Artemia: 2.5
- enzyme: 1.05
- Plastic (unspecified): 20
- Water quality improvers: 25
- Active Microecological Agent: 8
- calcium carbonate: 266
- Nitrogenous Fertilizer: 5
- Water disinfectant: 0.2
- Urea: 3
- Fry feed: 1200
- superphosphate: 0.5
- Probiotics: 0.3
- Container: 100

## Sampling procedure
数据采集为2011年年均数据

## Review details
Inventory: The internal review was done by several iteration steps concerning raw data validation, raw data documentation, representativity, completeness and consistency of modelling with regard to ISO 14040 and 14044.; Documentation: The review of the documentation was performed by Ecobilan and is in compliance with ISO 14040 and 14044. The data set documentation is correct in view of the appropriateness of the information provided. It includes all relevant information in view of data quality and scope of application of the respective LCI result.

## Data sources
- 易湘茜, 孙恢礼 & 潘剑宇. 凡纳滨对虾生命周期环境影响模型分析评价研究. 广西科学 21, 306–312 (2014).
