# NCM直接回收 B

Dataset: ILCD process, Unit process, single operation
Geography: CN
Reference year: 2021
Classification: End-of-life treatment / Material recycling
Functional unit: In this paper, the functional unit is defined as the nominal capacity of 1 kWh LIBs, which converts all the data collected into functional units for the calculation to ensure the quantitative evaluation and cross comparability of energy consumption and environmental impact of different batteries in various stages.
Generated by: 马清源, m1120498928@163.com
Owner: 天工LCI数据工作小组
Review: Dependent internal review by 天工LCI数据工作小组
Amounts: no units in this file; such an amount is in the reference unit of its flow, which a separate flow dataset defines
copyright: false
licenseType: Free of charge for all users and uses

## General comment
电池在拆卸前放电，并对粉碎过程中挥发的电解质进行集中处理。然后，用DMC洗涤诸如电极片的小颗粒尺寸混合物以去除残留电解质。干燥后，通过在超声波辅助处理下浸入n-甲基-2-吡咯烷酮（NMP）中，将活性材料与集电体分离。将获得的混合悬浮液沉淀并在离心后干燥。根据颗粒大小的差异，将电极材料与集电器和隔膜分离。阴极和阳极材料通过泡沫浮选进一步划分。将过滤的阴极材料与LiOH溶液混合，并在低温和低压下进行再锂化。然后，将再锂化的正极材料粉末与过量的Li2CO3混合，并在氮气氛中热退火，以获得修复的电池级正极活性材料。

## Geography
实验室工艺

## Technology and included processes
在这里，我们选择了化学脱锂的NCM111作为我们研究的模型材料。为了获得D-NCM111，将购自Toda America股份有限公司的原始NCM111与过硫酸钾水溶液反应。然后用水洗涤该材料，然后用乙腈洗涤，然后在环境温度下真空干燥。

## Technical purpose
DR-B处理过程主要用于直接回收用完的锂离子电池（LIBs），特别是恢复电池级阴极活性材料。适用于实验室规模研究，旨在优化从废弃LIBs中回收有价值材料的方法。这个过程有助于减少废物和回收关键材料如镍、钴和锰（NCM），同时保持阴极材料的功能性完整。

## Reference product
- EoL NCM battery: 6.67; input

## Inputs
- sodium chloride: 0.049
- Lithium Hydroxide: 0.293
- Lithium carbonate: 0.025
- electricity mix: 9.612
- process steam: 13.3
- Mechanical treatment facility: 7
- Chemical Industry: 0.7
- Freight rail: 8.66
- Freight Truck: 0.866

## Outputs
- Dust (unspecified, from stack),Dust (unspecified, from stack): 0.0058
- non-methane volatile organic compounds: 0.000895
- Waste (solid): 0.196
- Cathode Material: 1.12
- Copper Scrap: 0.76
- Aluminum scrap: 0.554

## Data selection and combination
部分数据来源于 Xu, P. et al. Design and Optimization of the Direct Recycling of Spent Li-Ion Battery Cathode Materials. ACS Sustainable Chem. Eng. 9, 4543–4553 (2021).

## Use advice
提供的数据必须归一化到1kWh LIBs标称容量的功能单位，以确保不同电池之间的可比性。用户应仔细考虑再循环过程中涉及的方法学，特别是使用过硫酸钾进行化学脱锂以及随后的DMC、NMP和LiOH处理，这些可能具有重要的方法学意义。必须遵循化学品使用的适当安全和处理程序，并且必须严格记录回收过程的操作参数（如温度、压力和处理持续时间），以便复制结果。

## Review details
清单： 内部审查通过几个迭代步骤完成，涉及原始数据验证、原始数据记录、代表性、完整性、与 ISO 14040 和 14044 有关的建模的一致性。

## Data sources
- Chen, Q. et al. Investigating the environmental impacts of different direct material recycling and battery remanufacturing technologies on two types of retired lithium-ion batteries from electric vehicles in China. Separation and Purification Technology 308, 122966 (2023).
