# Sediment Remediation;In-situ Mulching;Materials Production;Activated Carbon

Dataset: ILCD process, Unit process, black box
Geography: NO
Reference year: 2011
Classification: Unit processes / Other Services / Repair and maintenance
Generated by: Sang Chunhui, sangch@mail.bnu.edu.cn
Owner: Tiangong LCI Data Working Group
Review: Dependent internal review by Tiangong LCI Data Working Group
Amounts: no units in this file; such an amount is in the reference unit of its flow, which a separate flow dataset defines
copyright: false
licenseType: Free of charge for all users and uses

## General comment
The production process of activated carbon materials used for Sediment capping.

## Geography
After investigation, no relevant domestic research literature has been found yet.

## Time period
There is no clear start time for data collection in the literature, and the start time of the validity period is based on the publication time of the literature

## Technology and included processes
The acticed carbon is anthracite coal based production (1kg) cosuming semi-anth coal 1.89 kg, electricity 0.3774kwh and the transport is 0.905 tkm.

## Technical purpose
The production process of activated carbon described here is specifically used for sediment capping in environmental remediation projects. The method involves in-situ mulching of sediment using activated carbon to contain and stabilize pollutants. This data set represents the production phase of activated carbon materials which are employed in the context of environmental engineering, particularly in regions of Southern China.

## Reference product
- Activated Carbon: 4.76e7; calculated

## Inputs
- Coal,Coal,Coal: 8.9964e7; calculated
- Electricity: 6.46713e7; calculated
- Road Transport,Road Transport: 4.3078e7; calculated

## Data selection and combination
Process inventory data were obtained in accordance with ISO 14040 on LCA.35 Primary data were obtained from site-specific pot experiments, pilot studies, and vendors, which were representative of situations in Southern China.

## Use advice
When utilizing this data set for life cycle assessment, the user should acknowledge the regional specificity of the data, which is representative of practices in Southern China. As no start time for data collection is provided, the user should consider the literature's publication date as the point at which the data becomes valid. It is advised to include this production phase data when assessing the overall environmental impact of sediment remediation projects that utilize in-situ mulching with activated carbon. Additionally, users should be aware that this data set does not contain information on subsequent transportation beyond the initial range provided, or on the use and disposal phases of the activated carbon.

## Review details
Inventory: The internal review was done by several iteration steps concerning raw data validation, raw data documentation, representativity, completeness and consistency of modelling with regard to ISO 14040 and 14044.

## Data sources
- Sparrevik, M. et al. Use of Life Cycle Assessments To Evaluate the Environmental Footprint of Contaminated Sediment Remediation. Environ. Sci. Technol. 45, 4235–4241 (2011).
