# 砖块生产 |页岩空心砖生产 |粉碎过程

Dataset: ILCD process, Unit process, single operation
Geography: GZ-JX-CN
Reference year: 2020
Classification: Materials production / Other mineralic materials
Generated by: Wang xiangjin
Amounts: no units in this file; such an amount is in the reference unit of its flow, which a separate flow dataset defines
copyright: false

## Reference product
- brickbat aggregate: 1431; measured
  砖粉粗骨料混合物

## Inputs
- brown coal; 11.9 MJ/kg: 330; measured
- shale: 1176; measured
- electricity mix: 2.073; measured

## Outputs
- particles (> PM10): 50; measured
- Particles (PM0.2 - PM2.5): 40; measured

## Data selection and combination
采用根据《第一次全国污染源普查工业污染源产排污系数手册 第七分册》中 3131 烧结类砖瓦及建筑砌块制造业产排污系数表的相关数据。

## Sampling procedure
该环评报告的数据来源于工厂的实时数据

## Data sources
- 年产 8000 万块页岩标砖项目环评报告公示
