# NCA前驱体生产 ; 镍钴铝锂氧化物 (NCA) 前驱体 ; 硫酸铝粉末

Dataset: ILCD process, Unit process, single operation
Geography: CN
Reference year: 2019
Classification: Unit processes / Materials production / Inorganic chemicals
Generated by: 谢金良, jinliang.research@gmail.com
Owner: 天工LCI数据工作小组
Review: Dependent internal review by 天工LCI数据工作小组
Amounts: no units in this file; such an amount is in the reference unit of its flow, which a separate flow dataset defines
copyright: false
licenseType: Free of charge for all users and uses

## General comment
NCA前驱体生产过程旨在合成镍钴铝锂氧化物（NCA），该物质通常用作锂离子电池的正极材料。其中涉及的硫酸铝粉末是合成NCA前驱体化合物的关键中间体。

## Time period
论文发表年

## Reference product
- NCA precursor: 1; measured

## Inputs
All rows: measured
- transport, freight, lorry 16-32 metric ton, unregulated: 0.545
  Lorry, 30t
- electricity, high voltage, aluminium industry: 0.0432
  Electricity
- cobalt sulfate: 1.36
  Cobalt sulfate
- nickel sulfate: 0.26
  Nickel sulfate
- aluminium sulfate, powder: 0.09
  Aluminum sulfate
- Sodium Hydroxide (100%): 0.88
  Sodium Hydroxide
- ammonia, anhydrous, liquid: 0.37
  Ammonia
- transport, pipeline, long distance, natural gas: 2.21
  Pipeline for natural gas
- Natural Gas: 0.0036
  Natural gas

## Use advice
用户应注意，NCA前驱体生产的数据集特定于所示出版年份涉及硫酸铝粉末的过程。必须考虑自发布以来可能发生的技术进步和环境法规对适用性的影响。特别是在考虑回收方面或生产效率的改进时，仔细评估数据与当前过程的相关性至关重要。

## Review details
清单： 内部审查通过几个迭代步骤完成，涉及原始数据验证、原始数据记录、代表性、完整性、与 ISO 14040 和 14044 有关的建模的一致性。

## Data sources
- Yin, R., Hu, S. & Yang, Y. Life cycle inventories of the commonly used materials for lithium-ion batteries in China. J. Clean. Prod. 227, 960–971 (2019).
