# Forming|Plasticfurniture|Thermosettingplastics/thermoplastics|Injection molding, extrusion molding, compression molding, blow molding, thermoforming, calendering, rotational molding, slush molding|All sizes / 成型|塑料家具|热固型塑料/热塑型塑料|注塑成型、挤出成型、模压成型、吹塑成型、热成型、压延成型、滚塑成型、搪塑成型|所有规模

Dataset: ILCD process, Partly terminated system
Geography: CN
Reference year: 2019
Classification: Materials production / Other mineralic materials
Generated by: The data was created by the Office of the Second National Pollution Source Census of the Ministry of Ecology and Environment, and the data was organized by the TianGong Plan team for ILCD format / 生态环境部第二次全国污染源普查工作办公室创建数据，天工计划团队常慧敏整理数据为ILCD格式
Amounts: no units in this file; such an amount is in the reference unit of its flow, which a separate flow dataset defines
copyright: false

## Technology and included processes
the treatment technology for the pollution of Plastic Furnituredidn't offered，The formula for calculating the actual operation rate (k-value) of the end-of-pipe treatment facility is k = operating time of waste gas treatment equipment (hours/year) / normal production time (hours/year)
污染物指标工业废气量的末端治理技术未说明

## Reference product
- Plastic Furniture: 1; calculated
  原文件中描述污染物类别为Product，污染物指标为塑料家具，此处对其进行了匹配工作，将其匹配到LCAflow库里面相最符合的流

## Outputs
- Exhaust gas: 37.7; calculated
  原文件中描述污染物类别为废气，污染物指标为工业废气量，此处对其进行了匹配工作，将其匹配到LCAflow库里面相最符合的流
- particles (PM2.5 - PM10): 0.00218, 0.00109, 0.00218, 0.0109 (4 entries); calculated
  原文件中描述污染物类别为废气，污染物指标为颗粒物，此处对其进行了匹配工作，将其匹配到LCAflow库里面相最符合的流
- volatile organic compound: 0.0022, 0.00088, 0.00066, 0.004136, 0.00308, 0.00352, 0.0044 (7 entries); calculated
  原文件中描述污染物类别为废气，污染物指标为挥发性有机物，此处对其进行了匹配工作，将其匹配到LCAflow库里面相最符合的流

## Data sources
- 第二次全国污染源普查产排污核算系数手册（试用版）,二级代码21,三级代码214.0文件，在完整版文件中第455页
