# 铝再生 ; 再生铝锭 ; 废铝 ; 2014年

Dataset: ILCD process, Unit process, single operation
Geography: CN
Reference year: 2021
Classification: Unit processes / Materials production / Metals and semimetals
Generated by: 蔡梓萌, caizm6178@163.com
Owner: 天工LCI数据工作小组
Review: Dependent internal review by 天工LCI数据工作小组
Amounts: no units in this file; such an amount is in the reference unit of its flow, which a separate flow dataset defines
copyright: false
licenseType: Free of charge for all users and uses

## General comment
通过该工业过程生产的再生铝锭主要用于制造各种铝制品，包括建筑材料、汽车组件、包装（如罐头和箔材）以及消费电子产品。这些锭作为二次原材料，替代从铝土矿石中获取的原铝，减少了采矿和加工的环境影响。

## Time period
文献发表日期

## Reference product
- secondary aluminium ingot: 1000; missing unimportant
  ingot

## Inputs
- electricity, high voltage, aluminium industry: 1148.4; missing unimportant
  electricity
- aluminium scrap, unspecified: 1180; missing unimportant
  aluminum scrap

## Data selection and combination
本研究的数据参考了PA、SA、电力等背景数据的LCA数据。PA数据来自统计数据源，SA数据主要来自文献。背景数据主要来自中国科学院生态环境研究中心CASRCEES 2018建立的中国本地化LCA数据库，涵盖能源、材料、交通、废物管理等LCA数据。

## Use advice
在使用再生铝锭的LCA数据时，确保系统边界明确划定至关重要，特别是与使用此材料的产品的生命周期终端处理相关时。考虑在回收和初级生产过程之间影响的分配。计算回收含量时，应排除初级铝生产的影响。此外，应仔细考虑背景数据，因为它是依据中国科学院生态环境研究中心 (CAS RCEES) 2018 的本地化数据；地理和技术方面的差异可能影响数据在中国以外过程的适用性。

## Review details
清单： 内部审查通过几个迭代步骤完成，涉及原始数据验证、原始数据记录、代表性、完整性、与 ISO 14040 和 14044 有关的建模的一致性。

## Data sources
- Ding, N., Liu, N., Lu, B. & Yang, J. Life cycle greenhouse gas emissions of aluminum based on regional industrial transfer in China. J. Ind. Ecol. 25, 1657–1672 (2021).
