# 砖块生产 ; 透水砖 ; 面料混合工艺

Dataset: ILCD process, Unit process, single operation
Geography: JNA-SD-CN
Reference year: 2018
Classification: Unit processes / Materials production / Other mineralic materials
Functional unit: The functional unit is the area of 1 m2 brick products.
Generated by: 王湘锦, r99rt4@163.com
Owner: 天工LCI数据工作小组
Review: Dependent internal review by 天工LCI数据工作小组
Amounts: no units in this file; such an amount is in the reference unit of its flow, which a separate flow dataset defines
copyright: false
licenseType: Free of charge for all users and uses

## General comment
非烧结砖块中的透水砖生产工艺

## Technical purpose
此过程生产的透水砖主要用于需要渗透性的铺地表面建设，以便促进水排放和减少地表径流。这类砖块通常用于生态友好型建筑项目、景观设计和城市基础设施中，以减轻洪水影响和补充地下水位。

## Reference product
- brick dust: 16; measured
  Fabric blending 材料

## Inputs
All rows: measured
- portland cement: 6.17
- sand: 9.26
- freshwater: 0.617
- Iron oxide pigment: 0.0926
- Electricity: 0.32832

## Outputs
- particles (PM10): 7.5e-5; measured

## Deviations from the LCI method approaches
本研究采用了 ReCiPe midpoint（H）模型。

## Data selection and combination
本研究从济南顺德水泥制品有限公司收集了混凝土路面砖和透水砖的生产能耗以及各种原材料、能源投入和废气排放的相关数据。济南顺德水泥制品有限公司 山东省。

## Sampling procedure
原材料、能源投入和废物排放的大部分数据都是从生产厂家的现场调查中收集的。减水剂，其化学成分是磺酸钠盐的甲醛缩合物

## Use advice
使用此生命周期评估（LCA）数据的用户应注意，当进行模型建立或比较时，功能单位是1平方米砖制品。建议考虑敏感性分析结果，尤其是关键工序输入和输出变化，以确保情景建模的准确性。此数据集反映了济南顺德水泥制品有限公司混凝土路面砖和透水砖生产的特定能耗和排放概况，可能并不代表其他生产地点或工艺。应注意数据的地理和技术适用性，并可能需要进行调整，以解决原材料或生产实践中的地区差异。

## Review details
清单： 内部审查通过几个迭代步骤完成，涉及原始数据验证、原始数据记录、代表性、完整性、与 ISO 14040 和 14044 有关的建模的一致性。

## Data sources
- Yuan, X. et al. Environmental and economic impacts assessment of concrete pavement brick and permeable brick production process - A case study in China. Journal of Cleaner Production 171, 198–208 (2018).
