# 超临界水气制氢

Dataset: ILCD process, Unit process, single operation
Geography: CN
Reference year: 2019
Classification: Energy carriers and technologies / Other non-renewable fuels
Functional unit: 1 kg hydrogen
LCI method principle: Attributional
Generated by: Bonnie Gan, jinlu.gan1998@gmail.com
Owner: 天工LCI数据工作小组
Review: Dependent internal review by 天工LCI数据工作小组
Amounts: no units in this file; such an amount is in the reference unit of its flow, which a separate flow dataset defines
copyright: false
licenseType: Free of charge for all users and uses

## General comment
生物质超临界水气化（SCWG）是一种很有前途的制氢技术。 SCWG 是一个复杂的过程，其中生物质裂解成气态、液态和固态生物产品，分别为合成气、生物油和木炭。该中试工厂包括四个子系统，即生物质和给水子系统、热交换子系统、太阳能聚光器和超临界水反应子系统、气体分离和收集子系统。 SCWGSolar中试系统的主要组成部分包括太阳能聚光器、太阳能接收器、SCW反应器、生物质浆料供给系统、热交换器、气液分离器和产品测试系统。

## Time period
文章的发表日期

## Technical purpose
该超临界水气化（SCWG）过程主要用于能源行业的制氢。该方法生产的氢气可用于燃料电池的零排放车辆、电力生成系统中的能源载体，或作为各种工业应用中减少碳足迹的清洁燃料。这种中试级系统特别适合与生物质来源和可再生能源技术（如太阳能）集成。

## Reference product
- Hydrogen: 1; calculated

## Inputs
- biomass; 14.7 MJ/kg: 6.24; article inperiodical
  wood sawdust
- Electricity: 10.944; article inperiodical
- primary energy from solar energy: 25.51; article inperiodical
- primary energy from solar energy: 4.04; article inperiodical
  can be solar energy or electricity

## Outputs
- methane: 0.17; calculated

## Use advice
在使用此数据集进行生命周期评估（LCA）时，用户应确保其研究范围与中试工厂的运行条件一致。应特别注意生物质来源、运行效率和太阳能聚光器的能源输入，因为这些参数对环境影响概况至关重要。用户必须考虑地理和技术相关性以及与SCWG过程的方法论一致性。在核算整体环境性能时，重要的是要包括可能的共产品分配或生物油和木炭副产品的能源信用。

## Review details
清单： 内部审查通过几个迭代步骤完成，涉及原始数据验证、原始数据记录、代表性、完整性、与 ISO 14040 和 14044 有关的建模的一致性。
