# Dry sand Production| sand stone crushing | cone crushing technology

Dataset: ILCD process, Unit process, single operation
Geography: HAIN-CN
Reference year: 2020
Classification: Materials production / Other mineralic materials
Generated by: Cui hang, Cuihang0716@163.com
Review: Dependent internal review by Tiangong LCI Data Working Group
Amounts: no units in this file; such an amount is in the reference unit of its flow, which a separate flow dataset defines
copyright: false

## General comment
Secondary crushing, screening and processing (cone crushing)

## Technology and included processes
After jaw crushing, it is transported to cone crusher through conveyor belt for second crushing, after crushing, it enters into vibrating screen for screening, and the crushed stone with smaller particle size goes into the finished product yard through conveyor belt, and the unqualified products with larger particle size go back to cone crusher for crushing, and sand making machine enters into sand making.

## Reference product
- gravel: 41870

## Inputs
- gravel: 41870; measured
- electricity mix: 315000; measured

## Review details
Inventory: The internal review was done by several iteration steps concerning raw data validation, raw data documentation, representativity, completeness and consistency of modelling with regard to ISO 14040 and 14044.; Documentation: The review of the documentation was performed by Ecobilan and is in compliance with ISO 14040 and 14044. The data set documentation is correct in view of the appropriateness of the information provided. It includes all relevant information in view of data quality and scope of application of the respective LCI result.

## Data sources
- 陵水海岛混凝土有限公司干法制砂项目
