# 露地蔬菜生产 ; 农作生产（番茄）

Dataset: ILCD process, Unit process, single operation
Geography: CN
Classification: Unit processes / Materials production / Agricultural production means
Functional unit: hm2
Generated by: Haoran Zhang, hrzhang@whu.edu.cn
Owner: 天工LCI数据工作小组
Review: Dependent internal review by 天工LCI数据工作小组
Amounts: no units in this file; such an amount is in the reference unit of its flow, which a separate flow dataset defines
copyright: false
licenseType: Free of charge for all users and uses

## General comment
系统边界集中于露地蔬菜生产全过程 ( 从播种到收获过程) ，分为农资阶段和农作阶段． 农资阶段主要关注肥料( 化肥和有机肥) 、农药和农 膜等生产和运输过程产生的温室气体排放． 农作阶 段主要关注肥料和农药施用过程、农事操作( 耕作、 灌溉等) 过程柴油消耗和人工耗能产生的温室气体 排放，另外还关注蔬菜通过净初级生产力固定于本 身的碳和有机肥投入引起的土壤有机碳固定［16］． 选 取单位面积( 每 hm2 ) 为此系统评价单元．

## Technology and included processes
基于国家农业统计数据，以露地番茄、黄瓜、大白菜和萝卜为研究对象，应用生命周期评价( life cycle assessment，LCA) 方法，定量化我国 4 种典型露地蔬菜生产中的净温室气体排放( net greenhouse gas emission，NGHGE) ，并比较蔬菜种类间、省域间净温室气体排放差异和分析减排措施．

## Technical purpose
该数据集代表中国露地番茄、黄瓜、大白菜和萝卜生产的生命周期温室气体排放情况。此数据对于了解农业实践的环境影响至关重要，适用于旨在实现可持续农业方法和减少农业排放的研究人员、政策制定者和农业企业。该数据集可作为中国不同地区间比较以及评估潜在减排策略的基准。

## Reference product
- Tomato: 71400; software or database
  番茄

## Inputs
All rows: software or database
- nitrogen: 406, 365, 41.1 (3 entries)
  番茄
- phosphorus: 232, 206, 26.1 (3 entries)
  番茄
- potassium: 229, 200, 28.9 (3 entries)
  番茄
- Rice Seeds: 108
  番茄
- Agricultural film: 74.8
  番茄
- Labor: 614
  番茄

## Deviations from the LCI method approaches
分为农资阶段和农作阶段．农资阶段主要关注肥料( 化肥和有机肥) 、农药和农膜等生产和运输过程产生的温室气体排放． 农作阶段主要关注肥料和农药施用过程、农事操作( 耕作、灌溉等) 过程柴油消耗和人工耗能产生的温室气体排放，另外还关注蔬菜通过净初级生产力固定于本身的碳和有机肥投入引起的土壤有机碳固定

## Data selection and combination
根据蔬菜种类和数据库能查询的各类蔬菜种植分布情况，选择 4种典型露地蔬菜，分别为瓜果类( 番茄、黄瓜) 、叶菜类( 大白菜) 和块根类( 萝卜) ，并收集整理 2016 年全国不同省份 4 种露地蔬菜生产种植相关数据( 中国台湾省数据暂缺)

## Data treatment and extrapolations
各种蔬菜的肥料施用量、柴油用量、农膜投入量、劳动者用工和产量数据从文献获得，其中，柴油费用通过公式［18］: 柴油费用 =( 机械作业费 + 排灌费 － 水费) × 21% + 燃料动力费计算得出，柴油单价数据来源于我国油价网数据库［19］． 农药投入数据参考罗巍［20］对全国露地蔬菜农药施用大数据分析的研究结果． 从文献［15］中查询获得各省不同种类蔬菜播种面积．

## Use advice
使用这个数据集的用户应考虑技术的适用性，包括地区实践和投入的特殊性。建议在应用这些LCA数据时，考虑数据对拟定农业上下文的代表性。此外，用户应注意在温室气体排放量化中使用的方法论框架和假设。由于蔬菜生长和有机肥料施用导致的碳固定效应的排除或包含，应根据目标评估的目的和范围进行处理。该数据集的系统边界限于露地蔬菜生产的整个过程；因此，用户在没有适当适配的情况下不应将其应用于不同的农业系统。

## Review details
清单： 内部审查通过几个迭代步骤完成，涉及原始数据验证、原始数据记录、代表性、完整性、与 ISO 14040 和 14044 有关的建模的一致性。

## Data sources
- 张芬,程泰鸿,陈新平,王孝忠.我国典型露地蔬菜生产中的温室气体排放[J].环境科学,2020,41(07):3410-3417.
