# 废铝加工 ; 新铝废料 ; 旧铝废料

Dataset: ILCD process, Unit process, single operation
Geography: CN
Classification: Unit processes / Materials production / Metals and semimetals
Generated by: 常慧敏, huiminchang@tsinghua.edu.cn
Owner: 天工LCI数据工作小组
Review: Dependent internal review by 天工LCI数据工作小组
Amounts: no units in this file; such an amount is in the reference unit of its flow, which a separate flow dataset defines
copyright: false
licenseType: Free of charge for all users and uses

## General comment
该工艺回收的铝材可在接受二手铝材的各种行业中使用，例如汽车、包装、建筑和消费电子产品行业。此材料可以用作铝合金、铸造和挤压产品生产的输入材料。相比于原生铝生产，回收铝因其较低的环境影响而备受重视。

## Reference product
- aluminium scrap, new: 1000; software or database
  Pre-processed aluminumscrap

## Inputs
- electricity, high voltage, aluminium industry: 414.9; software or database
  Electricity [kWh]
- aluminium scrap, post-consumer: 1042.45; estimated
  Unprocessed aluminum scrap [kg] ; 80% from CN and 20% from USA
- quicklime, in pieces, loose: 0.8961; estimated
  Quicklime ; EU-28 used as no specific data for CN and NO available
- sodium hydroxide, without water, in 50% solution state: 0.3409; software or database
  Sodium silicate
- freshwater: 1.4978; software or database
  Fresh water [kg]
- heat, district or industrial, natural gas: 896.99; software or database
  Natural gas [MJ]

## Data selection and combination
为了获得可靠的研究结果，我们考虑了最新的和有代表性的数据。如果 GaBi©"专业和推广 "数据库（SP 39）或文献中提供了特定地区或国家的数据，则使用这些数据。如果找不到特定地区的数据，则使用该国的可比数据或全球数据。为保持一致性，如果有相同来源和年份的数据，则使用相同来源和年份的数据。由于数据的可获得性，如果某些输入和背景过程对总输入质量的贡献小于 1%，则本研究不考虑这些输入和背景过程。对于原铝生产，本研究使用了国际铝业协会（IAI）提供的 2015 年最新 LCI 数据（国际铝业协会，2017b）。之所以使用 IAI 的数据，是因为 IAI 是一个考虑全球原铝生产的成熟机构，其数据已在铝业协会和欧洲铝业协会等研究中使用（铝业协会，2013 年；欧洲铝业协会，2018 年）。就标准化原铝生产的生命周期评估数据而言，不确定因素很少。一般来说，这些数据的组成可以完全解释和重建。

## Use advice
在使用此数据集进行生命周期评估时，请确保回收的包含或排除与研究的目标和范围保持一致。在模拟使用阶段行为时，应特别注意实际的终生回收率和过程。铝业协会的数据应用于二次生产建模。为了准确性，根据来源指示，应调整反映回收过程中更高盐输入的数据。在与原生铝生产数据比较时，还必须考虑由于二级生产中的各种收集、处理和精炼方法不同而产生的方法论差异。

## Review details
清单： 内部审查通过几个迭代步骤完成，涉及原始数据验证、原始数据记录、代表性、完整性、与 ISO 14040 和 14044 有关的建模的一致性。

## Data sources
- Luthin, A., Backes, J. G. & Traverso, M. A framework to identify environmental-economic trade-offs by combining life cycle assessment and life cycle costing – A case study of aluminium production. Journal of Cleaner Production 321, 128902 (2021).
