# 炼钢;钢;转炉炼钢（D01）

Dataset: ILCD process, Unit process, single operation
Geography: CN
Reference year: 1998
Classification: Materials production / Metals and semimetals
Generated by: 付翔, 1162850692@qq.com
Owner: 天工LCI数据工作小组
Review: Dependent internal review by 天工LCI数据工作小组
Amounts: no units in this file; such an amount is in the reference unit of its flow, which a separate flow dataset defines
copyright: false
licenseType: Free of charge for all users and uses

## General comment
来自表 4-17 D01 钢厂生产吨材环境负荷编目表

## Time period
论文提到钢铁企业环境总体数据为1998年的吨钢环境基础数据。

## Technical purpose
通过基氧炉（BOF）工艺生产的熔融钢用于广泛的钢铁产品，这些产品包括建筑材料、汽车、机械、家电以及其他需要高强度钢的应用。

## Reference product
- Crude Steel: 1078; measured
  粗钢

## Inputs
- Energy, geothermal, converted: 1004.05; measured
- water: 24363; measured
- Molten Iron: 1065; measured
  铁水

## Outputs
All rows: measured
- Dust (unspecified, from stack): 4.583
- Hydrocarbons, aliphatic, alkanes, unspecified: 0.001848
  石油类
- Suspended solids, unspecified: 0.469081
- chemical oxygen demand: 0.223435
- Dust (unspecified, from stack): 21.951
  集尘
- Spoil (deposited, hibernating in ground, non elementary flow): 161.7

## Use advice
用户应注意，转炉炼钢生产过程的环境负荷清单数据基于1998年吨钢环境影响的基础数据。因此，用户在将数据应用于当前评估时应考虑数据的时间相关性。此外，分析中还必须注意钢铁回收、技术适用性以及区域特定环境影响的考量。

## Review details
清单： 内部审查通过几个迭代步骤完成，涉及原始数据验证、原始数据记录、代表性、完整性、与 ISO 14040 和 14044 有关的建模的一致性。

## Data sources
- 周和敏. 钢铁材料生产过程环境协调性评价研究. (北京工业大学, 2001).
