# 华东(恒台)玉米生产 ; 原料开采与运输

Dataset: ILCD process, Partly terminated system
Geography: ZB-SD-CN
Reference year: 2003
Valid until: 2004
Classification: Unit processes / Transport services / Road
Functional unit: 1t
Generated by: Haoran Zhang, hrzhang@whu.edu.cn
Owner: 天工LCI数据工作小组
Review: Dependent internal review by 天工LCI数据工作小组
Amounts: no units in this file; such an amount is in the reference unit of its flow, which a separate flow dataset defines
copyright: false
licenseType: Free of charge for all users and uses

## General comment
本文把研究对象分为3个阶段即原料开采与 运输阶段、农用化学品生产与运输阶段和夏玉米田 间种植阶段分别简称原料阶段、农资阶段和种植 阶段．原料阶段的影响包括矿石和化石能源开采等 引起的能源与资源消耗及污染排放；农资阶段的影 响有农用化学品生产所导致的大量能源消耗和废 水、废气及污染物排放；种植阶段的影响包括整地、 灌溉、施肥、病虫害防治等管理措施引起的燃料、电 力、水资源消耗及径流、淋溶、挥发等过程的污染物 排放；各阶段中运输过程的影响主要是燃料消耗及 由此产生的尾气排放．

## Geography
恒台县

## Technology and included processes
依据ＩＳＯ（2006）提出的ＬＣＡ原则与框架ＬＣＡ 由4个相互关联的阶段组成即：目标定义与范围界 定（ｇｏａｌａｎｄｓｃｏｐｅｄｅｆｉｎｉｔｉｏｎ）、清单分析（ｉｎｖｅｎｔｏｒｙ）、 影响评价（ｉｍｐａｃｔａｓｓｅｓｓｍｅｎｔ）和生命周期解释 （ｉｎｔｅｒｐｒ

## Technical purpose
该数据集描述了华东（恒台）玉米生产和运输过程中的环境影响。它包括碳排放因子、能源利用和水消耗指标，这些指标对农业部门的生命周期评估（LCA）至关重要。该数据可用于玉米种植的生命周期评估，提供原材料提取、肥料等投入品以及种植和运输活动总体影响的洞见。

## Reference product
- maize grain: 1000; measured

## Inputs
All rows: measured
- Electricity: 1051
  施氮水平N0
- Electricity: 2110
  施氮水平N1
- Electricity: 3824
  施氮水平N2
- Electricity: 6340
  施氮水平N3
- water: 186000
  施氮水平N0
- water: 192000
  施氮水平N1
- water: 244000
  施氮水平N2
- water: 323000
  施氮水平N3

## Outputs
All rows: measured
- carbon monoxide (fossil): 0.16
  施氮水平N0
- carbon monoxide (fossil): 0.21
  施氮水平N1
- carbon monoxide (fossil): 0.31
  施氮水平N2
- carbon monoxide (fossil): 0.47
  施氮水平N3
- nitrous oxide: 0.11
  施氮水平N0
- nitrous oxide: 0.18
  施氮水平N1
- nitrous oxide: 0.26
  施氮水平N2
- nitrous oxide: 0.15
  施氮水平N3
- carbon dioxide (fossil),carbon dioxide (fossil): 994.64
  施氮水平N0
- carbon dioxide (fossil),carbon dioxide (fossil): 979.07
  施氮水平N1
- carbon dioxide (fossil),carbon dioxide (fossil): 1244.75
  施氮水平N2
- carbon dioxide (fossil),carbon dioxide (fossil): 2218.82
  施氮水平N3
- methane (fossil),methane (fossil): 0.47
  施氮水平N0
- methane (fossil),methane (fossil): 0.67
  施氮水平N1
- methane (fossil),methane (fossil): 1.05
  施氮水平N2
- methane (fossil),methane (fossil): 1.6
  施氮水平N3
- sulfur dioxide: 0.59
  施氮水平N0
- sulfur dioxide: 1.5
  施氮水平N1
- sulfur dioxide: 2.83
  施氮水平N2
- sulfur dioxide: 4.78
  施氮水平N3
- Nitrogen oxides: 0.53
  施氮水平N0
- Nitrogen oxides: 2.13
  施氮水平N1
- Nitrogen oxides: 2.81
  施氮水平N2
- Nitrogen oxides: 3.86
  施氮水平N3
- ammonia: 1.13
  施氮水平N0
- ammonia: 2.06
  施氮水平N1
- ammonia: 3.5
  施氮水平N2
- ammonia: 5.61
  施氮水平N3
- nitrogen, total (excluding N2): 0.02
  施氮水平N1
- nitrogen, total (excluding N2): 0.05
  施氮水平N2
- nitrogen, total (excluding N2): 0.08
  施氮水平N3
- TotalPhosphorus: 0.03
  施氮水平N0
- TotalPhosphorus: 0.03
  施氮水平N1
- TotalPhosphorus: 0.04
  施氮水平N2
- TotalPhosphorus: 0.04
  施氮水平N3
- chemical oxygen demand: 0.19
  施氮水平N1
- chemical oxygen demand: 0.44
  施氮水平N2
- chemical oxygen demand: 0.8
  施氮水平N3

## Deviations from the LCI method approaches
研究的起始边界从与夏玉米生命周期有关的 矿石和能源开采开始终止边界为作物种植管理输 出农产品和污染物

## Data selection and combination
原料阶段和农资阶段的能耗、水耗等技术经济 指标来自《中国统计年鉴》（2005～2008）、《中国环 境年鉴》（2004～2006）、《中国能源统计年鉴》（2004 ～2006）、《中国化学工业年鉴》（2006）和《中国电力 年鉴》（2005～2006）等种植阶段的相关数据来自 田间记录．各阶段主要的大气污染物和水污染物包 括ＳＯ2、ＣＨ4、ＣＯ2、ＣＯ、Ｎ2Ｏ、ＣＯＤ、ＮＨ3和ＮＯｘ等其 排放系数来自国内公开发表文献（狄向华等2005； 胡志远等2006；段宁2007）．种植阶段与碳、氮有 关的各种排污系数来自中国农业大学山东桓台实 验站及其它研究机构在华北平原开展的研究报道

## Data treatment and extrapolations
分为特 征化、标准化和加权评估3个步骤

## Sampling procedure
中国农业大学山东桓台实验站2003～ 2004年夏玉米肥料实验的4个施氮处理为典型研 究对象4个氮肥处理用量分别是0、100、200、300 ｋｇ·ｈｍ—2·ａ—1分别以Ｎ0、Ｎ1、Ｎ2、Ｎ3表示

## Use advice
使用者应将此数据集专用于中国东部恒台县玉米种植的生命周期模型。在使用此数据集进行影响评估时，应特别注意与模型中应用的其他数据源保持方法论上的一致性。应特别注意在回收阶段是否包括排放物的包含与排除，模拟使用阶段行为，技术适用性，以及氮肥处理（N0、N1、N2、N3）产生的排放。该数据集应与系统边界一起使用，这些边界定义从矿石与能源开采开始至作物生命周期管理结束时农产品和污染物的输出。

## Review details
清单： 内部审查通过几个迭代步骤完成，涉及原始数据验证、原始数据记录、代表性、完整性、与 ISO 14040 和 14044 有关的建模的一致性。

## Data sources
- 王明新,吴文良,夏训峰. 2010. 华北高产粮区夏玉米生命周期环境影响评价 [J]. 环境科学学报 30(6): 1339—1344
