# 湿蒸法棉布染整加工;印染棉布;丝光

Dataset: ILCD process, Unit process, single operation
Geography: SZ-JS-CN
Reference year: 2012
Classification: Unit processes / Materials production / Other materials
Generated by: 段颖凡, 1300925579@qq.com
Owner: 天工LCI数据工作小组
Review: Dependent internal review by 天工LCI数据工作小组
Amounts: no units in this file; such an amount is in the reference unit of its flow, which a separate flow dataset defines
copyright: false
licenseType: Free of charge for all users and uses

## General comment
丝光是印染过程中的一种处理，旨在通过在织物表面涂覆丝光剂，使其呈现出一种光亮、丝绸般的光泽。这个过程通常包括在印染完成后将织物经过丝光剂的处理，然后通过加热或其他手段使其固化，最终产生光滑、有光泽的表面。

## Geography
本研究选取江苏省某印染企业为重点调研对象，该企业位于长三角经济圈中的常熟。

## Technical purpose
本工业流程涉及湿蒸法棉布染整加工，为纺织行业特别是印染棉布和丝光处理所使用。丝光处理能增强棉布的光泽、强度和染色亲和力。煤炭在蒸汽和导热油锅炉中被使用，用以产生蒸汽并维持高操作温度，这对纺织加工的各个阶段（例如煮练氧漂、丝光、磨毛、平幅水洗、培烘和轧染）是必需的。蒸汽用于在上述每个工序后对坯布进行烘干处理，其中轧染需要进行两步烘干，其它阶段各为一步烘干。该流程旨在根据2:1:1:1:1:2的比例高效配置各阶段的蒸汽使用，基于假设每个烘缸消耗相同蒸汽量。

## Reference product
- Cotton Fabric: 167; measured

## Inputs
- Electricity: 530; measured
- Standard coal: 981; measured
- Crude coal: 129; calculated
- Cleaned coal: 318; calculated
- Fuel Oil: 2.74; calculated
- heavy fuel oil: 0.826; calculated
- Diesel oil: 3.77; calculated
- Coke Oven Gas: 5.03; calculated
- natural gas: 0.0645; calculated
- process steam: 3.15e7; measured
- sodium hydroxide: 0.0336; measured
- Sulfuric acid: 14.4; calculated
- Acetic acid: 11.1; measured
- river water: 12500; measured
- freshwater: 2300; measured

## Outputs
- carbon dioxide (fossil): 2850; calculated
- carbon monoxide (fossil): 0.347; calculated
- sulfur dioxide: 2.15; calculated
- methane (fossil): 13.6; calculated
- Nitrogen oxides: 0.684; calculated
- nitrous oxide: 0.0431; measured
- particles (> PM10): 1.15; calculated
- non-methane volatile organic compounds: 0.0043; measured
- waste water - untreated: 11000; measured
- chemical oxygen demand: 12.6; calculated
- Suspended solids, unspecified,Suspended solids, unspecified: 1.39; calculated
- lead: 1.01e-5; calculated
- mercury: 2.12e-7; calculated
- fluorine: 1.91e-6; calculated
- cadmium: 3.75e-7; calculated
- arsenic: 8.65e-6; calculated

## Use advice
在使用这些LCA数据时，用户必须特别注意棉布染整加工过程中不同阶段能源的分配。报告中所指出的蒸汽和导热油锅炉的煤炭消费比例应在使用煤炭作为能源时被考虑在内。另外，至关重要的是，这些数据基于对位于江苏省长三角经济区中的常熟市某印染企业的特定操作调研。用户必须考虑区域能源结构和技术水平，并如有必要，调整数据以反映当地或特定的生产条件。回收和产品末生命周期的情景没有包含在这个数据集中，用户需要根据他们的LCA研究要求分别处理这些方面。

## Review details
清单： 内部审查通过几个迭代步骤完成，涉及原始数据验证、原始数据记录、代表性、完整性、与 ISO 14040 和 14044 有关的建模的一致性。

## Data sources
- 朱亚楠. 棉布连续轧染工艺生命周期环境影响评价. (南京大学, 2012).
