# cement production|cement, portland-composite cement|new dry process, 4500 t/d|mixed solid wastes

Dataset: ILCD process, Unit process, black box
Geography: CN
Reference year: 2012
Classification: Materials production / Other mineralic materials
Generated by: Siqi Yang
Amounts: no units in this file; such an amount is in the reference unit of its flow, which a separate flow dataset defines
copyright: false

## General comment
The company is equipped with a 4500t/d new dry process cement clinker production line.

## Geography
A cement plant in Northeast China

## Model description
The system boundary is the cement production system of the cement plant.

## Reference product
- cement, portland-composite cement: 1000
  Cement products

## Inputs
All rows: measured
- limestone, crushed, for mill: 1140.24
  Limestone
- shale: 18.4146
  Shale
- silica stone: 17.8049
  Silica
- iron, powder: 31.8293
  Iron powder
- gypsum (desulphurized): 56.5244
  Gupsum
- ash: 134.756
  Fly ash
- blast furnace slag: 215.244
  Blast furnace slag
- hard coal, run-of-mine: 109.39
  Coal. Annual coal consumption energy = (1.794E+8) kg x (2.149E+7) J/kg (average lower heating value) = (3.86E+15) J.
- diesel: 4.42683
  Diesel. Diesel = (7.260E+6) kg x (46.04) MJ/kg (combustion value) = (3.34E+8) MJ.
- electricity, medium voltage: 330.585
  Total electricity consumption. Annual electricity consumption energy = (1.506E+8) kWh x (3.60E+6) J/kWh = (5.42E+14) J.
- tap water: 251.22
  The original text refers to total water consumption, which includes tap water.

## Outputs
- carbon dioxide: 896.341; measured
  CO2
- sulfur dioxide: 0.337805; measured
  SO2
- Nitrogen oxides: 1.13415; measured
  NOx
- particles (> PM10): 0.878049; measured
  Dust, with an unspecified particle size, is treated as PM > 10 micrometers in diameter.

## Data sources
- 邵帅. (2016). 基于Emergy和Em-LCA的水泥企业可持续发展水平评价 [硕士, 大连理工大学].
