# 铝电解电容器生产 ; 分割纸 ; 分隔纸分切 ; 分离器纸卷

Dataset: ILCD process, Unit process, single operation
Geography: JS-CN
Reference year: 2020
Classification: Unit processes / Materials production / Other materials
Generated by: 常慧敏, huiminchang@tsinghua.edu.cn
Owner: 天工LCI数据工作小组
Review: Dependent internal review by 天工LCI数据工作小组
Amounts: no units in this file; such an amount is in the reference unit of its flow, which a separate flow dataset defines
copyright: false
licenseType: Free of charge for all users and uses

## General comment
分隔纸分切 ; 铝电解电容器 (AEC) 生产 ; 420V 680uf

## Time period
The investigated manufacturer produced about 1.183 billion AECs of all kinds in 2020.

## Technical purpose
本生产数据描述的是铝电解电容器（AEC），适用于需要稳定和可靠能量存储的各种电子产品，如电源滤波器和信号耦合装置。具体而言，所生产的AEC采用420V 680uf配置，适合高电压应用。分隔纸是AEC生产中的关键组件，对电容器的整体性能和耐久性起着至关重要的作用。

## Reference product
- Separator paper: 110.868; measured
  Separator paper [kg]

## Inputs
- electricity, high voltage, aluminium industry: 6.588; measured
  Electricity [kWh]
- Separator Paper Coil,Separator Paper Coil: 115.488; measured
  Separator paper coil [kg]

## Outputs
- waste paper, sorted: 4.62; measured
  Scraps of separator paper [kg]

## Data selection and combination
电容器生产的库存数据来自 AEC 位于中国江苏省的生产工厂。每道工序的 LCI 数据收集的截止标准是至少覆盖输入流和输出流 95% 的质量和能量。阳极箔生产和阴极箔生产的库存数据是根据生产工艺和相应工艺参数分析获得的。上游数据（即铝锭、分选纸、运输、电力和水）来自 Gabi 软件（版本：10.6.1.35）。具体而言，《中国电力年鉴》中的中国电网概况以 2016 年为基准年。铝锭生产的基准年为 2015 年。无法获取的柠檬酸铵、五硼酸铵、NH4H2PO4 和 HBO3 数据是根据 Gabi 软件中现有材料（反应物）的化学方程式估算的。使用和报废阶段的库存数据是通过分析和计算获得的。

## Use advice
此数据集应在反映中国生产环境和技术条件的背景下使用，铝锭生产的参考年份为2015年，中国电网的参考年份为2016年。用户如有更新或特定地区的数据，应更新铝锭和用电数据。生命周期清单（LCI）数据收集的割裂标准意味着至少95％的质量和能量输入输出流覆盖率。用户在建模生产时，应该考虑到这个门槛。某些数据是通过化学方程式估算得出的，一旦有实际工业数据可用时应进行核实。使用阶段和生命周期末端数据也应根据具体应用和法规要求，纳入LCA模型中。

## Review details
清单： 内部审查通过几个迭代步骤完成，涉及原始数据验证、原始数据记录、代表性、完整性、与 ISO 14040 和 14044 有关的建模的一致性。

## Data sources
- Zhang, C., Jing, J., Yun, L., Zheng, Y. & Huang, H. A cradle-to-grave life cycle assessment of high-voltage aluminum electrolytic capacitors in China. J. Clean. Prod. 370, (2022).
