# Sanding/Sanding|Bambooflooring,bamboo,rattan,palm,strawproducts|Bamboo,bamboo,rattan,palm,grass,stain,adhesive|Surfacetreatment|All sizes / 砂光/打磨|竹地板、竹、藤、棕、草制品|竹材、竹、藤、棕、草、染色剂、胶粘剂|表面处理|所有规模

Dataset: ILCD process, Partly terminated system
Geography: CN
Reference year: 2019
Classification: Materials production / Other mineralic materials
Generated by: The data was created by the Office of the Second National Pollution Source Census of the Ministry of Ecology and Environment, and the data was organized by the TianGong Plan team for ILCD format / 生态环境部第二次全国污染源普查工作办公室创建数据，天工计划团队常慧敏整理数据为ILCD格式
Amounts: no units in this file; such an amount is in the reference unit of its flow, which a separate flow dataset defines
copyright: false

## Technology and included processes
the treatment technology for the pollution of Bamboo Flooringdidn't offered
污染物指标工业废气量的末端治理技术未说明

## Reference product
- Bamboo Flooring: 1, 1 (2 entries); calculated
  原文件中描述污染物类别为Product，污染物指标为竹地板、竹、藤、棕、草制品，此处对其进行了匹配工作，将其匹配到LCAflow库里面相最符合的流

## Outputs
- Exhaust gas: 970; calculated
  原文件中描述污染物类别为废气，污染物指标为工业废气量，此处对其进行了匹配工作，将其匹配到LCAflow库里面相最符合的流
- particles (PM2.5 - PM10): 0.28, 0.28, 0.14, 1.4 (4 entries); calculated
  原文件中描述污染物类别为废气，污染物指标为颗粒物，此处对其进行了匹配工作，将其匹配到LCAflow库里面相最符合的流

## Data sources
- 第二次全国污染源普查产排污核算系数手册（试用版）,二级代码20,三级代码204.0文件，在完整版文件中第385页
