# Fermentedmilk|Rawcow'smilk,sugar,milkpowder|Milk collection + cold storage + clean milk + blending + preheating + homogenization + sterilization + cooling + inoculation + fermentation + stirring + cooling + filling|50~100 t/d / /|发酵乳|生鲜牛乳、白砂糖、奶粉|收奶+冷贮+净乳+配料+预热+均质+杀菌+冷却+接种+发酵+搅拌+冷却+灌装|50～100吨/天

Dataset: ILCD process, Partly terminated system
Geography: CN
Reference year: 2019
Classification: Materials production / Other mineralic materials
Generated by: The data was created by the Office of the Second National Pollution Source Census of the Ministry of Ecology and Environment, and the data was organized by the TianGong Plan team for ILCD format / 生态环境部第二次全国污染源普查工作办公室创建数据，天工计划团队常慧敏整理数据为ILCD格式
Amounts: no units in this file; such an amount is in the reference unit of its flow, which a separate flow dataset defines
copyright: false

## Technology and included processes
the Technical of end-of-pipe management technology for pollution Fermented Dairy Productsis/，Its Technical efficiency of end-of-pipe management0
污染物指标废水排放量的末端治理技术是/，其效率为0

## Reference product
- Fermented Dairy Products: 1000; calculated
  原文件中描述污染物类别为Product，污染物指标为发酵乳，此处对其进行了匹配工作，将其匹配到LCAflow库里面相最符合的流，污染物指标备注为废水排放量

## Outputs
- Waste water: 7460; calculated
  原文件中描述污染物类别为废水，污染物指标为废水排放量，此处对其进行了匹配工作，将其匹配到LCAflow库里面相最符合的流，污染物指标备注为废水排放量
- chemical oxygen demand: 0.175898, 13.5306 (2 entries); calculated
  原文件中描述污染物类别为废水，污染物指标为化学需氧量，此处对其进行了匹配工作，将其匹配到LCAflow库里面相最符合的流，污染物指标备注为化学需氧量
- Ammonia Nitrogen: 0.0102921, 0.1183 (2 entries); calculated
  原文件中描述污染物类别为废水，污染物指标为氨氮，此处对其进行了匹配工作，将其匹配到LCAflow库里面相最符合的流，污染物指标备注为氨氮
- Nitrogen, organic bound: 0.0848897, 0.52272 (2 entries); calculated
  原文件中描述污染物类别为废水，污染物指标为总氮，此处对其进行了匹配工作，将其匹配到LCAflow库里面相最符合的流，污染物指标备注为总氮

## Data sources
- 第二次全国污染源普查产排污核算系数手册（试用版）,二级代码14,四级代码1441文件，在完整版文件中第3413页
