# Soil remediation ; Ex-situ remediation ; Chemical oxidation ; Project implementation ; Soil excavation

Dataset: ILCD process, Unit process, single operation
Geography: AH-CN
Classification: Other Services / Repair and maintenance
Generated by: Sang Chunhui, sangch@mail.bnu.edu.cn
Owner: Tiangong LCI Data Working Group
Review: Dependent internal review by Tiangong LCI Data Working Group
Amounts: no units in this file; such an amount is in the reference unit of its flow, which a separate flow dataset defines
licenseType: Free of charge for all users and uses

## General comment
Contaminated soil excavation 29,437.9 m3

## Geography
安徽省合肥市受重金属和有机物复合污染的钢铁厂地块

## Technical purpose
The industrial process described is used for environmental remediation specifically targeting a steel plant site in Hefei, Anhui Province, which is contaminated with heavy metals and organic pollutants. The process involves excavating contaminated soil, with a volume of 29,437.9 cubic meters, followed by ex-situ chemical oxidation. This technique is typically applied in the field of environmental engineering to clean up contaminated land, enabling it to be reclaimed for safe use or development.

## Inputs
- Diesel: 4.179; article inperiodical

## Use advice
Users of this data set should ensure that they apply the information within the proper context of ex-situ soil remediation using chemical oxidation for heavy metals and organic compounds. When utilizing this data for life cycle assessment or environmental impact studies, users must account for site-specific conditions, adapt the data to regional policy requirements, and include considerations for downstream waste management and potential for soil reuse after treatment. Where applicable, recycling or reuse of the remediated soil should be included in the system boundary of the LCA.

## Review details
Inventory: The internal review was done by several iteration steps concerning raw data validation, raw data documentation, representativity, completeness and consistency of modelling with regard to ISO 14040 and 14044.

## Data sources
- 桑春晖,杨欣桐,李香兰等.基于SEFA方法的异位土壤修复环境足迹分析——以某钢铁厂为例[J].中国环境科学,2023,43(10):
