# 砖块生产 ;页岩空心砖生产 ;烘干过程

Dataset: ILCD process, Unit process, single operation
Geography: GZ-JX-CN
Reference year: 2020
Classification: Unit processes / Materials production / Other mineralic materials
Generated by: 王湘锦, r99rt4@163.com
Owner: 天工LCI数据工作小组
Review: Dependent internal review by 天工LCI数据工作小组
Amounts: no units in this file; such an amount is in the reference unit of its flow, which a separate flow dataset defines
copyright: false
licenseType: Free of charge for all users and uses

## General comment
传统页岩空心砖生产工艺

## Technical purpose
在此过程中生产的页岩空心砖通常用于建筑行业建造墙体、地基及其它结构组件，因为它们具有重量轻、隔熱性好和结构强度高等优点。

## Reference product
- fired brick: 1450; measured
  细坯

## Inputs
- green brick: 1510; measured
- Electricity: 3.7332; measured

## Deviations from the LCI method approaches
环境影响评估报告基于砖的年产量（8000万块砖），出于统计目的，数据已根据其中所述的尺寸规格进行转换，即每吨生产的砖

## Data selection and combination
采用根据《第一次全国污染源普查工业污染源产排污系数手册 第七分册》中 3131 烧结类砖瓦及建筑砌块制造业产排污系数表的相关数据。

## Sampling procedure
该环评报告的数据来源于工厂的实时数据

## Use advice
在使用该数据集进行生命周期评估时，请参考《第一次全国污染源普查工业污染源产排污系数手册 第七分册》中规定的具体产排污系数。确认技术相关性以确保数据适用于预定使用范围，并确保年产量数据与每吨砖块的单位相对应。对于不同砖块尺寸或生产方法，可能需要进行调整。

## Review details
清单： 内部审查通过几个迭代步骤完成，涉及原始数据验证、原始数据记录、代表性、完整性、与 ISO 14040 和 14044 有关的建模的一致性。

## Data sources
- 年产 8000 万块页岩标砖项目环评报告公示
