# 熟料生产|熟料, 硅酸盐水泥熟料, 52.5MPa|粉煤灰 4%

Dataset: ILCD process, LCI结果
Geography: CN
Classification: Materials production / Other mineralic materials
Generated by: 杨思琪
Amounts: no units in this file; such an amount is in the reference unit of its flow, which a separate flow dataset defines
copyright: false

## General comment
企业利用粉煤灰（掺量4%）替代部分原料生产水泥熟料。

## Model description
选取1t强度为52.5MPa的水泥熟料作为功能单位。 研究选取“从摇篮到大门”的系统边界，天然矿物生产水泥熟料产品系统包括原燃料的获取、运输以及水泥熟料生产过程；综合利用粉煤灰生产水泥熟料系统边界还包括上游发电系统及避免的粉煤灰堆砌处置过程。

## Reference product
- clinker, portland cement clinker, 52.5MPa: 1000
  粉煤灰熟料52.5MPa

## Inputs
All rows: measured
- limestone, crushed, for mill: 1280
  石灰石
- wastewater, unpolluted: 109
  砂岩
- iron, powder: 51
  铁粉
- ash: 60
  粉煤灰。粉煤灰生产过程的生命周期清单数据取自文献。
- hard coal, run-of-mine: 156
  原煤
- electricity, medium voltage: 138.24
  电力

## Outputs
All rows: measured
- carbon dioxide: 836
  CO2
- Nitrogen oxides: 1.44
  NOx
- sulfur dioxide: 0.773
  SO2
- carbon monoxide: 0.34
  CO
- methane: 1.56
  CH4
- non-methane volatile organic compounds: 0.121
  NMVOC

## Deviations from the LCI method approaches
石灰石、黏土、砂岩等原材料的开采、能源生产、运输、粉煤灰堆砌处置等过程的清单数据来自Ecoinvent数据库。

## Data sources
- 邵亦白, 刘宇, 郑焱, 任品桥, & 杜世伟. (2022). 利废水泥熟料产品系统的生命周期清单分析方法及应用. 中国水泥, 11, 59–62.
