# 聚丙烯（PP）生产;聚丙烯

Dataset: ILCD process, Unit process, black box
Geography: CN
Reference year: 2020
Classification: Unit processes / Materials production / Organic chemicals
Functional unit: considering 1 kg resin production as the functional unit.
Generated by: 郭慧娟, GHJ@email.ncu.edu.cn
Owner: 天工LCI数据工作小组
Review: Dependent internal review by 天工LCI数据工作小组
Amounts: no units in this file; such an amount is in the reference unit of its flow, which a separate flow dataset defines
copyright: false
licenseType: Free of charge for all users and uses

## General comment
通过前期原油精炼得到乙烯和丙烯，然后分别聚合成PE和PP。

## Geography
Process-based data from China were used, yet if not available, data from Europe were applied instead.

## Time period
Process-based data from China were used, yet if not available, data from Europe were applied instead. The electricity input was developed based on the national grid structure in China (Table S3), which was obtained from the share of the electric power structure in 2020 (National Bureau Statistics of China, 2020).

## Technical purpose
通过此工艺生产的聚丙烯（PP）树脂应用于多种用途，包括包装、汽车零部件、消费品和医疗设备。该材料因其耐疲劳、耐化学溶剂、耐碱和耐酸等属性而广泛应用。考虑到其生产过程包括聚合从早期原油精炼得到的丙烯，这种PP可被用于需要高纯度和一致性的应用场景。

## Model description
life cycle environmental and human health impacts were modeled using SimaPro software (version 8.5) with Ecoinvent 3 and ELCD (European Reference Life Cycle Database) databases.

## Reference product
- polypropylene granulate (PP): 1; missing unimportant
  PP

## Inputs
- propene (propylene): 1.05; missing unimportant
  Propylene
- naphtha: 1.64; missing unimportant
- Process water: 0.00234; missing unimportant
  Processed water
- Electricity: 4; missing unimportant

## Outputs
All rows: missing unimportant
- carbon dioxide (fossil): 1.21
  原文未区分bio和fossil，根据专家判断此处为fossil
- nitrogen: 0.037
- sulfur dioxide: 0.0121
- chemical oxygen demand: 0.00014
- chloroform: 1.5e-7
- toluene: 4.6e-6
- benzene: 0.0015
- 1,1,2-trichloroethane: 0.0058
  Trichloroethane
- Waste (unspecified): 5.53
- particles (>PM10): 0.0025
- Volatile Organic Compounds (VOCs): 0.00277

## Data treatment and extrapolations
ReCiPe method (Europe H/H) was used as the assessment method for consistency.

## Use advice
使用这份PP生产数据集时，如果应用于中国或欧洲以外地区，确保调整数据以反映具体区域能源结构的差异，因为数据集的电力输入基于中国国家电网结构和欧洲的基准。计算环境影响时始终使用规定的1公斤树脂功能单位来保持一致性。请注意，评估中使用了ReCiPe（欧洲H/H）方法，请在与使用不同影响评估方法的研究比较时考虑到这点。如果要与其他LCA数据库整合，请确保它们与SimaPro（版本8.5）、Ecoinvent 3和ELCD兼容，以实现准确建模。

## Review details
清单： 内部审查通过几个迭代步骤完成，涉及原始数据验证、原始数据记录、代表性、完整性、与 ISO 14040 和 14044 有关的建模的一致性。

## Data sources
- An, J., Wu, F., Wang, D. & You, J. Estimated material metabolism and life cycle greenhouse gas emission of major plastics in China: A commercial sector-scale perspective. Resources, Conservation and Recycling 180, (2022).
