# 电力生产 ; 混合电力 ; 贵州

Dataset: ILCD process, Unit process, single operation
Geography: GZ-CN
Reference year: 2019
Classification: Unit processes / Energy carriers and technologies / Electricity
Generated by: 熊若熙, xiongrx0126@163.com
Owner: 天工LCI数据工作小组
Review: Dependent internal review by 天工LCI数据工作小组
Amounts: no units in this file; such an amount is in the reference unit of its flow, which a separate flow dataset defines
copyright: false
licenseType: Free of charge for all users and uses

## General comment
混合电力产生形式包括火力发电、水力发电、风力发电、核能发电和太阳能发电

## Technical purpose
该数据集代表了贵州混合电力的生产，可用于需要电力的各个部门。电力混合包括火力（煤、天然气、石油）、水力、风力、核能和太阳能发电过程。这种混合反映了该地区居民、商业、工业和交通运输部门使用的能源。

## Reference product
- Electricity: 3.6; missing unimportant
  [{'text': '3.6', 'type': 'text'}]

## Inputs
All rows: missing unimportant
- electricity for thermal power: 2.21686
  [{'text': '3.6', 'type': 'text'}]
- electricity from hydroelectric power plant: 1.2268
  [{'text': '3.6', 'type': 'text'}]
- electricity for nuclear power: 0
  [{'text': '3.6', 'type': 'text'}]
- electricity from wind power: 0.124434
  [{'text': '3.6', 'type': 'text'}]
- electricity for solar power: 0.0319068
  [{'text': '3.6', 'type': 'text'}]

## Use advice
在使用此数据集进行生命周期评估或碳足迹计算时，用户应考虑贵州电力混合的具体能源结构。在与其他地区比较或评估产品生命周期时，考虑电力生成来源的区域差异非常重要。还应考虑数据的时效性，因为能源组合会随时间变化。用户应根据可用的最新数据更新数据集，并确保技术适用性与他们的具体案例研究相符。

## Review details
清单： 内部审查通过几个迭代步骤完成，涉及原始数据验证、原始数据记录、代表性、完整性、与 ISO 14040 和 14044 有关的建模的一致性。

## Data sources
- 能源统计年鉴2020
