# 地下水修复;原位修复;吸附;废弃吸附剂处置;制砖

Dataset: ILCD process, Unit process, single operation
Geography: ID
Reference year: 2022
Classification: Unit processes / Other Services / Repair and maintenance
Generated by: 肖萌, xiaomeng@mail.bnu.edu.cn
Owner: 天工LCI数据工作小组
Review: Dependent internal review by 天工LCI数据工作小组
Amounts: no units in this file; such an amount is in the reference unit of its flow, which a separate flow dataset defines
copyright: false
licenseType: Free of charge for all users and uses

## General comment
废吸附剂的处置是通过用 90% 粘土将其固定在砖中来管理的。

## Technical purpose
本工艺旨在通过将废弃吸附剂与90%的粘土混合、并沉积在砖块中，管理废弃吸附剂的处理。这种做法主要服务于建筑行业，它为生产砖块提供了一种环保解决方案，同时通过原位修复方法解决地下水污染问题。

## Reference product
- Aluminium hydroxide/oxide nanoparticles adsorption (Spent; waste): 3.06; input; measured
  Spent adsorbent

## Inputs
- clay: 27.54; measured
- Tap Water: 6; measured

## Outputs
- Brick: 30.6; measured

## Use advice
在使用此数据集进行生命周期评估时，用户应注意废弃吸附剂在砖块生产过程中的应用。应特别注意从废物填埋转向砖块制造中有益使用的环境好处的量化。此外，重要的是要考虑在建筑材料中回收使用废弃吸附剂的技术可行性和区域法规合法性，并充分考虑砖块在使用期间可能从中渗出的污染物对环境的潜在影响。

## Review details
清单： 内部审查通过几个迭代步骤完成，涉及原始数据验证、原始数据记录、代表性、完整性、与 ISO 14040 和 14044 有关的建模的一致性。

## Data sources
- Goyal, H. & Mondal, P. Life cycle assessment (LCA) of the arsenic and fluoride removal from groundwater through adsorption and electrocoagulation: A comparative study. Chemosphere 304, 135243 (2022).
