# Electricity/electricalenergy+heatenergy|Coal|Pulverized coal boiler|less than or equal to8 MW / 电能/电能+热能|煤炭|煤粉锅炉|小于等于8兆瓦

Dataset: ILCD process, Unit process, single operation
Geography: CN
Reference year: 2019
Classification: Energy carriers and technologies / Electricity
Generated by: The data was created by the Office of the Second National Pollution Source Census of the Ministry of Ecology and Environment, and the data was organized by the TianGong Plan team for ILCD format / 生态环境部第二次全国污染源普查工作办公室创建数据，天工计划团队常慧敏整理数据为ILCD格式
Owner: Tiangong LCI Data Working Group / 天工LCI数据工作小组
Review: Dependent internal review by Tiangong LCI Data Working Group / 天工LCI数据工作小组
Amounts: no units in this file; such an amount is in the reference unit of its flow, which a separate flow dataset defines
copyright: false
licenseType: Free of charge for all users and uses

## General comment
the Technical of end-of-pipe management technology for pollution volatile organic compoundis/

## Reference product
- Coal: 1000; input; calculated
  源文件中描述为为煤炭，此处对其进行了匹配工作，将其匹配到LCAflow库里面相最符合的流，污染物指标备注为工业废气量（烟煤）

## Outputs
All rows: calculated
- Exhaust gas: 9186
  污染物指标工业废气量（烟煤）的末端治理技术是其他（直排）。原文件中描述污染物类别为废气，污染物指标为工业废气量（烟煤），此处对其进行了匹配工作，将其匹配到LCAflow库里面相最符合的流，污染物指标备注为工业废气量（烟煤）
- Exhaust gas: 5915
  污染物指标工业废气量（褐煤）的末端治理技术是其他（直排）。原文件中描述污染物类别为废气，污染物指标为工业废气量（褐煤），此处对其进行了匹配工作，将其匹配到LCAflow库里面相最符合的流，污染物指标备注为工业废气量（褐煤）
- particles (PM2.5 - PM10): nan
  污染物指标颗粒物（烟煤）的末端治理技术是静电除尘，其效率为0.0085Aar+99.59，末端治理设施实际运行率（k值）计算公式为除尘设施年实际运行小时数/机组年实际运行小时数。原文件中描述污染物类别为废气，污染物指标为颗粒物（烟煤），此处对其进行了匹配工作，将其匹配到LCAflow库里面相最符合的流，污染物指标备注为颗粒物（烟煤）
- particles (PM2.5 - PM10): nan
  污染物指标颗粒物（烟煤）的末端治理技术是电袋组合，其效率为0.008Aar+99.64，末端治理设施实际运行率（k值）计算公式为除尘设施年实际运行小时数/机组年实际运行小时数。原文件中描述污染物类别为废气，污染物指标为颗粒物（烟煤），此处对其进行了匹配工作，将其匹配到LCAflow库里面相最符合的流，污染物指标备注为颗粒物（烟煤）
- particles (PM2.5 - PM10): nan
  污染物指标颗粒物（烟煤）的末端治理技术是袋式除尘，其效率为0.0075Aar+99.65，末端治理设施实际运行率（k值）计算公式为除尘设施年实际运行小时数/机组年实际运行小时数。原文件中描述污染物类别为废气，污染物指标为颗粒物（烟煤），此处对其进行了匹配工作，将其匹配到LCAflow库里面相最符合的流，污染物指标备注为颗粒物（烟煤）
- particles (PM2.5 - PM10): nan
  污染物指标颗粒物（烟煤）的末端治理技术是高效静电除尘①，其效率为0.0017Aar+99.918，末端治理设施实际运行率（k值）计算公式为除尘设施年实际运行小时数/机组年实际运行小时数，①高效颗粒物末端治理技术：采取高效电源供电、低低温电除尘、超净电袋、高效袋式除尘、湿法脱硫协同、湿式电除尘等技术，满足《燃煤电厂超低排放烟气
  治理工程技术规范》（HJ2053-2186）相关要求。
  。原文件中描述污染物类别为废气，污染物指标为颗粒物（烟煤），此处对其进行了匹配工作，将其匹配到LCAflow库里面相最符合的流，污染物指标备注为颗粒物（烟煤）
- particles (PM2.5 - PM10): nan
  污染物指标颗粒物（烟煤）的末端治理技术是高效电袋组合①，其效率为0.0016Aar+99.928，末端治理设施实际运行率（k值）计算公式为除尘设施年实际运行小时数/机组年实际运行小时数，①高效颗粒物末端治理技术：采取高效电源供电、低低温电除尘、超净电袋、高效袋式除尘、湿法脱硫协同、湿式电除尘等技术，满足《燃煤电厂超低排放烟气
  治理工程技术规范》（HJ2053-2187）相关要求。
  。原文件中描述污染物类别为废气，污染物指标为颗粒物（烟煤），此处对其进行了匹配工作，将其匹配到LCAflow库里面相最符合的流，污染物指标备注为颗粒物（烟煤）
- particles (PM2.5 - PM10): nan
  污染物指标颗粒物（烟煤）的末端治理技术是高效袋式除尘①，其效率为0.0015Aar+99.93，末端治理设施实际运行率（k值）计算公式为除尘设施年实际运行小时数/机组年实际运行小时数，①高效颗粒物末端治理技术：采取高效电源供电、低低温电除尘、超净电袋、高效袋式除尘、湿法脱硫协同、湿式电除尘等技术，满足《燃煤电厂超低排放烟气
  治理工程技术规范》（HJ2053-2188）相关要求。
  。原文件中描述污染物类别为废气，污染物指标为颗粒物（烟煤），此处对其进行了匹配工作，将其匹配到LCAflow库里面相最符合的流，污染物指标备注为颗粒物（烟煤）
- particles (PM2.5 - PM10): nan
  污染物指标颗粒物（烟煤）的末端治理技术是高效静电除尘+其他（湿法脱硫协同）①，其效率为0.00068Aar+99.9672，末端治理设施实际运行率（k值）计算公式为除尘设施年实际运行小时数/机组年实际运行小时数，①高效颗粒物末端治理技术：采取高效电源供电、低低温电除尘、超净电袋、高效袋式除尘、湿法脱硫协同、湿式电除尘等技术，满足《燃煤电厂超低排放烟气
  治理工程技术规范》（HJ2053-2189）相关要求。
  。原文件中描述污染物类别为废气，污染物指标为颗粒物（烟煤），此处对其进行了匹配工作，将其匹配到LCAflow库里面相最符合的流，污染物指标备注为颗粒物（烟煤）
- particles (PM2.5 - PM10): nan
  污染物指标颗粒物（烟煤）的末端治理技术是高效电袋组合+其他（湿法脱硫协同）①，其效率为0.00064Aar+99.9712，末端治理设施实际运行率（k值）计算公式为除尘设施年实际运行小时数/机组年实际运行小时数，①高效颗粒物末端治理技术：采取高效电源供电、低低温电除尘、超净电袋、高效袋式除尘、湿法脱硫协同、湿式电除尘等技术，满足《燃煤电厂超低排放烟气
  治理工程技术规范》（HJ2053-2190）相关要求。
  。原文件中描述污染物类别为废气，污染物指标为颗粒物（烟煤），此处对其进行了匹配工作，将其匹配到LCAflow库里面相最符合的流，污染物指标备注为颗粒物（烟煤）
- particles (PM2.5 - PM10): nan
  污染物指标颗粒物（烟煤）的末端治理技术是高效袋式除尘+其他（湿法脱硫协同）①，其效率为0.0006Aar+99.972，末端治理设施实际运行率（k值）计算公式为除尘设施年实际运行小时数/机组年实际运行小时数，①高效颗粒物末端治理技术：采取高效电源供电、低低温电除尘、超净电袋、高效袋式除尘、湿法脱硫协同、湿式电除尘等技术，满足《燃煤电厂超低排放烟气
  治理工程技术规范》（HJ2053-2191）相关要求。
  。原文件中描述污染物类别为废气，污染物指标为颗粒物（烟煤），此处对其进行了匹配工作，将其匹配到LCAflow库里面相最符合的流，污染物指标备注为颗粒物（烟煤）
- particles (PM2.5 - PM10): nan
  污染物指标颗粒物（烟煤）的末端治理技术是高效静电除尘+其他（湿式电除尘）①，其效率为0.00034Aar+99.9836，末端治理设施实际运行率（k值）计算公式为除尘设施年实际运行小时数/机组年实际运行小时数，①高效颗粒物末端治理技术：采取高效电源供电、低低温电除尘、超净电袋、高效袋式除尘、湿法脱硫协同、湿式电除尘等技术，满足《燃煤电厂超低排放烟气
  治理工程技术规范》（HJ2053-2192）相关要求。
  。原文件中描述污染物类别为废气，污染物指标为颗粒物（烟煤），此处对其进行了匹配工作，将其匹配到LCAflow库里面相最符合的流，污染物指标备注为颗粒物（烟煤）
- particles (PM2.5 - PM10): nan
  污染物指标颗粒物（烟煤）的末端治理技术是高效电袋组合+其他（湿式电除尘）①，其效率为0.00032Aar+99.9856，末端治理设施实际运行率（k值）计算公式为除尘设施年实际运行小时数/机组年实际运行小时数，①高效颗粒物末端治理技术：采取高效电源供电、低低温电除尘、超净电袋、高效袋式除尘、湿法脱硫协同、湿式电除尘等技术，满足《燃煤电厂超低排放烟气
  治理工程技术规范》（HJ2053-2193）相关要求。
  。原文件中描述污染物类别为废气，污染物指标为颗粒物（烟煤），此处对其进行了匹配工作，将其匹配到LCAflow库里面相最符合的流，污染物指标备注为颗粒物（烟煤）
- particles (PM2.5 - PM10): nan
  污染物指标颗粒物（烟煤）的末端治理技术是高效袋式除尘+其他（湿式电除尘）①，其效率为0.0003Aar+99.986，末端治理设施实际运行率（k值）计算公式为除尘设施年实际运行小时数/机组年实际运行小时数，①高效颗粒物末端治理技术：采取高效电源供电、低低温电除尘、超净电袋、高效袋式除尘、湿法脱硫协同、湿式电除尘等技术，满足《燃煤电厂超低排放烟气
  治理工程技术规范》（HJ2053-2194）相关要求。
  。原文件中描述污染物类别为废气，污染物指标为颗粒物（烟煤），此处对其进行了匹配工作，将其匹配到LCAflow库里面相最符合的流，污染物指标备注为颗粒物（烟煤）
- particles (PM2.5 - PM10): nan
  污染物指标颗粒物（烟煤）的末端治理技术是高效静电除尘+其他（湿法脱硫协同）+其他（湿式电除尘）①，其效率为0.000136Aar+99.9934，末端治理设施实际运行率（k值）计算公式为除尘设施年实际运行小时数/机组年实际运行小时数，①高效颗粒物末端治理技术：采取高效电源供电、低低温电除尘、超净电袋、高效袋式除尘、湿法脱硫协同、湿式电除尘等技术，满足《燃煤电厂超低排放烟气
  治理工程技术规范》（HJ2053-2195）相关要求。
  。原文件中描述污染物类别为废气，污染物指标为颗粒物（烟煤），此处对其进行了匹配工作，将其匹配到LCAflow库里面相最符合的流，污染物指标备注为颗粒物（烟煤）
- particles (PM2.5 - PM10): nan
  污染物指标颗粒物（烟煤）的末端治理技术是高效电袋组合+其他（湿法脱硫协同）+其他（湿式电除尘）①，其效率为0.000128Aar+99.9942，末端治理设施实际运行率（k值）计算公式为除尘设施年实际运行小时数/机组年实际运行小时数，①高效颗粒物末端治理技术：采取高效电源供电、低低温电除尘、超净电袋、高效袋式除尘、湿法脱硫协同、湿式电除尘等技术，满足《燃煤电厂超低排放烟气
  治理工程技术规范》（HJ2053-2196）相关要求。
  。原文件中描述污染物类别为废气，污染物指标为颗粒物（烟煤），此处对其进行了匹配工作，将其匹配到LCAflow库里面相最符合的流，污染物指标备注为颗粒物（烟煤）
- particles (PM2.5 - PM10): nan
  污染物指标颗粒物（烟煤）的末端治理技术是高效袋式除尘+其他（湿法脱硫协同）+其他（湿式电除尘）①，其效率为0.00012Aar+99.9944，末端治理设施实际运行率（k值）计算公式为除尘设施年实际运行小时数/机组年实际运行小时数，①高效颗粒物末端治理技术：采取高效电源供电、低低温电除尘、超净电袋、高效袋式除尘、湿法脱硫协同、湿式电除尘等技术，满足《燃煤电厂超低排放烟气
  治理工程技术规范》（HJ2053-2197）相关要求。
  。原文件中描述污染物类别为废气，污染物指标为颗粒物（烟煤），此处对其进行了匹配工作，将其匹配到LCAflow库里面相最符合的流，污染物指标备注为颗粒物（烟煤）
- particles (PM2.5 - PM10): nan
  污染物指标颗粒物（烟煤）的末端治理技术是静电除尘+其他（湿法脱硫协同），其效率为0.0034Aar+99.836，末端治理设施实际运行率（k值）计算公式为除尘设施年实际运行小时数/机组年实际运行小时数。原文件中描述污染物类别为废气，污染物指标为颗粒物（烟煤），此处对其进行了匹配工作，将其匹配到LCAflow库里面相最符合的流，污染物指标备注为颗粒物（烟煤）
- particles (PM2.5 - PM10): nan
  污染物指标颗粒物（烟煤）的末端治理技术是电袋组合+其他（湿法脱硫协同），其效率为0.0032Aar+99.856，末端治理设施实际运行率（k值）计算公式为除尘设施年实际运行小时数/机组年实际运行小时数。原文件中描述污染物类别为废气，污染物指标为颗粒物（烟煤），此处对其进行了匹配工作，将其匹配到LCAflow库里面相最符合的流，污染物指标备注为颗粒物（烟煤）
- particles (PM2.5 - PM10): nan
  污染物指标颗粒物（烟煤）的末端治理技术是袋式除尘+其他（湿法脱硫协同），其效率为0.003Aar+99.860，末端治理设施实际运行率（k值）计算公式为除尘设施年实际运行小时数/机组年实际运行小时数。原文件中描述污染物类别为废气，污染物指标为颗粒物（烟煤），此处对其进行了匹配工作，将其匹配到LCAflow库里面相最符合的流，污染物指标备注为颗粒物（烟煤）
- particles (PM2.5 - PM10): nan
  污染物指标颗粒物（烟煤）的末端治理技术是静电除尘+其他（湿式电除尘），其效率为0.0017Aar+99.918，末端治理设施实际运行率（k值）计算公式为除尘设施年实际运行小时数/机组年实际运行小时数。原文件中描述污染物类别为废气，污染物指标为颗粒物（烟煤），此处对其进行了匹配工作，将其匹配到LCAflow库里面相最符合的流，污染物指标备注为颗粒物（烟煤）
- particles (PM2.5 - PM10): nan
  污染物指标颗粒物（烟煤）的末端治理技术是电袋组合+其他（湿式电除尘），其效率为0.0016Aar+99.928，末端治理设施实际运行率（k值）计算公式为除尘设施年实际运行小时数/机组年实际运行小时数。原文件中描述污染物类别为废气，污染物指标为颗粒物（烟煤），此处对其进行了匹配工作，将其匹配到LCAflow库里面相最符合的流，污染物指标备注为颗粒物（烟煤）
- particles (PM2.5 - PM10): nan
  污染物指标颗粒物（烟煤）的末端治理技术是袋式除尘+其他（湿式电除尘），其效率为0.0015Aar+99.930，末端治理设施实际运行率（k值）计算公式为除尘设施年实际运行小时数/机组年实际运行小时数。原文件中描述污染物类别为废气，污染物指标为颗粒物（烟煤），此处对其进行了匹配工作，将其匹配到LCAflow库里面相最符合的流，污染物指标备注为颗粒物（烟煤）
- particles (PM2.5 - PM10): nan
  污染物指标颗粒物（烟煤）的末端治理技术是静电除尘+其他（湿法脱硫协同）+其他（湿式电除尘），其效率为0.00068Aar+99.967，末端治理设施实际运行率（k值）计算公式为除尘设施年实际运行小时数/机组年实际运行小时数。原文件中描述污染物类别为废气，污染物指标为颗粒物（烟煤），此处对其进行了匹配工作，将其匹配到LCAflow库里面相最符合的流，污染物指标备注为颗粒物（烟煤）
- particles (PM2.5 - PM10): nan
  污染物指标颗粒物（烟煤）的末端治理技术是电袋组合+其他（湿法脱硫协同）+其他（湿式电除尘），其效率为0.00064Aar+99.971，末端治理设施实际运行率（k值）计算公式为除尘设施年实际运行小时数/机组年实际运行小时数。原文件中描述污染物类别为废气，污染物指标为颗粒物（烟煤），此处对其进行了匹配工作，将其匹配到LCAflow库里面相最符合的流，污染物指标备注为颗粒物（烟煤）
- particles (PM2.5 - PM10): nan
  污染物指标颗粒物（烟煤）的末端治理技术是袋式除尘+其他（湿法脱硫协同）+其他（湿式电除尘），其效率为0.0006Aar+99.972，末端治理设施实际运行率（k值）计算公式为除尘设施年实际运行小时数/机组年实际运行小时数。原文件中描述污染物类别为废气，污染物指标为颗粒物（烟煤），此处对其进行了匹配工作，将其匹配到LCAflow库里面相最符合的流，污染物指标备注为颗粒物（烟煤）
- particles (PM2.5 - PM10): nan
  污染物指标颗粒物（无烟煤）的末端治理技术是静电除尘，其效率为0.0085Aar+99.59，末端治理设施实际运行率（k值）计算公式为除尘设施年实际运行小时数/机组年实际运行小时数。原文件中描述污染物类别为废气，污染物指标为颗粒物（无烟煤），此处对其进行了匹配工作，将其匹配到LCAflow库里面相最符合的流，污染物指标备注为颗粒物（无烟煤）
- particles (PM2.5 - PM10): nan
  污染物指标颗粒物（无烟煤）的末端治理技术是电袋组合，其效率为0.008Aar+99.64，末端治理设施实际运行率（k值）计算公式为除尘设施年实际运行小时数/机组年实际运行小时数。原文件中描述污染物类别为废气，污染物指标为颗粒物（无烟煤），此处对其进行了匹配工作，将其匹配到LCAflow库里面相最符合的流，污染物指标备注为颗粒物（无烟煤）
- particles (PM2.5 - PM10): nan
  污染物指标颗粒物（无烟煤）的末端治理技术是袋式除尘，其效率为0.0075Aar+99.65，末端治理设施实际运行率（k值）计算公式为除尘设施年实际运行小时数/机组年实际运行小时数。原文件中描述污染物类别为废气，污染物指标为颗粒物（无烟煤），此处对其进行了匹配工作，将其匹配到LCAflow库里面相最符合的流，污染物指标备注为颗粒物（无烟煤）
- particles (PM2.5 - PM10): nan
  污染物指标颗粒物（无烟煤）的末端治理技术是高效静电除尘①，其效率为0.0017Aar+99.918，末端治理设施实际运行率（k值）计算公式为除尘设施年实际运行小时数/机组年实际运行小时数，①高效颗粒物末端治理技术：采取高效电源供电、低低温电除尘、超净电袋、高效袋式除尘、湿法脱硫协同、湿式电除尘等技术，满足《燃煤电厂超低排放烟气
  治理工程技术规范》（HJ2053-2198）相关要求。
  。原文件中描述污染物类别为废气，污染物指标为颗粒物（无烟煤），此处对其进行了匹配工作，将其匹配到LCAflow库里面相最符合的流，污染物指标备注为颗粒物（无烟煤）
- particles (PM2.5 - PM10): nan
  污染物指标颗粒物（无烟煤）的末端治理技术是高效电袋组合①，其效率为0.0016Aar+99.928，末端治理设施实际运行率（k值）计算公式为除尘设施年实际运行小时数/机组年实际运行小时数，①高效颗粒物末端治理技术：采取高效电源供电、低低温电除尘、超净电袋、高效袋式除尘、湿法脱硫协同、湿式电除尘等技术，满足《燃煤电厂超低排放烟气
  治理工程技术规范》（HJ2053-2199）相关要求。
  。原文件中描述污染物类别为废气，污染物指标为颗粒物（无烟煤），此处对其进行了匹配工作，将其匹配到LCAflow库里面相最符合的流，污染物指标备注为颗粒物（无烟煤）
- particles (PM2.5 - PM10): nan
  污染物指标颗粒物（无烟煤）的末端治理技术是高效袋式除尘①，其效率为0.0015Aar+99.93，末端治理设施实际运行率（k值）计算公式为除尘设施年实际运行小时数/机组年实际运行小时数，①高效颗粒物末端治理技术：采取高效电源供电、低低温电除尘、超净电袋、高效袋式除尘、湿法脱硫协同、湿式电除尘等技术，满足《燃煤电厂超低排放烟气
  治理工程技术规范》（HJ2053-2200）相关要求。
  。原文件中描述污染物类别为废气，污染物指标为颗粒物（无烟煤），此处对其进行了匹配工作，将其匹配到LCAflow库里面相最符合的流，污染物指标备注为颗粒物（无烟煤）
- particles (PM2.5 - PM10): nan
  污染物指标颗粒物（褐煤）的末端治理技术是静电除尘，其效率为0.0085Aar+99.59，末端治理设施实际运行率（k值）计算公式为除尘设施年实际运行小时数/机组年实际运行小时数。原文件中描述污染物类别为废气，污染物指标为颗粒物（褐煤），此处对其进行了匹配工作，将其匹配到LCAflow库里面相最符合的流，污染物指标备注为颗粒物（褐煤）
- particles (PM2.5 - PM10): nan
  污染物指标颗粒物（褐煤）的末端治理技术是电袋组合，其效率为0.008Aar+99.64，末端治理设施实际运行率（k值）计算公式为除尘设施年实际运行小时数/机组年实际运行小时数。原文件中描述污染物类别为废气，污染物指标为颗粒物（褐煤），此处对其进行了匹配工作，将其匹配到LCAflow库里面相最符合的流，污染物指标备注为颗粒物（褐煤）
- particles (PM2.5 - PM10): nan
  污染物指标颗粒物（褐煤）的末端治理技术是袋式除尘，其效率为0.0075Aar+99.65，末端治理设施实际运行率（k值）计算公式为除尘设施年实际运行小时数/机组年实际运行小时数。原文件中描述污染物类别为废气，污染物指标为颗粒物（褐煤），此处对其进行了匹配工作，将其匹配到LCAflow库里面相最符合的流，污染物指标备注为颗粒物（褐煤）
- particles (PM2.5 - PM10): nan
  污染物指标颗粒物（褐煤）的末端治理技术是高效静电除尘①，其效率为0.0017Aar+99.918，末端治理设施实际运行率（k值）计算公式为除尘设施年实际运行小时数/机组年实际运行小时数，①高效颗粒物末端治理技术：采取高效电源供电、低低温电除尘、超净电袋、高效袋式除尘、湿法脱硫协同、湿式电除尘等技术，满足《燃煤电厂超低排放烟气
  治理工程技术规范》（HJ2053-2201）相关要求。
  。原文件中描述污染物类别为废气，污染物指标为颗粒物（褐煤），此处对其进行了匹配工作，将其匹配到LCAflow库里面相最符合的流，污染物指标备注为颗粒物（褐煤）
- particles (PM2.5 - PM10): nan
  污染物指标颗粒物（褐煤）的末端治理技术是高效电袋组合①，其效率为0.0016Aar+99.928，末端治理设施实际运行率（k值）计算公式为除尘设施年实际运行小时数/机组年实际运行小时数，①高效颗粒物末端治理技术：采取高效电源供电、低低温电除尘、超净电袋、高效袋式除尘、湿法脱硫协同、湿式电除尘等技术，满足《燃煤电厂超低排放烟气
  治理工程技术规范》（HJ2053-2202）相关要求。
  。原文件中描述污染物类别为废气，污染物指标为颗粒物（褐煤），此处对其进行了匹配工作，将其匹配到LCAflow库里面相最符合的流，污染物指标备注为颗粒物（褐煤）
- particles (PM2.5 - PM10): nan
  污染物指标颗粒物（褐煤）的末端治理技术是高效袋式除尘①，其效率为0.0015Aar+99.93，末端治理设施实际运行率（k值）计算公式为除尘设施年实际运行小时数/机组年实际运行小时数，①高效颗粒物末端治理技术：采取高效电源供电、低低温电除尘、超净电袋、高效袋式除尘、湿法脱硫协同、湿式电除尘等技术，满足《燃煤电厂超低排放烟气
  治理工程技术规范》（HJ2053-2203）相关要求。
  。原文件中描述污染物类别为废气，污染物指标为颗粒物（褐煤），此处对其进行了匹配工作，将其匹配到LCAflow库里面相最符合的流，污染物指标备注为颗粒物（褐煤）
- sulfur dioxide: nan
  污染物指标二氧化硫（烟煤)的末端治理技术是石灰石/石膏法，其效率为4.2857Sar+85.43，末端治理设施实际运行率（k值）计算公式为脱硫设施年实际运行小时数/机组年实际运行小时数。原文件中描述污染物类别为废气，污染物指标为二氧化硫（烟煤)，此处对其进行了匹配工作，将其匹配到LCAflow库里面相最符合的流，污染物指标备注为二氧化硫（烟煤)
- sulfur dioxide: nan
  污染物指标二氧化硫（烟煤)的末端治理技术是石灰/石膏法，其效率为4.2857Sar+85.43，末端治理设施实际运行率（k值）计算公式为脱硫设施年实际运行小时数/机组年实际运行小时数。原文件中描述污染物类别为废气，污染物指标为二氧化硫（烟煤)，此处对其进行了匹配工作，将其匹配到LCAflow库里面相最符合的流，污染物指标备注为二氧化硫（烟煤)
- sulfur dioxide: nan
  污染物指标二氧化硫（烟煤)的末端治理技术是海水脱硫法，其效率为5.1429Sar+81.14，末端治理设施实际运行率（k值）计算公式为脱硫设施年实际运行小时数/机组年实际运行小时数。原文件中描述污染物类别为废气，污染物指标为二氧化硫（烟煤)，此处对其进行了匹配工作，将其匹配到LCAflow库里面相最符合的流，污染物指标备注为二氧化硫（烟煤)
- sulfur dioxide: nan
  污染物指标二氧化硫（烟煤)的末端治理技术是氨法，其效率为2.5714Sar+88.00，末端治理设施实际运行率（k值）计算公式为脱硫设施年实际运行小时数/机组年实际运行小时数。原文件中描述污染物类别为废气，污染物指标为二氧化硫（烟煤)，此处对其进行了匹配工作，将其匹配到LCAflow库里面相最符合的流，污染物指标备注为二氧化硫（烟煤)
- sulfur dioxide: nan
  污染物指标二氧化硫（烟煤)的末端治理技术是其他（电石渣法），其效率为6.4286Sar+81.14，末端治理设施实际运行率（k值）计算公式为脱硫设施年实际运行小时数/机组年实际运行小时数。原文件中描述污染物类别为废气，污染物指标为二氧化硫（烟煤)，此处对其进行了匹配工作，将其匹配到LCAflow库里面相最符合的流，污染物指标备注为二氧化硫（烟煤)
- sulfur dioxide: nan
  污染物指标二氧化硫（烟煤)的末端治理技术是其他（钠碱法），其效率为5.5714Sar+82.86，末端治理设施实际运行率（k值）计算公式为脱硫设施年实际运行小时数/机组年实际运行小时数。原文件中描述污染物类别为废气，污染物指标为二氧化硫（烟煤)，此处对其进行了匹配工作，将其匹配到LCAflow库里面相最符合的流，污染物指标备注为二氧化硫（烟煤)
- sulfur dioxide: nan
  污染物指标二氧化硫（烟煤)的末端治理技术是氧化镁法，其效率为4.2857Sar+84.57，末端治理设施实际运行率（k值）计算公式为脱硫设施年实际运行小时数/机组年实际运行小时数。原文件中描述污染物类别为废气，污染物指标为二氧化硫（烟煤)，此处对其进行了匹配工作，将其匹配到LCAflow库里面相最符合的流，污染物指标备注为二氧化硫（烟煤)
- sulfur dioxide: nan
  污染物指标二氧化硫（烟煤)的末端治理技术是双碱法，其效率为5.5714Sar+82.86，末端治理设施实际运行率（k值）计算公式为脱硫设施年实际运行小时数/机组年实际运行小时数。原文件中描述污染物类别为废气，污染物指标为二氧化硫（烟煤)，此处对其进行了匹配工作，将其匹配到LCAflow库里面相最符合的流，污染物指标备注为二氧化硫（烟煤)
- sulfur dioxide: nan
  污染物指标二氧化硫（烟煤)的末端治理技术是烟气循环流化床法，其效率为8.1429Sar+78.57，末端治理设施实际运行率（k值）计算公式为脱硫设施年实际运行小时数/机组年实际运行小时数。原文件中描述污染物类别为废气，污染物指标为二氧化硫（烟煤)，此处对其进行了匹配工作，将其匹配到LCAflow库里面相最符合的流，污染物指标备注为二氧化硫（烟煤)
- sulfur dioxide: nan
  污染物指标二氧化硫（烟煤)的末端治理技术是高效石灰石/石膏法②，其效率为0.5Sar+98.3，末端治理设施实际运行率（k值）计算公式为脱硫设施年实际运行小时数/机组年实际运行小时数，②高效二氧化硫末端治理技术：采取空塔提效、强化气液传质、改善pH值分区等措施，满足《燃煤电厂超低排放烟气治理工程技术规范》（HJ2053-2116）相
  关要求。
  。原文件中描述污染物类别为废气，污染物指标为二氧化硫（烟煤)，此处对其进行了匹配工作，将其匹配到LCAflow库里面相最符合的流，污染物指标备注为二氧化硫（烟煤)
- sulfur dioxide: nan
  污染物指标二氧化硫（烟煤)的末端治理技术是高效石灰/石膏法②，其效率为0.5Sar+98.3，末端治理设施实际运行率（k值）计算公式为脱硫设施年实际运行小时数/机组年实际运行小时数，②高效二氧化硫末端治理技术：采取空塔提效、强化气液传质、改善pH值分区等措施，满足《燃煤电厂超低排放烟气治理工程技术规范》（HJ2053-2117）相
  关要求。
  。原文件中描述污染物类别为废气，污染物指标为二氧化硫（烟煤)，此处对其进行了匹配工作，将其匹配到LCAflow库里面相最符合的流，污染物指标备注为二氧化硫（烟煤)
- sulfur dioxide: nan
  污染物指标二氧化硫（烟煤)的末端治理技术是高效海水脱硫法②，其效率为0.6Sar+97.8，末端治理设施实际运行率（k值）计算公式为脱硫设施年实际运行小时数/机组年实际运行小时数，②高效二氧化硫末端治理技术：采取空塔提效、强化气液传质、改善pH值分区等措施，满足《燃煤电厂超低排放烟气治理工程技术规范》（HJ2053-2118）相
  关要求。
  。原文件中描述污染物类别为废气，污染物指标为二氧化硫（烟煤)，此处对其进行了匹配工作，将其匹配到LCAflow库里面相最符合的流，污染物指标备注为二氧化硫（烟煤)
- sulfur dioxide: nan
  污染物指标二氧化硫（烟煤)的末端治理技术是高效氨法②，其效率为0.3Sar+98.6，末端治理设施实际运行率（k值）计算公式为脱硫设施年实际运行小时数/机组年实际运行小时数，②高效二氧化硫末端治理技术：采取空塔提效、强化气液传质、改善pH值分区等措施，满足《燃煤电厂超低排放烟气治理工程技术规范》（HJ2053-2119）相
  关要求。
  。原文件中描述污染物类别为废气，污染物指标为二氧化硫（烟煤)，此处对其进行了匹配工作，将其匹配到LCAflow库里面相最符合的流，污染物指标备注为二氧化硫（烟煤)
- sulfur dioxide: nan
  污染物指标二氧化硫（烟煤)的末端治理技术是其他（高效电石渣法）②，其效率为0.75Sar+97.8，末端治理设施实际运行率（k值）计算公式为脱硫设施年实际运行小时数/机组年实际运行小时数，②高效二氧化硫末端治理技术：采取空塔提效、强化气液传质、改善pH值分区等措施，满足《燃煤电厂超低排放烟气治理工程技术规范》（HJ2053-2120）相
  关要求。
  。原文件中描述污染物类别为废气，污染物指标为二氧化硫（烟煤)，此处对其进行了匹配工作，将其匹配到LCAflow库里面相最符合的流，污染物指标备注为二氧化硫（烟煤)
- sulfur dioxide: nan
  污染物指标二氧化硫（烟煤)的末端治理技术是其他（高效钠碱法）②，其效率为0.65Sar+98，末端治理设施实际运行率（k值）计算公式为脱硫设施年实际运行小时数/机组年实际运行小时数，②高效二氧化硫末端治理技术：采取空塔提效、强化气液传质、改善pH值分区等措施，满足《燃煤电厂超低排放烟气治理工程技术规范》（HJ2053-2121）相
  关要求。
  。原文件中描述污染物类别为废气，污染物指标为二氧化硫（烟煤)，此处对其进行了匹配工作，将其匹配到LCAflow库里面相最符合的流，污染物指标备注为二氧化硫（烟煤)
- sulfur dioxide: nan
  污染物指标二氧化硫（烟煤)的末端治理技术是高效氧化镁法②，其效率为0.5Sar+98.2，末端治理设施实际运行率（k值）计算公式为脱硫设施年实际运行小时数/机组年实际运行小时数，②高效二氧化硫末端治理技术：采取空塔提效、强化气液传质、改善pH值分区等措施，满足《燃煤电厂超低排放烟气治理工程技术规范》（HJ2053-2122）相
  关要求。
  。原文件中描述污染物类别为废气，污染物指标为二氧化硫（烟煤)，此处对其进行了匹配工作，将其匹配到LCAflow库里面相最符合的流，污染物指标备注为二氧化硫（烟煤)
- sulfur dioxide: nan
  污染物指标二氧化硫（烟煤)的末端治理技术是高效双碱法②，其效率为0.65Sar+98，末端治理设施实际运行率（k值）计算公式为脱硫设施年实际运行小时数/机组年实际运行小时数，②高效二氧化硫末端治理技术：采取空塔提效、强化气液传质、改善pH值分区等措施，满足《燃煤电厂超低排放烟气治理工程技术规范》（HJ2053-2123）相
  关要求。
  。原文件中描述污染物类别为废气，污染物指标为二氧化硫（烟煤)，此处对其进行了匹配工作，将其匹配到LCAflow库里面相最符合的流，污染物指标备注为二氧化硫（烟煤)
- sulfur dioxide: nan
  污染物指标二氧化硫（烟煤)的末端治理技术是高效烟气循环流化床法②，其效率为0.95Sar+97.5，末端治理设施实际运行率（k值）计算公式为脱硫设施年实际运行小时数/机组年实际运行小时数，②高效二氧化硫末端治理技术：采取空塔提效、强化气液传质、改善pH值分区等措施，满足《燃煤电厂超低排放烟气治理工程技术规范》（HJ2053-2124）相
  关要求。
  。原文件中描述污染物类别为废气，污染物指标为二氧化硫（烟煤)，此处对其进行了匹配工作，将其匹配到LCAflow库里面相最符合的流，污染物指标备注为二氧化硫（烟煤)
- sulfur dioxide: nan
  污染物指标二氧化硫（褐煤，无炉内脱硫）的末端治理技术是石灰石/石膏法，其效率为4.2857Sar+85.43，末端治理设施实际运行率（k值）计算公式为脱硫设施年实际运行小时数/机组年实际运行小时数。原文件中描述污染物类别为废气，污染物指标为二氧化硫（褐煤，无炉内脱硫），此处对其进行了匹配工作，将其匹配到LCAflow库里面相最符合的流，污染物指标备注为二氧化硫（褐煤，无炉内脱硫）
- sulfur dioxide: nan
  污染物指标二氧化硫（褐煤，无炉内脱硫）的末端治理技术是石灰/石膏法，其效率为4.2857Sar+85.43，末端治理设施实际运行率（k值）计算公式为脱硫设施年实际运行小时数/机组年实际运行小时数。原文件中描述污染物类别为废气，污染物指标为二氧化硫（褐煤，无炉内脱硫），此处对其进行了匹配工作，将其匹配到LCAflow库里面相最符合的流，污染物指标备注为二氧化硫（褐煤，无炉内脱硫）
- sulfur dioxide: nan
  污染物指标二氧化硫（褐煤，无炉内脱硫）的末端治理技术是海水脱硫法，其效率为5.1429Sar+81.14，末端治理设施实际运行率（k值）计算公式为脱硫设施年实际运行小时数/机组年实际运行小时数。原文件中描述污染物类别为废气，污染物指标为二氧化硫（褐煤，无炉内脱硫），此处对其进行了匹配工作，将其匹配到LCAflow库里面相最符合的流，污染物指标备注为二氧化硫（褐煤，无炉内脱硫）
- sulfur dioxide: nan
  污染物指标二氧化硫（褐煤，无炉内脱硫）的末端治理技术是氨法，其效率为2.5714Sar+88.00，末端治理设施实际运行率（k值）计算公式为脱硫设施年实际运行小时数/机组年实际运行小时数。原文件中描述污染物类别为废气，污染物指标为二氧化硫（褐煤，无炉内脱硫），此处对其进行了匹配工作，将其匹配到LCAflow库里面相最符合的流，污染物指标备注为二氧化硫（褐煤，无炉内脱硫）
- sulfur dioxide: nan
  污染物指标二氧化硫（褐煤，无炉内脱硫）的末端治理技术是其他（电石渣法），其效率为6.4286Sar+81.14，末端治理设施实际运行率（k值）计算公式为脱硫设施年实际运行小时数/机组年实际运行小时数。原文件中描述污染物类别为废气，污染物指标为二氧化硫（褐煤，无炉内脱硫），此处对其进行了匹配工作，将其匹配到LCAflow库里面相最符合的流，污染物指标备注为二氧化硫（褐煤，无炉内脱硫）
- sulfur dioxide: nan
  污染物指标二氧化硫（褐煤，无炉内脱硫）的末端治理技术是其他（钠碱法），其效率为5.5714Sar+82.86，末端治理设施实际运行率（k值）计算公式为脱硫设施年实际运行小时数/机组年实际运行小时数。原文件中描述污染物类别为废气，污染物指标为二氧化硫（褐煤，无炉内脱硫），此处对其进行了匹配工作，将其匹配到LCAflow库里面相最符合的流，污染物指标备注为二氧化硫（褐煤，无炉内脱硫）
- sulfur dioxide: nan
  污染物指标二氧化硫（褐煤，无炉内脱硫）的末端治理技术是氧化镁法，其效率为4.2857Sar+84.57，末端治理设施实际运行率（k值）计算公式为脱硫设施年实际运行小时数/机组年实际运行小时数。原文件中描述污染物类别为废气，污染物指标为二氧化硫（褐煤，无炉内脱硫），此处对其进行了匹配工作，将其匹配到LCAflow库里面相最符合的流，污染物指标备注为二氧化硫（褐煤，无炉内脱硫）
- sulfur dioxide: nan
  污染物指标二氧化硫（褐煤，无炉内脱硫）的末端治理技术是双碱法，其效率为5.5714Sar+82.86，末端治理设施实际运行率（k值）计算公式为脱硫设施年实际运行小时数/机组年实际运行小时数。原文件中描述污染物类别为废气，污染物指标为二氧化硫（褐煤，无炉内脱硫），此处对其进行了匹配工作，将其匹配到LCAflow库里面相最符合的流，污染物指标备注为二氧化硫（褐煤，无炉内脱硫）
- sulfur dioxide: nan
  污染物指标二氧化硫（褐煤，无炉内脱硫）的末端治理技术是烟气循环流化床法，其效率为8.1429Sar+78.57，末端治理设施实际运行率（k值）计算公式为脱硫设施年实际运行小时数/机组年实际运行小时数。原文件中描述污染物类别为废气，污染物指标为二氧化硫（褐煤，无炉内脱硫），此处对其进行了匹配工作，将其匹配到LCAflow库里面相最符合的流，污染物指标备注为二氧化硫（褐煤，无炉内脱硫）
- sulfur dioxide: nan
  污染物指标二氧化硫（褐煤，无炉内脱硫）的末端治理技术是高效石灰石/石膏法②，其效率为0.5Sar+98.3，末端治理设施实际运行率（k值）计算公式为脱硫设施年实际运行小时数/机组年实际运行小时数，②高效二氧化硫末端治理技术：采取空塔提效、强化气液传质、改善pH值分区等措施，满足《燃煤电厂超低排放烟气治理工程技术规范》（HJ2053-2125）相
  关要求。
  。原文件中描述污染物类别为废气，污染物指标为二氧化硫（褐煤，无炉内脱硫），此处对其进行了匹配工作，将其匹配到LCAflow库里面相最符合的流，污染物指标备注为二氧化硫（褐煤，无炉内脱硫）
- sulfur dioxide: nan
  污染物指标二氧化硫（褐煤，无炉内脱硫）的末端治理技术是高效石灰/石膏法②，其效率为0.5Sar+98.3，末端治理设施实际运行率（k值）计算公式为脱硫设施年实际运行小时数/机组年实际运行小时数，②高效二氧化硫末端治理技术：采取空塔提效、强化气液传质、改善pH值分区等措施，满足《燃煤电厂超低排放烟气治理工程技术规范》（HJ2053-2126）相
  关要求。
  。原文件中描述污染物类别为废气，污染物指标为二氧化硫（褐煤，无炉内脱硫），此处对其进行了匹配工作，将其匹配到LCAflow库里面相最符合的流，污染物指标备注为二氧化硫（褐煤，无炉内脱硫）
- sulfur dioxide: nan
  污染物指标二氧化硫（褐煤，无炉内脱硫）的末端治理技术是高效海水脱硫法②，其效率为0.6Sar+97.8，末端治理设施实际运行率（k值）计算公式为脱硫设施年实际运行小时数/机组年实际运行小时数，②高效二氧化硫末端治理技术：采取空塔提效、强化气液传质、改善pH值分区等措施，满足《燃煤电厂超低排放烟气治理工程技术规范》（HJ2053-2127）相
  关要求。
  。原文件中描述污染物类别为废气，污染物指标为二氧化硫（褐煤，无炉内脱硫），此处对其进行了匹配工作，将其匹配到LCAflow库里面相最符合的流，污染物指标备注为二氧化硫（褐煤，无炉内脱硫）
- sulfur dioxide: nan
  污染物指标二氧化硫（褐煤，无炉内脱硫）的末端治理技术是高效氨法②，其效率为0.3Sar+98.6，末端治理设施实际运行率（k值）计算公式为脱硫设施年实际运行小时数/机组年实际运行小时数，②高效二氧化硫末端治理技术：采取空塔提效、强化气液传质、改善pH值分区等措施，满足《燃煤电厂超低排放烟气治理工程技术规范》（HJ2053-2128）相
  关要求。
  。原文件中描述污染物类别为废气，污染物指标为二氧化硫（褐煤，无炉内脱硫），此处对其进行了匹配工作，将其匹配到LCAflow库里面相最符合的流，污染物指标备注为二氧化硫（褐煤，无炉内脱硫）
- sulfur dioxide: nan
  污染物指标二氧化硫（褐煤，无炉内脱硫）的末端治理技术是其他（高效电石渣法）②，其效率为0.75Sar+97.8，末端治理设施实际运行率（k值）计算公式为脱硫设施年实际运行小时数/机组年实际运行小时数，②高效二氧化硫末端治理技术：采取空塔提效、强化气液传质、改善pH值分区等措施，满足《燃煤电厂超低排放烟气治理工程技术规范》（HJ2053-2129）相
  关要求。
  。原文件中描述污染物类别为废气，污染物指标为二氧化硫（褐煤，无炉内脱硫），此处对其进行了匹配工作，将其匹配到LCAflow库里面相最符合的流，污染物指标备注为二氧化硫（褐煤，无炉内脱硫）
- sulfur dioxide: nan
  污染物指标二氧化硫（褐煤，无炉内脱硫）的末端治理技术是其他（高效钠碱法）②，其效率为0.65Sar+98，末端治理设施实际运行率（k值）计算公式为脱硫设施年实际运行小时数/机组年实际运行小时数，②高效二氧化硫末端治理技术：采取空塔提效、强化气液传质、改善pH值分区等措施，满足《燃煤电厂超低排放烟气治理工程技术规范》（HJ2053-2130）相
  关要求。
  。原文件中描述污染物类别为废气，污染物指标为二氧化硫（褐煤，无炉内脱硫），此处对其进行了匹配工作，将其匹配到LCAflow库里面相最符合的流，污染物指标备注为二氧化硫（褐煤，无炉内脱硫）
- sulfur dioxide: nan
  污染物指标二氧化硫（褐煤，无炉内脱硫）的末端治理技术是高效氧化镁法②，其效率为0.5Sar+98.2，末端治理设施实际运行率（k值）计算公式为脱硫设施年实际运行小时数/机组年实际运行小时数，②高效二氧化硫末端治理技术：采取空塔提效、强化气液传质、改善pH值分区等措施，满足《燃煤电厂超低排放烟气治理工程技术规范》（HJ2053-2131）相
  关要求。
  。原文件中描述污染物类别为废气，污染物指标为二氧化硫（褐煤，无炉内脱硫），此处对其进行了匹配工作，将其匹配到LCAflow库里面相最符合的流，污染物指标备注为二氧化硫（褐煤，无炉内脱硫）
- sulfur dioxide: nan
  污染物指标二氧化硫（褐煤，无炉内脱硫）的末端治理技术是高效双碱法②，其效率为0.65Sar+98，末端治理设施实际运行率（k值）计算公式为脱硫设施年实际运行小时数/机组年实际运行小时数，②高效二氧化硫末端治理技术：采取空塔提效、强化气液传质、改善pH值分区等措施，满足《燃煤电厂超低排放烟气治理工程技术规范》（HJ2053-2132）相
  关要求。
  。原文件中描述污染物类别为废气，污染物指标为二氧化硫（褐煤，无炉内脱硫），此处对其进行了匹配工作，将其匹配到LCAflow库里面相最符合的流，污染物指标备注为二氧化硫（褐煤，无炉内脱硫）
- sulfur dioxide: nan
  污染物指标二氧化硫（褐煤，无炉内脱硫）的末端治理技术是高效烟气循环流化床法②，其效率为0.95Sar+97.5，末端治理设施实际运行率（k值）计算公式为脱硫设施年实际运行小时数/机组年实际运行小时数，②高效二氧化硫末端治理技术：采取空塔提效、强化气液传质、改善pH值分区等措施，满足《燃煤电厂超低排放烟气治理工程技术规范》（HJ2053-2133）相
  关要求。
  。原文件中描述污染物类别为废气，污染物指标为二氧化硫（褐煤，无炉内脱硫），此处对其进行了匹配工作，将其匹配到LCAflow库里面相最符合的流，污染物指标备注为二氧化硫（褐煤，无炉内脱硫）
- sulfur dioxide: nan
  污染物指标二氧化硫（褐煤，有炉内脱硫）的末端治理技术是高效石灰石/石膏法②，其效率为0.5Sar+98，末端治理设施实际运行率（k值）计算公式为脱硫设施年实际运行小时数/机组年实际运行小时数，②高效二氧化硫末端治理技术：采取空塔提效、强化气液传质、改善pH值分区等措施，满足《燃煤电厂超低排放烟气治理工程技术规范》（HJ2053-2134）相
  关要求。
  。原文件中描述污染物类别为废气，污染物指标为二氧化硫（褐煤，有炉内脱硫），此处对其进行了匹配工作，将其匹配到LCAflow库里面相最符合的流，污染物指标备注为二氧化硫（褐煤，有炉内脱硫）
- sulfur dioxide: nan
  污染物指标二氧化硫（褐煤，有炉内脱硫）的末端治理技术是高效石灰/石膏法②，其效率为0.5Sar+98，末端治理设施实际运行率（k值）计算公式为脱硫设施年实际运行小时数/机组年实际运行小时数，②高效二氧化硫末端治理技术：采取空塔提效、强化气液传质、改善pH值分区等措施，满足《燃煤电厂超低排放烟气治理工程技术规范》（HJ2053-2135）相
  关要求。
  。原文件中描述污染物类别为废气，污染物指标为二氧化硫（褐煤，有炉内脱硫），此处对其进行了匹配工作，将其匹配到LCAflow库里面相最符合的流，污染物指标备注为二氧化硫（褐煤，有炉内脱硫）
- sulfur dioxide: nan
  污染物指标二氧化硫（褐煤，有炉内脱硫）的末端治理技术是高效海水脱硫法②，其效率为0.6Sar+97.3，末端治理设施实际运行率（k值）计算公式为脱硫设施年实际运行小时数/机组年实际运行小时数，②高效二氧化硫末端治理技术：采取空塔提效、强化气液传质、改善pH值分区等措施，满足《燃煤电厂超低排放烟气治理工程技术规范》（HJ2053-2136）相
  关要求。
  。原文件中描述污染物类别为废气，污染物指标为二氧化硫（褐煤，有炉内脱硫），此处对其进行了匹配工作，将其匹配到LCAflow库里面相最符合的流，污染物指标备注为二氧化硫（褐煤，有炉内脱硫）
- sulfur dioxide: nan
  污染物指标二氧化硫（褐煤，有炉内脱硫）的末端治理技术是高效氨法②，其效率为0.3Sar+98.4，末端治理设施实际运行率（k值）计算公式为脱硫设施年实际运行小时数/机组年实际运行小时数，②高效二氧化硫末端治理技术：采取空塔提效、强化气液传质、改善pH值分区等措施，满足《燃煤电厂超低排放烟气治理工程技术规范》（HJ2053-2137）相
  关要求。
  。原文件中描述污染物类别为废气，污染物指标为二氧化硫（褐煤，有炉内脱硫），此处对其进行了匹配工作，将其匹配到LCAflow库里面相最符合的流，污染物指标备注为二氧化硫（褐煤，有炉内脱硫）
- sulfur dioxide: nan
  污染物指标二氧化硫（褐煤，有炉内脱硫）的末端治理技术是其他（高效电石渣法）②，其效率为0.75Sar+97.5，末端治理设施实际运行率（k值）计算公式为脱硫设施年实际运行小时数/机组年实际运行小时数，②高效二氧化硫末端治理技术：采取空塔提效、强化气液传质、改善pH值分区等措施，满足《燃煤电厂超低排放烟气治理工程技术规范》（HJ2053-2138）相
  关要求。
  。原文件中描述污染物类别为废气，污染物指标为二氧化硫（褐煤，有炉内脱硫），此处对其进行了匹配工作，将其匹配到LCAflow库里面相最符合的流，污染物指标备注为二氧化硫（褐煤，有炉内脱硫）
- sulfur dioxide: nan
  污染物指标二氧化硫（褐煤，有炉内脱硫）的末端治理技术是其他（高效钠碱法）②，其效率为0.65Sar+97.6，末端治理设施实际运行率（k值）计算公式为脱硫设施年实际运行小时数/机组年实际运行小时数，②高效二氧化硫末端治理技术：采取空塔提效、强化气液传质、改善pH值分区等措施，满足《燃煤电厂超低排放烟气治理工程技术规范》（HJ2053-2139）相
  关要求。
  。原文件中描述污染物类别为废气，污染物指标为二氧化硫（褐煤，有炉内脱硫），此处对其进行了匹配工作，将其匹配到LCAflow库里面相最符合的流，污染物指标备注为二氧化硫（褐煤，有炉内脱硫）
- sulfur dioxide: nan
  污染物指标二氧化硫（褐煤，有炉内脱硫）的末端治理技术是高效氧化镁法②，其效率为0.45Sar+98，末端治理设施实际运行率（k值）计算公式为脱硫设施年实际运行小时数/机组年实际运行小时数，②高效二氧化硫末端治理技术：采取空塔提效、强化气液传质、改善pH值分区等措施，满足《燃煤电厂超低排放烟气治理工程技术规范》（HJ2053-2140）相
  关要求。
  。原文件中描述污染物类别为废气，污染物指标为二氧化硫（褐煤，有炉内脱硫），此处对其进行了匹配工作，将其匹配到LCAflow库里面相最符合的流，污染物指标备注为二氧化硫（褐煤，有炉内脱硫）
- sulfur dioxide: nan
  污染物指标二氧化硫（褐煤，有炉内脱硫）的末端治理技术是高效双碱法②，其效率为0.65Sar+97.6，末端治理设施实际运行率（k值）计算公式为脱硫设施年实际运行小时数/机组年实际运行小时数，②高效二氧化硫末端治理技术：采取空塔提效、强化气液传质、改善pH值分区等措施，满足《燃煤电厂超低排放烟气治理工程技术规范》（HJ2053-2141）相
  关要求。
  。原文件中描述污染物类别为废气，污染物指标为二氧化硫（褐煤，有炉内脱硫），此处对其进行了匹配工作，将其匹配到LCAflow库里面相最符合的流，污染物指标备注为二氧化硫（褐煤，有炉内脱硫）
- sulfur dioxide: nan
  污染物指标二氧化硫（褐煤，有炉内脱硫）的末端治理技术是高效烟气循环流化床法②，其效率为0.95Sar+97.2，末端治理设施实际运行率（k值）计算公式为脱硫设施年实际运行小时数/机组年实际运行小时数，②高效二氧化硫末端治理技术：采取空塔提效、强化气液传质、改善pH值分区等措施，满足《燃煤电厂超低排放烟气治理工程技术规范》（HJ2053-2142）相
  关要求。
  。原文件中描述污染物类别为废气，污染物指标为二氧化硫（褐煤，有炉内脱硫），此处对其进行了匹配工作，将其匹配到LCAflow库里面相最符合的流，污染物指标备注为二氧化硫（褐煤，有炉内脱硫）
- sulfur dioxide: nan
  污染物指标二氧化硫（褐煤，有炉内脱硫）的末端治理技术是石灰石/石膏法，其效率为4.2857Sar+82.86，末端治理设施实际运行率（k值）计算公式为脱硫设施年实际运行小时数/机组年实际运行小时数。原文件中描述污染物类别为废气，污染物指标为二氧化硫（褐煤，有炉内脱硫），此处对其进行了匹配工作，将其匹配到LCAflow库里面相最符合的流，污染物指标备注为二氧化硫（褐煤，有炉内脱硫）
- sulfur dioxide: nan
  污染物指标二氧化硫（褐煤，有炉内脱硫）的末端治理技术是石灰/石膏法，其效率为4.2857Sar+82.86，末端治理设施实际运行率（k值）计算公式为脱硫设施年实际运行小时数/机组年实际运行小时数。原文件中描述污染物类别为废气，污染物指标为二氧化硫（褐煤，有炉内脱硫），此处对其进行了匹配工作，将其匹配到LCAflow库里面相最符合的流，污染物指标备注为二氧化硫（褐煤，有炉内脱硫）
- sulfur dioxide: nan
  污染物指标二氧化硫（褐煤，有炉内脱硫）的末端治理技术是海水脱硫法，其效率为5.1429Sar+76.86，末端治理设施实际运行率（k值）计算公式为脱硫设施年实际运行小时数/机组年实际运行小时数。原文件中描述污染物类别为废气，污染物指标为二氧化硫（褐煤，有炉内脱硫），此处对其进行了匹配工作，将其匹配到LCAflow库里面相最符合的流，污染物指标备注为二氧化硫（褐煤，有炉内脱硫）
- sulfur dioxide: nan
  污染物指标二氧化硫（褐煤，有炉内脱硫）的末端治理技术是氨法，其效率为2.5714Sar+86.29，末端治理设施实际运行率（k值）计算公式为脱硫设施年实际运行小时数/机组年实际运行小时数。原文件中描述污染物类别为废气，污染物指标为二氧化硫（褐煤，有炉内脱硫），此处对其进行了匹配工作，将其匹配到LCAflow库里面相最符合的流，污染物指标备注为二氧化硫（褐煤，有炉内脱硫）
- sulfur dioxide: nan
  污染物指标二氧化硫（褐煤，有炉内脱硫）的末端治理技术是其他（电石渣法），其效率为6.4286Sar+78.57，末端治理设施实际运行率（k值）计算公式为脱硫设施年实际运行小时数/机组年实际运行小时数。原文件中描述污染物类别为废气，污染物指标为二氧化硫（褐煤，有炉内脱硫），此处对其进行了匹配工作，将其匹配到LCAflow库里面相最符合的流，污染物指标备注为二氧化硫（褐煤，有炉内脱硫）
- sulfur dioxide: nan
  污染物指标二氧化硫（褐煤，有炉内脱硫）的末端治理技术是其他（钠碱法），其效率为5.5714Sar+79.43，末端治理设施实际运行率（k值）计算公式为脱硫设施年实际运行小时数/机组年实际运行小时数。原文件中描述污染物类别为废气，污染物指标为二氧化硫（褐煤，有炉内脱硫），此处对其进行了匹配工作，将其匹配到LCAflow库里面相最符合的流，污染物指标备注为二氧化硫（褐煤，有炉内脱硫）
- sulfur dioxide: nan
  污染物指标二氧化硫（褐煤，有炉内脱硫）的末端治理技术是氧化镁法，其效率为3.8571Sar+82.86，末端治理设施实际运行率（k值）计算公式为脱硫设施年实际运行小时数/机组年实际运行小时数。原文件中描述污染物类别为废气，污染物指标为二氧化硫（褐煤，有炉内脱硫），此处对其进行了匹配工作，将其匹配到LCAflow库里面相最符合的流，污染物指标备注为二氧化硫（褐煤，有炉内脱硫）
- sulfur dioxide: nan
  污染物指标二氧化硫（褐煤，有炉内脱硫）的末端治理技术是双碱法，其效率为5.5714Sar+79.43，末端治理设施实际运行率（k值）计算公式为脱硫设施年实际运行小时数/机组年实际运行小时数。原文件中描述污染物类别为废气，污染物指标为二氧化硫（褐煤，有炉内脱硫），此处对其进行了匹配工作，将其匹配到LCAflow库里面相最符合的流，污染物指标备注为二氧化硫（褐煤，有炉内脱硫）
- sulfur dioxide: nan
  污染物指标二氧化硫（褐煤，有炉内脱硫）的末端治理技术是烟气循环流化床法，其效率为8.1429Sar+76.0，末端治理设施实际运行率（k值）计算公式为脱硫设施年实际运行小时数/机组年实际运行小时数。原文件中描述污染物类别为废气，污染物指标为二氧化硫（褐煤，有炉内脱硫），此处对其进行了匹配工作，将其匹配到LCAflow库里面相最符合的流，污染物指标备注为二氧化硫（褐煤，有炉内脱硫）
- Nitrogen oxides: 3.68
  污染物指标氮氧化物（低氮燃烧法，20小于等于煤炭干燥无灰基挥发分小于等于37%）的末端治理技术是其他（直排），末端治理设施实际运行率（k值）计算公式为脱硝设施年实际运行小时数/机组年实际运行小时数。原文件中描述污染物类别为废气，污染物指标为氮氧化物（低氮燃烧法，20小于等于煤炭干燥无灰基挥发分小于等于37%），此处对其进行了匹配工作，将其匹配到LCAflow库里面相最符合的流，污染物指标备注为氮氧化物（低氮燃烧法，20小于等于煤炭干燥无灰基挥发分小于等于37%）
- Nitrogen oxides: 0.736
  污染物指标氮氧化物（低氮燃烧法，20小于等于煤炭干燥无灰基挥发分小于等于37%）的末端治理技术是高效选择性催化还原法（SCR）③，其效率为80，末端治理设施实际运行率（k值）计算公式为脱硝设施年实际运行小时数/机组年实际运行小时数，③高效氮氧化物末端治理技术：采取高效低氮燃烧技术、增设脱硝催化剂层数等措施，满足《燃煤电厂超低排放烟气治理工程技术规范》（HJ2053-2101）相关
  要求。。原文件中描述污染物类别为废气，污染物指标为氮氧化物（低氮燃烧法，20小于等于煤炭干燥无灰基挥发分小于等于37%），此处对其进行了匹配工作，将其匹配到LCAflow库里面相最符合的流，污染物指标备注为氮氧化物（低氮燃烧法，20小于等于煤炭干燥无灰基挥发分小于等于37%）
- Nitrogen oxides: 0.92
  污染物指标氮氧化物（低氮燃烧法，20小于等于煤炭干燥无灰基挥发分小于等于37%）的末端治理技术是选择性催化还原法（SCR），其效率为75，末端治理设施实际运行率（k值）计算公式为脱硝设施年实际运行小时数/机组年实际运行小时数。原文件中描述污染物类别为废气，污染物指标为氮氧化物（低氮燃烧法，20小于等于煤炭干燥无灰基挥发分小于等于37%），此处对其进行了匹配工作，将其匹配到LCAflow库里面相最符合的流，污染物指标备注为氮氧化物（低氮燃烧法，20小于等于煤炭干燥无灰基挥发分小于等于37%）
- Nitrogen oxides: 2.21
  污染物指标氮氧化物（低氮燃烧法-SNCR，20小于等于煤炭干燥无灰基挥发分小于等于37%）的末端治理技术是其他（直排），末端治理设施实际运行率（k值）计算公式为脱硝设施年实际运行小时数/机组年实际运行小时数。原文件中描述污染物类别为废气，污染物指标为氮氧化物（低氮燃烧法-SNCR，20小于等于煤炭干燥无灰基挥发分小于等于37%），此处对其进行了匹配工作，将其匹配到LCAflow库里面相最符合的流，污染物指标备注为氮氧化物（低氮燃烧法-SNCR，20小于等于煤炭干燥无灰基挥发分小于等于37%）
- Nitrogen oxides: 0.4862
  污染物指标氮氧化物（低氮燃烧法-SNCR，20小于等于煤炭干燥无灰基挥发分小于等于37%）的末端治理技术是高效选择性催化还原法（SCR）③，其效率为78，末端治理设施实际运行率（k值）计算公式为脱硝设施年实际运行小时数/机组年实际运行小时数，③高效氮氧化物末端治理技术：采取高效低氮燃烧技术、增设脱硝催化剂层数等措施，满足《燃煤电厂超低排放烟气治理工程技术规范》（HJ2053-2102）相关
  要求。。原文件中描述污染物类别为废气，污染物指标为氮氧化物（低氮燃烧法-SNCR，20小于等于煤炭干燥无灰基挥发分小于等于37%），此处对其进行了匹配工作，将其匹配到LCAflow库里面相最符合的流，污染物指标备注为氮氧化物（低氮燃烧法-SNCR，20小于等于煤炭干燥无灰基挥发分小于等于37%）
- Nitrogen oxides: 0.663
  污染物指标氮氧化物（低氮燃烧法-SNCR，20小于等于煤炭干燥无灰基挥发分小于等于37%）的末端治理技术是选择性催化还原法（SCR），其效率为70，末端治理设施实际运行率（k值）计算公式为脱硝设施年实际运行小时数/机组年实际运行小时数。原文件中描述污染物类别为废气，污染物指标为氮氧化物（低氮燃烧法-SNCR，20小于等于煤炭干燥无灰基挥发分小于等于37%），此处对其进行了匹配工作，将其匹配到LCAflow库里面相最符合的流，污染物指标备注为氮氧化物（低氮燃烧法-SNCR，20小于等于煤炭干燥无灰基挥发分小于等于37%）
- Nitrogen oxides: 2.36
  污染物指标氮氧化物（低氮燃烧法，煤炭干燥无灰基挥发分>37%）的末端治理技术是其他（直排），末端治理设施实际运行率（k值）计算公式为脱硝设施年实际运行小时数/机组年实际运行小时数。原文件中描述污染物类别为废气，污染物指标为氮氧化物（低氮燃烧法，煤炭干燥无灰基挥发分>37%），此处对其进行了匹配工作，将其匹配到LCAflow库里面相最符合的流，污染物指标备注为氮氧化物（低氮燃烧法，煤炭干燥无灰基挥发分>37%）
- Nitrogen oxides: 0.472
  污染物指标氮氧化物（低氮燃烧法，煤炭干燥无灰基挥发分>37%）的末端治理技术是高效选择性催化还原法（SCR）③，其效率为80，末端治理设施实际运行率（k值）计算公式为脱硝设施年实际运行小时数/机组年实际运行小时数，③高效氮氧化物末端治理技术：采取高效低氮燃烧技术、增设脱硝催化剂层数等措施，满足《燃煤电厂超低排放烟气治理工程技术规范》（HJ2053-2103）相关
  要求。。原文件中描述污染物类别为废气，污染物指标为氮氧化物（低氮燃烧法，煤炭干燥无灰基挥发分>37%），此处对其进行了匹配工作，将其匹配到LCAflow库里面相最符合的流，污染物指标备注为氮氧化物（低氮燃烧法，煤炭干燥无灰基挥发分>37%）
- Nitrogen oxides: 0.59
  污染物指标氮氧化物（低氮燃烧法，煤炭干燥无灰基挥发分>37%）的末端治理技术是选择性催化还原法（SCR），其效率为75，末端治理设施实际运行率（k值）计算公式为脱硝设施年实际运行小时数/机组年实际运行小时数。原文件中描述污染物类别为废气，污染物指标为氮氧化物（低氮燃烧法，煤炭干燥无灰基挥发分>37%），此处对其进行了匹配工作，将其匹配到LCAflow库里面相最符合的流，污染物指标备注为氮氧化物（低氮燃烧法，煤炭干燥无灰基挥发分>37%）
- Nitrogen oxides: 1.45
  污染物指标氮氧化物（低氮燃烧法-SNCR，煤炭干燥无灰基挥发分>37%）的末端治理技术是其他（直排），末端治理设施实际运行率（k值）计算公式为脱硝设施年实际运行小时数/机组年实际运行小时数。原文件中描述污染物类别为废气，污染物指标为氮氧化物（低氮燃烧法-SNCR，煤炭干燥无灰基挥发分>37%），此处对其进行了匹配工作，将其匹配到LCAflow库里面相最符合的流，污染物指标备注为氮氧化物（低氮燃烧法-SNCR，煤炭干燥无灰基挥发分>37%）
- Nitrogen oxides: 0.3625
  污染物指标氮氧化物（低氮燃烧法-SNCR，煤炭干燥无灰基挥发分>37%）的末端治理技术是高效选择性催化还原法（SCR）③，其效率为75，末端治理设施实际运行率（k值）计算公式为脱硝设施年实际运行小时数/机组年实际运行小时数，③高效氮氧化物末端治理技术：采取高效低氮燃烧技术、增设脱硝催化剂层数等措施，满足《燃煤电厂超低排放烟气治理工程技术规范》（HJ2053-2104）相关
  要求。。原文件中描述污染物类别为废气，污染物指标为氮氧化物（低氮燃烧法-SNCR，煤炭干燥无灰基挥发分>37%），此处对其进行了匹配工作，将其匹配到LCAflow库里面相最符合的流，污染物指标备注为氮氧化物（低氮燃烧法-SNCR，煤炭干燥无灰基挥发分>37%）
- Nitrogen oxides: 0.435
  污染物指标氮氧化物（低氮燃烧法-SNCR，煤炭干燥无灰基挥发分>37%）的末端治理技术是选择性催化还原法（SCR），其效率为70，末端治理设施实际运行率（k值）计算公式为脱硝设施年实际运行小时数/机组年实际运行小时数。原文件中描述污染物类别为废气，污染物指标为氮氧化物（低氮燃烧法-SNCR，煤炭干燥无灰基挥发分>37%），此处对其进行了匹配工作，将其匹配到LCAflow库里面相最符合的流，污染物指标备注为氮氧化物（低氮燃烧法-SNCR，煤炭干燥无灰基挥发分>37%）
- mercury: nan
  污染物指标汞及其化合物的末端治理技术是协同脱汞，其效率为25.73MHgar+84.12，末端治理设施实际运行率（k值）计算公式为取该机组除尘、脱硝脱硫K的最小值。原文件中描述污染物类别为废气，污染物指标为汞及其化合物，此处对其进行了匹配工作，将其匹配到LCAflow库里面相最符合的流，污染物指标备注为汞及其化合物
- volatile organic compound: nan
  污染物指标挥发性有机物的末端治理技术是/。原文件中描述污染物类别为废气，污染物指标为挥发性有机物，此处对其进行了匹配工作，将其匹配到LCAflow库里面相最符合的流，污染物指标备注为挥发性有机物

## Use advice
This dataset is derived from the Pollution Source Census Report and contains information on pollution emissions and related products. However, it does not include data on energy or chemical consumption, nor does it provide information on waste or co-product generation. When utilizing this dataset, please supplement the missing data based on actual conditions before use
该数据集来源于污染源普查报告，包含污染物排放及相关产品信息，但不包含能源或化学品消耗数据，也不提供废弃物或共生产物产生信息。在使用该数据集时，请根据实际情况补充缺失数据后再使用。

## Review details
Inventory: The internal review was done by several iteration steps concerning raw data validation, raw data documentation, representativity, completeness and consistency of modelling with regard to ISO 14040 and 14044.
清单： 内部审查通过几个迭代步骤完成，涉及原始数据验证、原始数据记录、代表性、完整性、与 ISO 14040 和 14044 有关的建模的一致性。

## Data sources
- 第二次全国污染源普查产排污核算系数手册（试用版）,四级代码4411、4412文件，在完整版文件中第5333页
