# Life cycle inventory for average rare earth oxide;Rare Earth Elements (REE) Bayan Obo;Rare Earth Elements (REE) containing ore

Dataset: ILCD process, Unit process, single operation
Geography: NMG-CN
Reference year: 2012
Valid until: 2014
Classification: Unit processes / Materials production / Non-energetic raw materials
Functional unit: 1 kg REO at 100% purity
LCI method principle: Attributional
LCI method approaches: Allocation - mass
Generated by: Tao Wang, twang@iue.ac.cn
Owner: Tiangong LCI Data Working Group
Review: Dependent internal review by Tiangong LCI Data Working Group
Amounts: no units in this file; such an amount is in the reference unit of its flow, which a separate flow dataset defines
copyright: false
licenseType: Free of charge for all users and uses

## General comment
The rare earth oxides (REO) produced from the Bayan Obo mine are utilized for a wide range of applications, including the manufacture of magnets, catalysts, alloys, glass, and ceramics. These oxides are key in the production of high-tech devices such as smartphones, computer hard drives, and electric vehicles due to their unique magnetic, luminescent, and electrochemical properties. Specifically, the 1 kg REO at 100% purity described in the lifecycle inventory is typically used in applications requiring high levels of purity, such as advanced electronics, research, and specialized industrial processes.

## Technology and included processes
The LCA model was constructed using eBalance Professional 4.7 (IT & Knowledge for Environment, Sichuan, China). We chose to construct an attributional model because it aligned more with the aims of our research, although we adopted a contributional approach to the scenarios sensitivity analysis. Life cycle environmental impacts were assessed using the CML2002 method (CML 2015). Eleven mid-point impact categories were selected based on suggested LCA practice (Hauschild et al. 2013) and previously identified environmental harms in the industry.

## Reference product
- Rare Earth Oxides: 1; calculated
  LANGUAGE

## Inputs
- Raw ore: 33.93; calculated
  Fe-Nb-RE ores
- sulphuric acid: 0.07; calculated
- Sodium silicate: 0.15; calculated
- ammonia: 1.22; calculated
- sulphuric acid: 3.86; measured
- phosphoric acid: 0.01; calculated
- Kerosene: 0.04; calculated
- Hydrochloric acid: 8.46; calculated
- Magnesium oxide: 0.55; measured
- Lime: 2.43; calculated
- Iron Pellet Production: 0.13; measured
  Iron pellet production, substituted for iron flakes
- Ammonium bicarbonate: 1.6; measured
- Sodium carbonate: 1.05; measured
- process steam: 4.43; measured
- Charcoal: 0.041; measured
- Electricity: 25.164; calculated
- hard coal,hard coal,hard coal: 56.66; calculated
- water: 306.21; calculated

## Outputs
All rows: calculated
- Spray mold: 1.85
  Ammonium chloride
- ammonium: 0.171
- thorium-230: 1.01e-5
  Thorium (water, unspecified)
- hydrogen fluoride: 0.003
- sulfur dioxide: 0.112
- sulphuric acid: 0.017
- thorium-230: 7.6e-5
  Thorium (air, unspecified)
- carbon dioxide (fossil): 2.04
  原文未区分bio和fossil，根据专家判断此处为fossil

## Deviations from the LCI method approaches
The LCI is first described individually for the three REO production chains, followed by a section on metal refining. Aggregated modeling data are also included for the industry average REO production in tabular form (Tables 1, 2, and 3). A more in-depth description of the processes, LCI, and modeling data used for the entire study (including metal refining) is available in section 1 in supporting information S1 on the Web.

## Use advice
Users of this lifecycle inventory data set for average rare earth oxide from Bayan Obo should incorporate the data within an attributional modeling framework for assessing environmental impacts, preferably using the CML2002 method (CML 2015) or similar. Users should consider the eleven mid-point impact categories selected to understand the full environmental impact. Additionally, note that this data set is constructed to reflect average conditions and does not account for specific REO production chains or individual methods involved in metal refining. Those seeking detailed insights into particular REO production chains or metal refining should refer to supporting information S1 on the Web, which includes in-depth descriptions of the processes, LCI, and modeling data used.

## Review details
Inventory: The internal review was done by several iteration steps concerning raw data validation, raw data documentation, representativity, completeness and consistency of modelling with regard to ISO 14040 and 14044.

## Data sources
- Lee, J. C. K. & Wen, Z. Rare Earths from Mines to Metals: Comparing Environmental Impacts from China’s Main Production Pathways: Environmental Impacts of Rare Earths in China. Journal of Industrial Ecology 21, 1277–1290 (2017).
