# Soil remediation ; In-situ remediation ; Phytoextraction remediation ; Engineering implementation ; Planting

Dataset: ILCD process, Unit process, single operation
Geography: IT
Classification: Other Services / Repair and maintenance
Generated by: Xiao Meng, xiaomeng@mail
Owner: Tiangong LCI Data Working Group
Review: Dependent internal review by Tiangong LCI Data Working Group
Amounts: no units in this file; such an amount is in the reference unit of its flow, which a separate flow dataset defines
licenseType: Free of charge for all users and uses

## General comment
Plant high accumulator plants.

## Geography
The site taken as a reference for the remediation is an area of 712 m2 located in a disused industrial district of Tuscany (Italy), in the past subjected to various productive activities that led to contamination with various metals, some of which potentially toxic such as lead (Pb), arsenic (As) and thallium (Tl). As it is a “site of national interest”, its exact location is considered confidential and cannot be disclosed.

## Technical purpose
This industrial process relates to the environmental management sector, particularly the in-situ phytoextraction technique for soil remediation. It is applied to decontaminate soils with high concentrations of metals, including but not limited to lead (Pb), arsenic (As), and thallium (Tl). The process involves using high accumulator plants capable of extracting toxic elements from soil in a previously contaminated industrial district. This specific application is suitable for areas where soil excavation is impractical and is intended to restore land for future use with minimal ecological disturbance.

## Reference product
- Planting site: 1281.6; measured
  植物种植完成的场地

## Inputs
All rows: measured
- Urea: 14.24
  nitrogen fertilizer
- Phosphorus Pentoxide: 11.39
  肥料-P2O5（phosphoric acid anhydride）
- potassium oxide: 7.12
  肥料-K2O（potassium oxide）
- EDTA: 61
  土壤改良剂-EDTA
- Potassium phosphate: 1261
  土壤改良剂-K3PO4
- Seed of H. annuus: 1.14
  种子-H. annuus
- Seed of L. albus: 14.24
  种子-L. albus
- Seed of B. juncea: 1.14
  种子-B. juncea
- Water: 384.48

## Use advice
When utilizing this data for Life Cycle Assessment, consider the boundary conditions of the specific site and the confidentiality of its exact location. Assumptions regarding technological applicability should be made based on similar climatic and soil conditions as the reference site. Take into account the time required for plants to accumulate metals and the subsequent harvest and disposal phases. This data set should not be applied to sites with different contamination or soil characteristics without proper adjustments. Ensure any modeling of use phase behavior accurately reflects the slow and biological nature of phytoextraction.

## Review details
Inventory: The internal review was done by several iteration steps concerning raw data validation, raw data documentation, representativity, completeness and consistency of modelling with regard to ISO 14040 and 14044.

## Data sources
- Vocciante, M., De Folly D’Auris, A., Franchi, E., Petruzzelli, G. & Ferro, S. CO2 footprint analysis of consolidated and innovative technologies in remediation activities. J Clean Prod 297, 126723 (2021).
