# 土壤修复;异位修复;热脱附;案例2;运行;修复后的土壤

Dataset: ILCD process, Unit process, single operation
Geography: FI
Reference year: 2017
Classification: Unit processes / Other Services / Repair and maintenance
Generated by: 王宁, wang_ning@caep.org.cn
Owner: 天工LCI数据工作小组
Review: Dependent internal review by 天工LCI数据工作小组
Amounts: no units in this file; such an amount is in the reference unit of its flow, which a separate flow dataset defines
copyright: false
licenseType: Free of charge for all users and uses

## General comment
将挖掘出的污染土投入热脱附设备，同时使用化学药剂进行水处理

## Technology and included processes
挖掘出污染无土壤方量为45916m3，热脱附设备功耗为2300kw/ h，每天运行20h，共运行141d，同时消耗了大量药剂

## Technical purpose
该热脱附单元过程用于异位土壤修复。它包括挖掘受污染土壤并使用热脱附设备进行清洁，使土壤适合重新使用或安全处理。此外，该过程中使用的水会用化学药剂处理以去除污染物。该过程通常用于大规模环境清洁项目，在这些项目中，土壤污染对健康或环境构成重大风险。

## Reference product
- Remediated soil: 45916; measured

## Inputs
All rows: measured
- Excavated soil,Excavated soil: 45916
- Electricity: 2.33496e7
- Polyaluminium Chloride,Polyaluminium Chloride: 16325
- Polyacrylamide,Polyacrylamide: 22926.6
- Water: 240484
- sodium hydroxide: 2350.47
- LPG - liquefied petroleum gas: 2.2958e6

## Use advice
在使用该数据集进行生命周期评估（LCA）时，必须考虑热脱附过程操作的具体条件。确保所处理的土壤体积、设备的耗电量和药剂使用量与被评估案例相符合。考虑影响过程效率和环境性能的场地特定因素。在LCA框架内，对处理后挖掘出的土壤的命运和用于过程的水的处理等下游影响的包含或排除应清楚地进行说明。

## Review details
清单： 内部审查通过几个迭代步骤完成，涉及原始数据验证、原始数据记录、代表性、完整性、与 ISO 14040 和 14044 有关的建模的一致性。

## Data sources
- Song, Y. et al. Environmental and socio-economic sustainability appraisal of contaminated land remediation strategies: A case study at a mega-site in China. Science of The Total Environment 610–611, 391–401 (2018).
