# copper-based mixed waste recycling|Electrolytic copper|electrolysis process|Anode coppe

Dataset: ILCD process, Unit process, single operation
Geography: JX-CN
Reference year: 2020
Classification: Materials production / Other mineralic materials
Functional unit: We consider the functional unit of the recycling of copper-based mixed waste to be 1000 kg electrolytic copper.
LCI method principle: Attributional
LCI method approaches: Allocation - market value
Generated by: Peng Wang, 2867919560@qq.com
Review: Dependent internal review by Tiangong LCI Data Working Group
Amounts: no units in this file; such an amount is in the reference unit of its flow, which a separate flow dataset defines
copyright: false

## Geography
The typical case is a metal recycling enterprise located in Jiangxi Province, China,

## Technology and included processes
he electrolytic process uses anode copper as the main raw material, electricity as the main source of energy, and sulfuric acid, hydrochloric acid, gelatin, and water as auxiliary materials to generate high-purity electrolytic copper for sale. residual electrode (returned to the refining process), anode mud (sent to the gold and silver recovery process), and nickel carbonate (for sale) products are also produced.

## Reference product
- Refined copper: 1000; measured
  copper(99%)需要补充

## Inputs
All rows: measured
- Electricity: 900
- copper: 1200
  Blister copper
- Glue: 0.1
  Glue需要补充
- Hard coal, at consumer EU-27: 100
  Hard coal
- Hydrochloric acid: 0.07
  Hydrochloric acid(32%)需要补充
- Sulfuric acid(98%): 8.3
  Sulfuric acid(98%) 需要补充resourse
- transport in t*km,transport in t*km: 2.71175
  Transport
- water: 343.5
  Water

## Outputs
- Anode sludge: 15; measured
  Anode sludge需要补充
- Anode copper: 210; measured
  Anode copper需要补充
- Nickel sulfate: 15; measured
  Nickel sulfate需要补充
- water vapour: 329.89; measured
  Water vapor

## Deviations from the LCI method approaches
Using the LCA-ReCiPe 2016 (Heijungs et al., 2017) characterization and normalization method (the midpoint and endpoint method), the life cycle inventory is converted into impact scores in multiple fields.

## Data selection and combination
foreground data and background data.

## Data treatment and extrapolations
GaBi 9.0 software is adopted to calculate the inventory, resource consumption, and waste emissions of the various copper-based mixed-waste recovery processes per unit mass.

## Review details
Inventory: The internal review was done by several iteration steps concerning raw data validation, raw data documentation, representativity, completeness and consistency of modelling with regard to ISO 14040 and 14044.; Documentation: The review of the documentation was performed by Ecobilan and is in compliance with ISO 14040 and 14044. The data set documentation is correct in view of the appropriateness of the information provided. It includes all relevant information in view of data quality and scope of application of the respective LCI result.

## Data sources
- Zhang, W. et al. Analyzing the environmental impact of copper-based mixed waste recycling-a LCA case study in China. Journal of Cleaner Production 284, 125256 (2021).
