# Rare Earth calcination|Neodymium(III) fluoride|In-situ leaching|neodymium iron boron (NdFeB) magnet

Dataset: ILCD process, Unit process, single operation
Geography: NMG-CN
Reference year: 2014
Classification: Materials production / Other mineralic materials
Functional unit: The functional unit is a 1 kg NdFeB magnet
LCI method principle: Attributional
LCI method approaches: Allocation - market value; Allocation - mass
Generated by: Tao Wang, twang@iue.ac.cn
Review: Dependent internal review by Tiangong LCI Data Working Group
Amounts: no units in this file; such an amount is in the reference unit of its flow, which a separate flow dataset defines
copyright: false

## Geography
Bayan Obo (China)

## Technology and included processes
The basic process for Nd and Pr production is the same at all three deposits. It is identical for Nd and Pr except for the last solvent extraction step (SX5) where both are separated.

## Reference product
- Neodymium fluoride: 0.00059; calculated
  Neodymium fluoride. Bayan Obo

## Inputs
- Electricity: 0.00072; article inperiodical
  Bayan Obo: based on analog production of LiF in Ecoinvent process (CN: lithium fluoride production)
- hydrogen fluoride: 0.00042; calculated
  Bayan Obo: used for the production of ammonium bifluoride NH3 g 306 0.18 (1.02 kg NH4F▪HF), stoichiometric calculation
- Ammonia (NH4+, NH3, as N): 0.00018; calculated
  (same comment as for hydrogen fluoride)
- Neodymium oxide: 0.00052; measured
  Neodymium oxide. Bayan Obo: stoichiometric calculation
- transport in t*km,transport in t*km: 2.2e-5; software or database
  Bayan Obo: chemicals 1000 km, Nd2O3 20 km, lorry EURO3

## Outputs
- Ammonium Bifluoride: 0.0001; software or database
  Ammonium Bifluoride. Bayan Obo: stoichiometric calculation with 20 % excess; in the ecobalance software GaBi the decomposition products (NH3 and HF) of NH4F∙HF and NH4F are included, because NH3 and HF are considered in the impact assessment (ReCiPe)
- Ammonium fluoride: 0.00039; software or database
  Ammonium fluoride. Bayan Obo: stoichiometric calculation with 20 % excess; in the ecobalance software GaBi the decomposition products (NH3 and HF) of NH4F∙HF and NH4F are included, because NH3 and HF are considered in the impact assessment (ReCiPe)
- Neodymium oxide: 3e-5; software or database
  Neodymium oxide. Bayan Obo: stoichiometric calculation with 20 % excess; in the ecobalance software GaBi the decomposition products (NH3 and HF) of NH4F∙HF and NH4F are included, because NH3 and HF are considered in the impact assessment (ReCiPe)
- waste water - treated: 8e-5; software or database
  Bayan Obo: stoichiometric calculation with 20 % excess; in the ecobalance software GaBi the decomposition products (NH3 and HF) of NH4F∙HF and NH4F are included, because NH3 and HF are considered in the impact assessment (ReCiPe)

## Deviations from the LCI method approaches
In this study, an allocation method based on the market prices of REOs28 is considered. To estimate uncertainties that refer to the allocation method, a mass-based allocation is undertaken as a sensitivity analysis

## Review details
Inventory: The internal review was done by several iteration steps concerning raw data validation, raw data documentation, representativity, completeness and consistency of modelling with regard to ISO 14040 and 14044.; Documentation: The review of the documentation was performed by Ecobilan and is in compliance with ISO 14040 and 14044. The data set documentation is correct in view of the appropriateness of the information provided. It includes all relevant information in view of data quality and scope of application of the respective LCI result.

## Data sources
- Marx, J., Schreiber, A., Zapp, P. & Walachowicz, F. Comparative Life Cycle Assessment of NdFeB Permanent Magnet Production from Different Rare Earth Deposits. ACS Sustainable Chem. Eng. 6, 5858–5867 (2018).
