# Hydrometallurgy--Alkaline leaching(Process F)

Dataset: ILCD process, Unit process, single operation
Geography: CN
Reference year: 2013
Valid until: 2017
Classification: Materials production / Other mineralic materials
Functional unit: FU is a typical type of LIB electrode material of 100 kg
Generated by: maqingyuan, m1120498928@163.com
Review: Dependent internal review by Tiangong LCI Data Working Group
Amounts: no units in this file; such an amount is in the reference unit of its flow, which a separate flow dataset defines
copyright: false

## General comment
The ammonia/ammonium salt system can leach Li, Ni and Co from the ternary cathode materials without leaching Mn and Al. The selectivity is good and the system is alkaline, so the amount of alkali can be saved in the recovery of the products by precipitation method.

## Time period
Data source: 2013-2017

## Reference product
- Electrolyte: 100; input; article inperiodical
  Electrode paste

## Inputs
All rows: article inperiodical
- Ammonia (25%): 217.7
  Ammonia (25% NH3·H 2O)
- Ammonium Chloride: 59.1
  Ammonium salt
- Sodium sulfite: 76.2
  sodium sulfite，NaSO3
- sodium hydroxide: 2
- water,water: 700
- Natural gas, at consumer EU-27: 2.3
  Natural gas:8500 kCal,单位Nm3
- Electricity: 90

## Outputs
All rows: article inperiodical
- Lithium carbonate: 10.6
- Graphite: 18
  Graphite powder
- Al/Cu foil: 5.7
- Nickel salt: 13
  Ni salt/metal
- Cobalt salt: 15.8
  Co salt/ metal
- Manganese salt: 18
  Mn salt/metal
- Ternary precursor: 12
  Precursor
- sodium sulfate: 70
- Slag (deposited, hibernating in ground, non elementary flow): 5.6
- carbon dioxide: 7
- waste water - treated: 690

## Data selection and combination
The input-output of the process comes from the average results of the data reported in the literature review, reflecting the representative process from "tomb" to "cradle". This study does not consider the recycling or treatment of plastic and metal shells, and labor costs, factory construction costs, and their impact on the environment are also not included in this analysis.

## Data treatment and extrapolations
It is worth noting that the EU's data is not specific to a specific industry, and some import and export data and recycling information are not suitable for China's situation. Therefore, the improved CRMs evaluation method also combines official Chinese data, literature reports, and data from other interest groups such as trade/industry associations to conduct the best estimation of data from major LIB manufacturers, recycling companies, official management agencies in China, and other stakeholders. In terms of data timeliness, the reference period used in the evaluation of CRMs is based on the latest 4-year average (i.e. 2013-2016).

## Review details
Inventory: The internal review was done by several iteration steps concerning raw data validation, raw data documentation, representativity, completeness and consistency of modelling with regard to ISO 14040 and 14044.; Documentation: The review of the documentation was performed by Ecobilan and is in compliance with ISO 14040 and 14044. The data set documentation is correct in view of the appropriateness of the information provided. It includes all relevant information in view of data quality and scope of application of the respective LCI result.

## Data sources
- 宋佳丽. 面向能源金属高效回收的资源关键性评价模型与应用. (天津大学, 2019).
