# 修复后土壤;土壤修复;原位热处理;射频加热

Dataset: ILCD process, Unit process, black box
Geography: DK
Reference year: 2013
Classification: Unit processes / Other Services / Repair and maintenance
Functional unit: Results are presented per unit volume (1 m3 ) of soil remediated in order to compare results for each site.
Generated by: 杨欣桐, yangxt@caep.org.cn
Owner: 天工LCI数据工作小组
Review: Dependent internal review by 天工LCI数据工作小组
Amounts: no units in this file; such an amount is in the reference unit of its flow, which a separate flow dataset defines
copyright: false
licenseType: Free of charge for all users and uses

## General comment
从数据来源文献 表1（作为数据收集基础的试验场地概述）中可以看出,所修复的小型场地的面积和方量分别为180 m2和1175 m3。污染物的质量为400千克PCE。

## Geography
LCA的数据收集是针对一个较小（180 m2）的场地进行的，该场地代表了使用ISTD进行修复的典型丹麦场地。

## Technology and included processes
RFH适用于低渗透性地层，安装多个井来加热土壤，RFH使用专用天线。修复原理为将土壤加热到100°C左右，以增强PCE的挥发，使用真空在地表以下对热蒸汽进行提取，活性炭空气过滤装置安装在地表以上，冷凝水在单独的活性炭水过滤装置中处理。在加热区上方安装一个40 cm混凝土盖，以防止雨水侵入，并形成不透气的密封表面，减少对大气的热损失

## Technical purpose
所描述的修复过程旨在通过射频加热技术（RFH）进行原位热处理来处理被污染的土壤。它专门适用于丹麦典型的较小场地，面积为180平方米。该土壤治疗方法适用于低渗透性污染区，并涉及将土壤加热至大约100°C以增强污染物如四氯乙烯（PCE）的挥发。修复过程使用井进行土壤加热和提取蒸汽，然后通过活性炭过滤器进行处理。

## Reference product
- Remediated soil: 1175; estimated

## Inputs
All rows: estimated
- Road Transport,Road Transport: 1.3056e7
  Travel by car （personkm）
- transport in t*km: 53, 2006, 1752 (3 entries)
- Road Transport,Road Transport: 6000, 90000, 1.2e6 (3 entries)
- Electricity: 3.56699e6
- Diesel,Diesel: 6.855
- sand: 11794
- Mortar: 905
- Concrete: 41600
- Activated Carbon: 2646, 405 (2 entries)
- Carbon Steel: 3659
- Stainless Steel: 6422
- Copper and copper alloys: 140
- Aluminium and aluminium alloy products: 90
- Fiber glass: 219
- Polyethylene,Polyethylene: 791
- contaminated soil: 1175

## Use advice
在使用数据集进行生命周期评估时，必须考虑与修复技术评估相关的能源和材料使用、设备和人员的建设和运输活动。数据收集反映了使用RFH和ISTD标准丹麦修复站点的系统边界，并且应该与类似的环境和技术场景相结合。必须准确表示并与替代修复方法进行比较的关键方面包括井场材料、盖顶建造、空气和水处理系统、电力消耗以及运输影响。

## Review details
清单： 内部审查通过几个迭代步骤完成，涉及原始数据验证、原始数据记录、代表性、完整性、与 ISO 14040 和 14044 有关的建模的一致性。

## Data sources
- Lemming G ,Nielsen G S ,Weber K , et al. Optimizing the Environmental Performance of In Situ Thermal Remediation Technologies Using Life Cycle Assessment [J]. Groundwater Monitoring & Remediation, 2013, 33 (3): 38-51.
