# 规模生猪生产 ; 1W HP 猪场

Dataset: ILCD process, Unit process, black box
Geography: HUB-CN
Reference year: 2012
Classification: Unit processes / Materials production / Agricultural production means
Functional unit: The application coefficient (100/ field weight) was corrected to the standard functional unit weight of 100kg due to inconsistent field weight.
Generated by: 杨瑞, 1632707028@qq.com
Owner: 天工LCI数据工作小组
Review: Dependent internal review by 天工LCI数据工作小组
Amounts: no units in this file; such an amount is in the reference unit of its flow, which a separate flow dataset defines
copyright: false
licenseType: Free of charge for all users and uses

## General comment
规模集约化养猪与传统养猪相区别的一个重要特征是生产过程中实现流水式均 衡生产，产品批量化、规格化。由于不同猪舍类型、不同的管理措施、不同的饲料 来源及配方技术、粪污处理采取不同方法等，不同规模生猪生产系统整体及关键节 点导致的环境影响并没有确切认识，本章结合第二章构建的生猪生产系统模型进行 系统地研究。

## Geography
通过实地调研归纳了湖北省集约化生猪养殖的特点，即生猪生产工艺多为自繁 自养采用全进全出分阶段饲养方式。建有各种类型猪舍。一般猪舍内采用机械通风， 进行防暑降温驱寒保暖及舍内小环境控制；母猪与仔猪采用限位栏和高床饲养，平 均更新率一般在 35%-40%，种猪使用年限在 3-4 年。日粮依据生理阶段的营养需要 配制成全价饲料，以玉米等谷物为主，饲料原料从外部购买。品种多数为洋三元杂 交猪（如 DLY），年出栏商品猪 10000 头以上；日常管理中采用干清粪、水泡粪方 式，以利干湿分离；粪污处理方式采用干粪堆肥，污水进行厌氧发酵工艺生产沼气。 万头猪场为一点分布，五万头以上集约化猪场采取多点布局，繁育场+育肥场，断奶 仔猪使用卡车运输周转。

## Time period
按照 2012 年《中国畜牧业年鉴》的划分，生猪养殖模式可分为年出栏生猪 1 头至 49 头的散户 养殖；年出栏生猪 50 头至 499 头的小规模养殖；年出栏生猪 500 头至 9999 头的中 规模养殖；年出栏生猪 10000 头以上的大规模养殖四种模式。

## Technology and included processes
本文确立的商品猪 LCA 的研究对象是商品猪产品系统，因此商品猪 LCA 的目 标应包含以下几个方面：1）依照商品猪的生产流程，阐明商品猪生产工艺中的关键 环节或过程的环境影响类型；2）依据商品猪的不同生产系统特点阐明不同生产系统 的环境影响评分，并通过影响评分评价不同产品系统的环境友好程度；3）依据对生 猪生产系统的环境影响评价结果提出改善或优化途径以及建议。

## Technical purpose
该数据集描述了大规模集约化养猪实践，可用于养猪系统的开发和评估。主要应用是为了理解生猪生产的流程、输入、输出和环境影响，包括猪舍类型、管理策略、饲料来源和组成，以及粪污处理方法。这些信息可以应用于提高养猪场的可持续性，特别是在湖北省的背景下，以及评估养猪生产技术的环境足迹，如那些专注于从小规模到大规模操作的不同繁殖规模。

## Reference product
- pig: 100; measured
  由于出栏体重不一致运用系数（100/出栏体重）校正为 100kg 的标准功能单元体重。

## Inputs
All rows: measured
- sand: 2.682
  sands，取自1W HP 猪场数据
- Glass (formed & finished): 0.0722
  glasses，取自1W HP 猪场数据
- Steel: 1.107
  steel，取自1W HP 猪场数据
- polystyrene expandable granulate (EPS): 0.0551
  EPS，取自1W HP 猪场数据
- water: 1768.1
  取自1W HP 猪场数据
- feed: 304.5
  取自1W HP 猪场数据

## Outputs
All rows: measured
- manure: 256.4
  猪粪便，取自1W HP 猪场数据
- carbon dioxide (fossil),carbon dioxide (fossil): 255.92
  取自1W HP 猪场数据
- ammonia: 1.06281
  取自1W HP 猪场数据
- methane (fossil): 0.79723
  取自1W HP 猪场数据
- nitrous oxide: 0.05362
  一氧化二氮，取自1W HP 猪场数据

## Data treatment and extrapolations
本文采用的气体产生系数为母猪阶段 NH3：8.2g/d.pig，CO2：2.6kg/d.pig，N2O： 0.48g/d.pig，CH4：3.5g/d.pig；育肥阶段 NH3：6.9 g/d.pigCO2：1585g/d.pigN2O 83 0.34g/d.pig，CH4：5.5g/d.pig。

## Use advice
使用该数据集的用户在分析环境影响时应考虑不同规模养猪生产系统的方法学建议。务必确保在建模时准确考虑了不同猪舍类型、管理措施和粪污处理方法等因素。环境影响评价应基于提供的不同生猪生产阶段的气体产生系数。为了比较目的，在出栏体重不一致时调整系数为100kg的标准功能单元体重。这些数据应与建立的生猪生产系统模型结合使用，研究结果应有助于战略决策，用于环境改善和优化。

## Review details
清单： 内部审查通过几个迭代步骤完成，涉及原始数据验证、原始数据记录、代表性、完整性、与 ISO 14040 和 14044 有关的建模的一致性。

## Data sources
- 惠晓红. 运用生命周期评价与生态效率法评估湖北省生猪养殖系统研究. (华中农业大学, 2017).
