# Bio-based ethylene glycol production | Ethylene glycol | Hydrogen+Dimethyl oxalate synthesis | Rice straw

Dataset: ILCD process, Unit process, black box
Geography: CN
Classification: Materials production / Other mineralic materials
Functional unit: For the convenience of comparison, we use 1 ton of ethylene glycol product as a functional unit.
LCI method principle: Attributional
Generated by: Zirui Tang, tangzirui123@gmail.com
Review: Dependent internal review by Tiangong LCI Data Working Group
Amounts: no units in this file; such an amount is in the reference unit of its flow, which a separate flow dataset defines
copyright: false

## General comment
The production of 1 ton of ethylene glycol consumes 2.48 tons of biomass, 47.6 GJ of coal, and 3.8 GJ of electricity.

## Geography
The results of this paper provide a reference for decision making in the structure change of energy in China.

## Technology and included processes
The biomass raw material first enters the biomass gasification (BGS) unit with 95% oxygen produced by the air separation (ASU) unit. The cooled synthesis gas is divided into two streams: one stream enters the water gas shift (WGS) unit to increase the H2/CO ratio of the synthesis gas and the other stream is the unshifted syngas as the bypass stream to adjust the H2/CO to a suitable ratio. Acid gases, such as CO2 and H2S, are removed in the following acid gas removal (AGR) unit equipment. The clean synthesis gas enters the H2/CO separation (HCS) unit to obtain high-purity CO and H2 gas streams. In the DMO synthesis (DMOS) unit, the CO stream is used to produce the intermediate product dimethyl oxalate (DMO), and the hydrogen stream is compressed into the ethylene glycol synthesis (ECS) unit for the production of ethylene glycol.

## Reference product
- Ethylene glycol: 1000; article inperiodical

## Inputs
All rows: article inperiodical
- biomass; 14.7 MJ/kg: 2480
- Hard coal, at consumer EU-27: 47600
- Diesel: 2000
- Gasoline (regular): 139
- Electricity: 3800

## Outputs
All rows: article inperiodical
- carbon dioxide (fossil): -281
- methane (fossil): 31.4
- nitrous oxide: 0.11
- carbon monoxide: 14
- nitrogen monoxide: 3.85
- sulfur dioxide: 2.13
- particles (PM10): 3.74
- non-methane volatile organic compounds: 0.105

## Data selection and combination
The data of this article mainly come from research papers on similar topics and some technical reports. The data used are all checked and compared to ensure the accuracy of the research results. For the researched route, the basic input and output energy consumption and specific pollution discharge data in the specific process are collected, such as raw material consumption, life cycle energy consumption, direct pollution discharge, etc.

## Review details
Inventory: The internal review was done by several iteration steps concerning raw data validation, raw data documentation, representativity, completeness and consistency of modelling with regard to ISO 14040 and 14044.; Documentation: The review of the documentation was performed by Ecobilan and is in compliance with ISO 14040 and 14044. The data set documentation is correct in view of the appropriateness of the information provided. It includes all relevant information in view of data quality and scope of application of the respective LCI result.

## Data sources
- Xu, S., Li, Z., Yang, Q., Chu, G., Zhang J., Zhang, D., Zhou, H. & Gao, M. Comparative Life Cycle Assessment of Energy Consumption, Pollutant Emission, and Cost Analysis of Coal/Oil/Biomass to Ethylene Glycol. ACS Sustainable Chem. Eng. 9, 15849–15860 (2021).
