# 选矿;铁精矿;选矿（Z11）

Dataset: ILCD process, Unit process, single operation
Geography: CN
Reference year: 1998
Classification: Materials production / Metals and semimetals
Generated by: 付翔, 1162850692@qq.com
Owner: 天工LCI数据工作小组
Review: Dependent internal review by 天工LCI数据工作小组
Amounts: no units in this file; such an amount is in the reference unit of its flow, which a separate flow dataset defines
copyright: false
licenseType: Free of charge for all users and uses

## General comment
来自表 4-15 Z11 钢厂生产吨材环境负荷编目表

## Time period
论文提到钢铁企业环境总体数据为1998年的吨钢环境基础数据。

## Technical purpose
通过选矿（Z11）工艺生产的铁精矿用于钢铁行业。该材料专门用于需要高品质铁原料的应用，以进一步加工和生产各种钢铁产品。

## Reference product
- Refined Iron Ore: 1456.88; measured
  精选矿

## Inputs
- Energy, geothermal, converted: 1075.97; measured
- water: 50743; measured
- Iron ore: 3383; measured
  铁矿石

## Outputs
All rows: measured
- Dust (unspecified, from stack): 0.306
- sulfur dioxide: 0.217
- cyanide: 5.2e-5
- phenol: 0.000177
  挥发酚
- Hydrocarbons, aliphatic, alkanes, unspecified: 0.017104
  石油类
- Suspended solids, unspecified: 1.0118
- chemical oxygen demand: 0.116259
- Spoil (deposited, hibernating in ground, non elementary flow): 1640.45

## Use advice
使用此数据集时，用户必须考虑从生命周期评估报告中的表4-15 Z11 提到的1998年精炼铁矿石生产的具体上下文。应特别注意钢铁公司每吨钢生产的环境负荷编目。重要的是要结合1998年后方法论或环境负荷数据的任何更新或变化，确保技术适用性与当前情况一致。

## Review details
清单： 内部审查通过几个迭代步骤完成，涉及原始数据验证、原始数据记录、代表性、完整性、与 ISO 14040 和 14044 有关的建模的一致性。

## Data sources
- 周和敏. 钢铁材料生产过程环境协调性评价研究. (北京工业大学, 2001).
