# Ultrahighmolecularweightpolyethylenefiber|Ultra-high-molecular-weightpolyethylenefiberresin|Dry:Polymerization-Spinning-Drafting-Winding|All sizes / 超高分子量聚乙烯纤维|超高分子量聚乙烯纤维树脂|干法：聚合—纺丝—牵伸—卷绕|所有规模

Dataset: ILCD process, Unit process, single operation
Geography: CN
Reference year: 2019
Classification: Materials production / Plastics
Generated by: The data was created by the Office of the Second National Pollution Source Census of the Ministry of Ecology and Environment, and the data was organized by the TianGong Plan team for ILCD format / 生态环境部第二次全国污染源普查工作办公室创建数据，天工计划团队常慧敏整理数据为ILCD格式
Owner: Tiangong LCI Data Working Group / 天工LCI数据工作小组
Amounts: no units in this file; such an amount is in the reference unit of its flow, which a separate flow dataset defines
copyright: false
licenseType: Free of charge for all users and uses

## Technology and included processes
the Technical of end-of-pipe management technology for pollution volatile organic compoundisAbsorption + diversion，Its Technical efficiency of end-of-pipe management32，The formula for calculating the actual operation rate (k-value) of the end-of-pipe treatment facility is k = 1

## Reference product
- Ultra High Molecular Weight Polyethylene Fiber: 1000; calculated
  源文件中描述为为超高分子量聚乙烯纤维，此处对其进行了匹配工作，将其匹配到LCAflow库里面相最符合的流

## Outputs
- Exhaust gas: 480000; calculated
  污染物指标工业废气量的末端治理技术未说明。原文件中描述污染物类别为废气，污染物指标为工业废气量，此处对其进行了匹配工作，将其匹配到LCAflow库里面相最符合的流
- volatile organic compound: 23.484; calculated
  污染物指标挥发性有机物的末端治理技术是吸附+蒸汽解析，其效率为62，末端治理设施实际运行率（k值）计算公式为k=污水治理设施运行时间（小时）/正常生产时间（小时）。原文件中描述污染物类别为废气，污染物指标为挥发性有机物，此处对其进行了匹配工作，将其匹配到LCAflow库里面相最符合的流
- volatile organic compound: 23.484; calculated
  污染物指标挥发性有机物的末端治理技术是直接燃烧，其效率为62，末端治理设施实际运行率（k值）计算公式为k=污水治理设施运行时间（小时）/正常生产时间（小时）。原文件中描述污染物类别为废气，污染物指标为挥发性有机物，此处对其进行了匹配工作，将其匹配到LCAflow库里面相最符合的流
- volatile organic compound: 42.024; calculated
  污染物指标挥发性有机物的末端治理技术是吸收+分流，其效率为32，末端治理设施实际运行率（k值）计算公式为k=污水治理设施运行时间（小时）/正常生产时间（小时）。原文件中描述污染物类别为废气，污染物指标为挥发性有机物，此处对其进行了匹配工作，将其匹配到LCAflow库里面相最符合的流

## Data sources
- 第二次全国污染源普查产排污核算系数手册（试用版）,二级代码28,三级代码282.0,四级代码2829文件，在完整版文件中第666页
