# 苹果生产

Dataset: ILCD process, Unit process, black box
Geography: SAX-CN
Reference year: 2013
Valid until: 2014
Classification: Materials production / Agricultural production means
Functional unit: 1 公顷苹果园
Generated by: 朱娴, zzhu0918@163.com
Owner: 天工LCI数据工作小组
Review: Dependent internal review by 天工LCI数据工作小组
Amounts: no units in this file; such an amount is in the reference unit of its flow, which a separate flow dataset defines
copyright: false
licenseType: Free of charge for all users and uses

## General comment
培育和种植苹果树苗，进入农资阶段，进行农药、化肥的施用并且进行薄膜覆盖，进入果园管理阶段，包括施肥、病虫害防治、套袋、覆膜、修剪、灌溉、用电等，最后收获阶段收获苹果果实。

## Geography
本研究在咸阳和延安的南部地区进行，这两个地区分别代表了典型的灌溉和雨养苹果生产系统。

## Technical purpose
该数据集代表了苹果生产的生命周期，包括培育和种植苹果树苗、施用农药、化肥和薄膜覆盖等农资阶段，以及包括施肥、病虫害防治、套袋、修剪、灌溉、用电等在内的果园管理活动。该数据适用于典型灌溉和雨养系统中苹果生产的环境影响评估，特别是咸阳和延安南部地区。

## Reference product
- Biological yield: 38400; min 19000; max 52500; measured

## Inputs
All rows: measured
- Nitrogenous fertilizer: 11185; min 216; max 2150
- Phosphate fertilizer: 681; min 117; max 1470
- Potassium fertilizer: 936.3; min 196; max 1518
- Irrigation water: 735; min 195; max 1800
- Pesticide: 32.2; min 15; max 39
- Plastic film,Plastic film: 96.5; min 76; max 105
- Paper bags: 677; min 653; max 698
- heavy fuel oil: 0.3505; min 0.305; max 0.365
- Electricity: 26683.2; min 23940; max 27975.6
- hard coal; 26.3 MJ/kg: 9580; min 8680; max 9940

## Use advice
在使用此数据集进行苹果生产的生命周期评估时，需考虑研究地区的区域差异，如典型的生产系统（灌溉或雨养）。用户应考虑季节变化及其对农业投入和果园管理实践的影响。这些信息对于准确的环境建模至关重要。数据中的排除项（例如，投入和产出的运输）应当注明，并且在相关时将其包括在系统边界内。

## Review details
清单： 内部审查通过几个迭代步骤完成，涉及原始数据验证、原始数据记录、代表性、完整性、与 ISO 14040 和 14044 有关的建模的一致性。
