# 加热烘干粉碎｜经过预处理的秸秆｜无工艺流程参数

Dataset: ILCD process, Unit process, single operation
Geography: CN
Reference year: 2010
Classification: Unit processes / Energy carriers and technologies / Heat and steam
Functional unit: 1 ton of straw as a functional unit (0% moisture content).
LCI method principle: Consequential
Generated by: 刘超硕, liucs22@mails.jlu.edu.cn
Owner: 天工LCI数据工作小组
Review: Dependent internal review by 天工LCI数据工作小组
Amounts: no units in this file; such an amount is in the reference unit of its flow, which a separate flow dataset defines
copyright: false
licenseType: Free of charge for all users and uses

## General comment
所描述的工业过程用于预处理秸秆生物质的准备。该材料后续通常用于各种生物基产品、用于加热的生物质颗粒生产，或作为生物燃料和生化制品的原料。

## Reference product
- Crop straw: 1000; measured

## Outputs
- sulfur dioxide: 0.882; measured
- nitrous oxide: 0.615; measured
- carbon dioxide (fossil): 118.1; measured
  原文未区分排放源为生物源或化石源，根据专家判断此处为化石源。

## Use advice
使用此数据集时，至关重要的是要考虑到该过程是针对含水量为0％的1吨秸秆的功能单位来定义的。用户应确保其研究范围与该数据的规格相匹配，并且任何湿度变化或其他过程参数的可调性都在其生命周期评价中得到了适当调整。

## Review details
清单： 内部审查通过几个迭代步骤完成，涉及原始数据验证、原始数据记录、代表性、完整性、与 ISO 14040 和 14044 有关的建模的一致性。

## Data sources
- Lu, W. & Zhang, T. Life-Cycle Implications of Using Crop Residues for Various Energy Demands in China. Environ. Sci. Technol. 44, 4026–4032 (2010).
