# 生物乙醇 ; 碱法处理 ; 收集与运输

Dataset: ILCD process
Geography: GLO
Classification: Unit processes / Energy carriers and technologies / Renewable fuels
Generated by: Jiayi Yuan, jiayi_y@mail.bnu.edu.cn
Owner: 天工LCI数据工作小组
Review: Dependent internal review by 天工LCI数据工作小组
Amounts: no units in this file; such an amount is in the reference unit of its flow, which a separate flow dataset defines
copyright: false
licenseType: Free of charge for all users and uses

## General comment
该数据集描述了从收集和运输阶段到预处理阶段的生物乙醇生命周期，重点关注碱法。它适用于生物乙醇生产行业内的各种技术配置。此外，该数据集有助于了解与车辆燃烧生物乙醇相关的环境影响，因为它包括了从GREET数据库获得的名为“汽车燃烧生物乙醇”的过程的LCI数据。

## Technology and included processes
通过数据质量评估，从474篇已发表论文的561个数据集中选择了141个具有高完整性和一致性的数据集，并将其分类为由预处理技术确定的8种技术配置。预处理后的技术步骤都是相同的，尽管实际流量和参数值在文献中观察到不同

## Inputs
- Diesel: 0.0006
  L/kg

## Data selection and combination
在可能的情况下使用了全球数据集，因为该研究不适用于任何特定地区。一种名为“汽车中生物乙醇燃烧”的外部过程的LCI数据来自GREET数据库

## Data treatment and extrapolations
我们通过不确定性传播（蒙特卡罗）、可辨别性分析、全局敏感性分析和场景变化评估了建模结果的鲁棒性。

## Use advice
在使用这个数据库进行生命周期评估时，用户应注意，全球数据集比特定区域的信息更受优先考虑。在分析过程中应考虑数据的稳健性，并鼓励用户使用包括蒙特卡洛、可识别性分析和情景变化等不确定性和敏感性分析来支持他们的发现。此外，用户应确保他们考虑了与“汽车燃烧生物乙醇”相关的数据中概述的特定方法论考虑，如回收、使用阶段行为或技术适用性。

## Review details
清单： 内部审查通过几个迭代步骤完成，涉及原始数据验证、原始数据记录、代表性、完整性、与 ISO 14040 和 14044 有关的建模的一致性。
