# 铝电解与铸锭 ; 原生铝锭 ; 预焙 ; 冶金用氧化铝

Dataset: ILCD process, Unit process, single operation
Geography: CN
Reference year: 2022
Classification: Unit processes / Materials production / Metals and semimetals
Generated by: 熊若熙, xiongrx0126@163.com
Owner: 天工LCI数据工作小组
Review: Dependent internal review by 天工LCI数据工作小组
Amounts: no units in this file; such an amount is in the reference unit of its flow, which a separate flow dataset defines
copyright: false
licenseType: Free of charge for all users and uses

## General comment
通过铝电解与铸锭得到的原生铝锭通常作为在交通、建筑和包装行业等制造部件和组件的基础原材料。预焙过程是指在电解生产铝中使用预焙碳阳极，这是生产用于铝冶炼的冶金用氧化铝的必需材料。

## Time period
文献发表日期

## Reference product
- aluminium, primary, ingot: 1000; missing unimportant
  electrolytic aluminium

## Inputs
All rows: missing unimportant
- electricity, high voltage, aluminium industry: 49971.6
- aluminium oxide, metallurgical: 1916
  alumina
- anode, prebake, for aluminium electrolysis: 469
  carbon electrode
- Fluoride: 19
  fluoride “氟化物”，我猜是萤石Flourite，但没有证据，就先新建了一个flow
- cryolite: 11.9
- hard coal: 77.8
- Diesel oil: 38.9
- solvent, unspecified: 4
  solvent 什么溶剂也没说明白
- coal gas: 311
- natural gas, high pressure: 41.8
  natural gas 天然气有很多种类，这里没说明白，姑且先新建一个flow

## Data selection and combination
根据目标、范围、系统边界定义，使用相关规范、标准、年鉴，或其他相关资料，收集汇总生命周期各阶段的输入输出数据。

## Use advice
在使用此数据集进行生命周期评估时，确保LCA的范围包括从摇篮到工厂大门阶段，考虑原生铝生产及其潜在环境影响。如果此数据集是涉及副产品或回收的更大系统的一部分，则必须采用适当的分配程序。数据应反映所述时期的技术适用性，并遵守定义的系统边界。随着新的标准、规范或方法论的出现，应监控并合并对此数据集的更新。

## Review details
清单： 内部审查通过几个迭代步骤完成，涉及原始数据验证、原始数据记录、代表性、完整性、与 ISO 14040 和 14044 有关的建模的一致性。

## Data sources
- Zhang, Y. et al. Life cycle assessment of pollutants and emission reduction strategies based on the energy structure of the nonferrous metal industry in China. ENERGY 261, (2022).
