# 鸡蛋生产 ; 蛋鸡生产

Dataset: ILCD process, Unit process, single operation
Geography: HLJ-CN
Reference year: 2009
Classification: Unit processes / Materials production / Agricultural production means
Functional unit: The main output product of laying hens is eggs, so the functional unit defined in this study is "1kg egg".
Generated by: 杨瑞, 1632707028@qq.com
Owner: 天工LCI数据工作小组
Review: Dependent internal review by 天工LCI数据工作小组
Amounts: no units in this file; such an amount is in the reference unit of its flow, which a separate flow dataset defines
copyright: false
licenseType: Free of charge for all users and uses

## General comment
蛋鸡生产阶段向环境释放的污染物主要分为两个阶段进行考虑： 词养阶段蛋鸡自身向环 境释放的污染物和鸡粪处理阶段向环境释放的污染物。

## Geography
黑龙江省集约化蛋鸡场的生命周期评价

## Technology and included processes
本研究采用定量方法。 这种评价包括对研究目标和范围的重新审查或修正， 从而决定如何才 能满足研究的目标。 依据 ， 结合蛋鸡生产的实际情况， 给出生命周期影响评价的技术框架（图 。 影响评价包括四个步骤分类、 特征化、 标 准 化、加权评估。 （1）分类： 将生命周期清单分析中输入输出数据分门别类的归纳到不同环境影响类型中， 针 对蛋鸡的生命周期清单分析结果， 本文分为以下四种环境影响类型进行评估： 全球变暖， 环境酸化， 富营养化， 光化学臭氧合成。 （2）特征化： 定量清单分析中的数据， 确定四种环境影响类型的影响程度。 这使本来不具可 比性的环境污染排放量具有可比性。 （3）标准化： 首先要建立标准化基准， 为全球变暖、 环境酸化、 富营养化、光化学臭氧合成 四种环境影响类型的相对大小提供可比较的标准。（4） 加权评估： 是将环境影响归为统一的指标 —环境负荷大小的过程， 从而直接对不同生 产系统进行对比。

## Technical purpose
本数据集描述的鸡蛋生产过程主要应用是蛋鸡产蛋。这些鸡蛋主要作为食品直接消费或用作各种烹饪应用的原料。该过程源自黑龙江省的一家集约化蛋鸡场，重点是通过大规模养殖蛋鸡来生产大量鸡蛋。

## Reference product
- egg: 1; measured
  鸡蛋

## Inputs
- Electricity: 0.4284; measured
- hard coal: 0.04959; measured

## Outputs
All rows: measured
- methane (fossil): 0.00165355
- carbon dioxide (biogenic): 2.50535
- ammonia: 0.0152992
- nitrous oxide: 0.000177785
- nitrogen, total (excluding N2): 0.00533589
- carbon monoxide (fossil): 0.0001194
- sulfur oxides: 0.000780853

## Data selection and combination
本文以黑龙江省集约化蛋鸡场为例

## Use advice
在使用此数据集对集约化蛋鸡场的鸡蛋生产进行生命周期评价时，用户必须考虑生产的所有阶段，包括蛋鸡直接释放的污染物和与鸡粪处理相关的污染物。功能单位定义为'1kg 鸡蛋'，并且应根据此单位分配影响。应确保正确建立系统边界，并注意任何对其他情境的外推都需要考虑地区特定因素，例如气候、饲料组成和废物管理实践。

## Review details
清单： 内部审查通过几个迭代步骤完成，涉及原始数据验证、原始数据记录、代表性、完整性、与 ISO 14040 和 14044 有关的建模的一致性。

## Data sources
- 高雪. 黑龙江省集约化蛋鸡场的生命周期评价. (东北农业大学, 2012).
