# 土壤修复;异位修复;土壤淋洗;案例2;运行;得到修复的土壤

Dataset: ILCD process, Unit process, single operation
Geography: SD-CN
Reference year: 2017
Classification: Unit processes / Other Services / Repair and maintenance
Generated by: 王宁, wang_ning@caep.org.cn
Owner: 天工LCI数据工作小组
Review: Dependent internal review by 天工LCI数据工作小组
Amounts: no units in this file; such an amount is in the reference unit of its flow, which a separate flow dataset defines
copyright: false
licenseType: Free of charge for all users and uses

## General comment
将挖掘出的污染土投入淋洗设备，同时使用化学药剂配置化学药剂进行淋洗

## Technology and included processes
挖掘出污染无土壤方量为210000m3，淋洗设备功耗为180kw/ h，每天运行20h，共运行300d，同时消耗了大量药剂

## Technical purpose
所描述的土壤修复流程适用于通过异位修复和土壤淋洗技术清理被挖掘出的污染土壤。其特别适用于大量污染土壤的大规模环境修复项目，在那些原位修复不可行、必须将土壤挖出并在淋洗设备中使用化学药剂外部处理以去除污染物的场景中应用。

## Reference product
- Remediated soil: 210000; measured

## Inputs
All rows: measured
- Excavated soil,Excavated soil: 210000
- Electricity: 3.888e6
- Activated Carbon: 27300
- Tap Water: 4899
- Sulfuric acid: 579
- sodium hydroxide: 24
- Sodium sulfide: 87

## Use advice
使用此数据集时，请确保修复工艺的上下文与数据呈现的环境条件相符。考虑所处理的土壤体积、设备的能源消耗和化学药剂的使用。数据应根据本地条件和法规进行适配。同时，将此过程数据与包括土壤运输、处理效果和最终废弃物处理在内的整体项目评估整合也是必须的。用户必须注意，电耗和化学药剂使用率基于每天运行20小时、总共300天的情况，并且需要根据不同项目规模和持续时间相应地调整数据。

## Review details
清单： 内部审查通过几个迭代步骤完成，涉及原始数据验证、原始数据记录、代表性、完整性、与 ISO 14040 和 14044 有关的建模的一致性。

## Data sources
- Song, Y. et al. Environmental and socio-economic sustainability appraisal of contaminated land remediation strategies: A case study at a mega-site in China. Science of The Total Environment 610–611, 391–401 (2018).
