# small-scale intensive pig production | Manure management

Dataset: ILCD process, Unit process, single operation
Geography: JS-CN
Reference year: 2010
Classification: Materials production / Other mineralic materials
Functional unit: The functional unit (FU) is defined to be 1000 kg of pig carcass weight (CW) after the process in slaughterhouse.
Generated by: Rui Yang, 1632707028@qq.com
Review: Dependent internal review by Tiangong LCI Data Working Group
Amounts: no units in this file; such an amount is in the reference unit of its flow, which a separate flow dataset defines
copyright: false

## General comment
The manure management system refers to the separate treatment of solid (70% of feces) and liquid manure (30% of feces are flushed away by urine). While solid manure is composted, liquid manure (slurry) flows out of the pig house to a biogas digester for digestion for 40 days, and then to an outdoor open slurry tank for storage for another 4 months. After that, the outputs of solid manure and digestates can be reused to nearby croplands as an effective source of nutrients.

## Geography
In this study, primary data about material and energy consumption, the composition of feed and the mixture with other ingredients at different pig production stages are derived from interviews with several pig production facilities in Jiangsu Province, China.

## Time period
On-field investigation (Guo and Wang, 2010)

## Technology and included processes
Due to the general mismanagement and the investment capacity of frontier techniques in small–scale pig farms (Meng, 2019), the leachate from compost and the emissions after slurry storage, including chemical oxygen demand, biochemical oxygen demand and phosphorus (P), is estimated according to a Chinese guideline (MEE, 2011).

## Reference product
- pig: 1000; measured
  pig carcass weight (CW)

## Inputs
- manure: 4360; measured
  pig manure
- nitrogen: -51.83; measured
  N fertilizer (avoided)
- phosphorus: -15.51; measured
  P fertilizer (avoided)
- potassium: -12.32; measured
  K fertilizer (avoided)

## Outputs
All rows: measured
- methane: 24.7
- carbon dioxide: 42.83
- ammonia: 4.77
- nitrous oxide: 0.94
- Nitrogenous Matter (unspecified, as N): 4.99
  Nitrogen
- nitrogen monoxide: 0.35
- chemical oxygen demand: 18.23
- biological oxygen demand: 4.33
  Biochemical oxygen demand
- Phosphorus: 0.46

## Deviations from the LCI method approaches
Based on the LCI results, life cycle impact assessment (LCIA) is carried out by using the ReCiPe midpoint (H) 2016 method (Huijbregts et al., 2016), which is an updated version of ReCiPe 2008 and now provides characterization factors that are representative with a global scope. Six impact categories are mostly used to evaluate the main life cycle environmental impact potentials, namely global warming (GWP), freshwater eutrophication (FEP), terrestrial acidification (TAP), freshwater ecotoxicity (FETP), human carcinogenic toxicity (HTP) and terrestrial ecotoxicity (TETP) (Cherubini et al., 2015; Noyaet al., 2017). Among them, GWP, FEP and TAP are the most concerned impact categories in previous studies (de Vries and de Boer, 2010; Reckmann et al., 2013).

## Review details
Inventory: The internal review was done by several iteration steps concerning raw data validation, raw data documentation, representativity, completeness and consistency of modelling with regard to ISO 14040 and 14044.; Documentation: The review of the documentation was performed by Ecobilan and is in compliance with ISO 14040 and 14044. The data set documentation is correct in view of the appropriateness of the information provided. It includes all relevant information in view of data quality and scope of application of the respective LCI result.

## Data sources
- Liu, X., Cai, Z. & Yuan, Z. Environmental burdens of small-scale intensive pig production in China. Science of The Total Environment 770, 144720 (2021).
