# 生物炭;生物炭生产;椰子壳为原料;农田土壤;原位稳定化

Dataset: ILCD process, Unit process, black box
Geography: HZ-GD-CN
Reference year: 2021
Classification: Unit processes / Other Services / Repair and maintenance
Functional unit: Using coconut shells as raw materials, 800kg of biochar is generated through processes such as thermal cracking.
Generated by: 杨欣桐, yangxt@caep.org.cn
Owner: 天工LCI数据工作小组
Review: Dependent internal review by 天工LCI数据工作小组
Amounts: no units in this file; such an amount is in the reference unit of its flow, which a separate flow dataset defines
copyright: false
licenseType: Free of charge for all users and uses

## General comment
生物炭跟一般的木炭一样是生物质能原料经热裂解之后的产物，其主要的成分是碳分子。

## Geography
研究地点位于中国南方珠江三角洲惠州市龚庄镇，是一片受镉污染的稻田。

## Technology and included processes
生物炭的生产过程主要包括生物质的干燥和热解，生物质来自椰子壳。

## Technical purpose
来自生物质（如椰子壳）热裂解的生物炭主要用于农田土壤修复。具体而言，它可原位应用于镉污染等污染问题的水稻田的稳定化。生物炭同样可用作土壤改良剂，以提高土壤健康和增强土壤碳固定。

## Reference product
- Biochar: 800; measured
  由于我国南方有早稻和晚稻两个生长季节，修复剂的施用量为3000公斤/公顷，施用频率为每年2次。从2017年到2018年，每个场景的整个修复时间为2年。总施加剂量=3000kg/ha*0.07ha*2次/年*2年≈800kg

## Inputs
- Coconut Shell: 3300; measured
- Electricity: 36; measured

## Outputs
- carbon dioxide (fossil): 1300; measured
  原表给出的仅为二氧化碳排放，我们通过分析，选择二氧化碳由化石燃料，即柴油燃烧产生
- carbon monoxide (fossil): 300; measured
- nitrogen dioxide: 49.5; measured
- sulfur dioxide: 21.12; measured

## Use advice
使用该数据集进行生命周期评估时，必须考虑使用生物炭进行土壤修复的环境效益和潜在权衡。用户应全面考虑从生产到应用的整个生命周期，包括热裂解过程中的能源消耗和排放。此外，用户必须解决长期碳固存效应，并评估对土壤生态和农作物产量的下游影响。在生命周期评估框架内，应清晰地证明排除或包括潜在的生物炭回收路径和二次使用的合理性。

## Review details
清单： 内部审查通过几个迭代步骤完成，涉及原始数据验证、原始数据记录、代表性、完整性、与 ISO 14040 和 14044 有关的建模的一致性。

## Data sources
- Kai L ,Liping F ,Fangbai L , et al. Sustainability assessment and carbon budget of chemical stabilization based multi-objective remediation of Cd contaminated paddy field. The Science of the total environment, 2021, 819 152022-152022.
