# 河道沉积物;清淤、疏浚;底泥异位修复

Dataset: ILCD process, Unit process, single operation
Geography: GB
Reference year: 2014
Classification: Unit processes / Other Services / Repair and maintenance
Functional unit: dredging over 2500 m of waterways and sediments generated during the process
Generated by: 杨欣桐, yangxt@caep.org.cn
Owner: 天工LCI数据工作小组
Review: Dependent internal review by 天工LCI数据工作小组
Amounts: no units in this file; such an amount is in the reference unit of its flow, which a separate flow dataset defines
copyright: false
licenseType: Free of charge for all users and uses

## General comment
疏浚是处理受污染沉积物的一种广泛使用的方法。疏浚物可以通过物理过程进行清理。

## Geography
研究项目是伦敦奥林匹克公园开发项目的一部分。

## Technology and included processes
该项目包括疏浚2500多米的水道。据估计，将产生近30000立方米的疏浚材料，其中包括近2700立方米的危险材料。

## Technical purpose
本描述的疏浚过程用于通过清除被污染的沉积物来对河道进行环境修复。该过程是伦敦奥林匹克公园开发的一部分，尤其适用于清理超过2500米的水渠，重点是安全移除和随后处理将近30000立方米的疏浚物料，包括约2700立方米的危险物质。它适合需要从水体系统中提取沉积物以改善水质和生态系统健康的大规模环境恢复项目。

## Reference product
- Waterway: 2500; input; measured

## Inputs
- Diesel,Diesel: 1.88112e6; measured

## Outputs
- Contaminated Sediment: 29097; measured
  包含Non-hazardous sediment volume （26431 m3）Hazardous sediment can be washed （1877 m3）Hazardous sediment cannot be washed （789 m3）

## Use advice
在使用此数据集进行生命周期评估时，需特别考虑伦敦奥林匹克公园开发项目中疏浚过程的范围。关注数据集中描述的只包括疏浚作业能量输入的柴油消耗数据。确保考虑危险物质处理和可能的下游处理过程，如物理修复。在类似的环境修复项目中应用此数据集，并对于与描述环境或规模不同的项目谨慎调整。

## Review details
清单： 内部审查通过几个迭代步骤完成，涉及原始数据验证、原始数据记录、代表性、完整性、与 ISO 14040 和 14044 有关的建模的一致性。

## Data sources
- Hou D, et al. Using a hybrid LCA method to evaluate the sustainability of sediment remediation at the London Olympic Park. Journal of Cleaner Production, 2014, 83 87-95.
