# 轧钢;粗钢;热轧（Z08）

Dataset: ILCD process, Unit process, single operation
Geography: CN
Reference year: 1998
Classification: Materials production / Metals and semimetals
Generated by: 付翔, 1162850692@qq.com
Owner: 天工LCI数据工作小组
Review: Dependent internal review by 天工LCI数据工作小组
Amounts: no units in this file; such an amount is in the reference unit of its flow, which a separate flow dataset defines
copyright: false
licenseType: Free of charge for all users and uses

## General comment
来自表 4-16 Z08 钢厂生产吨材环境负荷编目表

## Time period
论文提到钢铁企业环境总体数据为1998年的吨钢环境基础数据。

## Technical purpose
热轧钢生产过程通常用于钢铁工业，将粗钢转变为热轧钢产品，这些产品是各种工业应用的基础材料，如建筑、汽车、造船、重型机械和家电。

## Reference product
- Steel sections: 1000; measured

## Inputs
- Energy, geothermal, converted: 3042.13; measured
- water: 34720; measured
- Crude Steel: 1059.3; measured
  粗钢

## Outputs
All rows: measured
- Dust (unspecified, from stack): 0.216
  烟尘
- sulfur dioxide: 0.844
- Hydrocarbons, aliphatic, alkanes, unspecified: 0.0249
  石油类
- Suspended solids, unspecified: 0.27
- chemical oxygen demand: 0.136
- Spoil (deposited, hibernating in ground, non elementary flow): 14.883

## Use advice
在使用该工业过程的数据集时，用户应考虑环境负荷编目表单元过程（单一操作）基于1998年钢铁企业的总体环境数据。用户需要在评估中考虑技术进步和排放标准的更新，并应确认数据集是否反映了当前的加工技术和环境法规。

## Review details
清单： 内部审查通过几个迭代步骤完成，涉及原始数据验证、原始数据记录、代表性、完整性、与 ISO 14040 和 14044 有关的建模的一致性。

## Data sources
- 周和敏. 钢铁材料生产过程环境协调性评价研究. (北京工业大学, 2001).
