# Soil remediation;in-situ;electrokinetic remediation;remedial action construction;Water;

Dataset: ILCD process, Unit process, single operation
Geography: KR
Reference year: 2014
Classification: Other Services / Repair and maintenance
Generated by: Wang Yipeng, wangyp@caep.org.cn
Owner: Tiangong LCI Data Working Group
Review: Dependent internal review by Tiangong LCI Data Working Group
Amounts: no units in this file; such an amount is in the reference unit of its flow, which a separate flow dataset defines
copyright: false
licenseType: Free of charge for all users and uses

## General comment
Site preparation, closure and dismantling system installed

## Technology and included processes
include：Excavation, rolling drillingand installing；Transportation of personnel and equipment；System install

## Technical purpose
The provided industrial process data set relates to in-situ electrokinetic remediation, which is a technique used to remove contaminants from soil. This method is applicable for clean-up operations at sites with soil pollution from heavy metals, radionuclides, and other ionizable substances. It is especially suitable for fine-grained soils where traditional soil washing methods are less effective.

## Reference product
- Water: 1; input; measured
  Equipment and etc

## Inputs
All rows: measured
- Diesel: 0.0799
  2 m3 /month
- Diesel: 0.0386
  Chemical (0.01 M)
- Steel: 48
  Pump, power supply, etc
- Stainless Steel: 2448
  Cathode electrode
- Polyvinyl chloride: 140.2
  Anode (casing)
- Polyvinyl chloride: 7.6
  Circulation pipe
- polyethylene terephthalate (PET) granulate: 25
  Anode and cathode
- Polyethylene: 112
  Electrolyte tank (2 m3 , 2 ea)
- Electricity: 1440
  Equipment and etc
- Polyethylene: 25.1

## Outputs
- Greenhouse Gases: 16130; measured
- Nitrogen oxides: 1.48; measured
- SOx: 0.779; measured
- particles (> PM10): 0.0922; measured

## Use advice
Users of this data set need to consider the specific characteristics of the contaminated site, such as soil type, pollutant type, and concentration, to assess the appropriateness of electrokinetic remediation. The operational parameters such as voltage, electrode material, and treatment duration are crucial for the process efficacy and should be determined based on site-specific conditions. Exclude any external energy inputs or infrastructure setup from this unit process unless explicitly included in the provided data set.

## Review details
Inventory: The internal review was done by several iteration steps concerning raw data validation, raw data documentation, representativity, completeness and consistency of modelling with regard to ISO 14040 and 14044.

## Data sources
- Environmental assessment on electrokinetic remediation of multimetal-contaminated site: a case study
