# 牛奶生产 ; 饲料和有机肥运输 ; 种养一体化奶牛场(IPBS)

Dataset: ILCD process, Unit process, single operation
Geography: QD-SD-CN
Reference year: 2016
Classification: Unit processes / Transport services / Road
Functional unit: The 1t FPCM corrected for protein and fat content was selected as the evaluation unit
Generated by: 杨瑞, 1632707028@qq.com
Owner: 天工LCI数据工作小组
Review: Dependent internal review by 天工LCI数据工作小组
Amounts: no units in this file; such an amount is in the reference unit of its flow, which a separate flow dataset defines
licenseType: Free of charge for all users and uses

## General comment
在饲料和有机肥运 输环节中,2 种模式的不同之处在于青贮玉米和有机肥的运输.在 IPBS 中,青贮玉米 部分来源于自产,有机肥部分用于养殖场内耕地,两 者运输距离均为 1km.运输距离不同会导致能耗差异, 由此对环境的影响不同.相关研究表明,有机肥长距 离运输会增加粪便中 N 和 P 的损失,增加水体富营养 化风险[11].调研所知,液体肥的肥料价值低,菜农果农 不愿意购买液体肥,两模式的液体肥均由养殖场用车 将液体肥喷洒到周围农田或者养殖场耕地上,运输距 离均为 1km.2 种模式的其他饲料运输距离相同,浓缩 饲料、豆粕、玉米粒和麦麸来自当地市场,运输距离 约 50km.棉籽来自甘肃省,运输距离约 1830km.羊草 来自黑龙江省,运输距离约 1720km.燕麦和苜蓿来自 美国,运输距离约 18000km

## Geography
于 2020 年 7 月~8 月在山东省青岛市进行奶牛 场问卷调查.

## Time period
从 2016 年,山东开始实施青贮玉米种植补贴 政策,是国内最早实施该补贴政策的省份之一,补贴 标准为 20~50 元/t.2019 年,山东省青贮玉米种植面 积达 1.41 万 hm2,占全国的 7.3%.

## Technology and included processes
研究地区主要有 2 种牛奶生产模式:IPBS 和 non-IPBS.non-IPBS 中,养殖场只有饲养 环节和粪污处理环节,饲料全部来源于购买,粪便堆 肥制成有机肥后全销售给果农和菜农.IPBS 中,养殖 场增加青贮玉米种植环节,有机肥、液体肥主要施用 于场内农田,剩余部分销售给果农和菜农等.2 种模 式的区别:1)养殖场青贮玉米的来源不同,导致饲料 运输距离和饲料成本不同;2)有机肥、液体肥的利用 途径不同,运输距离不同.本研究共调研奶牛场 109 家,剔除不符合研究问卷后,得 83 份有效问卷,其中 non-IPBS 为 38 家,IPBS 为 45 家.

## Technical purpose
此工艺主要应用于以种植和养殖系统（IPBS）为一体的牛奶生产。过程中，饲料和有机肥料的运输是关键组成部分。青贮玉米和有机肥料主要采用本地化采购，运输距离是确定这一过程的环境影响的重要因素。目标是最小化运输距离（在IPBS系统内减少至1公里），以降低能耗和环境影响，如当运输距离较短时减少养分流失（氮和磷）和水体富养化风险。副产品，特别是液体肥料，由于其较低的肥料价值而被用在当地农田，这不吸引许多蔬果农。此外，关键饲料成分如燕麦和苜蓿的进口涉及从美国长途运输，这对牛奶生产过程的生命周期环境足迹有所贡献。

## Reference product
- milk: 1000; estimated
  作为参考定量，非实际输出

## Inputs
All rows: measured
- feed: 11.4
  浓缩饲料（IPBS模式）
- maize grain: 5.6
  玉米粒（IPBS模式）
- bean pulp: 2.6
  豆粕（IPBS模式）
- wheat bran: 2.2
  麦麸（IPBS模式）
- maize grain: 20.5
  外购青贮玉米（IPBS模式）
- maize grain: 0.3
  自产青贮玉米（IPBS模式）
- alfalfa: 1944
  苜蓿（IPBS模式）
- oat: 2070
  燕麦（IPBS模式）
- chinese wildrye: 498.8
  羊草（IPBS模式）
- cottonseed: 69.5
  棉籽（IPBS模式）
- organic fertilizer: 10.4
  外售有机肥（IPBS模式）
- Fertilizer: 10.2
  液体肥（IPBS模式）
- organic fertilizer: 0.2
  自用有机肥（IPBS模式）

## Use advice
在使用IPBS内牛奶生产的生命周期评估数据时，必须捕捉由于饲料和有机肥料运输距离不同导致的环境影响差异。数据使用者应记录运输相关的能耗变化和养分流失，注意到在IPBS内青贮玉米的生产和有机肥料使用是本地化的，而非IPBS情景涉及更长的运输距离。在评估进口饲料成分的运输影响时，考虑从美国进口的燕麦和苜蓿等项目涉及的重大距离。用户必须调整模型反映不同的运输距离和可能影响种植实践的补贴，如山东省的青贮玉米种植补贴政策。

## Review details
清单： 内部审查通过几个迭代步骤完成，涉及原始数据验证、原始数据记录、代表性、完整性、与 ISO 14040 和 14044 有关的建模的一致性。

## Data sources
- 黄显雷, 师博扬, 张英楠, 龙昭宇, & 尹昌斌. 基于生命周期视角的种养一体化奶牛场环境经济效益评估. 中国环境科学 41, 3944–3955 (2021).
