# 三元锂电池火法-湿法联合回收技术物质清单

Dataset: ILCD process, Unit process, single operation
Geography: CN
Reference year: 2018
Classification: Unit processes / End-of-life treatment / Material recycling
Functional unit: Functional unit is recycling 1 kwh NCM battery
Generated by: 胡志康, hzk2503593129@163.com
Owner: 天工LCI数据工作小组
Review: Dependent internal review by 天工LCI数据工作小组
Amounts: no units in this file; such an amount is in the reference unit of its flow, which a separate flow dataset defines
copyright: false
licenseType: Free of charge for all users and uses

## General comment
废三元锂电池系统经过简单的预处理拆解和放电后进行高温熔炼、浸出及氧化、高温烧结等过程重新制得电池正极材料。该工艺主要将火法回收技术的产物进一步采用湿法提纯，这样既对反应对象的要求较低，又可以减少浪费金属元素。

## Technical purpose
三元锂电池火法-湿法联合回收技术旨在从废弃的三元（NCM）电池中回收正极材料。该技术在回收设施中通过高温熔炼、浸出和高温烧结过程，回收有价金属元素，从而有助于电池行业的循环经济。所得到的纯化材料可以用于制造新的电池正极，支持锂电池的可持续生命周期。

## Reference product
- EoL NCM battery: 3.6; input; missing unimportant
  废三元锂电池

## Inputs
All rows: missing unimportant
- Natural gas, at consumer EU-27: 0.213
  天然气
- slagging agent: 1
  造渣剂
- Limestone: 1
  石灰石
- Metallurgical Coke: 1.1
  冶金焦炭
- water,water: 82.4
- hydrogen chloride: 1.37
  盐酸
- hydrogen peroxide: 0.193
  过氧化氢
- Calcium hydroxide: 0.288
  氢氧化钙
- Lithium carbonate: 0.696
  碳酸锂

## Outputs
- carbon dioxide (fossil): 2.45; missing unimportant
  二氧化碳（原文未区分bio和fossil，根据专家判断此处为fossil）
- Ternary cathode material: 1.84; missing unimportant
  三元正极材料

## Data selection and combination
数据来源于多种文献，没有明确。

## Use advice
使用此数据集进行生命周期评价（LCA）时，用户应确保系统边界包括预处理拆解和放电过程。功能单元必须清楚定义为回收0.81kg重、1kWh三元NCM电池。应关注回收材料的质量和回收过程中可能的损失。用户需要考虑回收材料在特定环境下的技术适用性以及与恢复过程相关的环境影响，包括能源消耗和排放。

## Review details
清单： 内部审查通过几个迭代步骤完成，涉及原始数据验证、原始数据记录、代表性、完整性、与 ISO 14040 和 14044 有关的建模的一致性。

## Data sources
- 王琢璞. 新能源汽车动力电池回收利用潜力及生命周期评价. (清华大学, 2018)
