# 铝电解碳阳极生产 ; 碳阳极 ; 预焙 ; 石油焦

Dataset: ILCD process, Partly terminated system
Geography: CN
Reference year: 2011
Classification: Unit processes / Materials production / Inorganic chemicals
Generated by: 谢金良, jinliang.research@gmail.com
Owner: 天工LCI数据工作小组
Review: Dependent internal review by 天工LCI数据工作小组
Amounts: no units in this file; such an amount is in the reference unit of its flow, which a separate flow dataset defines
copyright: false
licenseType: Free of charge for all users and uses

## General comment
使用石油焦的预焙碳阳极生产旨在用于铝电解过程。作为铝冶炼厂铝电解反应中关键组成部分的高品质消耗品，在将氧化铝转换为原铝金属的过程中起着至关重要的作用。

## Time period
学位论文完成日期

## Reference product
- anode, prebake, for aluminium electrolysis: 1000; missing unimportant

## Outputs
- carbon dioxide (fossil),carbon dioxide (fossil): 1551.65; missing unimportant

## Use advice
在铝产品生命周期评估（LCA）中使用此数据集时，应将铝生产过程视为主要环境影响因素，因为其涉及大量资源消耗、能源使用和废弃物排放。 生命周期边界应从铝土矿开采到原铝生产，涵盖铝土矿提取、氧化铝生产、阳极生产和铝电解过程。 从评价系统中排除石灰石和沥青等相对较小的辅助材料的开采、生产和运输过程。

## Review details
清单： 内部审查通过几个迭代步骤完成，涉及原始数据验证、原始数据记录、代表性、完整性、与 ISO 14040 和 14044 有关的建模的一致性。

## Data sources
- 李贵奇. 基于生命周期思想的环境评估模型及其在铝工业中的应用. (中南大学, 2011).
