# 大黄鱼生产;大黄鱼成鱼;传统小网箱养殖

Dataset: ILCD process, Unit process, black box
Geography: ZS-ZJ-CN
Reference year: 2014
Valid until: 2014
Classification: Unit processes / Materials production / Food and renewable raw materials
Functional unit: 1000kg large yellow croaker
LCI method principle: Attributional
LCI method approaches: Allocation
Generated by: 吴康妮, wukangni@xmu.stu.edu.cn
Owner: 天工LCI数据工作小组
Review: Dependent internal review by 天工LCI数据工作小组
Amounts: no units in this file; such an amount is in the reference unit of its flow, which a separate flow dataset defines
copyright: false
licenseType: Free of charge for all users and uses

## General comment
大黄鱼网箱养殖的系统边界包括大黄鱼网箱建设所需材料（木材、聚乙烯和水泥）的生产、大黄鱼养殖所需资料（配合饲料、甲醛和电冰箱等）的生产、各种材料的运输和养殖过程生产及各过程使用能源的生产和消耗。不包括大黄鱼鱼苗的孵化到半成鱼的养殖和大黄鱼成鱼的加工的过程。

## Geography
舟山市普陀区沙城大黄鱼传统小网箱养殖基地

## Time period
文献未说明数据或采样时间，由养殖幼苗购买于2014年6月，养殖周期约6个月进行估测

## Technology and included processes
大黄鱼网箱养殖技术。传统小网箱为小型板式浮网箱，网箱规格为 4m×4m×4m，主要由木板、 PE 网衣和浮尘装置等组成。考虑到其结构的不稳定性，一般这类网箱会被安排在海洋的内湾，所以又称内湾型网箱。网衣和箱体其材料为聚乙烯。为保持网衣在潮流的作用下不变形， 需要在网衣底部的四周加沉子固定，使用水泥块的数量随箱体的大小而定。

## Technical purpose
该数据集提供了有关大黄鱼成鱼传统小网箱养殖生产的信息。它被用于了解1000公斤大黄鱼生产过程的投入和产出，重点关注笼子建设材料、必需饲料和化学品以及能源消耗等因素。这些数据的应用与环境影响评估、水产养殖实践的优化和有关可持续海鲜产业的政策制定相关。

## Model description
数据标准化基准值采用了 2000 年世界人均环境影响基准值；加权评估采用专家组评议设置的权重系数

## Reference product
- Large Yellow Croaker: 1000; measured

## Inputs
All rows: measured
- Electricity: 62.676
- polyethylene high density granulate (PE-HD): 72.61
- cement, unspecified: 6.31
- trash fish: 6844
- Assorted Feed: 1376
- Formaldehyde: 8.45
- Wood: 13.19

## Deviations from the LCI method approaches
本研究基于污染物排放按照计算公式来计算生命周期污染排放。研究中能源生产和使用过程的、生产聚乙烯、电冰箱、防腐木、水泥和甲醛的能源消耗和环境排放数据分别参考已有文献的研究结果。柴油燃烧所产生的污染物排放参考美国 环保总署（EPA）关于汽车用柴油生产与燃烧清单

## Data selection and combination
针对大黄鱼网箱养殖的各个养殖或者生产阶段，通过直接的实地检测途径，或者间接的文献检索和政府公司的报告等进行基础数据的收集；然后对数据进行鉴 别，数据的有效性与真实性很重要，对正确无误的数据进行进一步的收集和分配， 用于生命周期清单的建立；收集的数据为无效的数据时，对收集方法进行调整， 转化为有效地数据，依然无效或错误的数据需要剔除，而相关的数据则需要进行补充

## Data treatment and extrapolations
文献基于清单和排放因子计算碳足迹，排放因子数据来自其他文献及报告性数据。各输入数据按照对应物资的使用寿命进行了折算

## Sampling procedure
数据主要来自浙江大海洋科技有限公司，该公司在舟山市普陀区沙城进行大黄鱼的传统小网箱养殖。

## Use advice
该数据集的用户应注意，它涵盖了从笼子建设到大黄鱼成鱼生产阶段的范围，不包括从孵化到半成鱼养殖阶段和鱼类收获后处理的过程。在描述的系统边界之外推断数据时要谨慎；对于需要完整生命周期分析的研究，应该寻求关于孵化、幼苗培养和加工的额外数据。水产养殖过程中能源消耗和共享资源的分配应当准确计算。

## Review details
清单： 内部审查通过几个迭代步骤完成，涉及原始数据验证、原始数据记录、代表性、完整性、与 ISO 14040 和 14044 有关的建模的一致性。

## Data sources
- 付晓洋. 基于生命周期评价的大黄鱼网箱养殖环境影响分析. (浙江海洋大学, 2016).
