# Soil and groundwater remediation;Ex-situ;groundwater pump and treat;construction; Construction of Treatment facilities

Dataset: ILCD process, Unit process, single operation
Geography: CA
Reference year: 2007
Classification: Other Services / Repair and maintenance
Generated by: Wang Ning, wang_ning@caep.org.cn
Owner: Tiangong LCI Data Working Group
Review: Dependent internal review by Tiangong LCI Data Working Group
Amounts: no units in this file; such an amount is in the reference unit of its flow, which a separate flow dataset defines
licenseType: Free of charge for all users and uses

## General comment
Construction of wastewater disposal facilities using activated carbon, glass, latex

## Geography
The contaminated area was located 600 m from a river shore in the northern part of the prov-ince of Quebec， Canada.

## Technical purpose
The industrial process described is used for soil and groundwater remediation. Specifically, this data set pertains to the ex-situ groundwater 'pump and treat' method combined with the construction of wastewater treatment facilities. These facilities are constructed using activated carbon, glass, and latex as primary materials. They are generally employed in scenarios where soil and groundwater contaminants are present and need to be extracted and treated, such as a contaminated site located 600 meters from a river shore in Quebec, Canada.

## Reference product
- Treatment facilities: 1; article inperiodical
  在现场建造一套废水处理装置

## Inputs
- Activated Carbon: 530700; article inperiodical
  在现场建造废水处置装置所消耗的活性炭颗粒
- Latex: 52.8; article inperiodical
  在现场建造废水处置装置所消耗的乳胶
- Glass (formed & finished): 6264; article inperiodical
  在现场建造废水处置装置所消耗的玻璃

## Use advice
When using this data set for Life Cycle Assessment (LCA) purposes, users should consider whether the remediation context matches their case study. It is important to ensure that the transportation distances for materials and waste are adapted to local conditions. Users should also take into account the specific construction technologies and local environmental regulations in place at the location under study. The indirect impacts of the construction process, such as emissions from machinery used in the construction, should be included in the LCA. For methodological consistency, this data should be complemented with information on operational phases and potential deconstruction and recycling scenarios, if applicable.

## Review details
Inventory: The internal review was done by several iteration steps concerning raw data validation, raw data documentation, representativity, completeness and consistency of modelling with regard to ISO 14040 and 14044.
