# 畜禽养殖 ; 屠宰阶段 ; 生猪

Dataset: ILCD process, Unit process, single operation
Geography: SD-CN
Reference year: 2014
Classification: Unit processes / Materials production / Agricultural production means
Functional unit: 1kg pork
Generated by: 杨瑞, 1632707028@qq.com
Owner: 天工LCI数据工作小组
Review: Dependent internal review by 天工LCI数据工作小组
Amounts: no units in this file; such an amount is in the reference unit of its flow, which a separate flow dataset defines
copyright: false
licenseType: Free of charge for all users and uses

## General comment
屠宰阶段一般消耗的能源为电力，猪肉、牛肉、禽肉、牛奶和禽蛋的屠宰加 工耗能系数分别为 3.76 KJ·kg-1、4.37 KJ·kg-1、2.59 KJ·kg-1、1.12 KJ·kg-1、8.16 KJ·kg-1[61]。

## Geography
本研究于 2014~2015 年，针对畜禽饲养周期、肉料比、饲料配方、饲料消耗 量、煤和电的消耗量等，先后对山东省高密正大种猪场、莱西市知双奶牛场、即 墨市段泊岚镇姜家坡村养猪场、即墨市刘家庄镇畜禽养殖场、日照市莒县长岭镇 上官庄村、莒县寨里河镇东兴农牧公司、莒县峤山镇东辰奶牛场、莒县峤山镇刘 家义水养猪场、诸城市外贸有限责任公司凤凰父母代种鸭场，新疆阜康宏发养殖 专业合作社、九运街镇旭鸿蛋鸡合作社、九运街镇六运村自成养殖场、中澳控股 集团有限公司、德州市庆云县洼于村、山东省庆云县四柳社区肉牛养殖基地、德 州市庆云青年鸡养殖基地、庆云县永利禽业蛋鸡育成公司、庆云县兴晨青年鸡养 殖专业合作社、庆云县东泰肉鸡养殖专业合作社、河北省盐山县博远饲料有限公 司、盐山县大华人饲料有限公司、无棣县六和饲料有限公司、中澳东方希望饲料 公司等地进行了实地调研。

## Time period
本研究于 2014~2015 年

## Technology and included processes
本文将畜禽养殖生命周期 分为饲料作物种植、饲料加工、畜禽饲养、粪便处理、屠宰、运输等 6 个阶段。 畜禽养殖的生命周期具体流程如图 2-1 所示。由于部分数据的缺乏和基础条件的 限制，未对农药、地膜、饲料添加剂等生产、运输、使用进行分析，其他相关的 基础设施建设、运输工具生产、人力成本所引起的环境影响也不再考虑的范畴内。

## Technical purpose
该数据集描述了畜禽养殖屠宰阶段的能耗，特别是生猪。详细列出了各种动物产品的能耗系数。该数据适用于屠宰场在屠宰猪、牛、家禽以及生产牛奶和家禽蛋过程中的环境影响评估和能源使用优化。适用范围扩展到农业行业的利益相关者和进行生命周期评估的环境科学家。

## Reference product
- pig: 1; measured

## Inputs
- Electricity: 0.00376; estimated
  屠宰阶段一般消耗的能源为电力

## Outputs
- carbon dioxide (fossil),carbon dioxide (fossil): 0.00112; measured
  生猪
- sulfur dioxide: 3.1e-5; measured
  生猪
- nitrogen, total (excluding N2): 3.7e-6; measured
  生猪

## Data selection and combination
直接数据：畜禽饲养阶段数据皆来自实地调研，通过现场收集及企业可公开 数据获得。背景数据：化肥、电力、燃煤等数据来自相关统计年鉴及国家统计局、农业 部网站的公开数据。

## Use advice
数据集用户在评估畜牧生产屠宰阶段的环境影响时，应谨慎应用能耗系数。重要的是确保使用当前的电力消耗率，并在必要时调整数据。如果在不同地理位置或不同技术条件下应用数据集，则应考虑重新计算。如果能源供应或屠宰技术发生重大变化，也应相应更新数据。用户应确保从可靠来源获取化肥、电力和煤炭等背景数据，并保持数据的更新。

## Review details
清单： 内部审查通过几个迭代步骤完成，涉及原始数据验证、原始数据记录、代表性、完整性、与 ISO 14040 和 14044 有关的建模的一致性。

## Data sources
- 周景月. 基于生命周期评价的畜禽养殖环境影响分析. (青岛科技大学, 2017).
