# 铝土矿开采 ; 铝土矿 ; 摇篮 ; 2016年

Dataset: ILCD process, Unit process, single operation
Geography: CN
Reference year: 2021
Classification: Unit processes / Materials production / Non-energetic raw materials
Generated by: 蔡梓萌, caizm6178@163.com
Owner: 天工LCI数据工作小组
Review: Dependent internal review by 天工LCI数据工作小组
Amounts: no units in this file; such an amount is in the reference unit of its flow, which a separate flow dataset defines
copyright: false
licenseType: Free of charge for all users and uses

## General comment
氧化铝生产2017

## Time period
文献发表日期

## Technical purpose
该数据集描述了铝土矿提取过程中的环境影响，铝土矿是生产氧化铝(Al2O3)的原材料。它包括从初始点（‘摇篮’）到但不包括氧化铝生产阶段（‘门’）的铝土矿开采过程。这套生命周期评估（LCA）数据旨在供分析师和从业者评估铝产品从原材料提取到生命周期终点的环境方面。

## Reference product
- bauxite: 6.73303e10; software or database

## Inputs
- electricity, high voltage, aluminium industry: 1.46534e8; software or database
  electricity
- Coal, brown, in ground: 4.0276e7; software or database
  coal
- Diesel oil: 1.8013e7; software or database
  diesel
- petrol, unleaded, burned in machinery: 1.815e6; software or database
  gasoline

## Data selection and combination
本研究的数据参考了PA、SA、电力等背景数据的LCA数据。PA数据来自统计数据源，SA数据主要来自文献。背景数据主要来自中国科学院生态环境研究中心CASRCEES 2018建立的中国本地化LCA数据库，涵盖能源、材料、交通、废物管理等LCA数据。

## Use advice
使用此LCA数据集的用户应确保考虑了铝土矿开采的所有相关阶段，包括土地使用、水消耗和排放的潜在影响。当将这些数据整合到铝产品更广泛的生命周期时，应注意方法论的一致性，确保功能和参考单位可比。氧化铝的生产和加工数据应从相应的LCA数据集中获得，以便于精确评估。因数据集使用中国本地化LCA数据库（CAS RCEES 2018），所以背景过程的数据，例如能源生产和运输，建议采用当地中国的数据。

## Review details
清单： 内部审查通过几个迭代步骤完成，涉及原始数据验证、原始数据记录、代表性、完整性、与 ISO 14040 和 14044 有关的建模的一致性。

## Data sources
- Ding, N., Liu, N., Lu, B. & Yang, J. Life cycle greenhouse gas emissions of aluminum based on regional industrial transfer in China. J. Ind. Ecol. 25, 1657–1672 (2021).
