# Rubbershoes|Rubber(includingvarioustypesofrubbermaterials,additives,naturalrubber,etc.),combinedcloth(rubber/textilematerials)|Vulcanization process|All sizes / /|橡胶鞋|橡胶（包括各类类橡胶原料、添加剂、天然橡胶等）、合布（橡胶/纺织材料）|硫化工艺|所有规模

Dataset: ILCD process, Partly terminated system
Geography: CN
Reference year: 2019
Classification: Materials production / Other mineralic materials
Generated by: The data was created by the Office of the Second National Pollution Source Census of the Ministry of Ecology and Environment, and the data was organized by the TianGong Plan team for ILCD format / 生态环境部第二次全国污染源普查工作办公室创建数据，天工计划团队常慧敏整理数据为ILCD格式
Amounts: no units in this file; such an amount is in the reference unit of its flow, which a separate flow dataset defines
copyright: false

## Technology and included processes
the Technical of end-of-pipe management technology for pollution Footwear of RubberisOthers (adsorption method + photolysis)，Its Technical efficiency of end-of-pipe management60，The formula for calculating the actual operation rate (k-value) of the end-of-pipe treatment facility is k = normal operating time of wastewater treatment facilities (days/year) / production days (days/year)
污染物指标挥发性有机物的末端治理技术是其他（吸附法+光解），其效率为60，末端治理设施实际运行率（k值）计算公式为废气净化设备运行时间（小时）/总生产时间（小时）

## Reference product
- Footwear of Rubber: 1; calculated
  原文件中描述污染物类别为Product，污染物指标为橡胶鞋，此处对其进行了匹配工作，将其匹配到LCAflow库里面相最符合的流，污染物指标备注为挥发性有机物

## Outputs
- volatile organic compound: 0.00332, 0.005395, 0.00664, 0.00664, 0.00498, 0.00664, 0.00747, 0.004565, 0.00498, 0.0083 (10 entries); calculated
  原文件中描述污染物类别为废气，污染物指标为挥发性有机物，此处对其进行了匹配工作，将其匹配到LCAflow库里面相最符合的流，污染物指标备注为挥发性有机物
- particles (PM2.5 - PM10): 0.000545, 0.0002725 (2 entries); calculated
  原文件中描述污染物类别为废气，污染物指标为颗粒物，此处对其进行了匹配工作，将其匹配到LCAflow库里面相最符合的流，污染物指标备注为颗粒物

## Data sources
- 第二次全国污染源普查产排污核算系数手册（试用版）,二级代码19,四级代码1954文件，在完整版文件中第2793页
