# Steel products | steel | Steel production

Dataset: ILCD process, Unit process, single operation
Geography: NJ-JS-CN
Reference year: 2012
Classification: Materials production / Other mineralic materials
Generated by: Wanghuanyu, wanghuanyu00@126.com
Review: Dependent internal review by Tiangong LCI Data Working Group
Amounts: no units in this file; such an amount is in the reference unit of its flow, which a separate flow dataset defines

## Geography
南京钢铁联合有限公司

## Reference product
- iron: 1000; article inperiodical

## Inputs
All rows: article inperiodical
- Coking coal: 318.2
  焦煤
- Coal injection: 318.2
  高炉喷煤
- Coal injection: 318.2
  烧结/转炉用煤
- coke: 313.8
  焦炭
- Limestone: 2272.7
- dolomite: 2123.1
- Electricity: 3777.48

## Outputs
- carbon dioxide (fossil): 990; article inperiodical

## Review details
Inventory: The internal review was done by several iteration steps concerning raw data validation, raw data documentation, representativity, completeness and consistency of modelling with regard to ISO 14040 and 14044.
