# 稀土氧化物直接排放;稀土氧化物;离子吸附工艺;离子吸附粘土

Dataset: ILCD process, Unit process, single operation
Geography: CN
Reference year: 2014
Valid until: 2016
Classification: Unit processes / Materials production / Inorganic chemicals
Functional unit: The functional unit is defined as the production of 1 kg of 90–92% purity mixed REOs by the in-situ leaching method from ion-adsorption clays in southern China.
LCI method principle: Attributional
LCI method approaches: Allocation - market value
Generated by: 汪涛, twang@iue.ac.cn
Owner: 天工LCI数据工作小组
Review: Dependent internal review by 天工LCI数据工作小组
Amounts: no units in this file; such an amount is in the reference unit of its flow, which a separate flow dataset defines
copyright: false
licenseType: Free of charge for all users and uses

## General comment
此数据集描述了中国南方离子吸附粘土中稀土氧化物的直接排放过程。所描述的过程特别适用于混合稀土氧化物的生产，这些氧化物通常用于制造磁铁、催化剂、合金和玻璃。但是，溶剂提取和金属生产等下游过程并未包含在此数据集的系统边界内。

## Geography
华南地区

## Technology and included processes
该过程以混合稀土氧化物结束，下游过程（例如溶剂萃取和金属生产）不包括在系统边界内。在某些地点可能会进行进一步处理（例如，将稀土元素分为轻质和组）。

## Reference product
- Rare Earth Oxides: 1; calculated
  REO

## Outputs
- ammonium: 1.88; min 0.26; max 3.5; uniform; software or database
  Ammonium, ion
- sulfate: 6.5; min 4.72; max 8.28; uniform; software or database
- carbon dioxide (fossil): 0.46; software or database
  原文未区分bio和fossil，根据专家判断此处为fossil
- ammonia: 0.34; software or database

## Deviations from the LCI method approaches
In this study, the material and energy flow data is gathered from Chinese literature and verified through personal communications with Chinese experts working in this industry. These datasets are derived based on attributional modeling (instead of consequential) and for most multi-products processes economic allocation is used. Since the data was collected from different sources

## Use advice
在进行生命周期评价（LCA）时，确保此数据集适用于您评价的地理范围——特别是中国南方。认识到此数据集代表基于多产品过程的经济分配的归属建模，对于需要结果建模的研究可能不合适。数据集不包括下游过程，必须单独考虑这些过程。数据用户还应考虑，由于该数据基于与中国专家的个人沟通和文献，若在不同的技术或地理环境中应用可能需要审核。

## Review details
清单： 内部审查通过几个迭代步骤完成，涉及原始数据验证、原始数据记录、代表性、完整性、与 ISO 14040 和 14044 有关的建模的一致性。

## Data sources
- Vahidi, E., Navarro, J. & Zhao, F. An initial life cycle assessment of rare earth oxides production from ion-adsorption clays. Resources, Conservation and Recycling 113, 1–11 (2016).
