# 铝再生 ; 再生铝锭 ; 废铝 ; 2007年

Dataset: ILCD process, Unit process, single operation
Geography: CN
Reference year: 2021
Classification: Unit processes / Materials production / Metals and semimetals
Generated by: 蔡梓萌, caizm6178@163.com
Owner: 天工LCI数据工作小组
Review: Dependent internal review by 天工LCI数据工作小组
Amounts: no units in this file; such an amount is in the reference unit of its flow, which a separate flow dataset defines
copyright: false
licenseType: Free of charge for all users and uses

## General comment
该数据集代表了从废铝中回收再生铝锭的过程。这些再生铝锭可用于包括汽车制造、建筑和包装在内的各种行业，这些行业需要高质量的铝制品。

## Time period
文献发表日期

## Reference product
- secondary aluminium ingot: 1000; missing unimportant
  ingot

## Inputs
- electricity, high voltage, aluminium industry: 925.2; missing unimportant
  electricity
- aluminium scrap, unspecified: 1350; missing unimportant
  aluminum scrap

## Data selection and combination
本研究的数据参考了PA、SA、电力等背景数据的LCA数据。PA数据来自统计数据源，SA数据主要来自文献。背景数据主要来自中国科学院生态环境研究中心CASRCEES 2018建立的中国本地化LCA数据库，涵盖能源、材料、交通、废物管理等LCA数据。

## Use advice
在将此数据集用于生命周期评估时，用户应注意初级铝（PA）数据来自统计资料来源，而再生铝（SA）数据主要来自文献。用户应确保其LCA研究的背景与此数据集的技术范围相符。应了解背景数据局限于中国市场并来自中国科学院生态环境研究中心2018年建立的CAS RCEES数据库。如果将数据应用到不同的地理环境中，可能需要进行调整。

## Review details
清单： 内部审查通过几个迭代步骤完成，涉及原始数据验证、原始数据记录、代表性、完整性、与 ISO 14040 和 14044 有关的建模的一致性。

## Data sources
- Ding, N., Liu, N., Lu, B. & Yang, J. Life cycle greenhouse gas emissions of aluminum based on regional industrial transfer in China. J. Ind. Ecol. 25, 1657–1672 (2021).
