# 市政污水处理; 污泥 ;加热干燥

Dataset: ILCD process, Unit process, single operation
Geography: SH-CN
Classification: Unit processes / End-of-life treatment / Waste water treatment
Generated by: 于晨阳, yuchenyang0506@foxmail.com
Owner: 天工LCI数据工作小组
Review: Dependent internal review by 天工LCI数据工作小组
Amounts: no units in this file; such an amount is in the reference unit of its flow, which a separate flow dataset defines
copyright: ['opt4ROkqig']
licenseType: Free of charge for all users and uses

## General comment
污泥加热干燥是一种常用的污泥处理技术，通过加热将污泥中的水分蒸发，使其含水量大幅降低。通常使用热风或其他热源，将污泥置于加热设备中，通过加热使水分蒸发并排出系统，从而实现污泥的干燥。这种技术可以有效减少污泥的体积和重量，使其更易于运输和处置。

## Technology and included processes
加热干燥过程首先将湿润的物料放置在加热设备中，然后通过加热操作提高物料的温度，使水分蒸发。随着水分蒸发，湿润物料逐渐变干，并且经过一段时间的加热，最终达到所需的干燥程度。

## Technical purpose
此数据集代表来自市政污水处理的污泥的热干燥过程。 它通常用作污泥管理更广泛系统中的单元操作，可能包括应用程序，例如体积减少，废物最小化，以及转换成适合最终处置的形式或进一步使用作为土壤改良剂或在能量回收过程中。

## Reference product
- Sludge: 1000; input; measured
  每吨干污泥

## Inputs
- Electricity: 2101.68; measured
  (kWh/t DS)
- energy (recovered): 7130; measured
  (MJ/t DS)

## Use advice
使用此数据集时，建议用户仔细考虑污泥处理的更广泛系统边界，并相应地管理数据。 应使用数据来准确建模热干燥阶段的环境影响，确保如果评估了污水处理的完整生命周期，则始终包括上游和下游过程。 用户应验证数据集是否与其评估过程的地理和技术特定兼容，并考虑在干燥污泥用于多个目的的情况下分配环境负担。

## Review details
清单： 内部审查通过几个迭代步骤完成，涉及原始数据验证、原始数据记录、代表性、完整性、与 ISO 14040 和 14044 有关的建模的一致性。

## Data sources
- Zhao, G. et al. A Megacity-Scale Analysis of Sludge Managementand Carbon Footprint in China. Pol. J. Environ. Stud. 31, 2451–2460 (2022).
