# Secondary copper|Refined copper|fire refining and electrorefining|Copper scrap

Dataset: ILCD process, Unit process, single operation
Geography: CN
Reference year: 2018
Classification: Materials production / Other mineralic materials
Functional unit: The production of 1000 kg of refined copper (99.99% cathode copper) was selected as the FU in this paper” (Chen 等, 2019, p. 36)
LCI method principle: Attributional
LCI method approaches: Allocation - market value
Generated by: Peng Wang, 2867919560@qq.com
Review: Dependent internal review by Tiangong LCI Data Working Group
Amounts: no units in this file; such an amount is in the reference unit of its flow, which a separate flow dataset defines
copyright: false

## Geography
Resources, energy consumption and pollution data of primary copper production were collected mainly from the survey of production technology and typical enterprises in this study.

## Technology and included processes
The system boundary for both technologies covered the major production process, including mining (mining and beneficiation), smelting (smelting and converting), fire refining and electrorefining for primary copper, and pretreatment (disassembling and separation), fire refining and electrorefining for secondary copper, a

## Reference product
- Refined copper: 1000; measured
  Refined copper 需要补充

## Inputs
- crude oil; 42.3 MJ/kg: 8.78; software or database
  Crude oil (resource)
- Hard coal, at consumer EU-27: 162; software or database
  Hard coal (resource)
- natural gas; 44.1 MJ/kg: 492; software or database
  Natural gas (resource)
- copper scrap: 1860; measured
  Copper scrap需要补充
- Water (fresh water): 1400; measured
  Fresh water
- Limestone: 8.46; software or database
- Refractory material: 7.62; measured
  Refractory material需要补充
- Industrial oxygen: 91.4; measured
  Industrial oxygen需要补充
- Sulfuric acid(98%): 6.8; measured
  Sulfuric acid resourse需要补充
- Spray mold: 5.08; measured
  Spray mold需要补充
- Sodium hydroxide: 0.04; measured
- Sodium chlorate: 0.454; measured
  Sodium chlorite需要补充
- Sodium hypochlorite: 0.374; measured
  Sodium hypochlorite需要补充

## Outputs
All rows: measured
- carbon dioxide: 278
- sulfur dioxide: 0.783
  Sulfur dioxide
- nitrous oxide: 0.0832
  Nitrogen oxide
- carbon monoxide: 0.366
  Carbon monoxide
- methane (fossil): 1.32
  Methane
- nitrous oxide: 0.00588
  Nitrous oxide
- sulphuric acid: 0.00034
- particles (PM2.5 - PM10): 2.62
- mercury: 0.00142
  Mercury
- lead: 0.00117
  Lead
- zinc: 0.00101
- nickel: 0.000593
  Nickel
- arsenic: 0.000136
  Arsenic
- chemical oxygen demand: 0.231
  Chemical oxygen demand
- Biological oxygen demand: 0.00241
  Biochemical oxygen demand需要补充
- Solid suspension: 0.177
  Solid suspension需要补充
- Ammonia Nitrogen: 1.64e-7
  Ammonia nitrogen需要补充
- municipal solid waste deposition: 1330
  Solid waste

## Deviations from the LCI method approaches
Combined with the characteristics of refined copper production in China, the CML2001 method (2016 revision), was selected for environmental impact accounting in this study.

## Data selection and combination
Resources, energy consumption and pollution data of primary copper production were collected mainly from the survey of production technology and typical enterprises in this study. The upstream date was from GaBi (ts vision) and Ecoinvent database

## Data treatment and extrapolations
This study used Gabi software (ts version) as the calculation software and the model was built for both technologies.

## Review details
Inventory: The internal review was done by several iteration steps concerning raw data validation, raw data documentation, representativity, completeness and consistency of modelling with regard to ISO 14040 and 14044.; Documentation: The review of the documentation was performed by Ecobilan and is in compliance with ISO 14040 and 14044. The data set documentation is correct in view of the appropriateness of the information provided. It includes all relevant information in view of data quality and scope of application of the respective LCI result.

## Data sources
- Chen, J. et al. Environmental benefits of secondary copper from primary copper based on life cycle assessment in China. Resources, Conservation and Recycling 146, 35–44 (2019).
