# cement production|cement, ordinary portland cement|new dry process, 5000 t/d|mixed solid wastes

Dataset: ILCD process, Unit process, black box
Geography: CN
Classification: Materials production / Other mineralic materials
Generated by: Siqi Yang
Amounts: no units in this file; such an amount is in the reference unit of its flow, which a separate flow dataset defines
copyright: false

## General comment
Equipped with a 5000T/D new dry process cement clinker production line, which adopts advanced enhanced suspension preheater five-stage kiln decomposition technology and advanced cement production equipment such as vertical raw material mill and large ball mill with roller press.

## Geography
Two cement plants in the Northeast

## Model description
The system boundary is the cement production system of the cement plant.

## Reference product
- cement, ordinary portland cement: 1000
  Cement products

## Inputs
All rows: measured
- limestone, crushed, for mill: 1142.86
  Limestone
- sandstone: 73.6264
  Sandstone
- shale: 54.9451
  Shale
- ash: 107.692
  Fly ash
- iron, powder: 19.0659
  Iron powder
- gypsum (desulphurized): 47.8022
  Gupsum
- blast furnace slag: 38.7912
  Blast furnace slag
- hard coal: 134.011
  Bituminous coal. Annual energy consumption of coal = (2.439E+8) kg x (2.1477E+7) J/kg (average lower heating value) = (5.24E+15) J
- electricity, medium voltage: 352.8
  Total electricity consumption. Annual energy consumption of electricity = (1.7836E+8) kWh x (3.60E+6) J/kWh = (6.42E+14) J
- tap water: 369.78
  The original text refers to total water consumption, which includes tap water.

## Outputs
- particles (> PM10): 0.295604; measured
  Dust, with an unspecified particle size, is treated as PM > 10 micrometers in diameter.
- nitrogen dioxide: 1.56593; measured
  NO2
- sulfur dioxide: 0.308; measured
  SO2
- carbon dioxide: 409.341; measured
  CO2

## Data sources
- 邵帅. (2016). 基于Emergy和Em-LCA的水泥企业可持续发展水平评价 [硕士, 大连理工大学].
