# 煤炭井工开采;开采煤炭

Dataset: ILCD process, Unit process, black box
Geography: CN
Reference year: 2018
Classification: Energy carriers and technologies / Hard coal based fuels
Generated by: 尹琳琳, yinlinlin0623@163.com
Owner: 天工LCI数据工作小组
Review: Dependent internal review by 天工LCI数据工作小组
Amounts: no units in this file; such an amount is in the reference unit of its flow, which a separate flow dataset defines
licenseType: Free of charge for all users and uses

## General comment
所描述的过程涉及中国低瓦斯和高瓦斯井下煤矿的煤炭开采。此数据集旨在用于涉及从此类矿井提取煤炭的产品和服务的生命周期评估。它可以为煤炭行业的利益相关者服务，包括矿业公司、环境分析师和政策制定者。应用包括但不限于能源生产、冶金过程以及作为化学合成的原料。

## Geography
根据中国2011年7575处井工煤矿矿井中的1161处高瓦斯矿井的CO2相对涌出量的测定数据，对中国低瓦斯井工煤矿开采过程的CO2逃逸排放因子进行了计算和分析。

## Technology and included processes
井工煤矿开采

## Reference product
- Hard coal, at consumer EU-27: 1000; uniform; estimated
  2011年中国井工煤矿高瓦斯矿井组开采1吨煤炭。

## Outputs
- carbon dioxide (fossil): 9.38; max 93.14; normal; software or database
  CO2逃逸排放因子,高瓦斯矿井CO2逃逸排放因子均值为9.38m3—即每开采1t煤炭释放9.38m3的CO2。7575处矿井中的高瓦斯矿井CO2逃逸排放因子均非正态分布但大体近似。
- carbon dioxide (fossil): 9.38; uniform; calculated
  2011年中国井工煤矿高瓦斯矿井组开采1吨煤炭释放的CO2量。

## Data selection and combination
梳理了井工煤矿开采过程CO2逃逸的排放来源，提出了一种基于排放因子先计算CO2排放总量，再分别考虑瓦斯气回收的减量贡献和/或火炬销毁的增量贡献的计算方法。其次根据中国2011年7575处井工煤矿矿井中1161处高瓦斯矿井的CO2相对涌出量的测定 数据，对中国高瓦斯井工煤矿开采过程的CO2逃逸排放因子进行了计算和分析。

## Use advice
使用此数据集的用户应仔细考虑为低瓦斯和高瓦斯井下煤矿提出的具体CO2逃逸排放因子，因为这些因子对于评估煤炭衍生产品或服务的生命周期分析中的环境影响至关重要。重要的是要考虑到总的CO2排放，包括由于瓦斯回收努力的减少以及由于火炬销毁气体的增加。数据集反映了2011年的具体条件，应根据不同的时间背景进行更新或调整。在应用此数据时，用户应确保任何假设和方法选择与其特定生命周期评估研究的目标和范围一致。

## Review details
清单： 内部审查通过几个迭代步骤完成，涉及原始数据验证、原始数据记录、代表性、完整性、与 ISO 14040 和 14044 有关的建模的一致性。

## Data sources
- 于胜民, 朱松丽, & 张俊龙. 中国井工煤矿开采过程的二氧化碳逃逸排放因子研究. 中国能源 40, 10-16+33 (2018).
