# 煤炭井工开采;开采煤炭

Dataset: ILCD process, Unit process, black box
Geography: CN
Reference year: 2005
Classification: Unit processes / Energy carriers and technologies / Hard coal based fuels
Generated by: 尹琳琳, yinlinlin0623@163.com
Owner: 天工LCI数据工作小组
Review: Dependent internal review by 天工LCI数据工作小组
Amounts: no units in this file; such an amount is in the reference unit of its flow, which a separate flow dataset defines
licenseType: Free of charge for all users and uses

## General comment
煤矿开采深度增大，煤层瓦斯含量增大。

## Geography
2000年“中国华东”地区井工煤矿开采过程甲烷排放。

## Technology and included processes
对1994年和2000年我国煤矿排入大气的甲烷量进行了调查研究, 通过对国有重点、国有地方和乡镇煤矿大量矿井瓦斯等级鉴定资料的整理分析, 矿井甲烷抽放量和利用量的调研,以及补充进行某些试验室测定工作。在此基础上, 按照IPCC 修订指南所提第2种方法即平均排放系数法, 分别求出我国各大区域的煤产量加权平均甲烷系数及我国各大区域煤矿开采过程甲烷排放系数。

## Technical purpose
所描述的过程是2000年“中国华东”地区的地下煤炭开采，特别关注在煤矿活动期间产生的甲烷(CH4)排放。该煤炭可能用作发电和其他需要高品质煤炭的工业应用的燃料来源。特别注意了甲烷排放，表明这数据集对环境影响、空气质量控制、温室气体清单和气候变化缓解策略研究尤为相关。所开采的煤炭还可能为基于煤炭的化学产品生产提供原料。

## Reference product
- Hard coal, at consumer EU-27: 1.766e11; uniform; software or database
  2000年中国华东地区井工煤矿开采过程中煤炭产量。

## Inputs
- Hard coal, at consumer EU-27: 1.766e11; uniform; estimated
  文献中没有说明煤炭的投入量，假设：煤炭的投入量:产出量=1:1

## Outputs
- methane (fossil): 1.0988e9; uniform; calculated
  2000年中国华东地区井工煤矿开采过程中甲烷排放量(甲烷排放系数6.22m3/t*煤炭产量176.60Mt所得结果);原文未区分bio和fossil的流，根据专家判断此处为fossil。

## Use advice
此数据集的用户应在煤矿活动甲烷排放环境影响评估方面考虑使用它。使用数据时，应采用 IPCC 的 '第二级别（Tier 2）' 方法，使用地区平均甲烷系数进行计算，如同数据集创建时应用的方法。应当适当关注自2000年以来可能改变了煤矿甲烷抓取和利用效率的技术变化。如果用于比较研究或时间分析，可能需要进行调整，以考虑随时间推进的技术和方法论进步。

## Review details
清单： 内部审查通过几个迭代步骤完成，涉及原始数据验证、原始数据记录、代表性、完整性、与 ISO 14040 和 14044 有关的建模的一致性。
