# 水泥生产;水泥, 普通硅酸盐水泥, 48.0MPa;机械立窑;炼铁高炉矿渣

Dataset: ILCD process, Unit process, black box
Geography: CN
Reference year: 2001
Classification: Materials production / Other mineralic materials
Generated by: 杨思琪, ysqsophia@gmail.com
Owner: 天工LCI数据工作小组
Review: Dependent internal review by 天工LCI数据工作小组
Amounts: no units in this file; such an amount is in the reference unit of its flow, which a separate flow dataset defines
copyright: false
licenseType: Free of charge for all users and uses

## General comment
立窑厂生产水泥。

## Technology and included processes
立窑厂水泥生产过程相对简单，主要流程示意见图3.4。

## Technical purpose
该工艺生产的水泥是普通硅酸盐水泥，强度为48.0MPa，主要用于结构性混凝土、桥梁、道路和建筑物等一般建筑活动。该材料以其机械性能为特点，适用于住宅和商业建筑项目。

## Model description
研究范围界定为由原料进厂、原料预处理、生料粉磨、生料煅烧、熟料粉磨，直至水泥均化、储存为止。未包括矿山开采、运输过程、水泥包装等具体过程。

## Reference product
- cement, ordinary portland cement, 48.0MPa: 1000
  水泥平均标号480号

## Inputs
- limestone, crushed, for mill: 1000.03
  石灰石
- clay: 145.937
  粘土
- iron, powder: 51.7668
  铁粉
- gypsum stone (CaSO4-dihydrate): 51.8984
  石膏
- fluorspar: 13.973
  萤石
- blast furnace slag: 81.5358
  原文献中标记为水渣（即炼铁高炉矿渣）。
- Water (fresh water): 1954.53
  新鲜水
- hard coal: 192.164
  原始数据为38.007kt标准煤，这里换算为硬煤，换算公式为1kg硬煤=0.929kg标准煤。
- electricity, medium voltage: 273.333
  电力

## Outputs
- particles (> PM10): 1.69618
  粉尘，未标明粒径，按PM>10处理。
- particles (> PM10): 0.0458563
  烟尘，未标明粒径，按PM>10处理。
- sulfur dioxide: 0.0884894
  二氧化硫
- Nitrogen oxides: 0.439957
  氮氧化物
- carbon dioxide: 925.623
  二氧化碳

## Data treatment and extrapolations
CO2数据处理：根据1个功能单元的CO2排放数据，计算出生产212839 t水泥的CO2排放量。

## Use advice
使用所述工艺的LCA数据时，用户必须考虑范围仅限于从原料进入工厂到作为水泥储存，不包括采矿、运输和包装过程。因此，任何评估或比较应包括类似的系统边界。此外，CO2排放数据是基于单一功能单元的；对于其他数量的水泥，用户需要按比例调整排放计算。

## Review details
清单： 内部审查通过几个迭代步骤完成，涉及原始数据验证、原始数据记录、代表性、完整性、与 ISO 14040 和 14044 有关的建模的一致性。

## Data sources
- 狄向华. (2001). 材料环境协调性评价的标准流程方法研究 [硕士, 北京工业大学].
