# Rare earth HCl leaching|Dysprosium|IAC|REE containing ore

Dataset: ILCD process, Unit process, single operation
Geography: CN
Reference year: 2010
Valid until: 2019
Classification: Materials production / Other mineralic materials
Functional unit: The goal of this investigation is to compare environmental impacts related to the production of 1 kg Dy (functional unit) from IAC (Southern China), from B/M ore (Bayan Obo), and from an eudialyte deposit (Norra Kärr) using the LCA method
LCI method principle: Attributional
LCI method approaches: Allocation - mass
Generated by: Tao Wang, twang@iue.ac.cn
Review: Dependent internal review by Tiangong LCI Data Working Group
Amounts: no units in this file; such an amount is in the reference unit of its flow, which a separate flow dataset defines
copyright: false

## Geography
Southern China and Bayan Obo

## Technology and included processes
The goal of this investigation is to compare environmental impacts related to the production of 1 kg Dy (functional unit) from IAC (Southern China), from B/M ore (Bayan Obo), and from an eudialyte deposit (Norra Kärr) using the LCA method

## Reference product
- Leaching solution: 6730; min 2660; max 10800; uniform; article inperiodical
  Leaching solution. input for next Process: Filtrate precipitation, average

## Inputs
- Electricity: 8.964; article inperiodical
  Based on in situ leaching coppe
- Ammonium sulfate: 51.065; min 11.12; max 91.01; uniform; article inperiodical
  Ammonium sulfate. average
- Geometry: 3.78; article inperiodical
  Values are based on geometry of injection holes
- transport in t*km,transport in t*km: 78.475; min 18.26; max 138.69; uniform; software or database
  320 km, average

## Outputs
- Drilling sludge: 285.1; software or database
  Drilling sludge. sludge is deposited, dissolved solids analog ore composition and drilling mud integrated in GaBi.
- ammonium: 64.91; min 12.85; max 116.97; uniform; article inperiodical
  includes also NH4HCO3 excess from filtrate precipitation, average
- sulfate: 171.82; min 33.37; max 310.27; uniform; article inperiodical
  includes also NH4HCO3 excess from filtrate precipitation,average

## Deviations from the LCI method approaches
In this study, an allocation method based on the mass of produced REEs combined with their market prices (based on an international metals market analysis and pricing index company ) are considered, as usual for metals with strongly different prices. As the ores have different compositions, the allocation factor has to be assessed individually for each site.

## Review details
Inventory: The internal review was done by several iteration steps concerning raw data validation, raw data documentation, representativity, completeness and consistency of modelling with regard to ISO 14040 and 14044.; Documentation: The review of the documentation was performed by Ecobilan and is in compliance with ISO 14040 and 14044. The data set documentation is correct in view of the appropriateness of the information provided. It includes all relevant information in view of data quality and scope of application of the respective LCI result.

## Data sources
- Zapp, P., Marx, J., Schreiber, A., Friedrich, B. & Voßenkaul, D. Comparison of dysprosium production from different resources by life cycle assessment. Resources, Conservation and Recycling 130, 248–259 (2018).
