# Potable water production | Reverse osmosis, spiral-wound, CN

Dataset: ILCD process, Unit process, single operation
Geography: US
Reference year: 2022
Classification: Materials production / Other mineralic materials
Functional unit: 1 t drinking water
Generated by: Jiaqi Lu, wilsherelu@foxmail.com
Review: Dependent internal review by Tiangong LCI Data Working Group
Amounts: no units in this file; such an amount is in the reference unit of its flow, which a separate flow dataset defines

## Reference product
- drinking water: 1000; measured
  饮用水

## Inputs
- Reverse Osmosis Component: 9.61e-5; measured
  RO组件
- electricity mix: 28.944; measured
  过程电耗
- Water (fresh water): 1310; measured
  原水

## Review details
Inventory: The internal review was done by several iteration steps concerning raw data validation, raw data documentation, representativity, completeness and consistency of modelling with regard to ISO 14040 and 14044.; Documentation: The review of the documentation was performed by Ecobilan and is in compliance with ISO 14040 and 14044. The data set documentation is correct in view of the appropriateness of the information provided. It includes all relevant information in view of data quality and scope of application of the respective LCI result.
