# Soil and Groundwater Remediation;In Situ;Soil Bioventilation; Injection Well

Dataset: ILCD process, Unit process, single operation
Geography: CA
Reference year: 2007
Classification: Other Services / Engineering and consulting
Generated by: Wang Ning, wang_ning@caep.org.cn
Owner: Tiangong LCI Data Working Group
Review: Dependent internal review by Tiangong LCI Data Working Group
Amounts: no units in this file; such an amount is in the reference unit of its flow, which a separate flow dataset defines
copyright: false
licenseType: Free of charge for all users and uses

## General comment
Construction of injection wells using polyvinyl chloride, bentonite, silica, diesel fuel and bentonite, etc.

## Geography
The contaminated area was located 600 m from a river shore in the northern part of the prov-ince of Quebec， Canada.

## Technology and included processes
Construction of injection wells using polyvinyl chloride, bentonite, quartz sand, gravel, diesel fuel, etc.

## Technical purpose
The described industrial process is intended for environmental remediation activities, specifically the in situ bioventilation treatment of contaminated soil and groundwater. The process involves the construction of injection wells that facilitate the microbial degradation of pollutants. These wells are constructed with materials such as polyvinyl chloride, bentonite, quartz sand, gravel, and diesel fuel. This construction allows for increased airflow or injection of substances that accelerate the breakdown of contaminants. The technology is suitable for site-specific remediation where the contaminated area is in close proximity to sensitive ecosystems, such as 600 m from a river shore.

## Reference product
- injection well: 1; estimated
  建造好的通风井

## Inputs
All rows: estimated
- Diesel: 0.38
  使用柴油建造通风井
- cement: 12.6
  使用混凝土建造通风井
- bentonite: 612
  使用膨润土建造通风井
- sand: 218
  使用石英砂建造通风井
- gravel: 62.5
  使用碎石建造通风井
- Polyvinyl chloride: 199
  使用聚氯乙烯建造通风井

## Use advice
When utilizing this dataset for environmental impact assessment or similar studies, ensure to take account of geographic specificity, as the process is contextually relevant to the province of Quebec, Canada. The dataset should be used to model the life cycle inventory of the construction phase of the in situ remediation process, including consideration of material inputs and outputs relevant to injection well construction. Specific attention should be placed on the representativeness of the data for similar climatic and geological conditions when applying this data to other locations.

## Review details
Inventory: The internal review was done by several iteration steps concerning raw data validation, raw data documentation, representativity, completeness and consistency of modelling with regard to ISO 14040 and 14044.
