# 聚乙烯（PE）生产及废弃;PE材料

Dataset: ILCD process, Unit process, black box
Geography: CN
Reference year: 1995
Classification: Unit processes / Materials production / Plastics
Generated by: 郭慧娟, GHJ@email.ncu.edu.cn
Owner: 天工LCI数据工作小组
Review: Dependent internal review by 天工LCI数据工作小组
Amounts: no units in this file; such an amount is in the reference unit of its flow, which a separate flow dataset defines
copyright: false
licenseType: Free of charge for all users and uses

## General comment
本文研究的起止点放在原油的开采、原油的运输、原油的提炼、聚合体的生产、废物处置方面，而材料的使用阶段不在本文考虑之列， 废物处置则选择了有关文献中认为环境影响较大的填埋方式，而这种填埋方式也是在我国城市固 体废弃物处置中被普遍采用的．能源生产中所带来的环境排放按照各阶段的能耗比计入其中

## Geography
我国的国情出发

## Technical purpose
本数据集涵盖的PE材料生命周期阶段包括原油的开采、运输、提炼、聚乙烯聚合体的生产以及通过填埋方式进行废物处置的过程。此过程在中国城市固体废物管理中较为普遍。所生产的PE可用于多种商业和工业应用，常见的包括包装材料、塑料部件制造和各种基于聚乙烯的产品的原材料。然而，本研究没有考虑材料的使用阶段。

## Reference product
- Polyethylene: 1000; measured
  PE

## Inputs
- crude oil; 42.3 MJ/kg: 1.507; measured
  原油
- Energy,unspecified: 32546.7; measured
  能耗

## Outputs
All rows: measured
- carbon dioxide (fossil): 6408.5
  原文未区分bio和fossil，根据专家判断此处为fossil
- sulfur dioxide: 42.53
- Nitrogen oxides: 0.172047
  NOx
- ethane: 2.017
- methane (fossil): 13
  原文未区分bio和fossil，根据专家判断此处为fossil
- waste water - untreated: 15223
  废水
- Waste (unspecified): 489.27
  废渣

## Data selection and combination
本文评价中所使用的数据来源有：企业内部实际生产数据、工艺改进的设计数据、国家环 境保护部门数据；我国相关的统计年鉴、文献等公开出版

## Data treatment and extrapolations
由于本文所研究的材料涉及到多产品系统，我们将各产品系统的输入和输出数据按照质量比例进行了分配

## Use advice
在使用此数据集进行生命周期评估时，需注意采用的方法论选择。生命周期阶段的数据基于企业内部实际生产数据、工艺改进的设计数据和中国国家环境保护部门的数据，以及公开的年鉴和文献。研究考虑了多产品系统，并且输入和输出数据根据质量比例进行分配。对于PE的评估，选择的功能单元是1000公斤。用户不应包括材料使用阶段，因为该阶段已从本研究中排除，并且应意识到选择的废弃末端是由于其显著的环境影响而选择的填埋处理。

## Review details
清单： 内部审查通过几个迭代步骤完成，涉及原始数据验证、原始数据记录、代表性、完整性、与 ISO 14040 和 14044 有关的建模的一致性。

## Data sources
- 陈红, 郝维昌, 石凤 & 王天民. 几种典型高分子材料的生命周期评价. 环境科学学报 24, 545–549 (2004).
