# 录井工程 ; 常规轻质油层 ; 流体性质气油比的定量计算

Dataset: ILCD process, Unit process, single operation
Geography: GD-CN
Reference year: 2003
Classification: Unit processes / Energy carriers and technologies / Crude oil based fuels
LCI method principle: Attributional
LCI method approaches: Consequential
Generated by: Shikang Kang, 908798159@qq.com
Owner: 天工LCI数据工作小组
Review: Dependent internal review by 天工LCI数据工作小组
Amounts: no units in this file; such an amount is in the reference unit of its flow, which a separate flow dataset defines
copyright: false
licenseType: Free of charge for all users and uses

## General comment
本文优选对凝析气、挥发油等临界流体较为敏感的四个气测录井衍生参数，联合常规测井响 应方程共同构建最优化测井解释目标函数，对地层组分进行联合反演，再通过气体状态方程计算得到气油比关键参数，从而达到综合测录井资料定量识别流体 性质的目的

## Geography
珠江口盆地珠三坳陷

## Time period
文献综述提及

## Technology and included processes
通过计算气油比定量参数判别流体性质准确率高达 94%，极大地提高了研究区流体性质识别的准确率，为后续勘探开发决策提供了有效依据

## Technical purpose
本工业流程的技术应用是为珠江口盆地珠三坳陷的石油勘探中流体性质鉴定提供便利。通过结合气测录井衍生参数、常规测井响应方程和气体状态方程，该过程可以准确地计算气油比，这是一个用于分类凝析气和挥发油等碳氢资源的关键指标。主要用于解释地层组分，以提高油气行业探索和发展决策的准确性。

## Model description
首先根据天然气的气体状态方程，得出地面条件下天然气的状态方程；同样可以得到地层条件下的气体状态方程；气油比的定义是地面条件下天然气体积 Vgm与油体积 Vom之比

## Reference product
- Gasoline (regular): 2673.8; log-normal; calculated
  计算气油比平均值

## Inputs
- Well pad: 3176.5; log-normal; missing unimportant
  电缆地层
- natural gas: 2673.8; log-normal
  文献中没有天然气投入量，假设天然气开采过程中投入量：输出量=1:1

## Outputs
- Gasoline (regular): 297.1; log-normal; missing unimportant
  油嘴油流量

## Data selection and combination
参与最优化计算的方程过多无法快速应用到实际生产中．本文介绍了一套快速应用到实际生产中的基于测录井资料的珠江口盆地流体性质综合识别方法，切实提高了解释符合率和效率，为临界流体识别及后续勘探开发决策提供依据

## Data treatment and extrapolations
基本原理是利用测 井资料和录井资料分别与地层条件下各组分建立方 程，组成超定方程组，求取这个方程组的最优解从而 得到地层条件下各组分的相对含量．然后通过气体状态方程将地层条件下的天然气体积转化到地面条件从而计算得到气油比

## Use advice
在使用此工业流程的数据时，研究人员和工程师应确保为感兴趣的临界流体正确选择气测录井衍生参数和常规测井响应方程。可靠反演结果需要准确的地层组分初始假设。计算出的气油比必须基于正确考虑了油气在地层和地面条件下压力、温度和组成变化的方程。建议将此方法纳入勘探和发展的决策流程中，因为其已被验证具有94%的准确率。还应考虑将这种方法快速应用于实际生产，以提高解释符合率和效率。用户应在优化过程中解决过定方程系统的过度拟合问题和计算效率。

## Review details
清单： 内部审查通过几个迭代步骤完成，涉及原始数据验证、原始数据记录、代表性、完整性、与 ISO 14040 和 14044 有关的建模的一致性。

## Data sources
- 张恒荣;肖立志;张顺超;汤翟;陈嵘; 基于测录井资料的流体性质综合识别方法研究——以珠江口盆地珠三坳陷为例. 地球物理学进展 940–949 (2023).
