# 变电站的建设和运营|电压等级110/10kV，规划容量3×50MVA变电站|全户内布置方式

Dataset: ILCD process
Geography: NJ-JS-CN
Reference year: 2021
Valid until: 2071
Classification: Materials production / Other mineralic materials
Generated by: Wang, Yuxuan , wyx135230@163.com
Review: Dependent internal review by Tiangong LCI Data Working Group
Amounts: no units in this file; such an amount is in the reference unit of its flow, which a separate flow dataset defines
copyright: false

## General comment
该文献采用生命周期计算碳足迹的方法，明确了该110kV变电站方案生命周期筹建阶段，建设阶段，运行阶段和报废阶段四个阶段的碳排放源，确定了碳排放因子和工程数据，计算出了各个阶段的碳足迹。

## Geography
作者未在文献中明确说明，选择作者所在的电力公司的地理位置

## Time period
文献中未明确说明数据集的起始时间，采用文献发表的时间为有效期始。该项目寿命按50年记，因此以50年作为有效时间段

## Technology and included processes
建设阶段：本期建设 2×50 MVA变压器。 110 kV 出线本期 4 回 ( 其中两回备用 )，远景4回； 本期采用单母线分段接线，远景接线型式不变 ；采用无氟环保型 G I S。10 k V出线本期 24 回，采用单母线三分段接线 ；远景36回，采用单母线四分段接线 ；采用中置柜，配真空断路器。本期两台主变各配置 1 组 4 Mvar 并联电容器和 1 组 6 Mvar 并联 电抗器。设钢结构配电楼 1 座，配电楼局部地下一层、局部两层。根据规划要求，围墙不设置实体围墙，采用绿植隔离，场地敷设草坪。运行阶段：均采用的是环保型新产品，站内无含 SF6 的电气设备，采用绿植隔离，场地敷设草坪。

## Inputs
All rows: measured
- pre-cast concrete: 28.175
- Concrete: 1146
  原数据中为现浇混凝土，da.tiangong.world中查不到该信息
- Steel sections: 5000
- Transformer: 4.60225e6
  原数据为机电设备，包括变压器，开关柜，GIS等，da.tiangong.world中查不到该信息。本期建设主要为2×50MVA变压器，因此选择变压器为输入流
- Electricity: 284400
  建设阶段电的输入流
- Diesel: 800
- Electricity: 57600
  运行阶段一年的用电量

## Outputs
- carbon dioxide: 0; calculated
  筹建阶段碳足迹：变电站筹建阶段的碳足迹主要来源于场地清 理，由于本工程项目位于市中心，建设场地上无任 何障碍物需移除或迁建，因此该项目可不计筹建阶 段的碳足迹。
- carbon dioxide: 4.32874e6; calculated
  建设阶段碳足迹
- carbon dioxide: 544965; calculated
  运行阶段碳足迹，该项目按50年寿命记，变电站消耗电力碳足迹633.680tCO2，忽略树木、草坪生长期，绿植降碳量为88.715tCO2
- carbon dioxide: 432874; calculated
  报废阶段碳足迹，工程项目报废阶段的碳足 迹按其建设阶段碳足迹的 10% 作简化处理

## Data selection and combination
碳足迹因子的取值按照中国区域电网基准线排放因子、中国电网企业温室气体排放核算方法与报告指 南 ( 试行 ) 和其他有关研究成果取值。相关I/O flow的量通过咨询相关施工单位，结合运检单位历史数据取得

## Review details
Inventory: The internal review was done by several iteration steps concerning raw data validation, raw data documentation, representativity, completeness and consistency of modelling with regard to ISO 14040 and 14044.
