# Penaeus white shrimp culture ; Penaeus white shrimp into shrimp ; Factory farming

Dataset: ILCD process, Unit process, black box
Geography: RZ-SD-CN
Classification: Materials production / Food and renewable raw materials
Functional unit: 1 ton of white shrimp
Generated by: Kangni Wu, wukangni@xmu.stu.edu.cn
Owner: Tiangong LCI Data Working Group
Review: Dependent internal review by Tiangong LCI Data Working Group
Amounts: no units in this file; such an amount is in the reference unit of its flow, which a separate flow dataset defines
licenseType: Free of charge for all users and uses

## General comment
The research scope of this paper includes five stages: infrastructure construction of aquaculture farms, transportation of shrimp seedlings, shrimp breeding, shrimp transportation to market, and infrastructure disposal. Among them, feed production for shrimp breeding stage is a link, is the use of fish meal, soybeans, peanuts, fish oil, flour, minerals and adhesives production of compound feed

## Geography
The study is located in Tao Luo Town, Rizhao City, Shandong Province.

## Technical purpose
Penaeus vannamei, commonly known as white shrimp, is cultured in this process for the purpose of seafood production. The cultivated shrimp are intended for consumption and distributed to various markets after reaching maturity. This factory farming method is designed for high-volume, controlled production of shrimp to meet consumer demand in food industries. The shrimps are grown using a compound feed that includes ingredients such as fish meal, soybeans, peanuts, fish oil, flour, minerals, and adhesives.

## Reference product
- Litopenaeus vannamei: 1000; article inperiodical

## Inputs
All rows: article inperiodical
- Cement: 42.354
- iron: 53
  It belongs to the infrastructure construction stage and has a service life of 20 years. This data is the input data equivalent to one breeding cycle.
- polyethylene low density foil(PE-LD): 14.6
  It belongs to the infrastructure construction stage and has a service life of 15 years. This data is the input data equivalent to one breeding cycle.
- transport in t*km: 207.064
  Transport of shrimp seedlings by air. The original data is mass * distance = (0.09412t * 2200km)
- water: 8.47059e6
  Belongs to the adult shrimp breeding stage
- Electricity: 60504.2
  Belongs to the adult shrimp breeding stage
- Diesel: 9.76
  Belongs to the adult shrimp breeding stage
- fish meal: 411.765
- Soybean: 288.236
- Peanut: 222.353
- Fish Oil: 24.7059
- Flour: 378.824
- Mineral: 49.4118
- Adhesives: 5.7647
- Hydrogen peroxide: 141.18
- Fertilizer paste for aquaculture: 117.65
- Multivitamins: 0.94
- Immunopolysaccharide: 2.35

## Outputs
All rows: article inperiodical
- waste water - untreated: 8.47059e6
- phosphate: 0.091788
- Ammonia (NH4+, NH3, as N): 0.17099
- nitrite: 0.05497
- Chemical Oxygen Demand (COD): 13.2178

## Sampling procedure
时间： 2019 年 6 月份、11 月份。地点：在山东省日照市涛雒镇固定观察点调研，养殖产业的投入产出数据绝大部分来源于对养殖厂以及饲料加工厂负责人的问卷调查，水质监测数据则取自于当地海洋与渔业研究所的固定监测点，成虾运输至市场数据取自于日照市水产品批发市场以及养殖场负责人的调研

## Use advice
When using this data set for Life Cycle Assessment, it is important to include all stages mentioned: infrastructure for farm construction, shrimp seedling transport, shrimp breeding, market transportation, and infrastructure disposal. Special attention should be given to the representative nature of the inputs and outputs from the aquaculture and feed processing factories, as well as the local water quality monitoring data. Ensure that the time and location of data collection are relevant for the assessed system and account for seasonal differences by considering the data from June and November 2019. If modeling transport to the market, use the provided transportation data from Rizhao City’s seafood wholesale market and aquaculture farm surveys.

## Review details
Inventory: The internal review was done by several iteration steps concerning raw data validation, raw data documentation, representativity, completeness and consistency of modelling with regard to ISO 14040 and 14044.

## Data sources
- 马一鸣. 基于生命周期评价方法的南美白对虾养殖产业链碳排放研究. (上海海洋大学, 2021).
