# LFP正极浆料生产;LFP正极浆料;LFP、炭黑、PTFE

Dataset: ILCD process, Unit process, single operation
Classification: Materials production / Inorganic chemicals
Functional unit: Produce 1kg LFP cathode slurry
Generated by: 陈鑫, xinchen@mail.nankai.edu.cn
Owner: 天工LCI数据工作小组
Review: Dependent internal review by 天工LCI数据工作小组
Amounts: no units in this file; such an amount is in the reference unit of its flow, which a separate flow dataset defines
copyright: false
licenseType: Free of charge for all users and uses

## General comment
将LFP、PTFE、炭黑进行简单的混合，制成正极浆料

## Inputs
- Lithium Iron Phosphate: 0.87; estimated
  数据基于假设

## Outputs
- 1-methyl-2-pyrrolidone: 0.28
  数据参考ecoivent数据库做了简单估计

## Data selection and combination
部分数据参考了ecoinvent数据库，部分数据基于假设

## Data treatment and extrapolations
根据生产工艺预计不会导致任何重大的能源消耗、排放或材料损失。

## Review details
清单： 内部审查通过几个迭代步骤完成，涉及原始数据验证、原始数据记录、代表性、完整性、与 ISO 14040 和 14044 有关的建模的一致性。

## Data sources
- Majeau-Bettez, G., Hawkins, T. R. & Strømman, A. H. Life Cycle Environmental Assessment of Lithium-Ion and Nickel Metal Hydride Batteries for Plug-In Hybrid and Battery Electric Vehicles. Environ. Sci. Technol. 45, 4548–4554 (2011).
