# 华东水稻; 上海水稻生产;播种

Dataset: ILCD process, Unit process, single operation
Geography: SH-CN
Reference year: 2012
Valid until: 2014
Classification: Unit processes / Materials production / Food and renewable raw materials
Functional unit: 1 t
LCI method principle: Attributional
LCI method approaches: Consequential
Generated by: Haoran Zhang, hrzhang@whu.edu.cn
Owner: 天工LCI数据工作小组
Review: Dependent internal review by 天工LCI数据工作小组
Amounts: no units in this file; such an amount is in the reference unit of its flow, which a separate flow dataset defines
copyright: false
licenseType: Free of charge for all users and uses

## General comment
参照PAS2050规范并结合生命周期评价方法对上海市水稻生产进行了碳足迹评估

## Geography
崇明

## Technology and included processes
主要参照 PAS2050 规范并结合 LCA 方 法进行水稻生产的碳足迹计算。PAS2050 全称“公 众可获 取 的 规 范”( Publicly Available Specification， PAS) ，由英国标准协会( British Standard Institution， BSI) 编制，旨在对产品和服务生命周期内温室气体 排放的评价要求做出明确的规定［19］。

## Technical purpose
该数据集提供了上海特别是崇明地区水稻生产的碳足迹信息。该数据与田间作业、加工、储存、深加工、产品包装以及田间温室气体排放相关，适用于评估水稻种植活动的环境影响，用于环境影响研究、与农业实践相关的政策制定或寻求提高水稻生产方法可持续性的组织。

## Reference product
- rice: 1000; measured

## Inputs
- Diesel: 0.000156413; calculated

## Outputs
- carbon dioxide (fossil),carbon dioxide (fossil): 0.0004; calculated
  播种作业的柴油消耗导致的CO2排放
- Methyl-1650,Methyl-1650: 0.0031; calculated

## Deviations from the LCI method approaches
主要参照PAS2050 规范并结合LCA方法进行水稻生产的碳足迹计算。PAS2050 全称“公众可获取的规范” ( Publicly Available Specification, PAS)

## Data selection and combination
水稻碳足迹的初级活动水平数据包括田间各项作业活动, 加工存储各项作业活动、深加工与产品包装以及田间温室气体散逸等活动水平数据。

## Data treatment and extrapolations
包括田间作业、稻谷加工、温室气体排放检测

## Use advice
使用该数据集的用户应根据PAS2050规范并结合生命周期评价（LCA）方法来应用该数据。在使用该数据集计算水稻生产系统的碳足迹时，应特别注意PAS2050中定义的系统边界。该数据集包括种子、化肥、农药的生产原材料和农机使用以及相关温室气体排放。但是，它不包括最终商品的销售、消费者使用或水稻产品的处置和回收。因此，用户应考虑评估的范围以及是否需要额外的数据来源来考虑全生命周期的影响。

## Review details
清单： 内部审查通过几个迭代步骤完成，涉及原始数据验证、原始数据记录、代表性、完整性、与 ISO 14040 和 14044 有关的建模的一致性。

## Data sources
- 曹黎明,李茂柏,王新其,赵志鹏,潘晓华.基于生命周期评价的上海市水稻生产的碳足迹[J].生态学报,2014,34(02):491-499.
