# 处理设施;地下水抽出处理

Dataset: ILCD process, Unit process, single operation
Geography: UM
Reference year: 2009
Classification: Unit processes / Other Services / Repair and maintenance
Generated by: 杨欣桐, yangxt@caep.org.cn
Owner: 天工LCI数据工作小组
Review: Dependent internal review by 天工LCI数据工作小组
Amounts: no units in this file; such an amount is in the reference unit of its flow, which a separate flow dataset defines
copyright: false
licenseType: Free of charge for all users and uses

## General comment
PTS通过抽取和使用地上处理设施清除受污染的地下水。PTS处理导致的污染物浓度的降低在初始很快，但通常会导致长期缓慢、稳定的降低

## Geography
该案例研究使用了巴特尔为位于美国多佛空军基地

## Technology and included processes
抽出处理由五个单元系统组成：抽提井、气提单元（ASU）、催化氧化单元（COU）、颗粒活性炭单元（GAC）和处理设施。处理设施包括一块37.1m2、0.15m厚的混凝土搅拌车浇筑结构板（260 kW at 0.14 m3 /hour）、61m直径0.05m的PVC管道、各种PVC配件和阀门以及一个钢结构棚。

## Technical purpose
描述的地下水泵和处理过程（PTS）旨在用于环境修复应用。特别是，它被用于像多佛空军基地这样的地点，利用抽水井和地上处理设施去除地下水中的污染物，其中包括气提单元、催化氧化单元和颗粒活性炭处理系统。

## Reference product
- Treatment facilities: 1; measured

## Inputs
- polyvinylchloride resin (S-PVC): 80; measured
  Treatment Tacilities pyc Pipe
- Concrete: 12100; measured
  Treatment Facilities Concrete
- Steel: 450; measured
  Treatment Facililies Sleel
- Energy, unspecified: 37500; measured
  Treatment Facilities Congtruction Energy

## Use advice
在使用PTS过程的数据集时，应注意确保假设的现场特性与实际条件一致。用户必须在他们的影响评估中考虑长期污染物减少趋势。基于现有文献或基础原则进行的估计和省略的数据应该受到严格评估，并且应考虑由于排除某些输入或排放而导致的限制。

## Review details
清单： 内部审查通过几个迭代步骤完成，涉及原始数据验证、原始数据记录、代表性、完整性、与 ISO 14040 和 14044 有关的建模的一致性。

## Data sources
- Life-Cycle Case Study Comparison of Permeable Reactive Barrier versus Pump-and-Treat Remediation
