# Propylene Production | Propylene | Propane Dehydrogenation Route | Propane

Dataset: ILCD process, Unit process, black box
Geography: NJ-JS-CN
Reference year: 2015
Classification: Materials production / Other mineralic materials
Functional unit: A functional unit is defined as 1 ton of propylene product
LCI method principle: Attributional
LCI method approaches: Allocation - mass
Generated by: Yanan Ren, renyn15@tsinghua.org.cn
Review: Dependent internal review by Tiangong LCI Data Working Group
Amounts: no units in this file; such an amount is in the reference unit of its flow, which a separate flow dataset defines
copyright: false

## General comment
Propane dehydrogenation adopts Oleflex process of UOP company, mainly including feed treatment, depropanizer, reaction unit catalyst continuous regeneration unit, reactor effluent compression, drying unit, separation unit, selective hydrogenation, deethanizer, propylene propane Separator unit. The key input parameters of this project include raw materials (propane), energy sources (electricity, steam, fresh water, natural gas) and auxiliary materials (catalyst Pt, etc.). The products are by-products of propylene and hydrogen, and by-products C4 and C2 are produced at the same time. The process produces by-product fuel gas, which is recycled as energy, which belongs to closed-loop energy recovery, so this process does not participate in the quality distribution of environmental impact.

## Geography
The process case comes from Sinopec Yangzi Petrochemical Company. The company is located in Jiangsu Province, the process was built in 2015, and the propylene production capacity is 600,000 tons/year.

## Time period
Craft built in 2015

## Technology and included processes
Propane raw materials in my country's coastal areas are mainly imported from the Middle East. The main reason is that the Oleflex process has high requirements on the purity of propane raw materials, and most of the propane in my country comes from liquefied petroleum gas, a by-product of oil refining, which has high impurity content and the purity cannot meet the requirements of the process. The propane raw materials of this enterprise are all imported, so the LCA model of the PDH route considers the raw material transportation stage. Assume that propane is transported 11,000km by sea to the port of Nanjing, China, and then transported to the enterprise through a 400km pipeline.

## Reference product
- propene (propylene): 1000; measured
  丙烯

## Inputs
All rows: measured
- Propane: 1240
  丙烷
- platinum: 0.38667
  Pt
- palladium: 0.022
  Pd
- Poly(styrene-divinylbenzene): 0.164
  苯乙烯-二乙烯苯聚合物
- Aluminum oxide (alumina): 0.93085
  氧化铝
- chlorine: 0.10883
  氯气
- Dimethyl disulfide: 0.03717
  二甲基二硫醚
- sodium hydroxide: 7.49
  氢氧化钠
- nitrogen: 8.8
  氮气
- air: 38.7
  装置风
- Water (fresh water): 7390
  新鲜水
- electricity mix: 531.18
  电
- process steam: 2860
  蒸汽
- natural gas: 110
  燃料气

## Outputs
All rows: measured
- C4 Hydrocarbon Mixture: 60
  C4+
- Hydrogen: 40
  氢气
- Ethane: 100
  C2
- carbon dioxide: 410
  CO2
- sulfur dioxide: 0.0314
  SO2
- nitrous oxide: 0.25167
  NOx
- Dust (unspecified, from stack): 0.065
  颗粒物
- chlorine: 0.00462
  氯气
- hydrogen chloride: 0.00168
  HCl
- chemical oxygen demand: 0.00345
  COD
- ammonia: 5e-5
  氨氮

## Deviations from the LCI method approaches
Quantification of environmental load between product propylene and by-products using mass distribution method

## Data selection and combination
The detailed input-output data of the propylene production process comes from the company's public environmental impact assessment report, including the input of raw materials and auxiliary materials, energy and resource consumption, and discharge of waste gas, wastewater and solid waste.

## Review details
Inventory: The internal review was done by several iteration steps concerning raw data validation, raw data documentation, representativity, completeness and consistency of modelling with regard to ISO 14040 and 14044.; Documentation: The review of the documentation was performed by Ecobilan and is in compliance with ISO 14040 and 14044. The data set documentation is correct in view of the appropriateness of the information provided. It includes all relevant information in view of data quality and scope of application of the respective LCI result.

## Data sources
- 吕琳. 丙烯产品环境负荷及温室气体减排的碳税政策. (大连理工大学, 2022).
