# 湿蒸法棉布染整加工;印染棉布;平幅水洗

Dataset: ILCD process, Unit process, single operation
Geography: SZ-JS-CN
Reference year: 2012
Classification: Unit processes / Materials production / Other materials
Generated by: 段颖凡, 1300925579@qq.com
Owner: 天工LCI数据工作小组
Review: Dependent internal review by 天工LCI数据工作小组
Amounts: no units in this file; such an amount is in the reference unit of its flow, which a separate flow dataset defines
copyright: false
licenseType: Free of charge for all users and uses

## General comment
平幅水洗是染整加工的一环，指的是对布料进行水洗处理，使其在幅宽方向上获得一定的洁净和处理效果。这个过程有助于去除残留的染料、助剂或其他杂质，同时调整织物的手感和外观。

## Geography
本研究选取江苏省某印染企业为重点调研对象，该企业位于长三角经济圈中的常熟。

## Technical purpose
此工业过程描述了湿蒸法棉布染整加工，包括使用平幅水洗技术的印染棉布。煤炭在蒸汽和导热油锅炉中使用，以产生蒸汽并保持更高的操作温度。利用这些锅炉产生的蒸汽的加工步骤顺序包括煮练氧漂、丝光、磨毛、平幅水洗、培烘和轧染。在这个步骤序列中，蒸汽用于对坯布进行烘干处理，其中烘干和轧染需要双步烘干，而其他步骤仅使用单步烘干。这些过程使用蒸汽的比率为2:1:1:1:1:2。本数据集专门研究位于江苏省长三角经济圈中常熟的一家纺织印染企业。

## Reference product
- Cotton Fabric: 167; measured

## Inputs
- Electricity: 310; measured
- Standard coal: 981; measured
- Crude coal: 56.5; calculated
- Cleaned coal: 140; calculated
- Fuel Oil: 1.21; calculated
- heavy fuel oil: 0.363; calculated
- Diesel oil: 1.66; calculated
- Coke Oven Gas: 2.21; calculated
- natural gas: 0.0283; calculated
- process steam: 3.15e7; measured
- Hydrogen peroxide: 10.7; measured
- Stabilizer: 10.9; measured
- Penetrant: 1.57; measured
- river water: 20300; measured
- freshwater: 2300; measured

## Outputs
- carbon dioxide (fossil): 2780; calculated
- carbon monoxide (fossil): 0.177; calculated
- sulfur dioxide: 2.09; calculated
- methane (fossil): 13.6; calculated
- Nitrogen oxides: 0.365; calculated
- nitrous oxide: 0.0431; measured
- particles (> PM10): 0.562; calculated
- ammonia: 9.11e-6; measured
- non-methane volatile organic compounds: 0.00429; measured
- waste water - untreated: 18800; measured
- chemical oxygen demand: 21.4; calculated
- Suspended solids, unspecified,Suspended solids, unspecified: 2.32; calculated
- lead: 4.44e-6; calculated
- mercury: 9.32e-8; calculated
- fluorine: 8.39e-7; calculated
- cadmium: 1.65e-7; calculated
- arsenic: 3.8e-6; calculated

## Use advice
使用此数据集时，用户需注意它反映了所研究的江苏省企业特定的能源和蒸汽消耗模式，这可能并不代表该行业的所有操作。在将此数据应用于不同情形时，用户应调整其计算，考虑两种锅炉类型的煤炭消耗比（17:1）以及不同烘缸所使用的蒸汽使用比例（2:1:1:1:1:2）。同时，用户还应注意培烘和轧染过程需要双步烘干，蒸汽使用量的计算应相应调整。回收和环境实践因地区而异，验证这些实践是否与数据集位置的条件一致是至关重要的。

## Review details
清单： 内部审查通过几个迭代步骤完成，涉及原始数据验证、原始数据记录、代表性、完整性、与 ISO 14040 和 14044 有关的建模的一致性。

## Data sources
- 朱亚楠. 棉布连续轧染工艺生命周期环境影响评价. (南京大学, 2012).
