# Sediment restoration ; in-situ capping ; activated carbon ;Transportation of capping material

Dataset: ILCD process, Unit process, black box
Geography: NO
Reference year: 2011
Classification: Other Services / Repair and maintenance
Generated by: Sang Chunhui, sangch@mail.bnu.edu.cn
Owner: Tiangong LCI Data Working Group
Review: Dependent internal review by Tiangong LCI Data Working Group
Amounts: no units in this file; such an amount is in the reference unit of its flow, which a separate flow dataset defines
copyright: false
licenseType: Free of charge for all users and uses

## General comment
Sources for the production of AC is a fossil anthracite coal-based product from China. Transport from China 20 000 km.

## Geography
After investigation, no relevant domestic research literature has been found yet.

## Time period
There is no clear start time for data collection in the literature, and the start time of the validity period is based on the publication time of the literature

## Technology and included processes
The transportation distance is 20000km.

## Technical purpose
The provided Life Cycle Assessment (LCA) data is intended to model the environmental impact of sediment restoration through the in-situ capping method using activated carbon (AC), derived from fossil anthracite coal produced in China. The data is applicable for studies focused on the ecological rehabilitation of water bodies by assessing the transportation and deployment of capping materials across long distances (20000 km) as part of the remediation process.

## Reference product
- Activated Carbon: 4.76e7; calculated

## Inputs
- Road Transport: 9.52e8; calculated

## Data selection and combination
. The life cycle inventories, i.e. the aggregated environmental data collected for the modeled system, are derived from three sources. The main source used for the majority of processes is the Ecoinvent 2.2 database.

## Use advice
When utilizing this LCA data, pay attention to the regional specificity of the data as it represents conditions in Southern China. Given the absence of local research literature, users must carefully consider the technological applicability and geographical relevance when extrapolating the data to other regions. The assumed validity period of the data is based on the publication time of the sources. The transportation distance should be confirmed as 20000 km, and any variations must be adjusted for accordingly. It is advised that secondary data from Ecoinvent database version 2.3 should be selected considering the closest geographic and technological similarities. The processes are handled as black-box unit processes, and the base data is gathered from pot experiments, pilot projects, and suppliers from specific sites.

## Review details
Inventory: The internal review was done by several iteration steps concerning raw data validation, raw data documentation, representativity, completeness and consistency of modelling with regard to ISO 14040 and 14044.

## Data sources
- Sparrevik et al. Use of Life Cycle Assessments To Evaluate the Environmental Footprint of Contaminated Sediment Remediation. Environ. Sci. Technol. 2011, 45, 10, 4235–4241
