# 架空线缆的制造 ; 外部20km

Dataset: ILCD process, Unit process, single operation
Geography: NMG-CN
Reference year: 2017
Classification: Systems / Construction
Functional unit: The functional unit is 1.5 MW wind turbine
LCI method principle: Attributional
LCI method approaches: Allocation
Generated by: 赵云志, ll10088@163.com
Owner: 天工LCI数据工作小组
Review: Dependent internal review by 天工LCI数据工作小组
Amounts: no units in this file; such an amount is in the reference unit of its flow, which a separate flow dataset defines
copyright: false
licenseType: Free of charge for all users and uses

## General comment
架空线缆是风电场电气基础设施中的关键组件，用于将风力涡轮发电机产生的电力输送到远处，同时尽量减少功率损失。这些电缆专门用于内蒙古东北部的风电场项目，该项目使用的是国产1.5兆瓦风力涡轮。这些电缆支持清洁能源的传输，有助于减少发电环境影响。

## Geography
风电功率参数的数据来自Wang ( 2012 )。以装有33台国产1.5兆瓦( MW )风电机组的风电场为案例，分析其环境影响及其替代效应。该风电场位于我国风电装机最多的省份- -内蒙古东北部。

## Reference product
- Steel Wire,Cable: 20000; article inperiodical

## Inputs
- aluminium: 280000; article inperiodical

## Deviations from the LCI method approaches
风电的生命周期清单如下所示。生产制造阶段包括风电机组、变电站、电缆的生产，这些设备消耗大量能源，排放污染物( Xue et al . , 2015)。

## Use advice
使用架空线缆制造过程的生命周期评价数据时，请确保参考Wang（2012年）提供的风电场案例研究的特定参数，以及Xia和Song（2017年）提供的额外背景信息。用户在评估环境影响时，应考虑Xue等人（2015年）报告的在电缆生产过程中的能源消耗和污染物排放。比较的基线功能单元是1.5兆瓦风力涡轮。任何与此设置的变化都必须相应调整，以保持数据的完整性和适用性。

## Review details
清单： 内部审查通过几个迭代步骤完成，涉及原始数据验证、原始数据记录、代表性、完整性、与 ISO 14040 和 14044 有关的建模的一致性。

## Data sources
- Li, H., Jiang, H.-D., Dong, K.-Y., Wei, Y.-M. & Liao, H. A comparative analysis of the life cycle environmental emissions from wind and coal power: Evidence from China. Journal of Cleaner Production 248, 119192 (2020).
