# 煤矿采空区治理;煤炭回采;井下综合机械化开采煤炭

Dataset: ILCD process, Unit process, single operation
Geography: ZZ-SD-CN
Reference year: 2022
Classification: Energy carriers and technologies / Hard coal based fuels
Generated by: 尹琳琳, yinlinlin0623@163.com
Owner: 天工LCI数据工作小组
Review: Dependent internal review by 天工LCI数据工作小组
Amounts: no units in this file; such an amount is in the reference unit of its flow, which a separate flow dataset defines
licenseType: Free of charge for all users and uses

## Geography
金达煤矿五—二开采区位于中国山东省滕州市。五—二开采区的东西宽度平均为0.66km,南北长度平均为2.9km,总体区域面积为1.94平方千米。

## Technology and included processes
全垮落法采用炸药进行爆破，会产生一定的碳排放。充填法是利用设备对抽采区域进行充填。

## Reference product
- Hard coal, at consumer EU-27: 1000; uniform; estimated
  5个采煤区域煤矿采空区处理工艺流程开采1吨煤炭。

## Outputs
- carbon dioxide (fossil): 3.98733e6; uniform; measured
  5个采煤区域煤矿采空区处理工艺流程释放的CO2量。
- carbon dioxide (fossil): 2793.6; uniform; calculated
  5个采煤区域煤矿采空区处理工艺流程开采1吨煤炭释放的CO2量。

## Data selection and combination
利用B - R模型得到该矿区此开采工艺流程中的碳排放量。

## Review details
清单： 内部审查通过几个迭代步骤完成，涉及原始数据验证、原始数据记录、代表性、完整性、与 ISO 14040 和 14044 有关的建模的一致性。

## Data sources
- Li, B. et al. Research on a Carbon Emission Calculation Model and Method for an Underground Fully Mechanized Mining Process. Energies 15, 2871 (2022).
