# 天然气液化 ;焦炉煤气; 脱碳工艺

Dataset: ILCD process, Unit process, single operation
Geography: CN
Reference year: 2021
Classification: Unit processes / Energy carriers and technologies / Natural gas based fuels
LCI method principle: Attributional
LCI method approaches: Consequential
Generated by: Shikang Kang, 908798159@qq.com
Owner: 天工LCI数据工作小组
Review: Dependent internal review by 天工LCI数据工作小组
Amounts: no units in this file; such an amount is in the reference unit of its flow, which a separate flow dataset defines
copyright: false
licenseType: Free of charge for all users and uses

## General comment
利用焦炉煤气（COG）生产液化天然气 （LNG）是部分缓解天然气供应短缺和有效利用中国炼焦生产副产品的有前途的选择。为了系统评价基于COG的LNG工艺的能耗和环境影响，

## Geography
中国某代表性焦化厂

## Time period
文献发表时间

## Technology and included processes
该研究涉及四种LNG生产工艺，具体如下：1）基于COG的脱碳工艺生产LNG（简称“脱碳工艺”），2）基于COG的LNG生产，采用无氢萃取的甲烷化工艺（简称“甲烷化工艺”），3）基于COG的LNG通过甲烷化工艺和氢气提取（简称“甲烷化工艺用H”）2萃取“），以及4）国产NG直接液化工艺（简称”国产NG液化“）

## Technical purpose
该技术涉及从焦炉煤气（COG）生产液化天然气（LNG），这是补充天然气供应和利用中国炼焦过程副产品的有效方法。这项技术可以在天然气短缺普遍的工业应用中并入，以及在旨在优化生成COG使用的炼焦工厂中。提到的LNG生产技术包括基于COG的脱碳工艺、无氢萃取的甲烷化工艺、带氢气提取的甲烷化以及国内天然气直接液化过程。

## Reference product
- Hard coal, at consumer EU-27: 1330; input; log-normal; software or database
  洗煤投入量

## Inputs
- Electricity: 234.864; log-normal; software or database
  电力投入量

## Outputs
- methane (fossil): 1000; log-normal; software or database
  原文未区分bio和fossil，根据专家判断此处为fossil。焦炭产出量。
- methane (fossil): 43; log-normal; software or database
  原文未区分bio和fossil，根据专家判断此处为fossil。焦煤油产出量。

## Data selection and combination
本研究以基于脱碳工艺的齿轮基LNG生产为基准，因为中国某代表性焦化厂的现场数据充足。

## Data treatment and extrapolations
功能单元定义为 1 Nm3向用户供应天然气。系统范围由六个生命周期阶段组成：煤炭开采和加工、煤炭运输、炼焦生产、LNG生产、LNG运输和LNG蒸发

## Use advice
该研究提供了基于焦炉煤气（COG）的各种LNG生产工艺的能源和环境影响的基本数据。用户应在评估中考虑从煤炭开采到LNG蒸发的综合生命周期阶段。在中国某代表性炼焦厂的现场数据相关时，应特别考虑该研究的参考工艺，即基于脱碳工艺的齿轮基LNG生产。此外，生产工艺的选择可能会影响LCA的范围和结果，因此必须根据目标应用和地理环境审慎选择。

## Review details
清单： 内部审查通过几个迭代步骤完成，涉及原始数据验证、原始数据记录、代表性、完整性、与 ISO 14040 和 14044 有关的建模的一致性。

## Data sources
- Li, J. et al. Life cycle assessment of liquefied natural gas production from coke oven gas in China. Journal of Cleaner Production 329, 129609 (2021).
