# 传统火法回收废旧动力电池生产镍钴锰酸锂

Dataset: ILCD process, Unit process, single operation
Geography: CN
Reference year: 2015
Classification: Unit processes / End-of-life treatment / Material recycling
Functional unit: 1 000 kg of lithium nickel cobalt manganese oxide (ternary material) as a functional unit.
Generated by: 胡志康, hzk2503593129@163.com
Owner: 天工LCI数据工作小组
Review: Dependent internal review by 天工LCI数据工作小组
Amounts: no units in this file; such an amount is in the reference unit of its flow, which a separate flow dataset defines
copyright: false
licenseType: Free of charge for all users and uses

## General comment
该方法将废旧电池破碎后分别进行熔炼、吹炼、磨浮、熔铸阳极、电解精炼、溶解、沉淀、烧结。

## Technical purpose
传统火法回收废旧动力电池生产镍钴锰酸锂（LNCMO）的过程用于从废弃电池电芯中回收有价值的金属。所产生的镍钴锰酸锂通常用作制造新锂离子电池的阴极材料，适用于电动汽车、便携式电子产品和能源储存系统等各种应用。

## Reference product
- Ternary cathode material: 1000; measured
  镍钴锰酸锂（三元材料）

## Inputs
All rows: measured
- Battery: 3330
  废旧动力电池
- Sulfuric acid(98%): 3080
  H2SO4（98%）
- sodium hydroxide: 6230
  氢氧化钠（30%）
- Sodium carbonate: 69.86
  碳酸钠
- Ammonia (28%): 373.35
  氨水（28%）
- water,water: 30300
  工业用水
- Lithium carbonate: 402.51
  碳酸锂
- brown coal; 11.9 MJ/kg: 3270.23
  原煤
- Electricity: 27507.4
  电能
- natural gas,natural gas: 465.79
  天然气

## Outputs
All rows: measured
- Water,Water: 33270
  废水
- Ammonia Nitrogen: 0.26616
  氨氮
- nickel: 0.03327
  镍
- carbon dioxide (fossil): 224
  二氧化碳（原文未区分bio和fossil，根据专家判断此处为fossil）
- Other Solid Waste: 1658
  残渣和灰烬

## Data selection and combination
数据来源于实地调研和作者计算。

## Use advice
在使用此数据集进行生命周期评估时，确保在系统边界内准确建模回收过程阶段。计算过程中每一步骤的能耗和排放：破碎、熔炼、吹炼、磨浮、熔铸阳极、电解精炼、溶解、沉淀和烧结。当评估环境影响时，应以1000公斤镍钴锰酸锂为基准进行比较。应该彻底解决回收材料与原生材料之间影响分配等方法学考虑因素。

## Review details
清单： 内部审查通过几个迭代步骤完成，涉及原始数据验证、原始数据记录、代表性、完整性、与 ISO 14040 和 14044 有关的建模的一致性。

## Data sources
- 谢英豪, 余海军, 欧彦楠, & 李长东. 废旧动力电池回收的环境影响评价研究. 无机盐工业 47, 43-46+61 (2015).
