# 氢氧化铝生产 ; 氢氧化铝 ; 铝土矿

Dataset: ILCD process, Unit process, single operation
Geography: CN
Reference year: 2019
Classification: Unit processes / Materials production / Inorganic chemicals
Generated by: 熊若熙, xiongrx0126@163.com
Owner: 天工LCI数据工作小组
Review: Dependent internal review by 天工LCI数据工作小组
Amounts: no units in this file; such an amount is in the reference unit of its flow, which a separate flow dataset defines
copyright: false
licenseType: Free of charge for all users and uses

## General comment
无流程图

## Time period
论文发表年

## Technical purpose
该工艺生产的氢氧化铝通常用作铝金属制造的原料、阻燃剂、水处理、其他铝化合物生产的原料，以及牙膏中的磨料。

## Reference product
- aluminium hydroxide: 1; missing unimportant

## Inputs
- transport, freight, lorry 16-32 metric ton, unregulated: 0.25; software or database
  Lorry, 30t
- electricity, high voltage, aluminium industry: 0.26388; software or database
- bauxite: 1.26; missing unimportant
- calcium carbonate: 0.06; software or database
- Sodium chloride, in ground: 0.04; software or database

## Use advice
在使用此数据集进行生命周期评估时，请考虑地理相关性和技术适用性。确保生产年份与评估的时间范围一致。如果过程中存在共产品，请注意分配方法。如果回收是生命周期的一部分，请根据LCA的目标和范围定义进行包含。

## Review details
清单： 内部审查通过几个迭代步骤完成，涉及原始数据验证、原始数据记录、代表性、完整性、与 ISO 14040 和 14044 有关的建模的一致性。

## Data sources
- Yin, R., Hu, S. & Yang, Y. Life cycle inventories of the commonly used materials for lithium-ion batteries in China. J. Clean. Prod. 227, 960–971 (2019).
