# 运输到场的材料和设备;石灰;农田土壤;原位稳定化

Dataset: ILCD process, Unit process, single operation
Geography: HZ-GD-CN
Reference year: 2021
Classification: Unit processes / Other Services / Repair and maintenance
Functional unit: 800kg of lime is transported from the production site to the repair site.
Generated by: 杨欣桐, yangxt@caep.org.cn
Owner: 天工LCI数据工作小组
Review: Dependent internal review by 天工LCI数据工作小组
Amounts: no units in this file; such an amount is in the reference unit of its flow, which a separate flow dataset defines
copyright: false
licenseType: Free of charge for all users and uses

## General comment
药剂运输到场的过程。

## Geography
研究地点位于中国南方珠江三角洲惠州市龚庄镇，是一片受镉污染的稻田。

## Technology and included processes
基于石灰的生产地址和修复场地的位置来计算修复药剂运输距离数据。

## Technical purpose
该数据集中描述的高品质石灰是用于环境修复的，特别是用于受污染农田土壤的原位稳定化。其主要应用是处理Cd污染的稻田，在中和土壤酸度和固定重金属方面起到了作用，以防止环境进一步恶化，同时提高土壤健康，用于农业生产。

## Reference product
- Equipment and Materials Arriving on Site: 1; measured

## Inputs
- Lime,Lime: 800; measured
- transport in t*km: 136; measured

## Use advice
使用这个数据集时，用户必须考虑从石灰生产地点到修复场地的具体运输距离。这对于环境修复背景下准确的生命周期评估至关重要。用户还应该考虑材料输入与输出、能源使用、资源消耗、排放和与过程每个阶段相关的碳足迹的方法论含义。此外，用户应考虑当地土壤状况及农业修复过程中应用石灰的法规要求。

## Review details
清单： 内部审查通过几个迭代步骤完成，涉及原始数据验证、原始数据记录、代表性、完整性、与 ISO 14040 和 14044 有关的建模的一致性。

## Data sources
- Kai L ,Liping F ,Fangbai L , et al. Sustainability assessment and carbon budget of chemical stabilization based multi-objective remediation of Cd contaminated paddy field. The Science of the total environment, 2021, 819 152022-152022.
