# Soil and Groundwater Remediation;In Situ;Soil Bioventilation;Treatment facilities

Dataset: ILCD process, Unit process, single operation
Geography: CA
Reference year: 2007
Classification: Other Services / Engineering and consulting
Generated by: Wang Ning, wang_ning@caep.org.cn
Owner: Tiangong LCI Data Working Group
Review: Dependent internal review by Tiangong LCI Data Working Group
Amounts: no units in this file; such an amount is in the reference unit of its flow, which a separate flow dataset defines
copyright: false
licenseType: Free of charge for all users and uses

## General comment
Construction of surface soil gas treatment facilities using latex, glass, HDPE, biofilters

## Geography
The contaminated area was located 600 m from a river shore in the northern part of the prov-ince of Quebec， Canada.

## Technology and included processes
Construction of surface treatment facilities using high-density polyethylene, latex, glass, etc.

## Technical purpose
The treatment facility constructed for soil bioventilation is intended for the process of in-situ soil and groundwater remediation. The facility is specifically designed to manage and treat surface soil gases using constructed biofilters made from materials such as high-density polyethylene (HDPE), latex, and glass, addressing contamination issues in areas such as the vicinity of river shores.

## Reference product
- Treatment facilities: 1; input; estimated
  建造好的地表土壤气处理设施

## Inputs
- polyethylene high density granulate (PE-HD): 19; estimated
  使用高密度聚乙烯建造地表土壤气处理设施
- Biofilter: 1015; estimated
  使用生物滤池建造地表土壤气处理设施
- Latex: 1.4; estimated
  使用乳胶建造地表土壤气处理设施
- glass wool: 108; estimated
  使用玻璃建造地表土壤气处理设施

## Use advice
Users of this data set for Life Cycle Assessment should note that the primary application of the described process is for in-situ remediation of contaminated soil and groundwater. Attention should be paid to geographical applicability, considering that the described facility is tailored to a specific context 600 meters from a river shore in the northern part of Quebec, Canada. Ensure proper modeling of the use phase behavior, accounting for the environmental conditions pertinent to the location. Assumptions made for the construction and operation of the treatment facilities should be clearly justified and documented in the LCA.

## Review details
Inventory: The internal review was done by several iteration steps concerning raw data validation, raw data documentation, representativity, completeness and consistency of modelling with regard to ISO 14040 and 14044.
