# 修复后土壤;土壤原位修复;地表沥青覆盖}原位生物通风

Dataset: ILCD process, Unit process, black box
Geography: CA
Reference year: 2014
Classification: Unit processes / Other Services / Repair and maintenance
Functional unit: Defining the functional unit as “the treatment of 112 m3 of soil contaminated with diesel to an acceptable risk level over the short term” .
Generated by: 杨欣桐, yangxt@caep.org.cn
Owner: 天工LCI数据工作小组
Review: Dependent internal review by 天工LCI数据工作小组
Amounts: no units in this file; such an amount is in the reference unit of its flow, which a separate flow dataset defines
copyright: false
licenseType: Free of charge for all users and uses

## General comment
方案C包括用沥青（190平方米）铺设z暂存场，以消除污染物和居民之间的暴露途径。铺路所需的机械和材料由驳船从鹅湾运往霍普代尔。区域1和2均通过生物通气处理。现场处理系统的安装包括从金斯敦赶来的合格工作人员和处理中使用的材料。曝气是由风车驱动的泵提供的。空气在通过穿孔的PVC管注入土壤之前被加湿。在处理开始时施用营养液（硝酸铵和磷酸铵）。监测包括合格的工作人员在每个温暖季节开始和结束时进行一次访问。在该设施的生命周期结束时，材料在垃圾填埋场进行了处理。

## Geography
在加拿大NL霍普代尔的一个住宅/商业区发现了被柴油污染的土壤。

## Time period
文献发表时间

## Technical purpose
该数据集表示加拿大NL霍普代尔一个住宅/商业区域内被柴油污染的土壤的原位修复过程。应用包括用沥青覆盖临时存储场地，以消除污染物和居民之间潜在的暴露途径。利用生物通气技术通过穿孔的PVC管使用风车驱动的泵供应湿化空气以处理两个特定区域的土壤，并施加营养液以促进生物降解。该过程特别适用于在控制污染的同时限制可能的环境暴露，并可以在类似的修复项目中应用。

## Reference product
- Remediated soil: 112; missing unimportant

## Inputs
All rows: missing unimportant
- Ammonium nitrate: 52.6
- Ammonium Phosphate: 13.6
- Transported asphalt: 22800
- Concrete: 4870
- Polyethylene,Polyethylene: 2
- polyvinylchloride resin (S-PVC): 33.6
- Steel: 17.9
- transport in t*km: 42
- Road Transport,Road Transport: 33600, 14000, 15 (3 entries)
- Diesel,Diesel: 0.125
  Operation backhoe, diesel
- Diesel,Diesel: 0.0416667
  Operation forklift, diesel
- contaminated soil: 112

## Use advice
该数据集的用户应注意，提供的修复过程信息具有场地特定的特性，并且在没有进行调整的情况下可能不适用于不同的环境背景。用户在将这些数据用于类似的修复项目时，需要考虑当地条件，如气候、土壤类型和污染程度。由于运输材料和工作人员的场地特异性，系统中未包含这些信息；因此，用户应在评估中分别考虑这些方面。材料的末端管理，如垃圾填埋场处理，也应纳入整体环境影响评估中。

## Review details
清单： 内部审查通过几个迭代步骤完成，涉及原始数据验证、原始数据记录、代表性、完整性、与 ISO 14040 和 14044 有关的建模的一致性。

## Data sources
- Sanscartier D ,Margni M ,Reimer K , et al. Comparison of the Secondary Environmental Impacts of Three Remediation Alternatives for a Diesel-contaminated Site in Northern Canada [J]. Soil and Sediment Contamination: An International Journal, 2010, 19 (3): 338-355.
