# 氧化铝生产 ; 冶金用氧化铝 ; 联合法 ; 铝土矿

Dataset: ILCD process, Unit process, single operation
Geography: CN
Reference year: 2022
Classification: Unit processes / Materials production / Non-energetic raw materials
Generated by: 熊若熙, xiongrx0126@163.com
Owner: 天工LCI数据工作小组
Review: Dependent internal review by 天工LCI数据工作小组
Amounts: no units in this file; such an amount is in the reference unit of its flow, which a separate flow dataset defines
copyright: false
licenseType: Free of charge for all users and uses

## General comment
通过这种工业过程生产的氧化铝专用于冶金应用。它特别用作生产原铝的原料，通过电解过程制得铝。这种高纯度的氧化铝适合用于铝冶炼行业，可用于制造各种铝产品，包括但不限于建筑材料、交通部件、包装材料和电导体。

## Time period
文献发表日期

## Reference product
- aluminium oxide, metallurgical: 1000; missing unimportant

## Inputs
All rows: missing unimportant
- electricity, high voltage, aluminium industry: 879.48, 1152 (2 entries)
- bauxite: 2456
- sodium hydroxide, without water, in 50% solution state: 281, 69 (2 entries)
  alkali
- lime: 154, 569 (2 entries)
- hard coal: 24.7, 485 (2 entries)
- Petroleum Coke: 44, 33.1 (2 entries)
- heavy fuel oil: 131, 83.9 (2 entries)

## Data selection and combination
根据目标、范围、系统边界定义，使用相关规范、标准、年鉴，或其他相关资料，收集汇总生命周期各阶段的输入输出数据。

## Use advice
在将此数据集用于铝产品的生命周期评价时，用户应考虑所描述的专门用于冶金的氧化铝的具体类型。值得注意的是，生产方法是基于铝土矿的联合法，并且需要准确地将这些信息整合进LCA模型中。在使用数据集时，要确保分配方法与研究定义的系统边界一致。应在用于测算的数据中反映任何生产技术或效率的更新或变化。

## Review details
清单： 内部审查通过几个迭代步骤完成，涉及原始数据验证、原始数据记录、代表性、完整性、与 ISO 14040 和 14044 有关的建模的一致性。

## Data sources
- Zhang, Y. et al. Life cycle assessment of pollutants and emission reduction strategies based on the energy structure of the nonferrous metal industry in China. ENERGY 261, (2022).
