# Bio-based ammonia production | Ammonia | Electrolysis-based route | N2, H2

Dataset: ILCD process, Unit process, black box
Geography: CN
Classification: Materials production / Other mineralic materials
Functional unit: In this study, the functional unit is defined as 1 kg of H2 carrier produced from coal, natural gas, and renewables.
LCI method principle: Attributional
Generated by: Zirui Tang, tangzirui123@gmail.com
Review: Dependent internal review by Tiangong LCI Data Working Group
Amounts: no units in this file; such an amount is in the reference unit of its flow, which a separate flow dataset defines
copyright: false

## General comment
Electrolysis-based ammonia manufacture technology combines water electrolysis for hydrogen production and the Haber-Bosch process for ammonia synthesis.

## Geography
The study assumes that both methanol and ammonia production plants are located in northwest China, where coal, natural gas and solar energy resources are abundant.

## Technology and included processes
In this work, we select solar photovoltaic (PV) as the power source for splitting water to produce H2 and O2. Solar PV, which can directly convert solar radiation into electricity, is gradually regarded as a potential alternative to fossil fuels due to its own advantages.

## Reference product
- Ammonia: 1000; article inperiodical

## Inputs
All rows: article inperiodical
- electricity: 7200
- Hydrogen: 177
- nitrogen: 822.5
- Ferric oxide: 0.002
- sodium hydroxide: 0.002
- Potassium hydroxide: 0.002

## Data selection and combination
The relevant data are collected from the Bicer's research work (Bicer et al., 2017).

## Data treatment and extrapolations
For solar PV-based ammonia production route, Bicer et al.33 concluded that for an ideal Haber-Bosch process, combining 0.177 kg hydrogen with 0.823 kg nitrogen can produce 1 kg ammonia through analyzing electrolysis-based ammonia generation processes.

## Review details
Inventory: The internal review was done by several iteration steps concerning raw data validation, raw data documentation, representativity, completeness and consistency of modelling with regard to ISO 14040 and 14044.; Documentation: The review of the documentation was performed by Ecobilan and is in compliance with ISO 14040 and 14044. The data set documentation is correct in view of the appropriateness of the information provided. It includes all relevant information in view of data quality and scope of application of the respective LCI result.

## Data sources
- Zhu, R., Wang, Z., He, Y., Zhu, Y. & Cen, K. LCA comparison analysis for two types of H2 carriers: Methanol and ammonia. Int. J. Energy Res. 46, 11818–11833 (2022).
