# Thermal treatment of EVA;Ethylene-vinyl acetate copolymer（EVA）;Thermal treatment

Dataset: ILCD process, Unit process, single operation
Geography: CN
Classification: Energy carriers and technologies / Heat and steam
Generated by: Nan Wang, 1209824595@qq.com
Owner: Tiangong LCI Data Working Group
Review: Dependent internal review by Tiangong LCI Data Working Group
Amounts: no units in this file; such an amount is in the reference unit of its flow, which a separate flow dataset defines
copyright: false
licenseType: Free of charge for all users and uses

## General comment
Glass need to be remelted, EVA (Ethylene Vinyl Acetat) need thermal treatment, and aluminum need remetling and chemical treatment before they may substitute virgin materials in the module assembling process. Meanwhile, chemical treatment is necessary for silicon and silver before recycling in polysilicon production and multi-Si PV cell respectively.

## Inputs
- Ethylene-vinyl acetate copolymer: 15.4; min 10.1024; max 20.6976; uniform; article inperiodical
  EVA
- nitrogen: 16.2; article inperiodical
- Oxidant: 9.63; article inperiodical
- Electricity: 10.8; article inperiodical
  Unit kw

## Outputs
All rows: article inperiodical
- Ethylene-vinyl acetate copolymer: 12.47
  EVA
- carbon dioxide: 2.71
- nitrogen dioxide: 18.26
- methane: 4.26
- ethene (ethylene): 2.59
- propene (propylene): 1.56

## Data selection and combination
The inventory data of the multi-Si PV modules are collectedfrom several sources: (1) Literatures including Fu (2013), whichcontain material inventory of several photovoltaic enterprises inJiangsu province; Diao and Shi (2011), which contain materialinventory of two photovoltaic enterprises in Beijing; He (2013),which contain material inventory of four photovoltaic enterprisesin Gansu and Sichuan province. (2) Environment Impact Assessment Statements (EIAS) of multi-Si PV production companies fromSichuan (EIAS-Sichuan, 2008), Henan (EIAS-Henan, 2009) andChongqing (EIAS-Chongqing, 2008). (3) Industry report of marketforesight and investment prospect for China’s photovoltaicdevelopment (2014) and Industrial report of market foresightand investment prospect for China’s polysilicon development(2014). The mean value is applied when there are different datasources for specific materials.

## Review details
Inventory: The internal review was done by several iteration steps concerning raw data validation, raw data documentation, representativity, completeness and consistency of modelling with regard to ISO 14040 and 14044.

## Data sources
- Huang, B. et al. Environmental influence assessment of China’s multi-crystalline silicon (multi-Si) photovoltaic modules considering recycling process. Solar Energy 143, 132–141 (2017).
