# Electricity production ; Electricity ; Thermal power (54.7%) + hydropower (17.2%) + nuclear power (24.1%) + wind power (3.4%) + solar power (0.6%)

Dataset: ILCD process, Partly terminated system
Geography: FJ-CN
Reference year: 2019
Classification: Energy carriers and technologies / Electricity
LCI method principle: Other
Generated by: Ruoxi Xiong, xiongrx0126@163.com
Owner: Tiangong LCI Data Working Group
Review: Dependent internal review by Tiangong LCI Data Working Group
Amounts: no units in this file; such an amount is in the reference unit of its flow, which a separate flow dataset defines
copyright: false
licenseType: Free of charge for all users and uses

## General comment
Forms of electricity generation include thermal power generation, hydropower generation, nuclear power generation, wind power generation and solar power generation.

## Time period
Calculated based on data from the 2019 Energy Statistics Yearbook

## Technical purpose
This dataset represents the mix of electricity generation that includes thermal power, hydropower, nuclear power, wind power, and solar power. It is used to provide insight into the energy production portfolio of a region and its associated environmental impacts, such as carbon emissions. The electricity produced is used for various purposes, including residential, commercial, and industrial applications.

## Reference product
- Electricity: 3.6; calculated

## Outputs
- carbon dioxide: 0.433; calculated
- sulfur dioxide: 7.5e-5; calculated
- Nitrogen oxides: 0.000115429; calculated
- Dust (unspecified, from stack): 1.5719e-5; calculated

## Data treatment and extrapolations
For the accounting method, please refer to the "Enterprise Greenhouse Gas Emissions Accounting Methods and Reporting Guidelines for Power Generation Facilities". Different forms of power generation and fuel consumption come from Chapter 3 (Energy Production) and Chapter 6 (Regional Energy Balance Sheet) in the "China Energy Statistical Yearbook 2020". The fuel parameters such as low calorific value and carbon content per unit calorific value used to calculate the carbon dioxide emission factor come from the "2019 China Regional Power Grid Carbon Dioxide Baseline Emission Factor Calculation Instructions OM" and the "Enterprise Greenhouse Gas Emission Accounting Method and Reporting Guide for Power Generation Facilities" 》

## Use advice
When using this data for Life Cycle Assessment or carbon footprint calculations, the users should ensure that the mix of electricity generation sources reflects the actual consumption proportions. Attention should be paid to the methodological guidance provided by the 'Enterprise Greenhouse Gas Emissions Accounting Methods and Reporting Guidelines for Power Generation Facilities.' It is important to update the emission factors and energy data periodically to reflect changes due to technological improvements or shifts in the energy mix. Inclusion or exclusion of the potential for recycling should be considered based on the end use of the electricity.

## Review details
Inventory: The internal review was done by several iteration steps concerning raw data validation, raw data documentation, representativity, completeness and consistency of modelling with regard to ISO 14040 and 14044.

## Data sources
- 熊若熙. 中国电力生产和消费二氧化碳与污染物排放因子核算. (清华大学, 2023).
