# 退役三元锂电池湿法回收

Dataset: ILCD process, Unit process, single operation
Geography: CN
Reference year: 2022
Classification: Unit processes / End-of-life treatment / Material recycling
Functional unit: retired NCM battery of 48V,12Ah
Generated by: 陈利鹏, lpchen07@163.com
Owner: 天工LCI数据工作小组
Review: Dependent internal review by 天工LCI数据工作小组
Amounts: no units in this file; such an amount is in the reference unit of its flow, which a separate flow dataset defines
copyright: false
licenseType: Free of charge for all users and uses

## General comment
废旧的锂镍钴锰氧化物（NCM）电池通过湿法冶金工艺来管理，以回收前驱材料。

## Technical purpose
湿法冶金回收过程用于处理废旧的锂镍钴锰氧化物(NCM)电池。该工艺目的是回收有价值的前驱材料，用于生产新电池单元或其他需要此类材料的相关应用。

## Reference product
- EoL NCM battery: 1; input; measured
  退役三元锂电池（4×12V, 12Ah）

## Inputs
All rows: measured
- Sulfuric acid(98%): 4.614
- Hydrochloric acid (32%): 0.168
- Sodium Hydroxide solution（1mol/L）: 0.4428
- Liquid ammonia: 0.471
- 2-ethylhexyl hydrogen -2-ethylhexylphosphonate: 0.0204
- Kerosene: 0.0204
- Hydrogen peroxide (27.5%): 5.586
- water,water: 58.8
- Lithium carbonate: 0.5076
- silicon: 0.0126
- sodium chloride: 0.0003
- magnesium chloride: 0.00054
- potassium chloride: 0.00024
- carbon: 0.0012
- Light gas oil: 0.0078
- Electricity: 29.16
- Natural gas, at consumer EU-27: 0.5874
- Heavy oil: 0.0096

## Outputs
All rows: measured
- aluminium: 0.21
- copper: 0.1944
- Graphite: 0.726
- polypropylene granulate (PP): 0.1188
- carbon monoxide (fossil): 0.0002826
- Total particulate matter: 6e-6
- nitrous oxide: 9e-6
- nickel: 1.68e-5
- hazardous waste (unspecified): 0.03138
- Cathode Material: 0.3462
  镍钴锰锂

## Use advice
使用这些数据时，应考虑回收材料的具体组成和纯度，因为这些可能会根据回收过程而有所不同。数据集仅适用于使用湿法冶金工艺回收48V，12Ah的NCM电池。确保有关能耗和回收效率的假设与所采用的具体方法一致是非常重要的。用户还应考虑数据的地理相关性以及它与当地回收法规和实践的一致性。

## Review details
清单： 内部审查通过几个迭代步骤完成，涉及原始数据验证、原始数据记录、代表性、完整性、与 ISO 14040 和 14044 有关的建模的一致性。

## Data sources
- Liu, M. et al. Life cycle environmental and economic assessment of electric bicycles with different batteries in China. Journal of Cleaner Production 385, 135715 (2023).
