# cement production|cement, portland cement, 52.5RMPa|modern dry process, five-stage kiln external decomposition, 4000 t/d

Dataset: ILCD process, Unit process, black box
Geography: DL-LN-CN
Classification: Materials production / Other mineralic materials
Generated by: Siqi Yang
Amounts: no units in this file; such an amount is in the reference unit of its flow, which a separate flow dataset defines
copyright: false

## General comment
The company's production process uses RSP five-stage kiln external decomposition technology, and mainly adopts advanced production equipment from Germany, France, Japan, and some domestic companies. The cement production line consists of a vertical raw mill, a 5-stage RSP (kiln external pre-decomposition tower), a rotary kiln, and a large ball mill equipped with a roller press, as well as gypsum crushing, limestone grinding, and conveying and adding equipment.

## Geography
Dalian Cement Company

## Model description
The LCA method was not used for modeling.

## Reference product
- cement, portland cement, 52.5RMPa: 1000
  Cement, PⅡ52.5R

## Inputs
All rows: measured
- limestone, crushed, for mill: 1216
  Limestone
- clay: 227.2
  Clay
- iron, powder: 47.4
  Iron powder
- gypsum (desulphurized): 30
  Gupsum
- electricity, medium voltage: 311.559
  Electricity
- hard coal: 129.447
  Coal

## Outputs
All rows: calculated
- sulfur dioxide: 0.555
  SO2. The main source of SO2 emissions in the production of building materials is from sulfides contained in fuels and raw materials. Due to the lack of statistical data on industrial pollutant emissions, it is very difficult to collect data, and some data cannot be obtained directly. Therefore, an energy and raw material conversion method is used to obtain the data.
- Nitrogen oxides: 0.9225
  NOX. The emissions of NOx in the production of building materials come from two main sources. The first is the combination of N and O2 in the air at high temperatures, which is directly related to the temperature. The second is the low-temperature combination of N and O2 in the fuel, which is related to the concentration of O2. Due to the lack of statistical data on industrial pollutant emissions, it is very difficult to collect data, and some data cannot be obtained directly. Therefore, an energy and raw material conversion method is used to obtain the data.
- carbon dioxide: 743.805
  CO2. The main sources of CO2 emissions in the building materials industry are from fuel combustion and raw material decomposition. Due to the lack of statistical data on industrial pollutant emissions, it is very difficult to collect data, and some data cannot be obtained directly. Therefore, an energy and raw material conversion method is used to obtain the data.
- particles (> PM10): 0.4063
  Dust, with an unspecified particle size, is treated as PM > 10 micrometers in diameter. The production of dust in the production of building materials is related to the content of powdered materials in the raw materials. Due to the lack of statistical data on industrial pollutant emissions, it is very difficult to collect data, and some data cannot be obtained directly. Therefore, an energy and raw material conversion method is used to obtain the data.
- chemical oxygen demand: 5.3924e-5
  COD (chemical oxygen demand) (mg/l). Chemical oxygen demand (COD) refers to the amount of oxidant consumed when treating wastewater with a strong oxidant. It is used to measure the degree of organic pollution in wastewater. The larger the COD value, the more severe the wastewater pollution. Due to the lack of statistical data on industrial pollutant emissions, it is very difficult to collect data, and some data cannot be obtained directly. Therefore, an energy and raw material conversion method is used to obtain the data.
- Suspended solids, unspecified: 6.1068e-5
  SS (suspended solids) (mg/l). The suspended solids in the wastewater discharged from the building materials industry mainly refer to inorganic substances, organic substances, sediment, clay, microorganisms, and other substances that are insoluble in water. Due to the lack of statistical data on industrial pollutant emissions, it is very difficult to collect data, and some data cannot be obtained directly. Therefore, an energy and raw material conversion method is used to obtain the data.
- Oils, unspecified: 2.304e-7
  Petroleum (mg/l). Oil pollution in wastewater mainly comes from production enterprises such as steel, coking, and petrochemicals. According to the size of the oil droplet diameter, there are three forms of oil substances in wastewater: floating oil, dispersed oil, and emulsified oil, and the difficulty of separation from wastewater increases in that order. Due to the lack of statistical data on industrial pollutant emissions, it is very difficult to collect data, and some data cannot be obtained directly. Therefore, an energy and raw material conversion method is used to obtain the data.
- particles (> PM10): 56.7048
  Solid waste refers to the solid waste generated during the production process, such as dust (with an unspecified particle size, is treated as PM > 10 micrometers in diameter). Due to the lack of statistical data on industrial pollutant emissions, it is very difficult to collect data, and some data cannot be obtained directly. Therefore, an energy and raw material conversion method is used to obtain the data.

## Data selection and combination
The data on evaluation indicators of cement products were obtained through on-site investigations of cement production enterprises, and the data on indicators came from the production process data of the enterprises.

## Sampling procedure
DOCC is a large-scale cement production enterprise jointly invested and operated by Pacific Cement Company and China Huaneng Group. The company was established in 1989 with a total investment of $188 million and covers an area of 500,000 square meters. It currently has 376 employees. The company now has a modern dry process production line of 4000t/d scale (reinforced suspension preheater (RSP) kiln decomposition equipment), its own independent open-pit limestone mine (annual production capacity of 2 million tons of limestone) and in-plant railroad line and bulk cement special line output terminal, with an annual output of 1.9 million tons of cement. The company has passed ISO14001:2004 environmental management system certification.

## Data sources
- 李礼. (2012). 建筑材料绿色性的6E综合评价体系研究 [博士, 大连理工大学].
