# 农田镉污染土壤;植物修复;伴矿景天;修复植物的生长管理;植株干重

Dataset: ILCD process, Unit process, black box
Geography: CN
Reference year: 2021
Classification: Unit processes / Other Services / Repair and maintenance
Generated by: 桑春晖, sangch@mail.bnu.edu.cn
Owner: 天工LCI数据工作小组
Review: Dependent internal review by 天工LCI数据工作小组
Amounts: no units in this file; such an amount is in the reference unit of its flow, which a separate flow dataset defines
copyright: false
licenseType: Free of charge for all users and uses

## General comment
使用有机肥料、复合肥料促进景田生长，同时伴随景天对土壤中镉的吸收。

## Geography
文献中仅明确指出，污染农田位于中国南方，没有具体给出省市

## Time period
文献中没有明确数据收集的开始时间，以文献发表时间为有效期的开始时间

## Technology and included processes
向土壤中添加有机肥和复合肥，经过5年的种植，产出干物质11250 kg

## Technical purpose
该工业过程描述了使用伴矿景天（Sedum plumbizincicola）通过植物修复方法，对镉（Cd）污染的农田土壤进行修复。该方法旨在应用于土壤修复，以降低中国南方特定农田中镉的浓度。通过使用有机肥和复合肥料培养植物，促进其生长并促进土壤中镉的吸收。

## Reference product
- Plant dry weight: 11250
  该处实际填写的是植物的植株干重，即从移栽到污染土壤的幼苗，经过5年的种植后，收获后得到的植物

## Inputs
- Organic fertilizer: 22500
- Compound Fertilizer,Compound Fertilizer: 1200
- trifluralin: 11.03
- fluazifop-p-butyl: 8.22
- Haloxyfop-P-methyl: 6.774
- Phoxim: 360
- cypermethrin: 7.44

## Outputs
- arsenic: 0.12
- Cadmium: 0.02
- trifluralin: 2.206
- fluazifop-p-butyl: 1.8084
- Haloxyfop-P-methyl: 1.0161
- Phoxim: 54
- cypermethrin: 0.8928

## Data selection and combination
初级数据清单是根据ISO 14040关于LCA.35的规定获得的。基本数据来自特定场地的盆栽实验、中试和供应商处获取，这些数据代表了中国南方的情况。二级数据来自Ecoinvent数据库v2.3，从中选择了地理来源和技术因素最相似的过程。

## Use advice
使用此数据集的用户需考虑地理空间相关性和时间线，因为主要数据反映了南方特定条件，但没有精确位置。从Ecoinvent数据库获得的辅助数据必须基于最接近的地理和技术相似性进行选择。用户应确保这些LCA数据用于类似气候和土壤条件的上下文中，以进行准确建模。由于文献中未提及具体的数据收集开始时间，数据有效性从文献发表日期开始。

## Review details
清单： 内部审查通过几个迭代步骤完成，涉及原始数据验证、原始数据记录、代表性、完整性、与 ISO 14040 和 14044 有关的建模的一致性。

## Data sources
- Jin, Y. et al. Integrated Life Cycle Assessment for Sustainable Remediation of Contaminated Agricultural Soil in China. Environ. Sci. Technol. 55, 12032–12042 (2021).
