# 电解水制氢

Dataset: ILCD process, Unit process, single operation
Geography: CN
Reference year: 2022
Classification: Energy carriers and technologies / Electricity
Functional unit: 1000 N m3 hydrogen
LCI method principle: Attributional
Generated by: Bonnie Gan, jinlu.gan1998@gmail.com
Owner: 天工LCI数据工作小组
Review: Dependent internal review by 天工LCI数据工作小组
Amounts: no units in this file; such an amount is in the reference unit of its flow, which a separate flow dataset defines
copyright: false
licenseType: Free of charge for all users and uses

## General comment
水电解利用电解槽中的电力将水分解为氢气和氧气。

## Time period
文章的发表日期

## Technical purpose
通过水电解生产的氢气适用于需要高纯度的应用，例如燃料电池使用、半导体制造或作为合成燃料生产的原料。

## Reference product
- Hydrogen: 1000; article inperiodical

## Inputs
- Water (desalinated; deionized): 820; article inperiodical
- electricity mix: 18000; article inperiodical

## Use advice
使用此LCA数据集时，请考虑用于电解过程的电力混合，因为它对环境足迹有重大影响。确保模拟与输入电力生产相关的任何上游影响。此外，评估产品生命周期的最后阶段，特别注意任何产生的副产品的潜在回收问题。

## Review details
清单： 内部审查通过几个迭代步骤完成，涉及原始数据验证、原始数据记录、代表性、完整性、与 ISO 14040 和 14044 有关的建模的一致性。

## Data sources
- Chen, Y., Lan, L., Hao, Z. & Fu, P. Cradle-grave energy consumption, greenhouse gas and acidification emissions in current and future fuel cell vehicles: Study based on five hydrogen production methods in China. Energy Reports 8, 7931–7944 (2022).
