# 碳酸锂生产 ; 电池级碳酸锂 ; 直接锂提取 ; 美国内华达州克莱顿谷卤水

Dataset: ILCD process, Unit process, single operation
Geography: US
Reference year: 2020
Classification: Unit processes / Materials production / Inorganic chemicals
Generated by: 孙鑫, xs389@cornell.edu
Owner: 天工LCI数据工作小组
Review: Dependent internal review by 天工LCI数据工作小组
Amounts: no units in this file; such an amount is in the reference unit of its flow, which a separate flow dataset defines
licenseType: Free of charge for all users and uses

## General comment
研究的目标是了解和分析在内华达州克莱顿谷利用卤水生产锂对环境造成的影响，这种生产碳酸锂的新方法无需使用大型蒸发池。直接锂提取技术致力于解决传统蒸发法在环境和技术经济方面的局限性。其目标是消除对露天蒸发池的需求。已经提出了许多替代技术，如离子交换树脂、热辅助工艺和电化学方法。

## Technology and included processes
原盐水直接取自地下，送至工厂，预处理阶段是第一步。在这一阶段，原盐水会被加热，其 pH 值也会被固定，以优化萃取效果。经过预处理的盐水随后进入 DLE 流程，产生的锂流浓度约为原来的十倍。在工艺的下一阶段，需要更多试剂来改变工艺条件和去除杂质。氢氧化钠、盐酸、聚合物和其他试剂对于沉淀和去除盐水中的污泥（如去除氯化物）至关重要（Rahmani 等人，2019 年）。在锂浓缩段，盐水的浓度增加了约 15 倍。此过程中多余的水将被导入淡水生成装置。该过程需要使用防垢剂、氢氧化钠和其他试剂来调节盐水的 pH 值和氯化物含量。此外，该工艺还需要消耗电力，通过压力浓缩盐水。该工厂生产碳酸锂的最后阶段是通过碳酸钠将溶解的锂转化为固体碳酸锂。产生淡水的最后阶段，主要是从盐水中回收水，通过添加各种添加剂来平衡 pH 值和去除杂质，以用作工厂的淡水。

## Technical purpose
通过美国内华达州克林顿谷直接锂提取技术生产的电池级碳酸锂主要用于锂离子电池，这类电池广泛应用于便携式电子设备、电动汽车和电网储能解决方案中。

## Reference product
- Lithium carbonate,Lithium carbonate: 1; measured

## Inputs
All rows: measured
- Brine (0.016% Li): 1.55e6
- sodium carbonate: 1530
- Electricity: 212760
- sodium hydroxide: 196
- O-ethyl potassium carbonodithioate: 65
- hydrogen chloride: 310
- Calcium Oxide: 140
- sodium sulfate: 18
- Polyacrylamide,Polyacrylamide: 22.7
- bromine: 1.24

## Use advice
在使用本数据集进行生命周期评估时，请注意，原材料的生产过程以及少于1%的能源流量不包括在系统边界范围内。在评估的完整性以及与系统边界不同的其他数据集比较时，应注意这一点。用户还应考虑数据的地理特定性，因为它涉及来自芬兰的锂辉石源。

## Review details
清单： 内部审查通过几个迭代步骤完成，涉及原始数据验证、原始数据记录、代表性、完整性、与 ISO 14040 和 14044 有关的建模的一致性。

## Data sources
- Mousavinezhad, S., Nili, S., Fahimi, A. & Vahidi, E. Environmental impact assessment of direct lithium extraction from brine resources: Global warming potential, land use, water consumption, and charting sustainable scenarios. Resources, Conservation and Recycling 205, 107583 (2024).
