# 熟料生产|熟料|钢渣 3.5%

Dataset: ILCD process, LCI结果
Geography: CN
Reference year: 2022
Classification: Materials production / Other mineralic materials
LCI method principle: Other
Generated by: 杨思琪
Amounts: no units in this file; such an amount is in the reference unit of its flow, which a separate flow dataset defines
copyright: false

## General comment
钢渣作铁质校正材料用于水泥生产钢渣不含碳酸盐，用于制备水泥熟料时不但可以替代铁矿石，还可以提供钙质、硅质和铝质，具有较好的碳减排效果。
水泥的主要原材料为钙质材料、硅质材料、铝质材料和铁质材料，各原材料通过高温固相反应形成水泥款料矿物相。从钢渣的化学组分、矿物特性和显微结构可以看出，钢渣也含有RO、FeO和Fe2O3等铁相，从而具备取代铁质校正材料的条件。加之钢渣中还含有CaO（含量大部分在40%~50%之间）等水泥烧成原材料所需要的钙、硅、铝等，可节省部分钙质、硅质和铝质原材料，鉴于此钢渣作铁质校正材料技术路线。一般水泥用铁质校正材料的矿物组分为赤铁矿Fe2O3，而钢渣中的铁相主要以RO、FeO、Fe2O3、Fe、CF等形式存在。钢渣作原材料时，不论铁以何种形式存在，其高温固相反应中铁相均能提供铁组分形成水泥熟料所需的C4AF矿相。
结合生产实际，以武钢钢渣运输至长江沿线的某水泥有限公司用于烧制水泥熟料为例，钢渣熟料目标值为：KH=0.91士0.02，SM=2.5士0.1，IM=1.5士0.1。

## Geography
长江沿线的某水泥有限公司

## Model description
功能单位为1t P·I型硅酸盐水泥。水泥的全生命周期碳排放边界设定为从“摇篮”到“大门”，即从能源上游的开采、生产及运输阶段算起，到成品水泥运输至使用企业为止。

## Reference product
- clinker: 1000
  熟料

## Inputs
- limestone, crushed, for mill: 1352; measured
  石灰石
- sandstone: 48; measured
  砂岩
- steel slag: 39; measured
  钢渣。钢渣无需再开采加工，故认定其开采、加工过程中不排放CO2。

## Outputs
- carbon dioxide: 511.591; calculated
  CO2。不包括熟料煅烧时的碳排放。

## Cut-off and completeness
只关注水泥熟料生产的碳足迹。数据不完整，碳排放量未包含“熟料煅烧过程的碳排放”。

## Data treatment and extrapolations
碳排放值：各单元过程碳足迹数据累加。

## Data sources
- 甘万贵 & 赵青林. (2022). 钢渣烧制硅酸盐水泥熟料的减碳效果分析. 建材世界, 43(6), 121–125.
