# Rare Earth crushing|Rare Earth|In-situ leaching|neodymium iron boron (NdFeB) magnet

Dataset: ILCD process, Unit process, single operation
Geography: NMG-CN
Reference year: 2014
Classification: Materials production / Other mineralic materials
Functional unit: The functional unit is a 1 kg NdFeB magnet
LCI method principle: Attributional
LCI method approaches: Allocation - market value; Allocation - mass
Generated by: Tao Wang, twang@iue.ac.cn
Review: Dependent internal review by Tiangong LCI Data Working Group
Amounts: no units in this file; such an amount is in the reference unit of its flow, which a separate flow dataset defines
copyright: false

## Geography
Bayan Obo (China)

## Technology and included processes
The basic process for Nd and Pr production is the same at all three deposits. It is identical for Nd and Pr except for the last solvent extraction step (SX5) where both are separated.

## Reference product
- Steel: 0.012; input; article inperiodical
  Steel. Bayan Obo: 0.035 kg/t ore, data estimated by experts from RWTH Aachen University

## Inputs
- Electricity: 2.088; article inperiodical
  Bayan Obo: Value per crushing step; data estimated by experts from RWTH Aachen University, 1.0 kWh/t ore (carbonatite)
- transport in t*km,transport in t*km: 0.00023; measured
  Bayan Obo: 20 km, lorry

## Outputs
- Dust (unspecified, from stack): 1.035; article inperiodical
  Bayan Obo: MW calculation is based on Western Regional Air Partnership
- Radioactive dust, waste: 1.496; article inperiodical
  Radioactive dust. Bayan Obo: based on Th232 and U238 activity in the ore

## Deviations from the LCI method approaches
In this study, an allocation method based on the market prices of REOs28 is considered. To estimate uncertainties that refer to the allocation method, a mass-based allocation is undertaken as a sensitivity analysis

## Review details
Inventory: The internal review was done by several iteration steps concerning raw data validation, raw data documentation, representativity, completeness and consistency of modelling with regard to ISO 14040 and 14044.; Documentation: The review of the documentation was performed by Ecobilan and is in compliance with ISO 14040 and 14044. The data set documentation is correct in view of the appropriateness of the information provided. It includes all relevant information in view of data quality and scope of application of the respective LCI result.

## Data sources
- Marx, J., Schreiber, A., Zapp, P. & Walachowicz, F. Comparative Life Cycle Assessment of NdFeB Permanent Magnet Production from Different Rare Earth Deposits. ACS Sustainable Chem. Eng. 6, 5858–5867 (2018).
