# 葡萄生产

Dataset: ILCD process, Unit process, black box
Geography: IR
Reference year: 2018
Valid until: 2019
Classification: Unit processes / Materials production / Agricultural production means
Functional unit: 1 hectare vineyard
Generated by: 朱娴, zzhu0918@163.com
Owner: 天工LCI数据工作小组
Review: Dependent internal review by 天工LCI数据工作小组
Amounts: no units in this file; such an amount is in the reference unit of its flow, which a separate flow dataset defines
copyright: false
licenseType: Free of charge for all users and uses

## General comment
播种葡萄种子，在生长阶段进行化肥、农药以及人工肥料的施用，同时进行灌溉，待葡萄开花后的收获阶段获得葡萄果实。

## Geography
本研究以阿拉克县葡萄生产为研究对象。阿拉克县位于北纬34°5′30″，东经49 °41′30″。

## Technical purpose
所描述的葡萄生产旨在种植葡萄藤以采收水果。所种植的葡萄可用于新鲜消费，也可用于生产葡萄干、葡萄酒、葡萄汁、果酱及其他葡萄衍生产品。该过程适用于涉及葡萄园管理和葡萄种植的农业部门。

## Reference product
- Grape: 17942; measured

## Inputs
All rows: measured
- diesel oil: 0.02364
- Labor: 84.9583
- Farmyard manure: 28379
- Nitrogenous fertilizer: 108.27
- Phosphate fertilizer: 109.31
- Potassium fertilizer: 155.77
- sulfur: 107.5
- Pesticide: 4.143
- Irrigation water: 6005.6

## Use advice
在使用本数据集进行生命周期评估时，重要的是要考虑阿拉克县的特定条件，如当地气候、土壤类型和农业实践。数据代表了一公顷葡萄园规模的葡萄生产投入和产出。如果将数据扩展到更大的地区或不同的地区，需要进行调整以反映当地的农艺条件和实践。此外，应当考虑评估中葡萄分摊的功能单位——例如考虑是按每公斤葡萄还是按每公顷来考虑。用户应确保适当地考虑了葡萄末端处理场景（如葡萄废物处理或副产品）的情况。

## Review details
清单： 内部审查通过几个迭代步骤完成，涉及原始数据验证、原始数据记录、代表性、完整性、与 ISO 14040 和 14044 有关的建模的一致性。
