# Electricity production ; Electricity ; Thermal power (67.8%) + hydropower (7.8%) + nuclear power (21.8%) + wind power (1.5%) + solar power (1.0%)

Dataset: ILCD process, Partly terminated system
Geography: GD-CN
Reference year: 2019
Classification: Energy carriers and technologies / Electricity
LCI method principle: Other
Generated by: Ruoxi Xiong, xiongrx0126@163.com
Owner: Tiangong LCI Data Working Group
Review: Dependent internal review by Tiangong LCI Data Working Group
Amounts: no units in this file; such an amount is in the reference unit of its flow, which a separate flow dataset defines
copyright: false
licenseType: Free of charge for all users and uses

## General comment
Forms of electricity generation include thermal power generation, hydropower generation, nuclear power generation, wind power generation and solar power generation.

## Time period
Calculated based on data from the 2019 Energy Statistics Yearbook

## Technical purpose
This dataset describes the mixed electricity production processes in China, encompassing thermal (67.8%), hydropower (7.8%), nuclear (21.8%), wind (1.5%), and solar (1.0%) power generation. It can be used to represent the environmental performance of the Chinese electricity grid mix in life cycle assessments, carbon footprint calculations, and other energy-related environmental impact studies. The electricity generated can be applied to both residential and industrial activities, as well as commercial and public services requiring electricity from the grid.

## Reference product
- Electricity: 3.6; calculated

## Outputs
- carbon dioxide: 0.482; calculated
- sulfur dioxide: 7.9e-5; calculated
- Nitrogen oxides: 0.000126196; calculated
- Dust (unspecified, from stack): 1.62e-5; calculated

## Data treatment and extrapolations
For the accounting method, please refer to the "Enterprise Greenhouse Gas Emissions Accounting Methods and Reporting Guidelines for Power Generation Facilities". Different forms of power generation and fuel consumption come from Chapter 3 (Energy Production) and Chapter 6 (Regional Energy Balance Sheet) in the "China Energy Statistical Yearbook 2020". The fuel parameters such as low calorific value and carbon content per unit calorific value used to calculate the carbon dioxide emission factor come from the "2019 China Regional Power Grid Carbon Dioxide Baseline Emission Factor Calculation Instructions OM" and the "Enterprise Greenhouse Gas Emission Accounting Method and Reporting Guide for Power Generation Facilities" 》

## Use advice
When utilizing this dataset, ensure that the scope of the LCA or carbon footprint study aligns with the geographical boundary represented by the data (China's electricity grid mix). The emission factors should be contextually applied, considering the proportional contribution of each electricity source. Users should also consider that the CO2 baseline emission factors are calculated using methodologies in line with the 'Enterprise Greenhouse Gas Emissions Accounting Methods and Reporting Guidelines for Power Generation Facilities' and data from the 'China Energy Statistical Yearbook 2020'. For electricity sourcing from China, these values are pivotal for energy consumption and greenhouse gas emissions modeling. Updates to the emission factors should be monitored over time to maintain accuracy.

## Review details
Inventory: The internal review was done by several iteration steps concerning raw data validation, raw data documentation, representativity, completeness and consistency of modelling with regard to ISO 14040 and 14044.

## Data sources
- 熊若熙. 中国电力生产和消费二氧化碳与污染物排放因子核算. (清华大学, 2023).
