# Coalganguebricks|Coalgangue,sludge,etc.|Brick and tile industry roasting kiln (hard plastic molding, etc.)|All sizes / /|煤矸石砖|煤矸石、污泥等|砖瓦工业焙烧窑炉（硬塑成型等）|所有规模

Dataset: ILCD process, Partly terminated system
Geography: CN
Reference year: 2019
Classification: Materials production / Other mineralic materials
Generated by: The data was created by the Office of the Second National Pollution Source Census of the Ministry of Ecology and Environment, and the data was organized by the TianGong Plan team for ILCD format / 生态环境部第二次全国污染源普查工作办公室创建数据，天工计划团队常慧敏整理数据为ILCD格式
Amounts: no units in this file; such an amount is in the reference unit of its flow, which a separate flow dataset defines
copyright: false

## Technology and included processes
the Technical of end-of-pipe management technology for pollution Coal Gangueis/
污染物指标工业废气量（窑炉）的末端治理技术是/

## Reference product
- Coal Gangue: 10000, 10000 (2 entries); calculated
  原文件中描述污染物类别为Product，污染物指标为煤矸石砖，此处对其进行了匹配工作，将其匹配到LCAflow库里面相最符合的流，污染物指标备注为工业废气量（窑炉）

## Outputs
- Exhaust gas: nan; calculated
  原文件中描述污染物类别为废气，污染物指标为工业废气量（窑炉），此处对其进行了匹配工作，将其匹配到LCAflow库里面相最符合的流，污染物指标备注为工业废气量（窑炉）
- particles (PM2.5 - PM10): 0.52, 0.975, 0.13, 2.6, 6.5 (5 entries); calculated
  原文件中描述污染物类别为废气，污染物指标为颗粒物（窑炉），此处对其进行了匹配工作，将其匹配到LCAflow库里面相最符合的流，污染物指标备注为颗粒物（窑炉）
- sulfur dioxide: 24.35, 48.7, 73.05, 487 (4 entries); calculated
  原文件中描述污染物类别为废气，污染物指标为二氧化硫（窑炉），此处对其进行了匹配工作，将其匹配到LCAflow库里面相最符合的流，污染物指标备注为二氧化硫（窑炉）
- Nitrogen oxides: 28.15, 22.52, 56.3 (3 entries); calculated
  原文件中描述污染物类别为废气，污染物指标为氮氧化物（窑炉），此处对其进行了匹配工作，将其匹配到LCAflow库里面相最符合的流，污染物指标备注为氮氧化物（窑炉）

## Data sources
- 第二次全国污染源普查产排污核算系数手册（试用版）,二级代码30,四级代码3031文件，在完整版文件中第3368页
