# 变电站的建设和运营|半地下变电站|一层楼面下钢筋混凝土框架结构，一层楼面上钢框架结构

Dataset: ILCD process
Geography: SJZ-HEB-CN
Reference year: 2023
Valid until: 2073
Classification: Materials production / Other mineralic materials
LCI method principle: Attributional
Generated by: Wang, Yuxuan , wyx135230@163.com
Review: Dependent internal review by Tiangong LCI Data Working Group
Amounts: no units in this file; such an amount is in the reference unit of its flow, which a separate flow dataset defines
copyright: false

## General comment
该文献通过建立半地下变电站全生命周期碳排放模型得出该半地下变电站建筑包括物化阶段，运行阶段，建造拆除阶段的全生命周期各个阶段的碳足迹。其中物化阶段包括建材的生产和运输阶段。

## Geography
该作者在文章中说明该变电站位于寒冷地区而未给出具体地理位置，以作者所在电网公司的地理位置作为该变电站的地理位置

## Time period
该文献未明确说明数据集的起始时间，故以文献发表时间作为数据集的起始时间，该变电站建筑寿命为50年，故以50年为有效时间段

## Technology and included processes
建设阶段：该半地下变电站位于寒冷地区，建筑为地下１层，地上２层，局部 ３层。一层楼面及以下采用钢筋混凝土框架结构，一层楼面以上采用钢框架结构。 建筑高度 17.9m。 总建筑面积 8402.6m2，地上总建筑面积 4982.6m2。运行阶段：在变电站内主变室、配电室、电抗器室、电容器室、电缆层等房间的设备产生大量的余热，需要风机进行排风散热，从而保证室内温度维持在40°C 以下。

## Inputs
All rows: measured
- Concrete: 1.42896e7
- steel rebar: 526950
- Cement: 447410
- Mortar: 1.33228e6
  原流名称为预拌砂浆，选择流数据表中已有的砂浆为流名称
- sand: 1.44762e6
- lightweight concrete block: 894820
  原流名称为砌块，未给出详细种类，以流数据表中已有的轻质混凝土砌块代替
- brick: 1.38398e6
- Ceramics: 78450
- Paint: 49710
- Welding Steel Pipe: 2780
  原数据流名称为管材，未明确说明，以流数据表中的焊接钢管的输入流代替

## Outputs
- carbon dioxide: 6.19472e6; calculated
  变电站物化阶段（包括建材生产和运输阶段）的碳足迹
- carbon dioxide: 3.27243e7; calculated
  变电站运行阶段碳足迹，以50年寿命记，变电站建筑运行阶段的碳排放来源主要来自于电能，主要涉及建筑供冷、供暖、 照明、风机设备
- carbon dioxide: 83858; calculated
  变电站建造和拆除阶段碳足迹

## Deviations from the LCI method approaches
文章中未明确说明所使用的LCI原理和方法，经过专业研判，我认为其用了attributional的原理

## Data selection and combination
基于工程量清单，结合建筑施工图纸确定主要建材消耗量。碳排放因子的确定：基于文献得出主要建材碳排放因子及其运输碳排放因子，运行阶段电网排放因子选择《关于做好2023-2025年发电行业企业温室气体排放报告管理有关工作的通知》等。

## Review details
Inventory: The internal review was done by several iteration steps concerning raw data validation, raw data documentation, representativity, completeness and consistency of modelling with regard to ISO 14040 and 14044.
