# 硅铝合金生产 ; 硅铝合金 ; 旧铝废料

Dataset: ILCD process, Unit process, single operation
Geography: CN
Reference year: 2012
Classification: Materials production / Metals and semimetals
Generated by: 傅晨玲, fu-chenling@tsinghua.edu.cn
Owner: 天工LCI数据工作小组
Review: Dependent internal review by 天工LCI数据工作小组
Amounts: no units in this file; such an amount is in the reference unit of its flow, which a separate flow dataset defines
copyright: false
licenseType: Free of charge for all users and uses

## General comment
该工艺生产的硅铝合金通常用于汽车和航空航天工业，因为它具有轻量化和高热导率等增强的材料特性。这种合金也可能在建筑行业找到应用，用于在强度与重量比是关键因素的结构组件中。

## Time period
文献发表于2012年3月

## Reference product
- Silicon-Aluminum Alloy (Si, 12%): 1000; missing unimportant
  silicon-aluminum alloy (Si, 12%)

## Inputs
All rows: missing unimportant
- electricity, high voltage, aluminium industry: 7416
  Electricity
- steam, in chemical industry: 0.02
  Steam
- fluoride salt: 0.94
  Fluoride salt
- diesel: 0.06
  Diesel
- hard coal: 0.22
  Coal
- Copper, in ground: 8
  Copper
- inorganic chemicals: 4.1
  Inorganic chemicals
- anthracene oil: 0.14
  Anthracene oil
- natural gas, high pressure: 87.73
  Natural gas
- Nitrogen: 2.5
  Nitrogen gas
- coal gas: 21.75
  Coal gas
- Old Aluminum: 1080
  Old aluminum
- bauxite: 160
  Bauxite
- lime: 10
  Lime
- Sodium Hydroxide (100%): 20
  NaOH (100%)
- fresh water: 920
  Fresh water
- petroleum coke: 110
  Petroleum coke
- bitumen: 10
  Bitumen
- anthracite: 4.8
  Anthracite
- silicon dioxide: 300
  Silica
- charcoal: 120
  Charcoal

## Outputs
All rows: missing unimportant
- Dust: 0.51
- sulfur dioxide: 0.21
  SO2
- Methane, tetrafluoro-, R-14: 0.0097
  Tetrafluoro methane
- hexafluoroethane: 0.001
  Hexa-fluoro ethane
- hydrogen fluoride: 0.02
  HF
- chemical oxygen demand: 0.01747
  COD
- ammonia nitrogen: 0.00184
  NH3eN
- petroleum pollutions: 0.00205
  Petroleum pollutions
- Phenol: 1e-5
- Polycyclic Aromatic Hydrocarbon (PAH): 3e-5
  B(a)P

## Use advice
使用此数据集的用户应考虑到硅铝合金生产过程是基于旧铝废料回收，且参考文献发表于2012年3月。这可能会根据发表后的技术进步和回收实践的变化影响环境影响评估。在生命周期评估中应用之前，建议用当前的制造工艺和回收率来验证数据的相关性。

## Review details
清单： 内部审查通过几个迭代步骤完成，涉及原始数据验证、原始数据记录、代表性、完整性、与 ISO 14040 和 14044 有关的建模的一致性。

## Data sources
- Hong, J., Hong, J., Zhou, J. & Xu, X. Environmental and economic life cycle assessment of aluminum-silicon alloys production: A case study in China. J. Clean. Prod. 24, 11–19 (2012).
