# 铝再生 ; 再生铝锭 ; 废铝 ; 2015年

Dataset: ILCD process, Unit process, single operation
Geography: CN
Reference year: 2021
Classification: Unit processes / Materials production / Metals and semimetals
Generated by: 蔡梓萌, caizm6178@163.com
Owner: 天工LCI数据工作小组
Review: Dependent internal review by 天工LCI数据工作小组
Amounts: no units in this file; such an amount is in the reference unit of its flow, which a separate flow dataset defines
copyright: false
licenseType: Free of charge for all users and uses

## General comment
该工艺生产的再生铝锭主要用于冶金和制造业。这些铝锭作为原材料用于需要铝的轻质性和抗腐蚀性的产品，例如在车辆建造、包装材料以及生产基于铝的组件中。

## Time period
文献发表日期

## Reference product
- secondary aluminium ingot: 1000; missing unimportant
  ingot

## Inputs
- electricity, high voltage, aluminium industry: 1148.4; missing unimportant
  electricity
- aluminium scrap, unspecified: 1180; missing unimportant
  aluminum scrap

## Data selection and combination
本研究的数据参考了PA、SA、电力等背景数据的LCA数据。PA数据来自统计数据源，SA数据主要来自文献。背景数据主要来自中国科学院生态环境研究中心CASRCEES 2018建立的中国本地化LCA数据库，涵盖能源、材料、交通、废物管理等LCA数据。

## Use advice
使用这个LCA数据时，请确保对再生内容的影响进行准确分配，并考虑铝产品的生命周期末期阶段。在适用的情况下排除初级铝的影响。注意区域背景，因为数据集特定于中国生产和中国科学院生态环境研究中心2018年概述的回收条件。如果有更近期的数据，就更新数据集，特别是在用它进行比较研究或政策制定决策时，以反映当前的技术进步和环境法规。

## Review details
清单： 内部审查通过几个迭代步骤完成，涉及原始数据验证、原始数据记录、代表性、完整性、与 ISO 14040 和 14044 有关的建模的一致性。

## Data sources
- Ding, N., Liu, N., Lu, B. & Yang, J. Life cycle greenhouse gas emissions of aluminum based on regional industrial transfer in China. J. Ind. Ecol. 25, 1657–1672 (2021).
