# 碳酸锂生产 ; 电池级碳酸锂 ; 沉淀法 ; 阿根廷考查里盐湖高浓卤水

Dataset: ILCD process, Unit process, single operation
Geography: AR
Reference year: 2012
Classification: Unit processes / Materials production / Inorganic chemicals
Generated by: 孙鑫, xs389@cornell.edu
Owner: 天工LCI数据工作小组
Review: Dependent internal review by 天工LCI数据工作小组
Amounts: no units in this file; such an amount is in the reference unit of its flow, which a separate flow dataset defines
licenseType: Free of charge for all users and uses

## General comment
本研究审查的未来供应路线是基于从几家锂矿开采和加工公司（Lithium Americas Corp.、Minera Salar Blanco、Nemaska Lithium Inc.和Keliber Oy）的技术报告和环境影响评估报告中收集的数据，这些公司的锂资产正处于不同的开发阶段。这些锂资产正处于不同的开发阶段。预计在 5-10 年内投入运营。这些以卤水为基础的来源的锂浓度较低，也反映了当前供应路线中卤水的未来锂品位。

## Technology and included processes
基于卤水的未来锂OH⋅H2O 生产供应路线与当前供应路线类似，代表了阿根廷考查里盐湖和智利马里孔加盐湖的运营情况。这两个地方位于 "锂三角"，锂储量可观。考查里盐湖和马里昆加盐湖的平均锂浓度分别为 0.05% 和 0.09%。这影响了能源和化学品的使用，并在一定程度上影响了这些设施的技术工艺设计。Salar de Cauchari 盐湖卤水提取作业的工艺信息来自为美洲锂业公司（Lithium Americas Corporation）编写的几份技术报告（Burga 等人，2020 年；Worley Parsons，2011 年）。同样，马里孔加盐湖的开采工艺信息也来自为 Minera Salar Blanco 公司编写的技术报告（Atacama Water Consultants, 2022）。在计算这些未来供应数据集对盐水路线的影响以进行比较时，使用了特定审查来源的数据，直至生产出 Li2CO3。在该步骤之后，再次使用 Ecoinvent v3.8′ 将 Li2CO3 转化为 LiOH⋅H2O 的单元过程来模拟最后的生产步骤，从而填补完整生产过程中的数据空白，以便与本研究中模拟的其他数据集进行比较。

## Technical purpose
使用阿根廷考查里盐湖高浓卤水通过沉淀法生产的电池级碳酸锂，用于制造锂离子电池。这种高纯度的碳酸锂是生产可充电锂电池阴极的关键材料，广泛应用于智能手机、笔记本电脑和电动汽车等一系列电子产品。

## Reference product
- Lithium carbonate,Lithium carbonate: 1000; measured

## Inputs
All rows: measured
- Concentrated brine (4.3%): 5150
- Electricity: 8856
- sodium carbonate: 1860
- Calcium Oxide: 7.1
- sodium hydroxide: 20
- Sulfuric acid: 23
- hydrogen chloride: 45

## Use advice
使用此数据集时，需注意原材料的生产流程和贡献比小于1%的能源流未被包括在内。因此，如果进行全面的生命周期评估，用户应加入额外数据或使用代理数据来计算这些输入。用户还必须意识到这些数据是特定于考查里盐湖背景下的沉淀法，并且可能不适用于通过其他过程或不同来源生产的碳酸锂。

## Review details
清单： 内部审查通过几个迭代步骤完成，涉及原始数据验证、原始数据记录、代表性、完整性、与 ISO 14040 和 14044 有关的建模的一致性。

## Data sources
- Chordia, M., Wickerts, S., Nordelöf, A. & Arvidsson, R. Life cycle environmental impacts of current and future battery-grade lithium supply from brine and spodumene. Resources, Conservation and Recycling 187, 106634 (2022).
