# 棉纱生产|棉纱线|纤维获得

Dataset: ILCD process, Unit process, black box
Geography: XJ-CN
Reference year: 2013
Classification: Materials production / Other mineralic materials
Generated by: Yingfan Duan, 1300925579@qq.com
Review: Dependent internal review by Tiangong LCI Data Working Group
Amounts: no units in this file; such an amount is in the reference unit of its flow, which a separate flow dataset defines
copyright: false

## General comment
包括原棉的种植与收获和轧棉。

## Reference product
- Cotton: 1; measured
  棉纱线

## Inputs
All rows: measured
- Electricity: 12.1
- natural gas: 0.35
- crude oil; 42.3 MJ/kg: 0.53
- Hard coal, at consumer EU-27: 0.52
- LPG - liquefied petroleum gas: 0.03
- electricity from hydroelectric power plant: 1
- Fertilizer: 0.457
- Pesticide: 0.016
- Water (fresh water): 22200

## Outputs
All rows: measured
- carbon dioxide: 4.265
- methane: 0.0076
- sulfur dioxide: 0.004
- Nitrogen oxides: 0.0227
- carbon monoxide: 0.0161

## Review details
Inventory: The internal review was done by several iteration steps concerning raw data validation, raw data documentation, representativity, completeness and consistency of modelling with regard to ISO 14040 and 14044.; Documentation: The review of the documentation was performed by Ecobilan and is in compliance with ISO 14040 and 14044. The data set documentation is correct in view of the appropriateness of the information provided. It includes all relevant information in view of data quality and scope of application of the respective LCI result.

## Data sources
- 章媛媛 & 左强. 生命周期评价在纺织企业清洁生产审核中的应用. 新疆环境保护 36, 36–41 (2014).
