# 钢铁废渣 ; 混凝土免烧砖 ; 钢铁废渣的熔融还原技术

Dataset: ILCD process, Unit process, single operation
Geography: TS-HEB-CN
Classification: Unit processes / Materials production / Other mineralic materials
Generated by: 刘逸飞
Owner: 天工LCI数据工作小组
Review: Dependent internal review by 天工LCI数据工作小组
Amounts: no units in this file; such an amount is in the reference unit of its flow, which a separate flow dataset defines
licenseType: Free of charge for all users and uses

## General comment
铁和钢的废渣被用作生产混凝土未烧结砖的原料，采用熔融还原技术。该工艺用于建筑行业，特别是在包含铁和钢工业回收废物的环保建筑材料的制造中。

## Reference product
- reduction-melting iron: 1000

## Inputs
- Electricity: 112.32; measured
- Diesel oil: 0.66; measured
- small grain steel slag: 984.55
- gas ash: 403.92
- OG mud: 252.45
- dust removal ash: 504.9
- sulfuric acid slag: 631.12
- type slags powder: 474.6
- gas: 179.94
- Electricity: 450.144, 112.32 (2 entries)
- diesel fuel: 0.66
- Cooling water: 5900.42
- Coke: 807.69
- type slags: 2524.23
- coal powder: 180
- Diesel oil: 0.66, 0.66 (2 entries)
- water slag: 1000
- tailings steel slag: 1000
- Plaster: 125
- Cement: 275
- water: 100

## Outputs
- small grain steel slag: 984.55; measured
- agglomerates: 2524.23; measured
- water slag: 1000
- concrete unburned brick: 0.004
- sulfur dioxide: 1.75915
- carbon dioxide: 552.05
- nitric oxides: 1.79536
- Ammonia nitrogen: 0.05125
- chemical oxygen demand: 0.48602

## Use advice
当使用此数据集时，用户应确保系统边界包括与铁和钢废渣产生相关的上游过程。应包括对熔融还原技术相关环境影响的仔细评估，包括能源消耗和排放。用户还应考虑与将废渣运到生产设施以及混凝土未烧结砖的分配相关的任何运输影响。

## Review details
清单： 内部审查通过几个迭代步骤完成，涉及原始数据验证、原始数据记录、代表性、完整性、与 ISO 14040 和 14044 有关的建模的一致性。

## Data sources
- Li, Y., Lv, M., Li, R. & Liu, Z. Life cycle assessment of melting reduction treatment for iron and steel waste slag: A case study in Tangshan, China. Resources, Conservation & Recycling Advances 15, 200108 (2022).
