# 土壤修复;异位修复;土壤淋洗;土柱淋洗;受污染的土柱

Dataset: ILCD process, Unit process, single operation
Geography: CN
Reference year: 2023
Classification: Unit processes / Other Services / Repair and maintenance
Generated by: 王宁, wang_ning@caep.org.cn
Owner: 天工LCI数据工作小组
Review: Dependent internal review by 天工LCI数据工作小组
Amounts: no units in this file; such an amount is in the reference unit of its flow, which a separate flow dataset defines
copyright: false
licenseType: Free of charge for all users and uses

## General comment
使用石英砂、塑料、无水硫酸钠、丙酮、正已烷、二氯甲烷、乙腈等制作受污染的土柱

## Technology and included processes
使用石英砂、塑料、无水硫酸钠、丙酮、正已烷、二氯甲烷、乙腈等制做受污染的土柱

## Technical purpose
此数据集代表异位土壤修复过程，专为土柱淋洗设计。过程包括使用石英砂、塑料材料以及各种溶剂，如无水硫酸钠、丙酮、正己烷、二氯甲烷和乙腈，用于创建模拟受污染的土柱。该过程作为研究工具或在环境工程应用中使用，以研究土壤修复技术的效果和效率。

## Reference product
- Contaminated soil columns: 0.0008

## Inputs
- sand: 0.1
- Plastic (unspecified): 0.0004
- sodium sulfate: 0.002
- acetone: 6e-5
- hexane: 9.2e-5
- dichloromethane: 9e-6
- acetonitrile: 1e-6
- Tap Water: 0.01

## Outputs
- Wastewater: 0.01508

## Use advice
使用此数据集的用户在应用数据时应考虑异位修复上下文。数据集特别适用于模拟条件，可能无法完全代表原位修复场景。用户应计算土柱中使用的化学品和塑料的生命周期，并考虑修复设备和材料的终生处理。确保输入和输出数据准确反映过程中主要原材料消耗和能源使用情况。建议同时对材料的任何运输以及土柱使用阶段行为进行建模，包括潜在的污染物淋洗。

## Review details
清单： 内部审查通过几个迭代步骤完成，涉及原始数据验证、原始数据记录、代表性、完整性、与 ISO 14040 和 14044 有关的建模的一致性。

## Data sources
- 张雅鑫 et al. 基于生命周期评价的焦化污染土壤 淋洗技术环境影响研究. 安全、健康和环境 23, (2023).
