# Refinedtiningot|Tinoreconcentrate|Two-stage melting|All sizes / 精锡锭|锡精矿|两段熔炼|所有规模

Dataset: ILCD process, Unit process, single operation
Geography: CN
Reference year: 2019
Classification: Materials production / Metals and semimetals
Generated by: The data was created by the Office of the Second National Pollution Source Census of the Ministry of Ecology and Environment, and the data was organized by the TianGong Plan team for ILCD format / 生态环境部第二次全国污染源普查工作办公室创建数据，天工计划团队常慧敏整理数据为ILCD格式
Owner: Tiangong LCI Data Working Group / 天工LCI数据工作小组
Review: Dependent internal review by Tiangong LCI Data Working Group / 天工LCI数据工作小组
Amounts: no units in this file; such an amount is in the reference unit of its flow, which a separate flow dataset defines
copyright: false
licenseType: Free of charge for all users and uses

## General comment
the Technical of end-of-pipe management technology for pollution Nitrogen oxidesis/

## Reference product
- Tin coated copper strips: 1000; calculated
  源文件中描述为为精锡锭，此处对其进行了匹配工作，将其匹配到LCAflow库里面相最符合的流，污染物指标备注为工业废水量

## Outputs
All rows: calculated
- Waste water: 7340
  污染物指标工业废水量的末端治理技术是/，末端治理设施实际运行率（k值）计算公式为k=废水治理设施年运行时间（小时）/企业年正常生产时间（小时）。原文件中描述污染物类别为废水，污染物指标为工业废水量，此处对其进行了匹配工作，将其匹配到LCAflow库里面相最符合的流，污染物指标备注为工业废水量
- chemical oxygen demand: 0.163326
  污染物指标化学需氧量的末端治理技术是化学混凝法，其效率为70，末端治理设施实际运行率（k值）计算公式为k=废水治理设施年运行时间（小时）/企业年正常生产时间（小时）。原文件中描述污染物类别为废水，污染物指标为化学需氧量，此处对其进行了匹配工作，将其匹配到LCAflow库里面相最符合的流，污染物指标备注为化学需氧量
- chemical oxygen demand: 0.381094
  污染物指标化学需氧量的末端治理技术是沉淀分离，其效率为30，末端治理设施实际运行率（k值）计算公式为k=废水治理设施年运行时间（小时）/企业年正常生产时间（小时）。原文件中描述污染物类别为废水，污染物指标为化学需氧量，此处对其进行了匹配工作，将其匹配到LCAflow库里面相最符合的流，污染物指标备注为化学需氧量
- chemical oxygen demand: 0.0054442
  污染物指标化学需氧量的末端治理技术是膜分离，其效率为99，末端治理设施实际运行率（k值）计算公式为k=废水治理设施年运行时间（小时）/企业年正常生产时间（小时）。原文件中描述污染物类别为废水，污染物指标为化学需氧量，此处对其进行了匹配工作，将其匹配到LCAflow库里面相最符合的流，污染物指标备注为化学需氧量
- Ammonia Nitrogen: 0.063768
  污染物指标氨氮的末端治理技术是化学混凝法，其效率为20，末端治理设施实际运行率（k值）计算公式为k=废水治理设施年运行时间（小时）/企业年正常生产时间（小时）。原文件中描述污染物类别为废水，污染物指标为氨氮，此处对其进行了匹配工作，将其匹配到LCAflow库里面相最符合的流，污染物指标备注为氨氮
- Ammonia Nitrogen: 0.071739
  污染物指标氨氮的末端治理技术是沉淀分离，其效率为10，末端治理设施实际运行率（k值）计算公式为k=废水治理设施年运行时间（小时）/企业年正常生产时间（小时）。原文件中描述污染物类别为废水，污染物指标为氨氮，此处对其进行了匹配工作，将其匹配到LCAflow库里面相最符合的流，污染物指标备注为氨氮
- Petroleum-related waste: 0.0453025
  污染物指标石油类的末端治理技术是化学混凝法，其效率为75，末端治理设施实际运行率（k值）计算公式为k=废水治理设施年运行时间（小时）/企业年正常生产时间（小时）。原文件中描述污染物类别为废水，污染物指标为石油类，此处对其进行了匹配工作，将其匹配到LCAflow库里面相最符合的流，污染物指标备注为石油类
- Mercury: 5.57508e-5
  污染物指标汞的末端治理技术是化学混凝法，其效率为88，末端治理设施实际运行率（k值）计算公式为k=废水治理设施年运行时间（小时）/企业年正常生产时间（小时）。原文件中描述污染物类别为废水，污染物指标为汞，此处对其进行了匹配工作，将其匹配到LCAflow库里面相最符合的流，污染物指标备注为汞
- Mercury: 9.2918e-5
  污染物指标汞的末端治理技术是化学沉淀，其效率为80，末端治理设施实际运行率（k值）计算公式为k=废水治理设施年运行时间（小时）/企业年正常生产时间（小时）。原文件中描述污染物类别为废水，污染物指标为汞，此处对其进行了匹配工作，将其匹配到LCAflow库里面相最符合的流，污染物指标备注为汞
- Mercury: 4.6459e-6
  污染物指标汞的末端治理技术是离子交换，其效率为99，末端治理设施实际运行率（k值）计算公式为k=废水治理设施年运行时间（小时）/企业年正常生产时间（小时）。原文件中描述污染物类别为废水，污染物指标为汞，此处对其进行了匹配工作，将其匹配到LCAflow库里面相最符合的流，污染物指标备注为汞
- Mercury: 4.6459e-6
  污染物指标汞的末端治理技术是膜分离，其效率为99，末端治理设施实际运行率（k值）计算公式为k=废水治理设施年运行时间（小时）/企业年正常生产时间（小时）。原文件中描述污染物类别为废水，污染物指标为汞，此处对其进行了匹配工作，将其匹配到LCAflow库里面相最符合的流，污染物指标备注为汞
- cadmium: 0.0006684
  污染物指标镉的末端治理技术是化学混凝法，其效率为88，末端治理设施实际运行率（k值）计算公式为k=废水治理设施年运行时间（小时）/企业年正常生产时间（小时）。原文件中描述污染物类别为废水，污染物指标为镉，此处对其进行了匹配工作，将其匹配到LCAflow库里面相最符合的流，污染物指标备注为镉
- cadmium: 0.001114
  污染物指标镉的末端治理技术是化学沉淀，其效率为80，末端治理设施实际运行率（k值）计算公式为k=废水治理设施年运行时间（小时）/企业年正常生产时间（小时）。原文件中描述污染物类别为废水，污染物指标为镉，此处对其进行了匹配工作，将其匹配到LCAflow库里面相最符合的流，污染物指标备注为镉
- cadmium: 5.57e-5
  污染物指标镉的末端治理技术是离子交换，其效率为99，末端治理设施实际运行率（k值）计算公式为k=废水治理设施年运行时间（小时）/企业年正常生产时间（小时）。原文件中描述污染物类别为废水，污染物指标为镉，此处对其进行了匹配工作，将其匹配到LCAflow库里面相最符合的流，污染物指标备注为镉
- cadmium: 5.57e-5
  污染物指标镉的末端治理技术是膜分离，其效率为99，末端治理设施实际运行率（k值）计算公式为k=废水治理设施年运行时间（小时）/企业年正常生产时间（小时）。原文件中描述污染物类别为废水，污染物指标为镉，此处对其进行了匹配工作，将其匹配到LCAflow库里面相最符合的流，污染物指标备注为镉
- lead: 0.0008292
  污染物指标铅的末端治理技术是化学混凝法，其效率为88，末端治理设施实际运行率（k值）计算公式为k=废水治理设施年运行时间（小时）/企业年正常生产时间（小时）。原文件中描述污染物类别为废水，污染物指标为铅，此处对其进行了匹配工作，将其匹配到LCAflow库里面相最符合的流，污染物指标备注为铅
- lead: 0.001382
  污染物指标铅的末端治理技术是化学沉淀，其效率为80，末端治理设施实际运行率（k值）计算公式为k=废水治理设施年运行时间（小时）/企业年正常生产时间（小时）。原文件中描述污染物类别为废水，污染物指标为铅，此处对其进行了匹配工作，将其匹配到LCAflow库里面相最符合的流，污染物指标备注为铅
- lead: 6.91e-5
  污染物指标铅的末端治理技术是离子交换，其效率为99，末端治理设施实际运行率（k值）计算公式为k=废水治理设施年运行时间（小时）/企业年正常生产时间（小时）。原文件中描述污染物类别为废水，污染物指标为铅，此处对其进行了匹配工作，将其匹配到LCAflow库里面相最符合的流，污染物指标备注为铅
- lead: 6.91e-5
  污染物指标铅的末端治理技术是膜分离，其效率为99，末端治理设施实际运行率（k值）计算公式为k=废水治理设施年运行时间（小时）/企业年正常生产时间（小时）。原文件中描述污染物类别为废水，污染物指标为铅，此处对其进行了匹配工作，将其匹配到LCAflow库里面相最符合的流，污染物指标备注为铅
- Chromium: 0.000162
  污染物指标铬的末端治理技术是化学混凝法，其效率为88，末端治理设施实际运行率（k值）计算公式为k=废水治理设施年运行时间（小时）/企业年正常生产时间（小时）。原文件中描述污染物类别为废水，污染物指标为铬，此处对其进行了匹配工作，将其匹配到LCAflow库里面相最符合的流，污染物指标备注为铬
- Chromium: 0.00027
  污染物指标铬的末端治理技术是化学沉淀，其效率为80，末端治理设施实际运行率（k值）计算公式为k=废水治理设施年运行时间（小时）/企业年正常生产时间（小时）。原文件中描述污染物类别为废水，污染物指标为铬，此处对其进行了匹配工作，将其匹配到LCAflow库里面相最符合的流，污染物指标备注为铬
- Chromium: 1.35e-5
  污染物指标铬的末端治理技术是离子交换，其效率为99，末端治理设施实际运行率（k值）计算公式为k=废水治理设施年运行时间（小时）/企业年正常生产时间（小时）。原文件中描述污染物类别为废水，污染物指标为铬，此处对其进行了匹配工作，将其匹配到LCAflow库里面相最符合的流，污染物指标备注为铬
- Chromium: 1.35e-5
  污染物指标铬的末端治理技术是膜分离，其效率为99，末端治理设施实际运行率（k值）计算公式为k=废水治理设施年运行时间（小时）/企业年正常生产时间（小时）。原文件中描述污染物类别为废水，污染物指标为铬，此处对其进行了匹配工作，将其匹配到LCAflow库里面相最符合的流，污染物指标备注为铬
- arsenic: 0.0294636
  污染物指标砷的末端治理技术是化学混凝法，其效率为88，末端治理设施实际运行率（k值）计算公式为k=废水治理设施年运行时间（小时）/企业年正常生产时间（小时）。原文件中描述污染物类别为废水，污染物指标为砷，此处对其进行了匹配工作，将其匹配到LCAflow库里面相最符合的流，污染物指标备注为砷
- arsenic: 0.049106
  污染物指标砷的末端治理技术是化学沉淀，其效率为80，末端治理设施实际运行率（k值）计算公式为k=废水治理设施年运行时间（小时）/企业年正常生产时间（小时）。原文件中描述污染物类别为废水，污染物指标为砷，此处对其进行了匹配工作，将其匹配到LCAflow库里面相最符合的流，污染物指标备注为砷
- arsenic: 0.0024553
  污染物指标砷的末端治理技术是离子交换，其效率为99，末端治理设施实际运行率（k值）计算公式为k=废水治理设施年运行时间（小时）/企业年正常生产时间（小时）。原文件中描述污染物类别为废水，污染物指标为砷，此处对其进行了匹配工作，将其匹配到LCAflow库里面相最符合的流，污染物指标备注为砷
- arsenic: 0.0024553
  污染物指标砷的末端治理技术是膜分离，其效率为99，末端治理设施实际运行率（k值）计算公式为k=废水治理设施年运行时间（小时）/企业年正常生产时间（小时）。原文件中描述污染物类别为废水，污染物指标为砷，此处对其进行了匹配工作，将其匹配到LCAflow库里面相最符合的流，污染物指标备注为砷
- Exhaust gas: 66006
  污染物指标工业废气量的末端治理技术是/，末端治理设施实际运行率（k值）计算公式为k=废气治理设施年运行时间（小时）/企业年正常生产时间（小时）。原文件中描述污染物类别为废气，污染物指标为工业废气量，此处对其进行了匹配工作，将其匹配到LCAflow库里面相最符合的流，污染物指标备注为工业废气量
- particles (PM2.5 - PM10): 1.238
  污染物指标颗粒物的末端治理技术是湿法除尘（动力，其效率为99，末端治理设施实际运行率（k值）计算公式为k=废气治理设施年运行时间（小时）/企业年正常生产时间（小时）。原文件中描述污染物类别为废气，污染物指标为颗粒物，此处对其进行了匹配工作，将其匹配到LCAflow库里面相最符合的流，污染物指标备注为颗粒物
- particles (PM2.5 - PM10): 1.238
  污染物指标颗粒物的末端治理技术是波），其效率为99，末端治理设施实际运行率（k值）计算公式为k=废气治理设施年运行时间（小时）/企业年正常生产时间（小时）。原文件中描述污染物类别为废气，污染物指标为颗粒物，此处对其进行了匹配工作，将其匹配到LCAflow库里面相最符合的流，污染物指标备注为颗粒物
- particles (PM2.5 - PM10): 2.476
  污染物指标颗粒物的末端治理技术是袋式除尘，其效率为98，末端治理设施实际运行率（k值）计算公式为k=废气治理设施年运行时间（小时）/企业年正常生产时间（小时）。原文件中描述污染物类别为废气，污染物指标为颗粒物，此处对其进行了匹配工作，将其匹配到LCAflow库里面相最符合的流，污染物指标备注为颗粒物
- particles (PM2.5 - PM10): 61.9
  污染物指标颗粒物的末端治理技术是旋风除尘，其效率为50，末端治理设施实际运行率（k值）计算公式为k=废气治理设施年运行时间（小时）/企业年正常生产时间（小时）。原文件中描述污染物类别为废气，污染物指标为颗粒物，此处对其进行了匹配工作，将其匹配到LCAflow库里面相最符合的流，污染物指标备注为颗粒物
- particles (PM2.5 - PM10): 0.619
  污染物指标颗粒物的末端治理技术是静电除尘，其效率为99.5，末端治理设施实际运行率（k值）计算公式为k=废气治理设施年运行时间（小时）/企业年正常生产时间（小时）。原文件中描述污染物类别为废气，污染物指标为颗粒物，此处对其进行了匹配工作，将其匹配到LCAflow库里面相最符合的流，污染物指标备注为颗粒物
- sulfur dioxide: 2.6545
  污染物指标二氧化硫的末端治理技术是氨法，其效率为95，末端治理设施实际运行率（k值）计算公式为k=废气治理设施年运行时间（小时）/企业年正常生产时间（小时）。原文件中描述污染物类别为废气，污染物指标为二氧化硫，此处对其进行了匹配工作，将其匹配到LCAflow库里面相最符合的流，污染物指标备注为二氧化硫
- sulfur dioxide: 5.309
  污染物指标二氧化硫的末端治理技术是石灰/石膏法，其效率为90，末端治理设施实际运行率（k值）计算公式为k=废气治理设施年运行时间（小时）/企业年正常生产时间（小时）。原文件中描述污染物类别为废气，污染物指标为二氧化硫，此处对其进行了匹配工作，将其匹配到LCAflow库里面相最符合的流，污染物指标备注为二氧化硫
- sulfur dioxide: 7.9635
  污染物指标二氧化硫的末端治理技术是石灰石/石膏法，其效率为85，末端治理设施实际运行率（k值）计算公式为k=废气治理设施年运行时间（小时）/企业年正常生产时间（小时）。原文件中描述污染物类别为废气，污染物指标为二氧化硫，此处对其进行了匹配工作，将其匹配到LCAflow库里面相最符合的流，污染物指标备注为二氧化硫
- sulfur dioxide: 2.6545
  污染物指标二氧化硫的末端治理技术是活性炭（焦）法，其效率为95，末端治理设施实际运行率（k值）计算公式为k=废气治理设施年运行时间（小时）/企业年正常生产时间（小时）。原文件中描述污染物类别为废气，污染物指标为二氧化硫，此处对其进行了匹配工作，将其匹配到LCAflow库里面相最符合的流，污染物指标备注为二氧化硫
- Nitrogen oxides: 2.93
  污染物指标氮氧化物的末端治理技术是/，末端治理设施实际运行率（k值）计算公式为/。原文件中描述污染物类别为废气，污染物指标为氮氧化物，此处对其进行了匹配工作，将其匹配到LCAflow库里面相最符合的流，污染物指标备注为氮氧化物

## Use advice
This dataset is derived from the Pollution Source Census Report and contains information on pollution emissions and related products. However, it does not include data on energy or chemical consumption, nor does it provide information on waste or co-product generation. When utilizing this dataset, please supplement the missing data based on actual conditions before use
该数据集来源于污染源普查报告，包含污染物排放及相关产品信息，但不包含能源或化学品消耗数据，也不提供废弃物或共生产物产生信息。在使用该数据集时，请根据实际情况补充缺失数据后再使用。

## Review details
Inventory: The internal review was done by several iteration steps concerning raw data validation, raw data documentation, representativity, completeness and consistency of modelling with regard to ISO 14040 and 14044.
清单： 内部审查通过几个迭代步骤完成，涉及原始数据验证、原始数据记录、代表性、完整性、与 ISO 14040 和 14044 有关的建模的一致性。

## Data sources
- 第二次全国污染源普查产排污核算系数手册（试用版）,四级代码3214文件，在完整版文件中第4983页
