# cement production|cement, portland fly-ash cement, 52.5MPa|dry process precalciner kiln|fly ash

Dataset: ILCD process, Unit process, black box
Geography: CN
Reference year: 2001
Classification: Materials production / Other mineralic materials
Generated by: Siqi Yang
Amounts: no units in this file; such an amount is in the reference unit of its flow, which a separate flow dataset defines
copyright: false

## General comment
Dry precalciner kilns produce cement. The computer automation system is used to fully control the entire cement production from raw material storage to cement storage. The main equipment includes raw meal mills, clinker mills, and clinker calcination equipment.
The clinker calcining equipment consists of a coal-fired New SuspensionPreheater-Flash Furnace (NSF) kiln and a clinker cooler. The NSF system consists of two columns of four-stage cyclone preheaters and a calciner (F.F).

## Model description
The scope of the study is defined from the arrival of raw materials, the processes of raw material pre-treatment, raw meal grinding, raw meal calcination, clinker grinding, and up to the cement homogenization and storage. Specific processes such as mining, transportation, and cement packaging are not included.

## Reference product
- cement, portland fly-ash cement, 52.5MPa: 1000
  The average grade of cement is 525.

## Inputs
All rows: measured
- limestone, crushed, for mill: 1274.77
  Limestone
- sandstone: 0.007784
  Sandstone
- iron, powder: 51.9989
  Iron powder
- bauxite: 61.2503
- gypsum (desulphurized): 56.1461
  Gupsum
- ash: 10.9485
  Fly ash
- Water (fresh water): 1169.37
  Fresh water
- hard coal: 106.55
  Standard coal. The original data is 155.517kt standard coal, here converted to hard coal, the conversion formula is 1kg hard coal = 0.929kg standard coal.
- electricity, medium voltage: 458.389
  Electricity

## Outputs
- particles (> PM10): 0.320632; measured
  Dust, with an unspecified particle size, is treated as PM > 10 micrometers in diameter.
- particles (> PM10): 0.37466; measured
  Smoke, with an unspecified particle size, is treated as PM > 10 micrometers in diameter.
- sulfur dioxide: 0.574625; measured
  Sulfur dioxide
- Nitrogen oxides: 0.535697; measured
- carbon monoxide: 0.080097; measured
  Carbon dioxide
- carbon dioxide: 811.3
- wastewater, unpolluted: 630.543; measured
  The original text is industrial wastewater (i.e. wastewater from cement production).

## Data treatment and extrapolations
CO2 data processing: Based on the CO2 emissions data for one functional unit, calculate the CO2 emissions for the production of 1567340 tonnes of cement.

## Data sources
- 狄向华. (2001). 材料环境协调性评价的标准流程方法研究 [硕士, 北京工业大学].
