# 风轮机制造 ; 5 MW 风轮机

Dataset: ILCD process, Unit process, black box
Geography: SH-CN
Reference year: 2009
Classification: Unit processes / Energy carriers and technologies / Mechanical energy
Functional unit: The functional unit is 1 kWh on-grid electricity provision.
LCI method principle: Attributional
LCI method approaches: Allocation
Generated by: 赵云志, ll10088@163.com
Owner: 天工LCI数据工作小组
Review: Dependent internal review by 天工LCI数据工作小组
Amounts: no units in this file; such an amount is in the reference unit of its flow, which a separate flow dataset defines
copyright: false
licenseType: Free of charge for all users and uses

## General comment
该数据集旨在评估与中国上海东海大桥海上风电场（DBOWF）5 MW风轮机的制造、安装、运营、维护、拆解和回收相关的环境影响和能源使用。可用于可持续性分析、关于可再生能源装置的决策制定，以及工程师和技术人员优化海上风电场的环境性能。

## Geography
所研究的风电场- -东海大桥海上风电场( DBOWF )是中国在上海管辖范围内的第一个海上风电场，也是欧洲以外的第一个海上风电场。工程分两期施工，分别位于东海大桥两侧(图1 )。

## Reference product
- Wind turbine: 1; measured

## Inputs
- Resin: 242000
  Resin and fiber glass
- iron: 118800
- Steel,Steel: 495300
- silicon: 1000
- copper: 9600

## Deviations from the LCI method approaches
本研究采用PLCA建模方法计算了中国某典型海上风电场的能源和环境排放。从摇篮到坟墓的过程包括材料和设备制造、运输和安装、操作和维护、拆解和回收4个阶段(图2 )。

## Data selection and combination
风机、基础和电缆的技术参数从DBOWF的设计文件中获得(表2)。能源和排放因子(即单位材料和构件生产的能源消耗和环境排放)来源于Ecoinvent 2.2数据集(生态发明中心, 2009)，优先参考中国实践的系数。对于关键材料和设备，其海上运输能量由运输负荷和海运能量强度计算得到。根据施工方案，对设施安装能耗和排放进行了估算。风电场的运行和维护数据，如维护的频率和工作时间，是通过与工程技术人员的现场调查获得的。与模型参数和输入数据相关的不确定性在本文的敏感性分析部分进行了说明。

## Use advice
用户应确保所采用的方法论框架与研究中使用的PLCA（产品生命周期评估）模型一致。分析单元应关注提供1 kWh电网电力。在考虑能源和排放因素时，必须引用Ecoinvent 2.2数据集，特别是适用于中国实践的系数。任何关键材料和设备的运输应考虑运输负荷和海运能量强度。安装能源和排放应根据施工计划估算。此外，现场数据如维护频率和工作时间必须用于操作和维护阶段。最后，应承认模型参数和输入数据的不确定性，并参考研究中提供的敏感性分析。

## Review details
清单： 内部审查通过几个迭代步骤完成，涉及原始数据验证、原始数据记录、代表性、完整性、与 ISO 14040 和 14044 有关的建模的一致性。

## Data sources
- Yang, J. et al. The life-cycle energy and environmental emissions of a typical offshore wind farm in China. Journal of Cleaner Production 180, 316–324 (2018).
