# 烧结矿生产;烧结矿;烧结（D01）

Dataset: ILCD process, Unit process, single operation
Geography: CN
Reference year: 1998
Classification: Materials production / Other mineralic materials
Generated by: 付翔, 1162850692@qq.com
Owner: 天工LCI数据工作小组
Review: Dependent internal review by 天工LCI数据工作小组
Amounts: no units in this file; such an amount is in the reference unit of its flow, which a separate flow dataset defines
copyright: false
licenseType: Free of charge for all users and uses

## General comment
来自表 4-17 D01 钢厂生产吨材环境负荷编目表

## Time period
论文提到钢铁企业环境总体数据为1998年的吨钢环境基础数据。

## Technical purpose
烧结矿生产过程用于钢铁工业中，通过将铁矿石粉末、助熔剂和焦炭聚集形成粗糙的预熔材料，随后将其送入高炉作为制铁过程的一部分。

## Reference product
- Sinter: 1751; measured
  烧结矿

## Inputs
- Energy, geothermal, converted: 4068.45; measured
- water: 2967; measured
- Refined Iron Ore: 955; measured
  精铁矿

## Outputs
All rows: measured
- Dust (unspecified, from stack): 1.362
- sulfur dioxide: 8.09
- Suspended solids, unspecified: 0.176268
- chemical oxygen demand: 0.129346
- Dust (unspecified, from stack): 33.269
  集尘
- Spoil (deposited, hibernating in ground, non elementary flow): 35.02

## Use advice
在使用此数据集进行生命周期评估（LCA）时，确保数据与制造地点的地理背景和时间范围（例如，参考1998年）一致。建议在将烧结矿生产过程纳入LCA模型时考虑随后的环境影响，例如参考文献中概述的特定单元操作的排放。用户应确保数据使用与技术范围保持一致，如数据来源的钢铁生产的规模和技术水平。

## Review details
清单： 内部审查通过几个迭代步骤完成，涉及原始数据验证、原始数据记录、代表性、完整性、与 ISO 14040 和 14044 有关的建模的一致性。

## Data sources
- 周和敏. 钢铁材料生产过程环境协调性评价研究. (北京工业大学, 2001).
