# 直接还原铁生产;直接还原铁;氢基还原（全部）

Dataset: ILCD process, Unit process, single operation
Geography: CN
Classification: Energy carriers and technologies / Heat and steam
Generated by: 付翔, 1162850692@qq.com
Owner: 天工LCI数据工作小组
Review: Dependent internal review by 天工LCI数据工作小组
Amounts: no units in this file; such an amount is in the reference unit of its flow, which a separate flow dataset defines
copyright: false
licenseType: Free of charge for all users and uses

## General comment
采用氢基还原工艺生产的直接还原铁通常用于钢铁制造行业。作为原材料，这种形式的铁对于希望减少依赖传统高炉方法和降低碳排放的钢铁生产设施至关重要。它适用于制造各种符合环保标准的钢铁产品。

## Geography
The average operating data of Coal-DR, NG-DR (MID), and NG-DR (ENE) demonstration projects in China are used as the benchmark for the LCI of DR routes.

## Reference product
- Direct Reduced Iron: 1000; calculated
  DRI

## Inputs
All rows: calculated
- Pellet: 1357.3
  Pellets
- Water (fresh water): 200
  The average operating data of Coal-DR, NG-DR (MID), and NG-DR (ENE) demonstration projects in China are used as the benchmark for the LCI of DR routes. LCI of COG-DR and H-DR routes, which is not scaled-up in China are estimated based on Coal-DR routes combined with literature data from simulations, laboratory tests, and process modeling in
- Natural gas, at consumer EU-27: 18.1
  (same comment as for Water (fresh water))
- hydrogen: 979.4
  (same comment as for Water (fresh water))
- Electricity: 356.4
  (same comment as for Water (fresh water))

## Outputs
- Dust (unspecified, from stack): 0.1; calculated
  (same comment as for Water (fresh water))

## Data treatment and extrapolations
LCI of COG-DR and H-DR routes, which is not scaled-up in China are estimated based on Coal-DR routes combined with literature data from simulations, laboratory tests, and process modeling in Table 9 [49,50]. The LCI of Coal-DR is obtai

## Use advice
在将直接还原铁生产的生命周期库存（LCI）数据融入生命周期评估时，用户必须考虑数据的特定区域背景，该数据基于中国项目的平均运行数据。由于在中国尚未规模化的Coal-DR、NG-DR和H-DR路线的LCI是基于估算而非实测得出的，用户在评估时需要对此额外考虑结果的不确定性。数据使用时应与当前技术进步情况相结合，并且未经调整不应直接应用于不同的技术或地理环境。在生命周期评估过程中，应特别注意包括或排除回收的方法学差异及特定使用阶段建模行为，这可能会影响最终的环境影响评估。

## Review details
清单： 内部审查通过几个迭代步骤完成，涉及原始数据验证、原始数据记录、代表性、完整性、与 ISO 14040 和 14044 有关的建模的一致性。

## Data sources
- The carbon reduction potential of hydrogen in the low carbon transition of the iron and steel industry: The case of China
