# Whitegranulatedsugar|Sugarcane|Sulfite method|Daily juicing capacity of sugarcane less than2000 t / 白砂糖|甘蔗|亚硫酸法|日榨甘蔗量2000吨以下

Dataset: ILCD process, Unit process, single operation
Geography: CN
Reference year: 2019
Classification: Materials production / Food and renewable raw materials
Generated by: The data was created by the Office of the Second National Pollution Source Census of the Ministry of Ecology and Environment, and the data was organized by the TianGong Plan team for ILCD format / 生态环境部第二次全国污染源普查工作办公室创建数据，天工计划团队常慧敏整理数据为ILCD格式
Owner: Tiangong LCI Data Working Group / 天工LCI数据工作小组
Amounts: no units in this file; such an amount is in the reference unit of its flow, which a separate flow dataset defines
copyright: false
licenseType: Free of charge for all users and uses

## Technology and included processes
the Technical of end-of-pipe management technology for pollution phosphorus, totalisPrecipitation separation + anaerobic biological treatment + aerobic biological treatment，Its Technical efficiency of end-of-pipe management75

## Reference product
- White Granulated Sugar: 1000; calculated
  源文件中描述为为白砂糖，此处对其进行了匹配工作，将其匹配到LCAflow库里面相最符合的流，污染物指标备注为工业废水量

## Outputs
All rows: calculated
- Waste water: 13260
  污染物指标工业废水量的末端治理技术是/，其效率为0，末端治理设施实际运行率（k值）计算公式为/。原文件中描述污染物类别为废水，污染物指标为工业废水量，此处对其进行了匹配工作，将其匹配到LCAflow库里面相最符合的流，污染物指标备注为工业废水量
- chemical oxygen demand: 0.6495
  污染物指标化学需氧量的末端治理技术是沉淀分离+好氧生物处理法，其效率为85，末端治理设施实际运行率（k值）计算公式为k=污水处理设施正常运行时间（天/年）/开榨天数（天/年）。原文件中描述污染物类别为废水，污染物指标为化学需氧量，此处对其进行了匹配工作，将其匹配到LCAflow库里面相最符合的流，污染物指标备注为化学需氧量
- chemical oxygen demand: 0.433
  污染物指标化学需氧量的末端治理技术是沉淀分离+厌氧生物处理法+好氧生物处理法，其效率为90，末端治理设施实际运行率（k值）计算公式为k=污水处理设施正常运行时间（天/年）/开榨天数（天/年）。原文件中描述污染物类别为废水，污染物指标为化学需氧量，此处对其进行了匹配工作，将其匹配到LCAflow库里面相最符合的流，污染物指标备注为化学需氧量
- Ammonia Nitrogen: 0.0176
  污染物指标氨氮的末端治理技术是沉淀分离+好氧生物处理法，其效率为80，末端治理设施实际运行率（k值）计算公式为k=污水处理设施正常运行时间（天/年）/开榨天数（天/年）。原文件中描述污染物类别为废水，污染物指标为氨氮，此处对其进行了匹配工作，将其匹配到LCAflow库里面相最符合的流，污染物指标备注为氨氮
- Ammonia Nitrogen: 0.0132
  污染物指标氨氮的末端治理技术是沉淀分离+厌氧生物处理法+好氧生物处理法，其效率为85，末端治理设施实际运行率（k值）计算公式为k=污水处理设施正常运行时间（天/年）/开榨天数（天/年）。原文件中描述污染物类别为废水，污染物指标为氨氮，此处对其进行了匹配工作，将其匹配到LCAflow库里面相最符合的流，污染物指标备注为氨氮
- Nitrogen, organic bound: 0.039
  污染物指标总氮的末端治理技术是沉淀分离+好氧生物处理法，其效率为70，末端治理设施实际运行率（k值）计算公式为k=污水处理设施正常运行时间（天/年）/开榨天数（天/年）。原文件中描述污染物类别为废水，污染物指标为总氮，此处对其进行了匹配工作，将其匹配到LCAflow库里面相最符合的流，污染物指标备注为总氮
- Nitrogen, organic bound: 0.0325
  污染物指标总氮的末端治理技术是沉淀分离+厌氧生物处理法+好氧生物处理法，其效率为75，末端治理设施实际运行率（k值）计算公式为k=污水处理设施正常运行时间（天/年）/开榨天数（天/年）。原文件中描述污染物类别为废水，污染物指标为总氮，此处对其进行了匹配工作，将其匹配到LCAflow库里面相最符合的流，污染物指标备注为总氮
- phosphorus, total: 0.0042
  污染物指标总磷的末端治理技术是沉淀分离+好氧生物处理法，其效率为70，末端治理设施实际运行率（k值）计算公式为k=污水处理设施正常运行时间（天/年）/开榨天数（天/年）。原文件中描述污染物类别为废水，污染物指标为总磷，此处对其进行了匹配工作，将其匹配到LCAflow库里面相最符合的流，污染物指标备注为总磷
- phosphorus, total: 0.0035
  污染物指标总磷的末端治理技术是沉淀分离+厌氧生物处理法+好氧生物处理法，其效率为75，末端治理设施实际运行率（k值）计算公式为k=污水处理设施正常运行时间（天/年）/开榨天数（天/年）。原文件中描述污染物类别为废水，污染物指标为总磷，此处对其进行了匹配工作，将其匹配到LCAflow库里面相最符合的流，污染物指标备注为总磷

## Data sources
- 第二次全国污染源普查产排污核算系数手册（试用版）,二级代码13,四级代码1340文件，在完整版文件中第3413页
