# 晶片切片 ; 多晶硅晶片 ; 用断锭器切割硅锭

Dataset: ILCD process, Unit process, single operation
Geography: CN
Reference year: 2017
Classification: Unit processes / Materials production / Other materials
Functional unit: In this paper, a 1 kWp solar PV system consisting of five 200 Wmodules made of 54 multi-Si cells, each with a size of 156*156 mm2 and 16% efficiency, was used as the primary study object
LCI method principle: Attributional
LCI method approaches: Allocation
Generated by: 杨锦锋, yjfzfshn@163.com
Owner: 天工LCI数据工作小组
Review: Dependent internal review by 天工LCI数据工作小组
Amounts: no units in this file; such an amount is in the reference unit of its flow, which a separate flow dataset defines
copyright: false
licenseType: Free of charge for all users and uses

## General comment
多晶硅

## Geography
2011-2016年中国太阳能光伏产业生命周期环境影响评价

## Time period
文章发表

## Technology and included processes
钢锭破碎机是用来切割钢锭的

## Technical purpose
上述工业过程包括切割多晶硅锭以生产光伏模块用的晶圆。每个光伏模块是更大的太阳能系统的一部分，重点是一个包括五个各自由54个多晶硅电池组成的200 W模块的1 kWp系统。这些电池的尺寸为156 x 156 mm2，效率为16%。因此，该过程是制造太阳能电池板的关键步骤，太阳能电池板在太阳能电力行业中用于捕获和转换太阳能为电能。

## Reference product
- Multi-Si wafer,Multi-Si wafer,Multi-Si wafer: 3.4203; measured
  Multi-Si wafer (Multi-Si wafer)

## Inputs
All rows: measured
- Multi-Si ingot: 5.6014
  Multi-Si ingot (Multi-Si wafer)
- Silicon carbide,Silicon carbide: 0.1799
  Silicon carbide (Multi-Si wafer)
- Steel Wire,Cable: 17.7336
  Steel wire
- Electricity: 24.6262
  Electricity (Multi-Si wafer)
- Detergent: 2.2837
  Detergent (Multi-Si wafer)

## Deviations from the LCI method approaches
基于中国太阳能光伏生命周期评价的现有文献(Fu 等，2015; He，2013; Hong 等，2016; Li 和 Yu，2014; Li 和 Chang，2012; Liang，2012; Yang 等，2015; Yu 等，2017; Xie 等，2015) ，得到了一份生命周期清单

## Use advice
在使用所描述过程的生命周期清单（LCI）数据时，用户应确保他们在光伏模块生产的背景下应用这些信息，具体而言，是2011年至2016年中国的多晶硅太阳能电池。重要的是要考虑时间段内的技术变化，并在解释结果时考虑地理特定性。还应特别注意研究的边界，确保在适用的情况下包括回收过程，并且基于现有文献，准确模拟PV系统的使用阶段行为，包括能源输出和退化率。

## Review details
清单： 内部审查通过几个迭代步骤完成，涉及原始数据验证、原始数据记录、代表性、完整性、与 ISO 14040 和 14044 有关的建模的一致性。

## Data sources
- Xu, L., Zhang, S., Yang, M., Li, W. & Xu, J. Environmental effects of China’s solar photovoltaic industry during 2011–2016: A life cycle assessment approach. Journal of Cleaner Production 170, 310–329 (2018).
