# 水泥生产|水泥, 普通硅酸盐水泥, 42.5MPa

Dataset: ILCD process, LCI结果
Geography: BJ-CN
Reference year: 2008
Classification: Materials production / Other mineralic materials
Generated by: 杨思琪
Amounts: no units in this file; such an amount is in the reference unit of its flow, which a separate flow dataset defines
copyright: false

## General comment
该水泥厂煤耗包括熟料煅烧用煤和余热发电锅炉补煤2个部分。

## Geography
北京琉璃河水泥厂

## Model description
规定1kg42.5普通硅酸盐水泥所具有的性能为功能单元；研究范围包括由水泥原料开采、能源生产、生料制备、熟料煅烧、直到水泥粉磨为止的生产工序。

## Reference product
- cement, ordinary portland cement, 42.5MPa: 1000
  42.5普通硅酸盐水泥。

## Inputs
All rows: measured
- calcium carbonate: 1060
  石灰石
- sandstone: 90.4
  砂岩
- iron: 61.6
  铁
- bauxite: 65.3
  铝矾土
- gypsum: 76.1
  石膏
- hard coal, run-of-mine: 394
  煤耗
- heavy fuel oil: 7.15
  原文献为燃料油消耗（即重油）。
- natural gas, high pressure: 0.657
  天然气

## Outputs
- carbon dioxide: 846; article inperiodical
  CO2。CO2生成主要产生于燃料、燃煤等化石能源的燃烧以及水泥生产原料中的石灰石分解。（1）化石能源燃烧的CO2排放量E＝3.67Fqka，式中，E为CO2的排放量（kg）；F为燃料的消耗量（kg）；Q为燃料发热量（MJ／kg）；k为燃料的碳排放系数；a为燃料的碳氧化率。（2）水泥生产过程中，原料石灰石的化学反应产生大量的CO2，其化学反应式如下CaCO3→CaO＋CO2↑，石灰石中碳酸钙含量按96％估算，1kg分解生成约0.54kg的CaO，同时生成0.42kg的CO2。最后得CO2排放量的估算公式为CO2排放量＝石灰石消耗量×CaCO3含量×(CO2分子量/CaCO3分子量)＋E
- Nitrogen oxides: 3.4; article inperiodical
  NOx的排放量估算公式为E＝0.001Fa(1-rf)。式中，E为NOx的排放量（kg）；F为燃料的消耗量（kg）；a为燃料燃烧时NOx排放因子；r为脱氮设备的覆盖率；f为平均脱氮效率。目前国内脱氮设备较少，不考虑脱氮问题。原煤和原油的排放因子分别为9.95kg／t和7.24kg／t，天然气为4.1g／m3。
- sulfur dioxide: 2.24; article inperiodical
  SO2的排放量估算公式为E＝Fa(1-rf)。式中，E为SO2x的排放量（kg）；F为燃料的消耗量（kg）；a为燃料燃烧时SO2排放因子；r为脱硫设备的覆盖率；f为平均脱硫效率。SO2的排放因子，原煤取（1.05E-2）kg／kg。
- carbon monoxide: 0.59; article inperiodical
  CO的排放量估算公式为E＝Fqa。式中，E为CO的排放量（kg）；F为燃料的消耗量（kg）；a为燃料燃烧时CO排放因子；Q为燃料发热量（MJ／kg）。CO的排放因子原煤发电取106kg／MJ。
- particles (> PM10): 24.5; measured
  粉尘，未标明粒径，按PM>10处理。

## Deviations from the LCI method approaches
资源与能源生产的初级资源消耗与北京琉璃河水泥厂水泥生产基础数据计算得LCI各单元过程数据。

## Data selection and combination
初级资源消耗采用狄向华计算的我国资源能源生产的生命周期排放数据。北京琉璃河水泥厂水泥生产基础数据（过程资源、能源消耗）。

## Data treatment and extrapolations
能耗和大气污染物数据：单元过程数据累加。

## Data sources
- 姜德义, 苍大强, 关生林, 吴红, 崔素萍, & 王志宏. (2008). 北京典型水泥企业生产过程环境负荷评价. 武汉理工大学学报, 4, 36–39.
