# 湿蒸法棉布染整加工|印染棉布|轧染|活性染料

Dataset: ILCD process, Unit process, single operation
Geography: SZ-JS-CN
Reference year: 2012
Classification: Materials production / Other mineralic materials
Generated by: Yingfan Duan, 1300925579@qq.com
Review: Dependent internal review by Tiangong LCI Data Working Group
Amounts: no units in this file; such an amount is in the reference unit of its flow, which a separate flow dataset defines
copyright: false

## General comment
在轧染工序中，调研得出使用活性染料染色的能耗占整个工序能耗的47%。煤被用于蒸汽和导热油锅炉中以分别产生蒸汽和较高的操作温度。根据所调研企业的清洁生产报告，两种类型锅炉煤消耗量比为17:1。其中，使用蒸汽的工序环节依次包括煮练氧漂、丝光、磨毛、平幅水洗、培烘和轧染。蒸汽用于对上述过程中坯布的烘干处理，除轧染需要两步烘干外，其余全为一步烘干，而煮练和氧漂有两个烘缸，其他过程只有一个烘缸。假设每步烘干过程中每个烘缸使用的蒸汽量相同，则上述过程使用蒸汽的比例为2:1:1:1:1:2。

## Geography
本研究选取江苏省某印染企业为重点调研对象，该企业位于长三角经济圈中的常熟。

## Inputs
- Electricity: 449; measured
- Crude coal: 105; calculated
- Fuel Oil: 2.24
- heavy fuel oil: 0.673
- diesel: 3.08
- Coke Oven Gas: 4.1
- natural gas: 0.0526
- process steam: 2.96e7
- Cotton: 78.3; measured
- sodium chloride: 800
- sodium carbonate: 160
- Reactive Dye: 114
- river water: 52100
- Water (fresh water): 2160; measured

## Outputs
- carbon dioxide: 2670; calculated
- carbon monoxide: 0.323
- sulfur dioxide: 2.01; estimated
- methane: 12.8; calculated
- Nitrogen oxides: 0.723
- nitrous oxide: 0.0408; calculated
- Dust (unspecified, from stack): 0.954; estimated
- ammonia: 0.000117
- non-methane volatile organic compounds: 0.0162
- waste water - untreated: 54200
- chemical oxygen demand: 61.8; measured
- Suspended solids, unspecified: 6.65; measured
- lead: 8.24e-6
- mercury: 1.73e-7
- fluorine: 1.56e-6
- cadmium: 3.06e-7
- arsenic: 7.05e-6

## Review details
Inventory: The internal review was done by several iteration steps concerning raw data validation, raw data documentation, representativity, completeness and consistency of modelling with regard to ISO 14040 and 14044.; Documentation: The review of the documentation was performed by Ecobilan and is in compliance with ISO 14040 and 14044. The data set documentation is correct in view of the appropriateness of the information provided. It includes all relevant information in view of data quality and scope of application of the respective LCI result.

## Data sources
- 朱亚楠. 棉布连续轧染工艺生命周期环境影响评价. (南京大学, 2012).
