# 电力生产 ; 混合电力 ; 吉林

Dataset: ILCD process, Unit process, single operation
Geography: JL-CN
Reference year: 2019
Classification: Unit processes / Energy carriers and technologies / Electricity
Generated by: 熊若熙, xiongrx0126@163.com
Owner: 天工LCI数据工作小组
Review: Dependent internal review by 天工LCI数据工作小组
Amounts: no units in this file; such an amount is in the reference unit of its flow, which a separate flow dataset defines
copyright: false
licenseType: Free of charge for all users and uses

## General comment
混合电力产生形式包括火力发电、水力发电、风力发电、核能发电和太阳能发电

## Technical purpose
本数据集描述了吉林使用的电力组合，包括火力、水力、风力、核能和太阳能发电。这种电力被用于从住宅和商业电力供应到需要可靠电力源的工业过程的多种应用。

## Reference product
- Electricity: 3.6; missing unimportant
  [{'text': '3.6', 'type': 'text'}]

## Inputs
All rows: missing unimportant
- electricity for thermal power: 2.7379
  [{'text': '3.6', 'type': 'text'}]
- electricity from hydroelectric power plant: 0.260183
  [{'text': '3.6', 'type': 'text'}]
- electricity for nuclear power: 0
  [{'text': '3.6', 'type': 'text'}]
- electricity from wind power: 0.446584
  [{'text': '3.6', 'type': 'text'}]
- electricity for solar power: 0.155333
  [{'text': '3.6', 'type': 'text'}]

## Use advice
在使用此数据集进行生命周期评估时，应仔细考虑所提供的电力来源的特定组合。混合电力应反映评估过程和生命周期阶段的实际能耗特征。还需考虑时间变化和任何可能随时间影响发电组合的电网特定政策或变化。

## Review details
清单： 内部审查通过几个迭代步骤完成，涉及原始数据验证、原始数据记录、代表性、完整性、与 ISO 14040 和 14044 有关的建模的一致性。

## Data sources
- 能源统计年鉴2020
