# 土壤修复;异位修复;生物堆;工程实施;回填

Dataset: ILCD process
Geography: KR
Classification: Other Services / Repair and maintenance
Generated by: Sang Chunhui, sangch@mail.bnu.edu.cn
Owner: Tiangong LCI Data Working Group
Review: Dependent internal review by Tiangong LCI Data Working Group
Amounts: no units in this file; such an amount is in the reference unit of its flow, which a separate flow dataset defines
licenseType: Free of charge for all users and uses

## General comment
This data set describes a soil remediation process known as ex-situ biopiling. This technique is applied in environmental engineering to treat contaminated soil that has been excavated from its original location. After treatment, the remediated soil is typically backfilled into the original excavation pit.

## Reference product
- clean site: 200; article inperiodical

## Inputs
- Diesel: 0.803; article inperiodical

## Use advice
When utilizing this data set for life cycle assessment, attention should be given to the fact that the soil, once treated, is returned to the original site. This implies that the transport of contaminated soil and the return of remediated soil should be considered in the system boundaries of the assessment. The impacts associated with the excavation, treatment, and backfilling processes should be included in the LCA model. Furthermore, the potential environmental benefits of the biopile remediation (e.g., the degradation of pollutants) must be accounted for in comparison to other remediation methods.

## Review details
Inventory: The internal review was done by several iteration steps concerning raw data validation, raw data documentation, representativity, completeness and consistency of modelling with regard to ISO 14040 and 14044.
