# 修复后土壤;土壤修复;实验室研究;生物泥浆反应器;TPH污染土壤

Dataset: ILCD process, Unit process, single operation
Geography: IT
Reference year: 2023
Classification: Unit processes / Other Services / Repair and maintenance
Functional unit: The functional unit for this study is related to treated soil polluted with petroleum hydrocarbons using bioslurry (100 g, 36.5 kWh). The initial concentration of total petroleum hydrocarbons is 4500 mg/kg.
Generated by: 杨欣桐, yangxt@caep.org.cn
Owner: 天工LCI数据工作小组
Review: Dependent internal review by 天工LCI数据工作小组
Amounts: no units in this file; such an amount is in the reference unit of its flow, which a separate flow dataset defines
copyright: false
licenseType: Free of charge for all users and uses

## General comment
将污染土壤转移至生物反应器，加水混合成泥浆，调节适宜的pH，同时加入一定量的营养物质和表面活性剂，底部鼓入空气充氧，满足微生物所需氧气的同时，使微生物与污染物充分接触，加速污染物的降解，降解完成后，过滤脱水

## Geography
本研究基于室内试验，该处填写的为作者籍贯。

## Technology and included processes
降解是在由生物泥浆反应器在中试尺度进行的，使用100g悬浮在500ml蒸馏水中的柴油污染的土壤，土壤与水的比例为1:5。它们用1.5g NH4Cl和0.1g KH2PO4+5g/L活性污泥+鼠李糖脂粗品（275毫升）促使反应进行。使用1L锥形烧瓶作为生物反应器，通过机械混合器在150rpm下持续混合以确保底物可用性和氧气转移约20天。分析表明，在中试尺度实验中，活性污泥、营养物质和生物表面活性剂的组合在20天后显示出TPHs减少79.4%。

## Technical purpose
此生命周期评估数据详述了一种实验室规模的土壤修复过程，使用生物泥浆反应器处理石油碳氢化合物污染的土壤。该过程适用于实验研究目的，并为可能的大规模工业应用（如大型土壤净化项目）在环境工程行业提供了基础。

## Reference product
- Remediated soil: 1

## Inputs
- Deionized Water: 0.225; normal
- Ammonium Chloride: 0.0015; normal
- Potassium Dihydrogen Phosphate: 0.0001; normal
- Biosurfactant: 0.000225; normal
- Digested Sludge,Digester sludge: 0.005; normal
- Electricity: 129.6; normal
- contaminated soil: 1

## Outputs
- Wastewater: 0.0004; normal

## Use advice
用户应该仅将这些数据用于实验室级土壤修复场景，未经适当缩放和修改不得外推至现场级别。系统的低维护和资源要求特定于实验室设置；大规模应用将有显著不同。应特别注意土壤、营养物质和生物表面活性剂的正确配比，并持续监测过程参数，如pH和氧气转移率。在扩大过程中，考虑接种培养和化学品使用至关重要，这些在此生命周期评估数据集中被排除。

## Review details
清单： 内部审查通过几个迭代步骤完成，涉及原始数据验证、原始数据记录、代表性、完整性、与 ISO 14040 和 14044 有关的建模的一致性。

## Data sources
- Gebregiorgis T A ,Francesca F ,Silvia S , et al. Life cycle assessment of bioslurry and bioelectrochemical processes for sustainable remediation of soil polluted with petroleum hydrocarbons: An experimental study [J]. Sustainable Production and Consumption, 2023, 36 416-424.
