# 电渗析模块生产;螺旋缠绕

Dataset: ILCD process, Unit process, single operation
Geography: CN
Reference year: 2023
Classification: Materials production / Other materials
Functional unit: 1 item of electrodialysis module
Generated by: 陆嘉麒, wilsherelu@foxmail.com
Owner: 天工LCI数据工作小组
Review: Dependent internal review by 天工LCI数据工作小组
Amounts: no units in this file; such an amount is in the reference unit of its flow, which a separate flow dataset defines
copyright: false
licenseType: Free of charge for all users and uses

## General comment
这种螺旋缠绕式电渗析模块用于从水溶液中分离电解质。适用于水处理、盐产生和工业应用中废盐水净化等过程。

## Reference product
- Electrodialysis Component: 1; input; article inperiodical
  ED组件

## Inputs
All rows: article inperiodical
- Anion exchange resin: 8.45
  阴离子交换膜
- Cation Exchange Resin: 9.49
  阳离子交换膜
- Titanium Ruthenium Electrode: 1.8
  钛涂钌阳极
- Titanium Coated Ruthenium Cathode: 1.1
  钛涂钌阴极
- UPVC Casing: 8.5
  （UPVC）阴极外壳
- UPVC Casing: 49.8
  UPVC外壳
- electricity mix: 594
  过程电耗

## Outputs
All rows: article inperiodical
- Anion exchange resin: 0.00845
  阴离子交换膜
- Cation Exchange Resin: 0.00949
  阳离子交换膜
- Titanium Ruthenium Electrode: 0.0018
  钛涂钌阳极
- Titanium Coated Ruthenium Cathode: 0.0011
  钛涂钌阴极
- UPVC Casing: 0.0085
  （UPVC）阴极外壳
- UPVC Casing: 0.0498
  UPVC外壳

## Use advice
在使用该数据集进行生命周期评估时，应考虑电渗析过程的特定能耗和维护要求。包括模块结束使用寿命处理的规定，如回收或处置影响。确保数据集的地理相关性（CN单元过程）与生命周期评估应用的区域相符。

## Review details
清单： 内部审查通过几个迭代步骤完成，涉及原始数据验证、原始数据记录、代表性、完整性、与 ISO 14040 和 14044 有关的建模的一致性。

## Data sources
- Xue, N. et al. Carbon footprint analysis and carbon neutrality potential of desalination by electrodialysis for different applications. Water Res. 232, 119716 (2023).
