# Bioethanol ; Fungi

Dataset: ILCD process
Classification: Energy carriers and technologies / Renewable fuels
Generated by: Jiayi Yuan, jiayi_y@mail.bnu.edu.cn
Owner: Tiangong LCI Data Working Group
Review: Dependent internal review by Tiangong LCI Data Working Group
Amounts: no units in this file; such an amount is in the reference unit of its flow, which a separate flow dataset defines
licenseType: Free of charge for all users and uses

## Inputs
All rows: uniform; article inperiodical
- Electricity: 0
- heat: 376; min 254; max 540
- Electricity: 71.28; max 96.84
- heat: 4230; min 1040; max 5220
- Electricity: 124.2; min 76.68; max 181.08

## Outputs
- heat: 0; uniform; article inperiodical

## Review details
Inventory: The internal review was done by several iteration steps concerning raw data validation, raw data documentation, representativity, completeness and consistency of modelling with regard to ISO 14040 and 14044.
