# 污泥处理与处置|焚烧

Dataset: ILCD process, Unit process, single operation
Geography: XA-SAX-CN
Classification: Materials production / Other mineralic materials
Generated by: Jin Sitian, 2331276@tongji.edu.cn
Review: Dependent internal review by Tiangong LCI Data Working Group
Amounts: no units in this file; such an amount is in the reference unit of its flow, which a separate flow dataset defines

## Geography
西安第三污水处理厂

## Reference product
- Sludge: 1000; input; estimated
  1t含水率76.2%的剩余污泥

## Inputs
- Electricity: 554.508; calculated

## Outputs
All rows: calculated
- carbon dioxide: 268.35
- Nitrogen oxides: 2.753
- sulfur dioxide: 4.538
- carbon monoxide: 1.035
- methane: 0.01228
- nitrous oxide: 0.01079
- volatile organic compound: 0.0119
- Flue dust: 2.355
- mineral waste (ash): 105.87
- lead: 0.01044
- cadmium: 0.000723
- zinc: 0.065
- copper: 0.01444
- nickel: 0.00144
- chromium: 0.00476

## Review details
Inventory: The internal review was done by several iteration steps concerning raw data validation, raw data documentation, representativity, completeness and consistency of modelling with regard to ISO 14040 and 14044.

## Data sources
- 基于生命周期评价的典型剩余污泥处理方法的环境影响比较研究
