# 湿蒸法棉布染整加工;印染棉布;轧染;士林染料

Dataset: ILCD process, Unit process, single operation
Geography: SZ-JS-CN
Reference year: 2012
Classification: Unit processes / Materials production / Organic chemicals
Generated by: 段颖凡, 1300925579@qq.com
Owner: 天工LCI数据工作小组
Review: Dependent internal review by 天工LCI数据工作小组
Amounts: no units in this file; such an amount is in the reference unit of its flow, which a separate flow dataset defines
copyright: false
licenseType: Free of charge for all users and uses

## General comment
还原染料是指在碱性条件下被还原而使纤维着色，再经氧化，在纤维上恢复成原来不溶性的染料而染色，用于染纤维素纤维; 将不溶性还原染料制成硫酸酯钠盐，变成可溶性还原染料，主要用于棉布印花。在轧染工序中，调研得出使用士林染料染色的能耗占整个工序能耗的53%。

## Geography
本研究选取江苏省某印染企业为重点调研对象，该企业位于长三角经济圈中的常熟。

## Technical purpose
所述工艺用于纺织行业，特别是使用士林染料的棉布轧染。它涉及到生产染色棉料所必需的湿蒸法染整加工步骤。典型应用包括用于生产服装、家居装饰和其他需要耐用性和色牢度的布基制品的彩色纺织品。在染色步骤中强调的高能耗表明，这个过程适合能够大规模操作且能应用能效措施的设施。

## Reference product
- Cotton Fabric: 88.3; measured

## Inputs
- Electricity: 507; measured
- Standard coal: 1040; measured
- Crude coal: 118; calculated
- Cleaned coal: 293; calculated
- Fuel Oil: 2.52; calculated
- heavy fuel oil: 0.759; calculated
- Diesel oil: 3.47; calculated
- Coke Oven Gas: 4.63; calculated
- natural gas: 0.0593; calculated
- process steam: 3.34e7; measured
- Chemicals (unspecified): 25; measured
  LE-500
- Soap Detergent: 8; measured
- sodium hydroxide: 250; measured
- Sodium hydrosulfite: 100; measured
- Vat dye: 63.1; measured
- river water: 41300; measured
- freshwater: 2440; measured

## Outputs
- carbon dioxide (fossil): 3010; calculated
- carbon monoxide (fossil): 0.357; calculated
- sulfur dioxide: 2.26; calculated
- methane (fossil): 14.4; calculated
- Nitrogen oxides: 0.784; calculated
- nitrous oxide: 0.046; measured
- particles (> PM10): 1.07; calculated
- ammonia: 0.000109; measured
- non-methane volatile organic compounds: 0.0158; measured
- waste water - untreated: 42900; measured
- chemical oxygen demand: 48.9; calculated
- Suspended solids, unspecified,Suspended solids, unspecified: 5.28; calculated
- lead: 9.29e-6; calculated
- mercury: 1.95e-7; calculated
- fluorine: 1.76e-6; calculated
- cadmium: 3.45e-7; calculated
- arsenic: 7.95e-6; calculated

## Use advice
使用所提供的数据时，用户应注意到染色过程相对于整个操作中所消耗的能量比例，因为它占据了相当大的部分（53%）。应特别关注蒸汽和导热油锅炉的能源使用情况，其消耗比例为17:1。在各个加工阶段（煮练、漂白、丝光、磨毛、平幅水洗、培烘和轧染）的蒸汽消耗模式应遵循比例2:1:1:1:1:2。在考虑环境影响和实施清洁生产措施时，按照这些比例对能耗进行建模至关重要。建议用户在江苏省纺织行业的实践和限制条件下应用这些数据。

## Review details
清单： 内部审查通过几个迭代步骤完成，涉及原始数据验证、原始数据记录、代表性、完整性、与 ISO 14040 和 14044 有关的建模的一致性。

## Data sources
- 朱亚楠. 棉布连续轧染工艺生命周期环境影响评价. (南京大学, 2012).
