# cement production|cement, ordinary portland cement, 52.5MPa|dry process rotary kiln, incineration of waste

Dataset: ILCD process, Unit process, black box
Geography: BJ-CN
Classification: Materials production / Other mineralic materials
Generated by: Siqi Yang
Amounts: no units in this file; such an amount is in the reference unit of its flow, which a separate flow dataset defines
copyright: false

## General comment
Incineration of waste. The environmental impact of waste incineration in a new dry process rotary kiln system is analyzed.

## Geography
A cement plant under Beijing Jinyu Group in Beijing

## Model description
Based on the characteristics of the cement production process itself, the research scope is defined as follows: from raw material entering the plant, raw material pre-treatment, raw meal grinding, clinker production, clinker grinding, until the cement homogenization, storage, and packaging. The production and processing processes of raw materials are not considered here, only the direct impact of the production process on the environment, namely the direct consumption of raw materials and the direct discharge of waste. The functional unit is 1 ton of 525# ordinary Portland cement with a compressive strength of 52.5 MPa.

## Reference product
- cement, ordinary portland cement, 52.5MPa: 1000
  P.O. 52.5 Cement

## Inputs
All rows: measured
- limestone, crushed, for mill: 1318.5
  limestone
- clay: 94.5
  clay-based raw materials
- iron, powder: 27
  Iron correction raw material
- gypsum (desulphurized): 60
  The proportion of gypsum is 5.5%
- mixed materials, mineral: 200
  Mixed material
- Waste, from industry: 12.5; min 10; max 15; uniform
  Industrial waste
- hard coal, run-of-mine: 120
  Coal consumption
- electricity, medium voltage: 363.6
  Electricity consumption
- hard coal: 129.156
  Standard coal. The original text refers to the consumption of fuel oil (L), which is converted to the equivalent amount of standard coal. The original data is 120kg standard coal, here converted to hard coal, the conversion formula is 1kg hard coal = 0.929kg standard coal.

## Outputs
All rows: measured
- Nitrogen oxides: 1.43
  NOx
- sulfur dioxide: 0.003
  SO2
- hydrogen chloride: 0.00945
  HCI
- fluorine: 0.000685
  F
- particles (> PM10): 0.0098
  Smoke, with an unspecified particle size, is treated as PM > 10 micrometers in diameter.
- mercury: 1.55e-6; min 1.3e-6; max 1.8e-6; uniform
  Hg
- arsenic: 5.1e-5; min 1.3e-5; max 8.9e-5; uniform
  AS
- chromium: 2.6e-5
  Cr
- copper: 3.53e-5; min 2.6e-6; max 6.8e-5; uniform
  With
- lead: 5.25e-5; min 2.6e-5; max 7.9e-5; uniform
  Pb
- zinc: 0.00062; min 0.00014; max 0.0011; uniform
  Zn
- cadmium: 3.95e-6; min 2.6e-6; max 5.3e-6; uniform
  Cd
- nickel: 3.15e-5; min 2.6e-5; max 3.7e-5; uniform
  Ni

## Cut-off and completeness
CO2 emissions data is missing.

## Data sources
- 富丽. (2004). 生态水泥生命周期评价研究 [硕士, 北京工业大学].
