# MaterialConveying|Concreteproducts|Cement,sand,gravel,etc.|Material transportation and storage|All sizes / 物料输送|混凝土制品|水泥、砂子、石子等|物料输送储存|所有规模

Dataset: ILCD process, Partly terminated system
Geography: CN
Reference year: 2019
Classification: Materials production / Other mineralic materials
Generated by: The data was created by the Office of the Second National Pollution Source Census of the Ministry of Ecology and Environment, and the data was organized by the TianGong Plan team for ILCD format / 生态环境部第二次全国污染源普查工作办公室创建数据，天工计划团队常慧敏整理数据为ILCD格式
Amounts: no units in this file; such an amount is in the reference unit of its flow, which a separate flow dataset defines
copyright: false

## Technology and included processes
the Technical of end-of-pipe management technology for pollution Ordinary Portland Cementis/，The formula for calculating the actual operation rate (k-value) of the end-of-pipe treatment facility is /
污染物指标废气量的末端治理技术是/

## Reference product
- Ordinary Portland Cement: 1000; calculated
  原文件中描述污染物类别为Product，污染物指标为混凝土制品，此处对其进行了匹配工作，将其匹配到LCAflow库里面相最符合的流

## Outputs
- Exhaust gas: 20; calculated
  原文件中描述污染物类别为废气，污染物指标为废气量，此处对其进行了匹配工作，将其匹配到LCAflow库里面相最符合的流
- particles (PM2.5 - PM10): 0.00039, 0.13 (2 entries); calculated
  原文件中描述污染物类别为废气，污染物指标为颗粒物，此处对其进行了匹配工作，将其匹配到LCAflow库里面相最符合的流

## Data sources
- 第二次全国污染源普查产排污核算系数手册（试用版）,二级代码30,三级代码302.0,四级代码3021文件，在完整版文件中第706页
