# 土壤修复;异位修复;生物堆;建造;生物堆设施

Dataset: ILCD process, Unit process, single operation
Geography: IT
Reference year: 2018
Classification: Unit processes / Other Services / Repair and maintenance
Generated by: 王宁, wang_ning@caep.org.cn
Owner: 天工LCI数据工作小组
Review: Dependent internal review by 天工LCI数据工作小组
Amounts: no units in this file; such an amount is in the reference unit of its flow, which a separate flow dataset defines
copyright: false
licenseType: Free of charge for all users and uses

## General comment
使用HDPE、钢铁等建设一个面积为385平方米，高度为1.3米的生物堆设施

## Technical purpose
此数据集代表了用于土壤修复目的的生物堆设施建设。生物堆是一种用于污染土壤生物降解的生物反应器，通常用于环境清洁项目中的原位或异位处理。使用HDPE和钢铁材料建造的生物堆面积为385平方米，高度为1.3米，被设计用于通过生物手段处理受污染的土壤。

## Reference product
- biopile facility: 1; measured

## Inputs
- Polyethylene,Polyethylene: 16500; measured
- Steel: 100; measured

## Use advice
在使用此数据集进行生命周期评估（LCA）时，用户必须确保正确分配与生物堆设施建设相关的环境影响。应考虑包括与建设中使用的原材料（HDPE、钢铁等）的开采和加工相关的潜在间接效应。建设阶段的能源消耗应该被计算在内。用户还应考虑生物堆的运行阶段，包括电力和水的使用、维护，以及在其使用寿命结束时的最终拆除或再利用。建议评估数据质量，例如与时间相关的覆盖范围和技术代表性，以确保相关性和准确性。

## Review details
清单： 内部审查通过几个迭代步骤完成，涉及原始数据验证、原始数据记录、代表性、完整性、与 ISO 14040 和 14044 有关的建模的一致性。

## Data sources
- D’Imporzano, G. et al. OPTIMIZING BIOREMEDIATION OF HYDROCARBON POLLUTED SOIL BY LIFE CYCLE ASSESSMENT (LCA) APPROACH. Environmental Engineering and Management Journal (2019).
