# 水泥生产;水泥, 硅酸盐水泥, 42.5MPa;立窑

Dataset: ILCD process, Unit process, black box
Geography: CN
Reference year: 2004
Classification: Materials production / Other mineralic materials
Generated by: 杨思琪, ysqsophia@gmail.com
Owner: 天工LCI数据工作小组
Review: Dependent internal review by 天工LCI数据工作小组
Amounts: no units in this file; such an amount is in the reference unit of its flow, which a separate flow dataset defines
copyright: false
licenseType: Free of charge for all users and uses

## General comment
典型水泥生产工艺。原料组分包括石灰石、石膏、粘土和铁粉等。能源消耗包括各生产工序的电耗和煤耗，污染物则包括颗粒物、SO2、NOx和CO2等。

## Technical purpose
所述的水泥生产工艺用于生产42.5MPa硅酸盐水泥。该类型的水泥在需要高机械强度的建筑结构、道路铺面和商用混凝土应用领域广泛使用。工艺中指定的立窑方法，适用于因生产规模或技术考量需要使用立窑而非其他类型窑炉的情况。

## Model description
研究以1kg42.5等级硅酸盐水泥作为评价的功能单位。评价范围界定为水泥产品的厂内生产过程及其周边环境。其中，厂内生产过程是指原料依次经过预处理、生料粉磨、煅烧、熟料磨和水泥均化等工序最终成为水泥产品的生产全过程。水泥生产过程的周边环境是指外部资源和能源的投人和污染物的排放等。

## Reference product
- cement, portland cement, 42.5MPa: 1000
  1kg42.5等级硅酸盐水泥

## Inputs
- limestone, crushed, for mill: 1125.9
  石灰石
- clay: 166.5
  粘土
- gypsum stone (CaSO4-dihydrate): 56.8
  石膏
- iron, powder: 61.3
  铁粉
- hard coal: 210.201
  标准煤。原始数据为0.1953kg标准煤，这里换算为硬煤，换算公式为1kg硬煤=0.929kg标准煤。
- electricity, medium voltage: 298.8
  电力

## Outputs
- particles (> PM10): 0.325
  颗粒物，未标明粒径，按PM>10处理。
- sulfur dioxide: 0.3993
  SO2
- Nitrogen oxides: 2.4
  NOx
- carbon dioxide: 1070.3
  CO2

## Use advice
在使用本生命周期评估数据集进行硅酸盐水泥生产分析时，至关重要的是确保系统边界包括从原料预处理到水泥均化的整个厂内生产过程，以及外部资源输入和排放的释放。考虑立窑工艺特有的排放特征尤为重要，尤其是电耗和煤耗以及颗粒物、SO2、NOx和CO2的生成。此数据集的功能单位为1kg 42.5等级硅酸盐水泥，使用该数据扩大模型或评估时，必须考虑此细节。对于评估的特定背景，任何关于产品末端生命周期阶段的考虑，包括回收或废物处理，必须根据具体情况添加到现有数据集中。

## Review details
清单： 内部审查通过几个迭代步骤完成，涉及原始数据验证、原始数据记录、代表性、完整性、与 ISO 14040 和 14044 有关的建模的一致性。

## Data sources
- 朱天乐, 何炜, 曾小岚, 黄新, & 马保国. (2006). 中国水泥生产环境负荷研究. 环境科学, 10, 2135–2138.
