# 土壤修复;原位修复;原位化学氧化;注入井

Dataset: ILCD process, Unit process, single operation
Geography: CN
Reference year: 2021
Classification: Unit processes / Other Services / Repair and maintenance
Generated by: 浩骅, wangyp@caep.org.cn
Owner: 天工LCI数据工作小组
Review: Dependent internal review by 天工LCI数据工作小组
Amounts: no units in this file; such an amount is in the reference unit of its flow, which a separate flow dataset defines
copyright: false
licenseType: Free of charge for all users and uses

## General comment
抽提井、注入井布置

## Technology and included processes
在修复范围内布置20个注射点位

## Technical purpose
该土壤修复工艺采用现场化学氧化以及抽提井、注入井的布置方法来进行污染土壤的净化，无需进行挖掘。该方法适用于清除氯化溶剂、农药和某些金属等污染物，特别适用于污染较深且挖除土壤不切实际或过于破坏性的场所。

## Reference product
- injection well: 1; measured

## Inputs
All rows: measured
- Polyvinyl chloride: 341
- cement, unspecified: 232.6
- silica sand: 150
- steel rebar: 112
- Electricity: 2477.88
- Stainless Steel: 324

## Outputs
- Solid Waste: 46.74; measured
- SOx: 6.84; measured
- sulfur dioxide: 0.717; measured
- carbon dioxide (fossil): 321.9; measured

## Use advice
在使用此数据集进行生命周期评估时，用户必须确保所有主要的输入和输出流，包括所有原材料和能源消耗，都得到全面的记录和核算。此外，该数据集代表了一个具有20个注射点的单元过程，根据需要修复的面积应相应缩放。用户还应考虑该方法的技术适用性，特别是针对污染物和现场条件，并可能需要根据现场特定的地质和化学数据调整数据集。

## Review details
清单： 内部审查通过几个迭代步骤完成，涉及原始数据验证、原始数据记录、代表性、完整性、与 ISO 14040 和 14044 有关的建模的一致性。

## Data sources
- 王顺扬. 基于多目标决策方法改进LCA的污染场地修复技术比选研究.山西大学（硕士论文）,2021.
