# Desalination for seawater | Electrodialysis, spiral-wound, CN

Dataset: ILCD process, Unit process, single operation
Reference year: 2022
Classification: Materials production / Other mineralic materials
Functional unit: 1 t sodium chloride
Generated by: Jiaqi Lu, wilsherelu@foxmail.com
Review: Dependent internal review by Tiangong LCI Data Working Group
Amounts: no units in this file; such an amount is in the reference unit of its flow, which a separate flow dataset defines

## Reference product
- sodium chloride: 1000; article inperiodical
  产品盐

## Inputs
- electricity mix: 215.82; article inperiodical
  过程电耗
- Electrodialysis Component; article inperiodical
  ED 组件

## Review details
Inventory: The internal review was done by several iteration steps concerning raw data validation, raw data documentation, representativity, completeness and consistency of modelling with regard to ISO 14040 and 14044.; Documentation: The review of the documentation was performed by Ecobilan and is in compliance with ISO 14040 and 14044. The data set documentation is correct in view of the appropriateness of the information provided. It includes all relevant information in view of data quality and scope of application of the respective LCI result.
