# 土壤修复;原位修复;土壤气相抽提;建设阶段;SVE系统安装

Dataset: ILCD process, Unit process, single operation
Geography: KR
Reference year: 2011
Classification: Other Services / Repair and maintenance
Generated by: 雷秋霜, leiqs@caep.org.cn
Owner: 天工LCI数据工作小组
Review: Dependent internal review by 天工LCI数据工作小组
Amounts: no units in this file; such an amount is in the reference unit of its flow, which a separate flow dataset defines
copyright: false
licenseType: Free of charge for all users and uses

## General comment
本土壤气相抽提(SVE)系统安装用于原位土壤修复。该单元过程是针对项目建设阶段的单一操作，旨在通过移除挥发性化合物来处理和改善被污染土壤的质量。

## Reference product
- SVE system: 1; measured
  焊接烟气

## Inputs
- sand: 4; measured
- Concrete: 5; measured
- Flexible Polyurethane Hose: 340; measured
  flexible polyurethane hose（聚氨酯软管）
- Welding Strip: 100; measured
  焊接条

## Use advice
在使用此数据集进行生命周期评估(LCA)时，确保系统边界包括相关的建设阶段，并且数据仅代表SVE系统安装的环境影响。确保数据集适当缩放，以反映修复项目的规模。为了全面评估，考虑将此数据集与运营和退役阶段的数据以及与SVE系统组件运输相关的任何排放数据集成。

## Review details
清单： 内部审查通过几个迭代步骤完成，涉及原始数据验证、原始数据记录、代表性、完整性、与 ISO 14040 和 14044 有关的建模的一致性。

## Data sources
- Assessment of Environmental Impacts and CO2 Emissions from Soil Remediation Technologies using Life cycle Assessment - Case Studies on SVE and Biopile Systems
