# Naturalgas|Coalbedmethane|Drainage and pressure reduction desorption|All sizes / 天然气|煤层气|排水降压解析|所有规模

Dataset: ILCD process, Unit process, single operation
Geography: CN
Reference year: 2019
Classification: Energy carriers and technologies / Natural gas based fuels
Generated by: The data was created by the Office of the Second National Pollution Source Census of the Ministry of Ecology and Environment, and the data was organized by the TianGong Plan team for ILCD format / 生态环境部第二次全国污染源普查工作办公室创建数据，天工计划团队常慧敏整理数据为ILCD格式
Owner: Tiangong LCI Data Working Group / 天工LCI数据工作小组
Review: Dependent internal review by Tiangong LCI Data Working Group / 天工LCI数据工作小组
Amounts: no units in this file; such an amount is in the reference unit of its flow, which a separate flow dataset defines
copyright: false
licenseType: Free of charge for all users and uses

## General comment
the Technical of end-of-pipe management technology for pollution chemical oxygen demandisCoagulation and flocculation + advanced oxidation + biological activated carbon filtration，Its Technical efficiency of end-of-pipe management65，The formula for calculating the actual operation rate (k-value) of the end-of-pipe treatment facility is k = actual operating hours of environmental protection facilities (hours) / hours that environmental protection facilities should operate (hours)

## Reference product
- Natural gas: 10000; calculated
  源文件中描述为为天然气，此处对其进行了匹配工作，将其匹配到LCAflow库里面相最符合的流

## Outputs
All rows: calculated
- chemical oxygen demand: 0
  污染物指标化学需氧量的末端治理技术是物理+化学+回注，其效率为100，末端治理设施实际运行率（k值）计算公式为k=污水治理设施年运行时间（小时/年）/正常生产时间（小时/年）。原文件中描述污染物类别为废水，污染物指标为化学需氧量，此处对其进行了匹配工作，将其匹配到LCAflow库里面相最符合的流
- chemical oxygen demand: 0
  污染物指标化学需氧量的末端治理技术是物理+回注，其效率为100，末端治理设施实际运行率（k值）计算公式为k=污水治理设施年运行时间（小时/年）/正常生产时间（小时/年）。原文件中描述污染物类别为废水，污染物指标为化学需氧量，此处对其进行了匹配工作，将其匹配到LCAflow库里面相最符合的流
- Ammonia Nitrogen: 0
  污染物指标氨氮的末端治理技术是物理+化学+回注，其效率为100，末端治理设施实际运行率（k值）计算公式为k=污水治理设施年运行时间（小时/年）/正常生产时间（小时/年）。原文件中描述污染物类别为废水，污染物指标为氨氮，此处对其进行了匹配工作，将其匹配到LCAflow库里面相最符合的流
- Ammonia Nitrogen: 0
  污染物指标氨氮的末端治理技术是物理+回注，其效率为100，末端治理设施实际运行率（k值）计算公式为k=污水治理设施年运行时间（小时/年）/正常生产时间（小时/年）。原文件中描述污染物类别为废水，污染物指标为氨氮，此处对其进行了匹配工作，将其匹配到LCAflow库里面相最符合的流
- Petroleum-related waste: 0
  污染物指标石油类的末端治理技术是物理+化学+回注，其效率为100，末端治理设施实际运行率（k值）计算公式为k=污水治理设施年运行时间（小时/年）/正常生产时间（小时/年）。原文件中描述污染物类别为废水，污染物指标为石油类，此处对其进行了匹配工作，将其匹配到LCAflow库里面相最符合的流
- Petroleum-related waste: 0
  污染物指标石油类的末端治理技术是物理+回注，其效率为100，末端治理设施实际运行率（k值）计算公式为k=污水治理设施年运行时间（小时/年）/正常生产时间（小时/年）。原文件中描述污染物类别为废水，污染物指标为石油类，此处对其进行了匹配工作，将其匹配到LCAflow库里面相最符合的流
- Nitrogen, organic bound: 0
  污染物指标总氮的末端治理技术是物理+化学+回注，其效率为100，末端治理设施实际运行率（k值）计算公式为k=污水治理设施年运行时间（小时/年）/正常生产时间（小时/年）。原文件中描述污染物类别为废水，污染物指标为总氮，此处对其进行了匹配工作，将其匹配到LCAflow库里面相最符合的流
- Nitrogen, organic bound: 0
  污染物指标总氮的末端治理技术是物理+回注，其效率为100，末端治理设施实际运行率（k值）计算公式为k=污水治理设施年运行时间（小时/年）/正常生产时间（小时/年）。原文件中描述污染物类别为废水，污染物指标为总氮，此处对其进行了匹配工作，将其匹配到LCAflow库里面相最符合的流
- Petroleum-related waste: 0.0108
  污染物指标石油类的末端治理技术是混凝絮凝＋高级氧化＋生物活性炭过滤，其效率为60，末端治理设施实际运行率（k值）计算公式为k=污水治理设施年运行时间（小时/年）/正常生产时间（小时/年）。原文件中描述污染物类别为废水，污染物指标为石油类，此处对其进行了匹配工作，将其匹配到LCAflow库里面相最符合的流
- Petroleum-related waste: 0.0108
  污染物指标石油类的末端治理技术是生化法+BAF曝气滤池，其效率为60，末端治理设施实际运行率（k值）计算公式为k=污水治理设施年运行时间（小时/年）/正常生产时间（小时/年）。原文件中描述污染物类别为废水，污染物指标为石油类，此处对其进行了匹配工作，将其匹配到LCAflow库里面相最符合的流
- Petroleum-related waste: 0.01161
  污染物指标石油类的末端治理技术是高级氧化＋絮凝及固液分离＋折点加氯，其效率为57，末端治理设施实际运行率（k值）计算公式为k=污水治理设施年运行时间（小时/年）/正常生产时间（小时/年）。原文件中描述污染物类别为废水，污染物指标为石油类，此处对其进行了匹配工作，将其匹配到LCAflow库里面相最符合的流
- Ammonia Nitrogen: 0.03216
  污染物指标氨氮的末端治理技术是高级氧化＋絮凝及固液分离＋折点加氯，其效率为94，末端治理设施实际运行率（k值）计算公式为k=污水治理设施年运行时间（小时/年）/正常生产时间（小时/年）。原文件中描述污染物类别为废水，污染物指标为氨氮，此处对其进行了匹配工作，将其匹配到LCAflow库里面相最符合的流
- Waste water: 75000
  污染物指标工业废水量的末端治理技术未说明。原文件中描述污染物类别为废水，污染物指标为工业废水量，此处对其进行了匹配工作，将其匹配到LCAflow库里面相最符合的流
- Nitrogen, organic bound: 0.07821
  污染物指标总氮的末端治理技术是高级氧化＋絮凝及固液分离＋折点加氯，其效率为89，末端治理设施实际运行率（k值）计算公式为k=污水治理设施年运行时间（小时/年）/正常生产时间（小时/年）。原文件中描述污染物类别为废水，污染物指标为总氮，此处对其进行了匹配工作，将其匹配到LCAflow库里面相最符合的流
- Nitrogen, organic bound: 0.09243
  污染物指标总氮的末端治理技术是生化法+BAF曝气滤池，其效率为87，末端治理设施实际运行率（k值）计算公式为k=污水治理设施年运行时间（小时/年）/正常生产时间（小时/年）。原文件中描述污染物类别为废水，污染物指标为总氮，此处对其进行了匹配工作，将其匹配到LCAflow库里面相最符合的流
- Ammonia Nitrogen: 0.23048
  污染物指标氨氮的末端治理技术是生化法+BAF曝气滤池，其效率为57，末端治理设施实际运行率（k值）计算公式为k=污水治理设施年运行时间（小时/年）/正常生产时间（小时/年）。原文件中描述污染物类别为废水，污染物指标为氨氮，此处对其进行了匹配工作，将其匹配到LCAflow库里面相最符合的流
- Ammonia Nitrogen: 0.25728
  污染物指标氨氮的末端治理技术是混凝絮凝＋高级氧化＋生物活性炭过滤，其效率为52，末端治理设施实际运行率（k值）计算公式为k=污水治理设施年运行时间（小时/年）/正常生产时间（小时/年）。原文件中描述污染物类别为废水，污染物指标为氨氮，此处对其进行了匹配工作，将其匹配到LCAflow库里面相最符合的流
- Nitrogen, organic bound: 0.30573
  污染物指标总氮的末端治理技术是混凝絮凝＋高级氧化＋生物活性炭过滤，其效率为57，末端治理设施实际运行率（k值）计算公式为k=污水治理设施年运行时间（小时/年）/正常生产时间（小时/年）。原文件中描述污染物类别为废水，污染物指标为总氮，此处对其进行了匹配工作，将其匹配到LCAflow库里面相最符合的流
- chemical oxygen demand: 1.14796
  污染物指标化学需氧量的末端治理技术是高级氧化＋絮凝及固液分离＋折点加氯，其效率为89，末端治理设施实际运行率（k值）计算公式为k=污水治理设施年运行时间（小时/年）/正常生产时间（小时/年）。原文件中描述污染物类别为废水，污染物指标为化学需氧量，此处对其进行了匹配工作，将其匹配到LCAflow库里面相最符合的流
- chemical oxygen demand: 2.19156
  污染物指标化学需氧量的末端治理技术是生化法+BAF曝气滤池，其效率为79，末端治理设施实际运行率（k值）计算公式为k=污水治理设施年运行时间（小时/年）/正常生产时间（小时/年）。原文件中描述污染物类别为废水，污染物指标为化学需氧量，此处对其进行了匹配工作，将其匹配到LCAflow库里面相最符合的流
- chemical oxygen demand: 3.6526
  污染物指标化学需氧量的末端治理技术是混凝絮凝＋高级氧化＋生物活性炭过滤，其效率为65，末端治理设施实际运行率（k值）计算公式为k=污水治理设施年运行时间（小时/年）/正常生产时间（小时/年）。原文件中描述污染物类别为废水，污染物指标为化学需氧量，此处对其进行了匹配工作，将其匹配到LCAflow库里面相最符合的流

## Use advice
This dataset is derived from the Pollution Source Census Report and contains information on pollution emissions and related products. However, it does not include data on energy or chemical consumption, nor does it provide information on waste or co-product generation. When utilizing this dataset, please supplement the missing data based on actual conditions before use
该数据集来源于污染源普查报告，包含污染物排放及相关产品信息，但不包含能源或化学品消耗数据，也不提供废弃物或共生产物产生信息。在使用该数据集时，请根据实际情况补充缺失数据后再使用。

## Review details
Inventory: The internal review was done by several iteration steps concerning raw data validation, raw data documentation, representativity, completeness and consistency of modelling with regard to ISO 14040 and 14044.
清单： 内部审查通过几个迭代步骤完成，涉及原始数据验证、原始数据记录、代表性、完整性、与 ISO 14040 和 14044 有关的建模的一致性。

## Data sources
- 第二次全国污染源普查产排污核算系数手册（试用版）,二级代码07文件，在完整版文件中第80页
