# Glass production | Tempered glass | Tempered treatment

Dataset: ILCD process, Unit process, single operation
Geography: KM-YN-CN
Reference year: 2015
Valid until: 2023
Classification: Materials production / Other mineralic materials
Generated by: He xiaxia, 18616148319@163.com
Review: Dependent internal review by Tiangong LCI Data Working Group
Amounts: no units in this file; such an amount is in the reference unit of its flow, which a separate flow dataset defines
copyright: false

## Reference product
- Glass (formed & finished): 250000; measured
  钢化玻璃

## Inputs
- Glass (formed & finished): 303000; measured

## Outputs
- Glass (formed & finished): 50000; measured
  中空玻璃
- cullet float glass: 3201.5; measured

## Review details
Inventory: The internal review was done by several iteration steps concerning raw data validation, raw data documentation, representativity, completeness and consistency of modelling with regard to ISO 14040 and 14044.; Documentation: The review of the documentation was performed by Ecobilan and is in compliance with ISO 14040 and 14044. The data set documentation is correct in view of the appropriateness of the information provided. It includes all relevant information in view of data quality and scope of application of the respective LCI result.

## Data sources
- 建设项目环境影响报告表（国环评证乙字 第 2501 号）
