# 场地准备阶段--固体废物池建设

Dataset: ILCD process
Geography: SC-CN
Reference year: 2014
Valid until: 2016
Classification: Materials production / Other mineralic materials
Generated by: 洪溥, 15695258655@163.com
Review: Dependent internal review by 天工LCI数据工作小组
Amounts: no units in this file; such an amount is in the reference unit of its flow, which a separate flow dataset defines

## Geography
我国页岩气开采工作目前集中在四川及重庆地区，选取四川及重庆的数据进行LCA计算。

## Time period
原始数据时间介于2014-2016之间

## Inputs
All rows: uniform; article inperiodical
- #325 cement: 199000; min 282000; max 149000
  C30混凝土的组成部分
- sand: 341000; min 482000; max 255000
  C30混凝土的组成部分
- gravel: 590000; min 834000; max 441000
  C30混凝土的组成部分
- freshwater: 94000; min 132000; max 70000
  C30混凝土的组成部分
- Diesel: 5050; min 7251; max 3689
  用于材料运输等
- Electricity: 1846.8; min 2610; max 1382.4
  用于混凝土搅拌等

## Review details
清单： 内部审查通过几个迭代步骤完成，涉及原始数据验证、原始数据记录、代表性、完整性、与 ISO 14040 和 14044 有关的建模的一致性。

## Data sources
- Wang, J., Liu, M., McLellan, B. C., Tang, X. & Feng, L. Environmental impacts of shale gas development in China: A hybrid life cycle analysis. Resources, Conservation and Recycling 120, 38–45 (2017).
