# Steam/hotwater/other|Fueloil|All types of boilers (outside boiler water treatment)|All sizes / 蒸汽/热水/其它|燃油|全部类型锅炉（锅外水处理）|所有规模

Dataset: ILCD process, Unit process, single operation
Geography: CN
Reference year: 2019
Classification: Energy carriers and technologies / Heat and steam
Generated by: The data was created by the Office of the Second National Pollution Source Census of the Ministry of Ecology and Environment, and the data was organized by the TianGong Plan team for ILCD format / 生态环境部第二次全国污染源普查工作办公室创建数据，天工计划团队常慧敏整理数据为ILCD格式
Owner: Tiangong LCI Data Working Group / 天工LCI数据工作小组
Amounts: no units in this file; such an amount is in the reference unit of its flow, which a separate flow dataset defines
copyright: false
licenseType: Free of charge for all users and uses

## Technology and included processes
the Technical of end-of-pipe management technology for pollution chemical oxygen demandisPhysical + chemical method，Its Technical efficiency of end-of-pipe management59.26

## Reference product
- Heavy fuel oil (1.0 wt.% S): 1000; input; calculated
  源文件中描述为为燃油，此处对其进行了匹配工作，将其匹配到LCAflow库里面相最符合的流，污染物指标备注为工业废水量

## Outputs
- Waste water: nan; calculated
  污染物指标工业废水量的末端治理技术是物理+化学法+综合利用，其效率为100，末端治理设施实际运行率（k值）计算公式为K=（锅炉运行小时数-废水处理设施的故障小时数）/锅炉运行小时数。原文件中描述污染物类别为废水，污染物指标为工业废水量，此处对其进行了匹配工作，将其匹配到LCAflow库里面相最符合的流，污染物指标备注为工业废水量
- Waste water: nan; calculated
  污染物指标工业废水量的末端治理技术是物理+化学法，其效率为0，末端治理设施实际运行率（k值）计算公式为K=（锅炉运行小时数-废水处理设施的故障小时数）/锅炉运行小时数。原文件中描述污染物类别为废水，污染物指标为工业废水量，此处对其进行了匹配工作，将其匹配到LCAflow库里面相最符合的流，污染物指标备注为工业废水量
- chemical oxygen demand: 0; calculated
  污染物指标化学需氧量的末端治理技术是物理+化学法+综合利用，其效率为100，末端治理设施实际运行率（k值）计算公式为K=（锅炉运行小时数-废水处理设施的故障小时数）/锅炉运行小时数。原文件中描述污染物类别为废水，污染物指标为化学需氧量，此处对其进行了匹配工作，将其匹配到LCAflow库里面相最符合的流，污染物指标备注为化学需氧量
- chemical oxygen demand: 0.109998; calculated
  污染物指标化学需氧量的末端治理技术是物理+化学法，其效率为59.26，末端治理设施实际运行率（k值）计算公式为K=（锅炉运行小时数-废水处理设施的故障小时数）/锅炉运行小时数。原文件中描述污染物类别为废水，污染物指标为化学需氧量，此处对其进行了匹配工作，将其匹配到LCAflow库里面相最符合的流，污染物指标备注为化学需氧量

## Data sources
- 第二次全国污染源普查产排污核算系数手册（试用版）,四级代码4430文件，在完整版文件中第5449页
