# 秸秆收集运输｜秸秆｜运载量为16吨的卡车

Dataset: ILCD process, Unit process, single operation
Geography: CN
Reference year: 2010
Classification: Unit processes / Transport services / Road
Functional unit: 1 ton of straw as a functional unit (0% moisture content).
LCI method principle: Consequential
Generated by: 刘超硕, liucs22@mails.jlu.edu.cn
Owner: 天工LCI数据工作小组
Review: Dependent internal review by 天工LCI数据工作小组
Amounts: no units in this file; such an amount is in the reference unit of its flow, which a separate flow dataset defines
copyright: false
licenseType: Free of charge for all users and uses

## General comment
本文献系统边界包括作物的生长阶段、农业废弃物（秸秆）的获取阶段、农业废弃物（秸秆）的预处理阶段和燃烧发电阶段（最终使用电力阶段也包含在内只是过程中没有排放）。此工艺过程为农业废弃物的收集运输阶段。

## Technical purpose
该工业过程涉及农业废弃物的物流，具体是秸秆的收集和运输，用于能源生产。通过该过程收集的秸秆作为生物质燃料用于燃烧发电，运输服务由载重量为16吨的卡车提供。运输的秸秆含水量为零，并且按吨计量，遵循从作物生长到能源转换的完整生命周期。

## Reference product
- Crop straw: 1000; measured

## Outputs
All rows: measured
- sulfur dioxide: 0.00585
- carbon monoxide,carbon monoxide (fossil): 0.00342
  原文未区分排放源为生物源或化石源，根据专家判断此处为化石源。
- nitrous oxide: 0.171, 0.01369 (2 entries)
- particles (> PM10),particles (> PM10): 0.00279
- hydrocarbons (unspecified): 0.0102
- carbon dioxide (fossil): 14.68
  原文未区分排放源为生物源或化石源，根据专家判断此处为化石源。
- methane (fossil): 0.044
  原文未区分排放源为生物源或化石源，根据专家判断此处为化石源。

## Use advice
在使用此数据集进行生命周期评估(LCA)时，请确保将其包含在针对作为生物质原料的秸秆收集和运输阶段的清单分析范围内。重要的是要记住功能单位为1吨秸秆，含水量为0%，并要考虑系统边界，包括作物生长、秸秆获取、预处理以及直到发电阶段的相关排放。当最终电力使用不导致与此LCA研究相关的进一步直接排放时，可以适用使用阶段的排除。

## Review details
清单： 内部审查通过几个迭代步骤完成，涉及原始数据验证、原始数据记录、代表性、完整性、与 ISO 14040 和 14044 有关的建模的一致性。

## Data sources
- Lu, W. & Zhang, T. Life-Cycle Implications of Using Crop Residues for Various Energy Demands in China. Environ. Sci. Technol. 44, 4026–4032 (2010).
