# NCM火法回收

Dataset: ILCD process, Unit process, single operation
Geography: CN
Reference year: 2020
Classification: Unit processes / End-of-life treatment / Material recycling
Functional unit: The product systems evaluated in this study are EB batteries. The service provided by these batteries is the distance driven; thus, the functional unit in this study is defined as an overall 100-km driving distance of a typical EB driven by a group of batteries (4 × 12 V, 20 Ah). According to the data of EB manufacturers, LFP, and NCM batteries can support a typical EB to travel for approximately 45 km and 50 km with one charge, the calculated lifetime distance is of 36, 000 km, and 30,000 km, respectively.
Generated by: 马清源, m1120498928@163.com
Owner: 天工LCI数据工作小组
Review: Dependent internal review by 天工LCI数据工作小组
Amounts: no units in this file; such an amount is in the reference unit of its flow, which a separate flow dataset defines
copyright: false
licenseType: Free of charge for all users and uses

## General comment
回收NCM电池的前体材料（锂镍钴锰酸盐氧化物）。

## Technical purpose
NCM火法回收工艺用于从废弃的NCM电池中回收前体材料，特别是锂镍钴锰酸盐氧化物。它通过使这些材料能够循环使用，支持锂离子电池技术的可持续发展。该过程适用于管理电池寿命终点电池的回收厂，将其转化为新电池生产的宝贵原材料。

## Reference product
- Ni-Co-Mn precursor: 0.604; measured
  锂镍钴锰

## Inputs
All rows: measured
- sulfate: 6.47
  硫酸盐 (98%)
- Heavy oil: 0.016
- silicon: 0.021
- Light gas oil: 0.013
- Water for industrial use: 64
- Electricity: 101.88
- carbon: 0.002
- natural gas,natural gas: 0.979
- magnesium chloride: 0.0009
- potassium chloride: 0.0004
- sodium chloride: 0.0005
- Lithium carbonate: 0.846
- Raw coal: 6.87

## Outputs
All rows: measured
- Secondary Synthetic Graphite: 1.21
- Secondary Aluminum: 0.35
- Secondary copper: 0.324
- Recycled Polypropylene: 0.198
- carbon dioxide (fossil): 0.953
  原文未区分bio和fossil，根据专家判断此处为fossil
- nickel: 7e-5
- Total particulate matter: 2.2e-5
- sulfur dioxide: 2.16e-6
- nitrogen monoxide: 1.5e-5
- aluminium: 0.005
- Waste Graphite: 5.1e-5
- chemical oxygen demand: 7.3e-8
- hazardous waste (unspecified): 0.0523
- waste incineration of plastics (PE, PP, PS, PB): 0.005

## Data selection and combination
NCM和LFP电池的生命周期清单是根据2018年至2019年的调查数据建立的，代表了锂离子电池技术的现状。

## Sampling procedure
电池回收的LCI是根据中国几家电池回收商的调查数据建立的，包括春星、宇光金铅（用于LAB）、GEM和Brump（用于LIB）。假设从废电池收集点到电池回收厂的距离为100公里。

## Use advice
在使用NCM和LFP电池的生命周期清单（LCI）数据时，必须考虑2018年至2019年收集数据的技术范围和时间框架，这可能不反映未来的进步。假设从收集点到回收厂的运输距离为100公里，必须适应特定的地理和物流条件。用于LCA目的时，应使用定义的功能单位寿命周期里程（LFP电池为36,000公里，NCM电池为30,000公里）来准确模拟使用阶段行为。此外，方法学建议包括考虑回收过程中潜在的技术变化，并更新数据以进行更准确的未来评估。

## Review details
清单： 内部审查通过几个迭代步骤完成，涉及原始数据验证、原始数据记录、代表性、完整性、与 ISO 14040 和 14044 有关的建模的一致性。

## Data sources
- Liu, W., Liu, H., Liu, W. & Cui, Z. Life cycle assessment of power batteries used in electric bicycles in China. RENEWABLE & SUSTAINABLE ENERGY REVIEWS 139, (2021).
