# 土壤修复;原位修复;原位化学氧化;运输;运输到场的设备与材料

Dataset: ILCD process, Unit process, single operation
Geography: CN
Reference year: 2021
Classification: Unit processes / Other Services / Repair and maintenance
Generated by: 王宁, wang_ning@caep.org.cn
Owner: 天工LCI数据工作小组
Review: Dependent internal review by 天工LCI数据工作小组
Amounts: no units in this file; such an amount is in the reference unit of its flow, which a separate flow dataset defines
copyright: false
licenseType: Free of charge for all users and uses

## General comment
将所需设备、材料药剂等运输至现场

## Technical purpose
该数据集描述了土壤修复项目中使用原位化学氧化技术的运输阶段。它适用于专注于通过现场化学处理过程恢复被污染土地的环境工程公司和顾问。

## Reference product
- Equipment and Materials Arriving on Site: 1.43586e6; measured

## Inputs
- transport in t*km: 2153.8; measured

## Use advice
使用此数据时，用户应将设备、材料和化学药剂的所有运输活动包含在原位土壤修复过程生命周期评估中。用户必须计算整个单元过程，包括与现场交付相关的所有主要原材料和能源消耗。此数据不应孤立使用，而应结合整个原位土壤修复项目的环境影响研究。

## Review details
清单： 内部审查通过几个迭代步骤完成，涉及原始数据验证、原始数据记录、代表性、完整性、与 ISO 14040 和 14044 有关的建模的一致性。

## Data sources
- 王顺扬. 基于多目标决策方法改进LCA的污染场地修复技术比选研究.山西大学（硕士论文）,2021.
