# Treatment of wasted electrodeionization module | mix of incineration and landfilling, CN

Dataset: ILCD process, Unit process, single operation
Geography: CN
Reference year: 2022
Classification: Materials production / Other mineralic materials
Functional unit: 1 item of EDI module
Generated by: Jiaqi Lu, wilsherelu@foxmail.com
Review: Dependent internal review by Tiangong LCI Data Working Group
Amounts: no units in this file; such an amount is in the reference unit of its flow, which a separate flow dataset defines
copyright: false

## Reference product
- Electrodeionization components: 1; input; article inperiodical
  1 wasted EDI module

## Outputs
All rows: article inperiodical
- landfill of ferro metals: 1.2
  废弃钛涂钌电极
- waste incineration of plastics (unspecified) fraction in municipal solid waste (MSW): 4.5
  废弃不锈钢电极
- waste incineration of plastics (unspecified) fraction in municipal solid waste (MSW): 12.71
  废弃EDI外壳（UPVC）
- waste incineration of plastics (unspecified) fraction in municipal solid waste (MSW): 3.82
  废弃EDI外壳（ABS)
- waste incineration of plastics (unspecified) fraction in municipal solid waste (MSW): 3.35
  废弃阴离子交换树脂
- waste incineration of plastics (unspecified) fraction in municipal solid waste (MSW): 2.75
  废弃阳离子交换树脂
- waste incineration of plastics (unspecified) fraction in municipal solid waste (MSW): 1.55
  废弃聚乙烯
- waste incineration of plastics (unspecified) fraction in municipal solid waste (MSW): 3.36
  废弃阴离子交换膜
- waste incineration of plastics (unspecified) fraction in municipal solid waste (MSW): 4.38
  废弃阳离子交换膜
- waste incineration of plastics (unspecified) fraction in municipal solid waste (MSW): 0.71
  废弃环氧树脂胶

## Review details
Inventory: The internal review was done by several iteration steps concerning raw data validation, raw data documentation, representativity, completeness and consistency of modelling with regard to ISO 14040 and 14044.; Documentation: The review of the documentation was performed by Ecobilan and is in compliance with ISO 14040 and 14044. The data set documentation is correct in view of the appropriateness of the information provided. It includes all relevant information in view of data quality and scope of application of the respective LCI result.

## Data sources
- Yuan, Y. et al. Deduction of carbon footprint for membrane desalination processes towards carbon neutrality: A case study on electrodeionization for ultrapure water preparation. Desalination 559, 116648 (2023).
