# 地层勘探 ; 石膏盐层 ; 物化探普查

Dataset: ILCD process, Unit process, single operation
Geography: SC-CN
Reference year: 2014
Classification: Unit processes / Energy carriers and technologies / Energetic raw materials
LCI method principle: Attributional
LCI method approaches: Consequential
Generated by: Shikang Kang, 908798159@qq.com
Owner: 天工LCI数据工作小组
Review: Dependent internal review by 天工LCI数据工作小组
Amounts: no units in this file; such an amount is in the reference unit of its flow, which a separate flow dataset defines
copyright: false
licenseType: Free of charge for all users and uses

## General comment
通过对四川盆地中东部6 × 104 km2范围内地震资料的精细解释，揭示了川盆地东部中下寒武统石膏盐岩的区域分布特征。与断层相关的褶皱发育在石膏盐岩之上，而6-7排NNE和NE向的平缓背斜主要分布在石膏盐岩之下。

## Geography
川东盆地

## Time period
文献发表时间

## Technology and included processes
对露头和钻井资料的综合分析，以及对6 × 104km2以上地震资料的解释，描绘了川盆地东部中下寒武统石膏盐层的区域分布，探讨了川盆地东部深盐下震旦系——寒武系天然气的成藏条件，指出了有利的勘探方向

## Technical purpose
此地震与地质数据为四川盆地东部的地层勘探过程所涉及，用于识别成藏条件和潜在勘探区域。这些数据对于专门从事搜寻和表征深层盐下烃类藏集地点的天然气探勘组织至关重要。分析特定地质构造（如登营组和石龙洞组）作为源岩、储岩或区域盖能力以指导钻探地点的选择和勘探策略，以寻找深盐下震旦系-寒武系天然气沉积。

## Reference product
- Well pad: 6e10; input; log-normal
  盆地范围

## Inputs
- natural gas: 4.45e-7; log-normal
  文献中没有天然气投入量，假设天然气开采过程中投入量：输出量=1:1

## Outputs
- natural gas: 4.45e-7; log-normal; calculated
  最大渗透率

## Data selection and combination
震旦系斗山沱组、震旦系登营组第三段、优势寒武系水井沱组三组烃源岩；震旦系登营组第二、四段、寒武系石龙洞组三组风化壳岩溶储层和粒滩储层；水井沱组中下寒武统石膏盐和页岩的区域盖。川东盆地深部盐下勘探的首要目标应为登营组第四段，其次为石龙洞组和登营组第二段

## Use advice
使用此数据集的用户应谨慎应用，并确保在构建储集层潜能模型和设计勘探策略时考虑四川盆地东部特有的地质参数及区域特性。使用数据时必须考虑区域地质，如断层相关的褶皱和背斜布局。此外，确定的勘探优先目标，即登营组第四段，其次是石龙洞组和登营组第二段，应指导此数据集在勘探工作中的使用。

## Review details
清单： 内部审查通过几个迭代步骤完成，涉及原始数据验证、原始数据记录、代表性、完整性、与 ISO 14040 和 14044 有关的建模的一致性。

## Data sources
- Gu, Z. et al. Accumulation conditions and exploration directions of natural gas in deep subsalt Sinian-Cambrian System in the eastern Sichuan Basin, SW China. Petroleum Exploration and Development 42, 152–166 (2015).
