# 氟化铝生产 ; 氟化铝 ; 摇篮

Dataset: ILCD process, Unit process, single operation
Geography: CN
Reference year: 2019
Classification: Unit processes / Materials production / Inorganic chemicals
Generated by: 蔡梓萌, caizm6178@163.com
Owner: 天工LCI数据工作小组
Review: Dependent internal review by 天工LCI数据工作小组
Amounts: no units in this file; such an amount is in the reference unit of its flow, which a separate flow dataset defines
copyright: false
licenseType: Free of charge for all users and uses

## General comment
通过该工业过程生产的氟化铝主要用作电解生产铝时的熔剂。它也用于陶瓷、搪瓷的制造和玻璃工业。

## Time period
文献发表日期

## Reference product
- aluminium fluoride: 1000; software or database
  aluminum fluoride

## Inputs
- hard coal; 26.3 MJ/kg: 108.896; software or database
  Fuel mix: raw coal (1%), raw NG (1%), crude oil (24%), clean coal (73%),
- natural gas, high pressure: 108.906; software or database
  Fuel mix: raw coal (1%), raw NG (1%), crude oil (24%), clean coal (73%),
- crude oil; 42.3 MJ/kg: 2613.98; software or database
  Fuel mix: raw coal (1%), raw NG (1%), crude oil (24%), clean coal (73%),
- hard coal: 7951.58; software or database
  Fuel mix: raw coal (1%), raw NG (1%), crude oil (24%), clean coal (73%),

## Data selection and combination
能源输入和物流的清单来自更新的年鉴、发表的论文、官方报告和数据库。清单的详细信息如表1所示。需要注意的是，材料运输假设的数据基于相关研究，可能与实际情况略有不同。每种最终使用能源类型的生命周期强度基于我们之前研究的结果。

## Use advice
在使用此数据集进行生命周期评估时，应按照表格1中的规定包含能量输入和物料流的清单，并确保运输假设尽可能反映实际情况。每种最终使用能源类型的生命周期强度必须根据以往相关研究的结果来应用。在考虑技术适用性时，应该包括可能影响过程环境影响的生产技术的任何更新或变化。此外，该过程仅有能源数据，仅作为能源消耗的参考数据，如需使用请根据实际情况补全其它信息。

## Review details
清单： 内部审查通过几个迭代步骤完成，涉及原始数据验证、原始数据记录、代表性、完整性、与 ISO 14040 和 14044 有关的建模的一致性。

## Data sources
- Peng, T., Ou, X., Yan, X. & Wang, G. Life-cycle analysis of energy consumption and GHG emissions of aluminium production in China. in Energy Procedia vol. 158 3937–3943 (2019).
