# 砖生产 ; 混凝土路面砖 ; 固化工艺

Dataset: ILCD process, Unit process, single operation
Geography: JNA-SD-CN
Reference year: 2018
Classification: Unit processes / Materials production / Other mineralic materials
Functional unit: The functional unit is the area of 1 m2 brick products.
Generated by: 王湘锦, r99rt4@163.com
Owner: 天工LCI数据工作小组
Review: Dependent internal review by 天工LCI数据工作小组
Amounts: no units in this file; such an amount is in the reference unit of its flow, which a separate flow dataset defines
copyright: false
licenseType: Free of charge for all users and uses

## General comment
混凝土路面砖块的非烧结工艺

## Technical purpose
在此工艺中生产的混凝土路面砖主要用于建设耐用的道路表面和人行道。它们适用于包括公共广场、停车场和城市道路系统在内的各种户外应用。透水砖的使用可以更好地管理水资源，通过减少径流和促进地下水补给，使表面更加环保。

## Reference product
- concrete pavement brick: 1; measured

## Inputs
- green brick: 90; measured
- freshwater: 3.9; measured

## Deviations from the LCI method approaches
本研究采用了 ReCiPe midpoint（H）模型。

## Data selection and combination
本研究从济南顺德水泥制品有限公司收集了混凝土路面砖和透水砖的生产能耗以及各种原材料、能源投入和废气排放的相关数据。济南顺德水泥制品有限公司 山东省。

## Sampling procedure
原材料、能源投入和废物排放的大部分数据都是从生产厂家的现场调查中收集的。减水剂，其化学成分是磺酸钠盐的甲醛缩合物

## Use advice
使用给定研究的LCA数据时，应密切注意混凝土路面砖和透水砖的生产能耗数据。确保计入所有输入，包括原材料和能源，以及输出，如废物和废气排放。应注意敏感性分析，关键工序中输入和输出变化超过5%必须考虑。对于影响评估必须应用 ReCiPe midpoint (H) 模型。在进行任何比较或分析时，应将功能单位视为1m²砖产品区域。

## Review details
清单： 内部审查通过几个迭代步骤完成，涉及原始数据验证、原始数据记录、代表性、完整性、与 ISO 14040 和 14044 有关的建模的一致性。

## Data sources
- Yuan, X. et al. Environmental and economic impacts assessment of concrete pavement brick and permeable brick production process - A case study in China. Journal of Cleaner Production 171, 198–208 (2018).
