# 土壤修复;原位修复;电修复;修复;修复后的土壤

Dataset: ILCD process, Unit process, single operation
Geography: IT
Reference year: 2015
Classification: Unit processes / Other Services / Repair and maintenance
Generated by: 王宁, wang_ning@caep.org.cn
Owner: 天工LCI数据工作小组
Review: Dependent internal review by 天工LCI数据工作小组
Amounts: no units in this file; such an amount is in the reference unit of its flow, which a separate flow dataset defines
copyright: false
licenseType: Free of charge for all users and uses

## General comment
通入电解液并通电，是污染土壤得到修复

## Technical purpose
该原位电修复过程用于污染土壤的去污。通过向受污染土地施加电解液和电流，从而修复土壤。它用于环境恢复活动，在工业、居住和农业等多个部门适用，这些部门土壤污染是一个问题。

## Reference product
- Remediated soil: 168; measured

## Inputs
All rows: measured
- Tap Water: 43408
- Electricity: 139968
- contaminated soil: 168
- Urea: 2805
- Potassium iodide: 135

## Outputs
- Wastewater: 40819; measured
- Tap Water: 2803; measured
  土壤中流失的水分
- Urea: 2726; measured
  土壤中的硝酸流失

## Use advice
在将此数据用于生命周期评估（LCA）时，请确保原位电修复过程数据适用于评估中的特定污染情境。考虑土壤类型、污染水平和当地法规等现场特定变量。在LCA模型中，确保包含所有相关的输入和输出至关重要，特别是与必要的原材料和能源消耗相关的因素。注意在预期修复目标的背景下，该修复方法的区域特性和技术适用性。

## Review details
清单： 内部审查通过几个迭代步骤完成，涉及原始数据验证、原始数据记录、代表性、完整性、与 ISO 14040 和 14044 有关的建模的一致性。

## Data sources
- Vocciante, M., Caretta, A., Bua, L., Bagatin, R. & Ferro, S. Enhancements in ElectroKinetic Remediation Technology: Environmental assessment in comparison with other configurations and consolidated solutions. Chemical Engineering Journal 289, 123–134 (2016).
