# 粗钢生产;粗钢;连铸（煤基直接还原）

Dataset: ILCD process, Unit process, single operation
Geography: CN
Classification: Unit processes / Materials production / Metals and semimetals
Generated by: 付翔, 1162850692@qq.com
Owner: 天工LCI数据工作小组
Review: Dependent internal review by 天工LCI数据工作小组
Amounts: no units in this file; such an amount is in the reference unit of its flow, which a separate flow dataset defines
copyright: false
licenseType: Free of charge for all users and uses

## General comment
通过煤基直接还原和连铸工艺生产的粗钢主要用于结构构件、建筑材料、机械制造以及作为进一步加工成各种钢铁产品的原料。

## Geography
The LCI of Coal-DR is obtained, as shown in Table 9, based on the statistics of the demonstration project in China.

## Reference product
- Crude Steel: 1000; calculated
  Crude steel

## Inputs
- Molten steel: 1000; calculated
- freshwater,freshwater: 800; calculated
- Electricity: 211.32; calculated

## Data treatment and extrapolations
LCI of COG-DR and H-DR routes, which is not scaled-up in China are estimated based on Coal-DR routes combined with literature data from simulations, laboratory tests, and process modeling in Table 9 [49,50]. The LCI of Coal-DR is obtai

## Use advice
使用这份生命周期评估数据集时，用户应考虑基于中国煤基直接还原（Coal-DR）方法的数据技术特性。如果将数据应用于示范项目以外的情境，必须进行适当的规模调整。特别是在与其他钢铁生产路线比较或应用于具有不同能源组合、技术标准或环境规制的地理区域时，应认真评估来自模拟、实验室测试和过程建模的假设。

## Review details
清单： 内部审查通过几个迭代步骤完成，涉及原始数据验证、原始数据记录、代表性、完整性、与 ISO 14040 和 14044 有关的建模的一致性。

## Data sources
- The carbon reduction potential of hydrogen in the low carbon transition of the iron and steel industry: The case of China
