# Glass production ; PMMA production ; monomer MMA

Dataset: ILCD process, Unit process, single operation
Geography: JX-CN
Classification: Materials production / Organic chemicals
Generated by: He xiaxia, 18616148319@163.com
Owner: Tiangong LCI Data Working Group
Review: Dependent internal review by Tiangong LCI Data Working Group
Amounts: no units in this file; such an amount is in the reference unit of its flow, which a separate flow dataset defines
copyright: false
licenseType: Free of charge for all users and uses

## Reference product
- methyl methacrylate: 1000; measured

## Inputs
- electricity mix: 476.64; measured
- methyl methacrylate: 997.513; measured
- organic waste (unspecified): 2.487; measured

## Outputs
All rows: measured
- methyl methacrylate: 981.4
- Water (fresh water): 1.5
- methanol: 9.5
- methacrylic acid: 1
- methacrylate: 6
- organic waste (unspecified): 0.6

## Review details
Inventory: The internal review was done by several iteration steps concerning raw data validation, raw data documentation, representativity, completeness and consistency of modelling with regard to ISO 14040 and 14044.

## Data sources
- 江西旺达新材料有限公司年产20000吨有机玻璃原料生产项目
