# 原铝生产 ; 原生铝锭 ; 铝土矿 ; 2008

Dataset: ILCD process, Unit process, single operation
Geography: CN
Reference year: 2014
Classification: Unit processes / Materials production / Metals and semimetals
Generated by: 封羽真, fyz22
Owner: 天工LCI数据工作小组
Review: Dependent internal review by 天工LCI数据工作小组
Amounts: no units in this file; such an amount is in the reference unit of its flow, which a separate flow dataset defines
copyright: false
licenseType: Free of charge for all users and uses

## General comment
原铝生产是一个涉及从铝土矿中提取铝金属的工业过程。通过该过程生产出的原生铝锭可作为多种行业的原材料，包括制造运输工具、建筑材料、包装产品、消费电子产品及电力传输线。该数据集特别代表了旨在广泛工业应用的铝锭。

## Time period
文献发表日期

## Reference product
- aluminium, primary, ingot: 1000; missing unimportant

## Inputs
All rows: missing unimportant
- electricity, high voltage, aluminium industry: 53312.4
  电力
- hard coal: 475
  煤炭
- Petroleum Coke: 53.8
  焦炭
- drying, natural gas: 112
  天然气
- coal gas: 872
  煤气
- light fuel oil: 105
  燃料油

## Data selection and combination
原铝生产的资源和能耗数据，均 以《有 色 金 图 1 原铝生产的系统边界 Fig． 1 System boundary of primary aluminum production 属工业 年 鉴》 中的统计数据作为主要参考依 据。对于一些非统计性工艺数据，则来源于典型企 业生产工艺及技术指标的调研和公开发表的文献。

## Use advice
使用此数据集时，请务必将其应用于2008年的背景下，因为原铝生产的资源和能耗数据来源于当年的《有色金属工业年鉴》的统计数据。生命周期评价研究应保持方法论的一致性，确保采纳的过程和技术指标应反映出当时典型企业报告与公布文献中的生产技术和技术标准。如果用于当前评估，应该考虑生产方法和排放因子的潜在更新。

## Review details
清单： 内部审查通过几个迭代步骤完成，涉及原始数据验证、原始数据记录、代表性、完整性、与 ISO 14040 和 14044 有关的建模的一致性。

## Data sources
- 郭杰, 高峰, 王志宏, 刘宇, & 龚先政. 原铝生产流程温室气体排放主要影响因素的关联度分析. 环境工程学报 8, 4858–4863 (2014).
