# Beneficiation|Molybdenumconcentrate|Molybdenumore,tungstenandmolybdenumore|Grinding-flotation|All sizes / 选矿|钼精矿|钼矿石、钨钼矿石|磨浮|所有规模

Dataset: ILCD process, Unit process, single operation
Geography: CN
Reference year: 2019
Classification: Materials production / Non-energetic raw materials
Generated by: The data was created by the Office of the Second National Pollution Source Census of the Ministry of Ecology and Environment, and the data was organized by the TianGong Plan team for ILCD format / 生态环境部第二次全国污染源普查工作办公室创建数据，天工计划团队常慧敏整理数据为ILCD格式
Owner: Tiangong LCI Data Working Group / 天工LCI数据工作小组
Amounts: no units in this file; such an amount is in the reference unit of its flow, which a separate flow dataset defines
copyright: false
licenseType: Free of charge for all users and uses

## Technology and included processes
the Technical of end-of-pipe management technology for pollution particles (PM2.5 - PM10)isWater film dust collector，Its Technical efficiency of end-of-pipe management65

## Reference product
- Molybdenum ore: 1000; input; calculated
  源文件中描述为为钼矿石、钨钼矿石，此处对其进行了匹配工作，将其匹配到LCAflow库里面相最符合的流，污染物指标备注为工业废水量

## Outputs
All rows: calculated
- Waste water: 3690
  污染物指标工业废水量的末端治理技术是循环利用，末端治理设施实际运行率（k值）计算公式为k=废水治理设施年运行时间（小时/年）/企业年正常生产时间（小时/年）。原文件中描述污染物类别为废水，污染物指标为工业废水量，此处对其进行了匹配工作，将其匹配到LCAflow库里面相最符合的流，污染物指标备注为工业废水量
- chemical oxygen demand: 0.16055
  污染物指标化学需氧量的末端治理技术是循环利用，末端治理设施实际运行率（k值）计算公式为k=废水治理设施年运行时间（小时/年）/企业年正常生产时间（小时/年）。原文件中描述污染物类别为废水，污染物指标为化学需氧量，此处对其进行了匹配工作，将其匹配到LCAflow库里面相最符合的流，污染物指标备注为化学需氧量
- Ammonia Nitrogen: 0.00564
  污染物指标氨氮的末端治理技术是循环利用，末端治理设施实际运行率（k值）计算公式为k=废水治理设施年运行时间（小时/年）/企业年正常生产时间（小时/年）。原文件中描述污染物类别为废水，污染物指标为氨氮，此处对其进行了匹配工作，将其匹配到LCAflow库里面相最符合的流，污染物指标备注为氨氮
- cadmium: 9.2e-5
  污染物指标镉的末端治理技术是循环利用，末端治理设施实际运行率（k值）计算公式为k=废水治理设施年运行时间（小时/年）/企业年正常生产时间（小时/年）。原文件中描述污染物类别为废水，污染物指标为镉，此处对其进行了匹配工作，将其匹配到LCAflow库里面相最符合的流，污染物指标备注为镉
- lead: 0.00037
  污染物指标铅的末端治理技术是循环利用，末端治理设施实际运行率（k值）计算公式为k=废水治理设施年运行时间（小时/年）/企业年正常生产时间（小时/年）。原文件中描述污染物类别为废水，污染物指标为铅，此处对其进行了匹配工作，将其匹配到LCAflow库里面相最符合的流，污染物指标备注为铅
- arsenic: 6e-5
  污染物指标砷的末端治理技术是循环利用，末端治理设施实际运行率（k值）计算公式为k=废水治理设施年运行时间（小时/年）/企业年正常生产时间（小时/年）。原文件中描述污染物类别为废水，污染物指标为砷，此处对其进行了匹配工作，将其匹配到LCAflow库里面相最符合的流，污染物指标备注为砷
- Exhaust gas: 170
  污染物指标工业废气量的末端治理技术是/，末端治理设施实际运行率（k值）计算公式为k=除尘设施年运行时间（小时/年）/企业年正常生产时间（小时/年）。原文件中描述污染物类别为废气，污染物指标为工业废气量，此处对其进行了匹配工作，将其匹配到LCAflow库里面相最符合的流，污染物指标备注为工业废气量
- particles (PM2.5 - PM10): 0.0046
  污染物指标颗粒物的末端治理技术是袋式除尘，其效率为99，末端治理设施实际运行率（k值）计算公式为k=除尘设施年运行时间（小时/年）/企业年正常生产时间（小时/年）。原文件中描述污染物类别为废气，污染物指标为颗粒物，此处对其进行了匹配工作，将其匹配到LCAflow库里面相最符合的流，污染物指标备注为颗粒物
- particles (PM2.5 - PM10): 0.161
  污染物指标颗粒物的末端治理技术是水膜除尘，其效率为65，末端治理设施实际运行率（k值）计算公式为k=除尘设施年运行时间（小时/年）/企业年正常生产时间（小时/年）。原文件中描述污染物类别为废气，污染物指标为颗粒物，此处对其进行了匹配工作，将其匹配到LCAflow库里面相最符合的流，污染物指标备注为颗粒物

## Data sources
- 第二次全国污染源普查产排污核算系数手册（试用版）,二级代码09,四级代码0931文件，在完整版文件中第3413页
