# Carbofuran,isoproterenol,secbutrin|o-isopropylphenol,o-swedenbutylphenol,methylisocyanate,toluene,catechol,methylallylchloride|Synthesis|All sizes / 克百威、异丙威、仲丁威|邻异丙基酚、邻肿丁基酚、甲基异氰酸酯、甲苯、邻苯二酚、甲代烯丙基氯|合成|所有规模

Dataset: ILCD process, Unit process, single operation
Geography: CN
Reference year: 2019
Classification: Materials production / Organic chemicals
Generated by: The data was created by the Office of the Second National Pollution Source Census of the Ministry of Ecology and Environment, and the data was organized by the TianGong Plan team for ILCD format / 生态环境部第二次全国污染源普查工作办公室创建数据，天工计划团队常慧敏整理数据为ILCD格式
Owner: Tiangong LCI Data Working Group / 天工LCI数据工作小组
Amounts: no units in this file; such an amount is in the reference unit of its flow, which a separate flow dataset defines
copyright: false
licenseType: Free of charge for all users and uses

## Technology and included processes
the Technical of end-of-pipe management technology for pollution volatile organic compoundisRTO，Its Technical efficiency of end-of-pipe management99.9，The formula for calculating the actual operation rate (k-value) of the end-of-pipe treatment facility is k = operating time of wastewater treatment facilities (hours/year) / normal production time (hours/year)

## Reference product
- Carbofuran: 1000; calculated
  源文件中描述为为克百威、异丙威、仲丁威，此处对其进行了匹配工作，将其匹配到LCAflow库里面相最符合的流，污染物指标备注为工业废气量

## Outputs
- Exhaust gas: 132000; calculated
  污染物指标工业废气量的末端治理技术是/，其效率为0。原文件中描述污染物类别为废气，污染物指标为工业废气量，此处对其进行了匹配工作，将其匹配到LCAflow库里面相最符合的流，污染物指标备注为工业废气量
- volatile organic compound: 0.09; calculated
  污染物指标挥发性有机物的末端治理技术是（吸附+蒸汽解析）/（吸附+氮气/空气解析），其效率为97，末端治理设施实际运行率（k值）计算公式为k=治理设施耗电量（千瓦时）/（治理设施运行时数（小时）*治理设施额定功率(千瓦)）。原文件中描述污染物类别为废气，污染物指标为挥发性有机物，此处对其进行了匹配工作，将其匹配到LCAflow库里面相最符合的流，污染物指标备注为挥发性有机物
- volatile organic compound: 0.003; calculated
  污染物指标挥发性有机物的末端治理技术是RTO，其效率为99.9，末端治理设施实际运行率（k值）计算公式为k=治理设施耗电量（千瓦时）/（治理设施运行时数（小时）*治理设施额定功率(千瓦)）。原文件中描述污染物类别为废气，污染物指标为挥发性有机物，此处对其进行了匹配工作，将其匹配到LCAflow库里面相最符合的流，污染物指标备注为挥发性有机物

## Data sources
- 第二次全国污染源普查产排污核算系数手册（试用版）,二级代码26,三级代码263.0文件，在完整版文件中第2936页
