# 砖生产 ; 透水砖 ; 挤出工艺

Dataset: ILCD process, Unit process, single operation
Geography: JNA-SD-CN
Reference year: 2018
Classification: Materials production / Other mineralic materials
Functional unit: The functional unit is the area of 1 m2 brick products.
Generated by: 王湘锦, r99rt4@163.com
Owner: 天工LCI数据工作小组
Review: Dependent internal review by 天工LCI数据工作小组
Amounts: no units in this file; such an amount is in the reference unit of its flow, which a separate flow dataset defines
licenseType: Free of charge for all users and uses

## General comment
通过挤出工艺生产的透水砖用于铺设路面。透水砖专门设计用于允许水分通过表面，通常用于人行道、街道以及需要有效排水系统从而减少水流失和增加地下水补给的其他区域。

## Reference product
- Clay Body: 106; measured
  粗坯

## Inputs
- brick dust: 16; measured
- brickbat aggregate: 104; measured
- electricity mix: 1.96992; measured

## Outputs
- particles (PM10): 0.000144; measured

## Deviations from the LCI method approaches
本研究采用了 ReCiPe midpoint（H）模型。

## Data selection and combination
In this study, the production energy consumption of concrete pavement brick and permeable brick as well as the relevant data of all kinds of raw materials and energy input and exhaust emissions are collected from Jinan Shunde Cement Products Co. Ltd. Shandong Province.

## Sampling procedure
原材料、能源投入和废物排放的大部分数据都是从生产厂家的现场调查中收集的。减水剂，其化学成分是磺酸钠盐的甲醛缩合物

## Use advice
在使用混凝土路面砖和透水砖的生命周期评估数据时，应用1平方米的功能单位以确保可比性至关重要。已采用ReCiPe midpoint (H)模型，并且在关键工序变更时，应承认5%投入和输出变化的敏感性分析。为确保生命周期评估计算的准确性，应考虑包括提供的所有原材料、能源投入和废气排放数据，并在可用时针对特定现场信息进行验证。

## Review details
清单： 内部审查通过几个迭代步骤完成，涉及原始数据验证、原始数据记录、代表性、完整性、与 ISO 14040 和 14044 有关的建模的一致性。

## Data sources
- Yuan, X. et al. Environmental and economic impacts assessment of concrete pavement brick and permeable brick production process - A case study in China. Journal of Cleaner Production 171, 198–208 (2018).
