# betwixt anaerobic and aerobic treatment

Dataset: ILCD process, Unit process, single operation
Geography: SC-CN
Classification: Materials production / Other mineralic materials
Generated by: 黄润垚, runyaoh@163.com
Review: Dependent internal review by 天工LCI数据工作小组
Amounts: no units in this file; such an amount is in the reference unit of its flow, which a separate flow dataset defines

## Inputs
- chemical oxygen demand: 0.168, 0.151 (2 entries); article inperiodical
- nitrogen trifluoride: 0.0119; article inperiodical
- nitrogen monoxide: 0.0008; article inperiodical

## Review details
清单： 内部审查通过几个迭代步骤完成，涉及原始数据验证、原始数据记录、代表性、完整性、与 ISO 14040 和 14044 有关的建模的一致性。

## Data sources
- Assessment of upgrading WWTP in southwest China: Towards a cleaner production
