# cement production|cement, common portland cement|new dry process kiln|waste, solid, from steel industry

Dataset: ILCD process, Unit process, black box
Geography: SD-CN
Reference year: 2012
Classification: Materials production / Other mineralic materials
Generated by: Siqi Yang
Amounts: no units in this file; such an amount is in the reference unit of its flow, which a separate flow dataset defines
copyright: false

## General comment
Under the use of a new dry kiln, the steel industry solid waste is used as an alternative raw material for cement production.

## Geography
The typical cement enterprise of the average production level of Shandong Province

## Model description
1T native cement is a functional unit; the geographical scope of the research is in Shandong. The system boundary is all the direct processes involved in cement production. all the resources, energy consumption and environmental emissions regarding raw material extraction, processing, energy production and auxiliary links such as production equipment, transportation, sales and use stages are not considered for the time being.

## Reference product
- cement, common portland cement: 1000
  Universal cement is a research object

## Inputs
All rows: measured
- limestone, crushed, for mill: 670
  Limestone
- clay: 120
  Clay
- iron, powder: 27
  Iron correction raw material
- gypsum (desulphurized): 60
  Gupsum
- mixed materials, mineral: 200
  Mixed material
- Waste, from steel production: 400
  The steel industry is solid. The steel industry's solid waste contains a large amount of recyclable metals and limestone.
- hard coal: 92.398
  Raw coal (standard coal). Coal consumption is converted into standard coal consumption according to the low heating value. Coal consumption in the literature is converted to standard coal consumption (0.066t) according to the low level heating value, the conversion formula is 1kg raw coal = 0.7143kg standard coal. Here the conversion is made into raw coal for entry.
- electricity, medium voltage: 0.225554
  Electricity. The power is mainly from thermal power. The electricity consumption in the literature is converted to standard coal (0.051t). The conversion formula used here is 1 kWh = 0.814 kg of standard coal. This conversion is used for inputting electricity data.

## Outputs
- sulfur dioxide: 0.3; measured
  SO2
- particles (> PM10): 2; measured
  Dust, with an unspecified particle size, is treated as PM > 10 micrometers in diameter.
- particles (> PM10): 0.23; measured
  Smoke, with an unspecified particle size, is treated as PM > 10 micrometers in diameter.
- Nitrogen oxides: 1.11; measured
  NOx
- carbon dioxide: 427; calculated
  CO2. CO2 emissions are generally not tested. According to the source of it, it is obtained according to the formula reasoning. The CO2 released during the production of cement is mainly produced in the decomposition of lumite of coal -fired and cement production raw materials. E = E1+E2, in the formula: E is CO2 emissions (KG) during the production of cement; E1 is CO2 emissions (KG) during the process of coal -fired; Essence E1 can be calculated by the calorie carbon volume method. The amount of CO2 released by 1J heat is equivalent to 8.494342e-8kg, and 1kg standard coal is equivalent to 2.93e+7J heat (the heat value of the standard coal). That is the heat generated by standard coal combustion, that is, the E1 calculation formula is as follows: E1 = coal consumption (standard coal) × (2.93e+7) × (8.494342e-8) coal consumption (standard coal) × 2.489, E2 can be based on carbonated carbonated carbonated carbonated carbonated carbonated carbonated carbonated carbonate. Calcium decomposition equilibrium equation calculation, assuming that the CAO content in 1kg limestone is calculated at 50%, and the estimated formula for CO2 emissions is CACO3 → Cao+CO2 ↑, E2 = limestone consumption × (50%XCO2 molecular weight CO%)

## Data selection and combination
The cement industry in Shandong Province holds an important position in the country and has been ranked first in the country for over a decade, with cement products accounting for 11% to 13% of the country's total output annually. It has become a truly cement-rich province. Therefore, the data mainly comes from the production data of typical cement enterprises in Shandong Province that represent the average production level and monitoring data from local environmental protection departments.

## Data sources
- 邓琪 & 陈吉宁. (2012). 钢铁工业固废应用于水泥生产的降耗与减排. 生态环境学报, 21(2), 298–302.
