# cement production|cement, unspecified|mixed solid wastes

Dataset: ILCD process, Unit process, black box
Geography: CN
Classification: Materials production / Other mineralic materials
Generated by: Siqi Yang
Amounts: no units in this file; such an amount is in the reference unit of its flow, which a separate flow dataset defines
copyright: false

## General comment
Preparation of ecological cement with phosphogypsum. Laboratory data. In the phosphogypsum-based ecological cement experiment, the main raw materials include phosphogypsum, fly ash, hydrate lime, cement, and early strength agent.
Firstly, phosphogypsum is dried in an oven at 45°C to a constant weight to remove free water from phosphogypsum, and then then the dried phosphogypsum is calcined in a high-temperature electric furnace for a certain period of time. The calcined phosphogypsum is then put into a planetary ball mill for grinding for 6 minutes and screened through a standard sieve with a mesh size of 0.08 mm. At the same time, fly ash and hydrate lime are also sieved through a 0.08 mm sieve and dried in a drying oven. The cement used in the experiment also needs to be dried. After the above raw materials are pre-treated, the ingredients are calculated according to the designed ratio, and the mixed material is ball-milled for 3 minutes to mix evenly. After the mixed material is homogenized for 2-3 hours, it is weighed and poured into a JJ-5 planetary cement mortar mixer for stirring, and then molded into cement test blocks using a ZS-15 cement mortar vibrating table. The molded cement test blocks are placed for 24 hours, demolded, and naturally cured. After a certain age, their strength is tested.

## Model description
The functional unit is 1t of ecological cement based on phosphogypsum developed in the laboratory. The system boundary for the study of phosphogypsum-based ecological cement is defined as phosphogypsum calcination, clinker grinding, and ecological cement preparation, ending with cement storage.

## Reference product
- cement, unspecified: 1000
  Ecological cement based on phosphogypsum. From laboratory data.

## Inputs
- phosphogypsum: 340
  Phosphogypsum. The data is from laboratory experiments. The phosphogypsum used in the laboratory was provided by Qiantai Chemical Co., Ltd. in Xiangyang, Hubei. It has a dark gray color and is a mixture resembling sediment, with a moisture content of 21.66%.
- ash: 430
  Fly ash. The data is from laboratory experiments. The fly ash used in this experiment comes from Pingdingshan and is dry discharged.
- lime, hydraulic: 10
  Hydrated lime. The data is from laboratory experiments. Hydrated lime is a product of slaked lime mixed with water.
- cement, ordinary portland cement, 32.5MPa: 200
  PO32.5. From laboratory data. The cement used in the experiment is PO32.5 ordinary Portland cement.
- early strength agent: 20
  Early strength agent. From laboratory data. The early strength agent used in the experiment is a self-made composite additive.
- hard coal, run-of-mine: 100
  Coal. From the laboratory data.
- electricity, medium voltage: 165.6
  Electricity. From the laboratory data.

## Outputs
- carbon dioxide: 257
  CO2. From the laboratory data.

## Data sources
- 张乐. (2009). 磷石膏基生态水泥的开发及其生命周期评价研究 [硕士, 华中科技大学].
