# 铝再生 ; 再生铝锭 ; 废铝 ; 2012年

Dataset: ILCD process, Unit process, single operation
Geography: CN
Reference year: 2021
Classification: Unit processes / Materials production / Metals and semimetals
Generated by: 蔡梓萌, caizm6178@163.com
Owner: 天工LCI数据工作小组
Review: Dependent internal review by 天工LCI数据工作小组
Amounts: no units in this file; such an amount is in the reference unit of its flow, which a separate flow dataset defines
copyright: false
licenseType: Free of charge for all users and uses

## General comment
再生铝锭来源于废铝，其用途旨在替代原铝的传统应用领域。例如建筑材料、汽车零部件、电子产品、包装以及家用品等。这种回收材料通过减少对原生铝的需求，在制造过程中有助于实现可持续性，因为原生铝的生产涉及高能耗和相关排放。

## Time period
文献发表日期

## Reference product
- secondary aluminium ingot: 1000; missing unimportant
  ingot

## Inputs
- electricity, high voltage, aluminium industry: 1148.4; missing unimportant
  electricity
- aluminium scrap, unspecified: 1180; missing unimportant
  aluminum scrap

## Data selection and combination
本研究的数据参考了PA、SA、电力等背景数据的LCA数据。PA数据来自统计数据源，SA数据主要来自文献。背景数据主要来自中国科学院生态环境研究中心CASRCEES 2018建立的中国本地化LCA数据库，涵盖能源、材料、交通、废物管理等LCA数据。

## Use advice
本LCA数据的用户应注意，提供的数据特定于2012年，并且适用于中国的地理背景。方法论方面的考量应包括生产再生铝锭所涉及的具体回收过程，因为这些可能会影响到环境影响评估。在将此数据整合到更广泛的评估中或与其他数据集进行比较时，用户必须确保时间、地理和技术上的一致性。使用这个数据集时，应在技术适用性的背景下考虑铝制品的回收和产品寿命终点情景。

## Review details
清单： 内部审查通过几个迭代步骤完成，涉及原始数据验证、原始数据记录、代表性、完整性、与 ISO 14040 和 14044 有关的建模的一致性。

## Data sources
- Ding, N., Liu, N., Lu, B. & Yang, J. Life cycle greenhouse gas emissions of aluminum based on regional industrial transfer in China. J. Ind. Ecol. 25, 1657–1672 (2021).
