# 烧结矿生产;烧结矿;烧结

Dataset: ILCD process, Unit process, single operation
Geography: CN
Classification: Unit processes / Materials production / Other mineralic materials
Generated by: 纪伟, 1299801467@qq.com
Owner: 天工LCI数据工作小组
Review: Dependent internal review by 天工LCI数据工作小组
Amounts: no units in this file; such an amount is in the reference unit of its flow, which a separate flow dataset defines
copyright: false
licenseType: Free of charge for all users and uses

## General comment
本数据集描述的烧结矿生产用于铁和钢铁制造行业。所指的烧结单元过程涉及细铁矿和其他成分的团聚，经烧结后形成可以送入高炉的块状物料。

## Reference product
- Sinter ore: 1000; measured

## Inputs
All rows: measured
- Iron ore (Domestic): 1053.5
- quicklime: 111.9
- freshwater,freshwater: 92.8
- compressed air: 45.3
- Electricity: 147.6
- coke,Coke: 29.47
- Coal gas: 26
- process steam: 9.65
- anthracite: 26.91

## Outputs
All rows: measured
- carbon dioxide (fossil): 189.85
  原文未区分bio和fossil，根据专家判断此处为carbon dioxide (fossil)
- carbon monoxide (fossil): 28
  原文未区分bio和fossil，根据专家判断此处为carbon monoxide (fossil)
- sulfur dioxide: 0.408
- particles (> PM10): 0.11
- Nitrogen oxides: 0.549

## Use advice
在使用此数据集进行生命周期评估（LCA）时，重要的是要考虑烧结过程的特定特征，因为它们适用于使用的地区和技术。数据集可能不包括材料的下游处理或回收。用户应确保根据LCA的目标和范围定义阶段将这些方面包含在内，当它们与评估的范围相关时。此外，用户需要注意任何可能随着时间影响数据相关性的技术适用性的更新或更改。

## Review details
清单： 内部审查通过几个迭代步骤完成，涉及原始数据验证、原始数据记录、代表性、完整性、与 ISO 14040 和 14044 有关的建模的一致性。

## Data sources
- Yang, L. et al. Life cycle carbon footprint of electric arc furnace steelmaking processes under different smelting modes in China. Sustainable Materials and Technologies 35, e00564 (2023).
