# NMC532直接回收（LCC）

Dataset: ILCD process, Unit process, single operation
Geography: CN
Reference year: 2021
Classification: Unit processes / End-of-life treatment / Material recycling
Functional unit: 333.9 kg of the degraded NMC532 can be sorted from per 1 ton of degraded battery
Generated by: 马清源, m1120498928@163.com
Owner: 天工LCI数据工作小组
Review: Dependent internal review by 天工LCI数据工作小组
Amounts: no units in this file; such an amount is in the reference unit of its flow, which a separate flow dataset defines
copyright: false
licenseType: Free of charge for all users and uses

## General comment
为了将降解的NMC532（Li1-xNi0.5Mn0.3Co0.2O2）上循环为Ni66 NMC，将0.2摩尔的降解NMC532阴极粉末（？20克，NMC532、炭黑和聚合物粘合剂的混合物）与0.2摩尔的Ni0.83Mn0.09Co0.08（OH）2、0.5摩尔的LiOH和0.1摩尔的Li2SO4混合，并转移到坩埚中。LiOH过量（过量%=（1.5？x）/（1+x））以促进完全的再锂化，根据文献，这是一个自饱和过程。1用于反应的坩埚被盖子松散地覆盖，以允许在合成过程中吸入空气，但避免Li盐的过度蒸发。将材料混合物在芳纶pin g r a t e o f？下加热至900℃？10℃min-1，在900℃下保温5h，然后在860℃下保温15h，然后以2℃min-1至300℃的速率缓慢冷却。炭黑和聚merbinder在高温MSDR过程中被烧掉。之后，使混合物自然冷却。将获得的粉末从坩埚中回收，在玛瑙研钵中研磨，并使用去离子水洗涤，以将材料与水溶性Li盐分离，水溶性锂盐可在水蒸发后回收并重复使用。通过离心收集Ni66 NMC粉末，并在空气中在70℃下干燥，然后在空气中700℃下热处理4h。再次研磨粉末以通过400目筛，然后在进一步测试之前储存在湿度控制的储存室中。为了通过MSDR将降解的NMC532上循环为Ni80 NMC，将0.2摩尔降解的NMC 532阴极粉末（？20 g）与0.3摩尔Ni（OH）2、0.625摩尔LiOH和0.125摩尔Li2SO4混合，并转移到坩埚中。实验程序与Ni66 NMC相同，只是烧结温度降低到780℃。

## Technical purpose
所描述的工艺流程用于使用熔盐基直接回收（MSDR）方法将降解的NMC532阴极材料上循环为Ni66-NMC或Ni80-NMC。这种更新的材料意在用于锂离子电池中的高镍含量正极材料的制造。由于对高纯度要求和特定化学成分的需求，该材料适用于先进的电池技术，这些电池技术是电子设备和电动汽车中的能源存储解决方案的一部分。

## Reference product
- Degraded NMC532: 226680; input; calculated

## Inputs
- Nickel sulfate: 160034; calculated
- Lithium Hydroxide Monohydrate: 369684; calculated
- oxygen: 36000; calculated
- Average labor (Disassemble degraded battery): 5475
- Average labor（Material preparation）: 5475
- Equipment Depreciation: 52612.5
- Electricity: 64800; calculated
- water,water: 7200

## Outputs
- Sewage treatment: 300
- Ni-rich NMC: 1.4475e6

## Data treatment and extrapolations
① 我们计算了每吨回收阴极材料的成本。回收过程可分为两个步骤：拆解退化电池和回收生产富镍正极材料。② 在拆卸过程中，我们使用降级的NMC532作为原材料。③ 在回收生成过程中，只添加Ni和Co。

## Use advice
使用此数据集时，必须考虑到整个上循环过程，包括在MSDR方法期间消耗的能量和Ni-rich正极材料的产率。同时，必须考虑回收水溶性Li盐和处理不可再利用的副产品的环境影响。从业者应确保在评估中准确反映了如降解NMC532阴极粉末和过程中使用的化学物质等输入量。此外，可能还需要进行彻底的热力学分析，以确定再锂化过程的效率。

## Review details
清单： 内部审查通过几个迭代步骤完成，涉及原始数据验证、原始数据记录、代表性、完整性、与 ISO 14040 和 14044 有关的建模的一致性。

## Data sources
- Qian, G. et al. Value-creating upcycling of retired electric vehicle battery cathodes. Cell Reports Physical Science 3, 100741 (2022).
