# 有机溶剂脱盐;电渗析，螺旋缠绕

Dataset: ILCD process, Unit process, single operation
Geography: CN
Reference year: 2023
Classification: Energy carriers and technologies / Electricity
Functional unit: 1 t sodium chloride
Generated by: 陆嘉麒, wilsherelu@foxmail.com
Owner: 天工LCI数据工作小组
Review: Dependent internal review by 天工LCI数据工作小组
Amounts: no units in this file; such an amount is in the reference unit of its flow, which a separate flow dataset defines
copyright: false
licenseType: Free of charge for all users and uses

## General comment
该电渗析螺旋缠绕配置工艺用于中国工业中有机溶剂的脱盐。螺旋缠绕设计指的是电渗析膜的特定结构。这个过程专门用于处理溶剂中的1吨氯化钠，目的是达到可能在各种化学合成应用或其他工业过程中需要的高纯度标准，其中盐的存在可能会阻碍性能或质量。

## Reference product
- sodium chloride: 1000; article inperiodical
  产品盐

## Inputs
- Electrodialysis Component: 0.0038; article inperiodical
  ED 组件
- electricity mix: 903.06; article inperiodical
  过程电耗
- Water (fresh water): 386; article inperiodical
  原水

## Outputs
- High-concentration saline wastewater: 77.2; article inperiodical
  浓水（高含盐废水）
- Deionized Water: 308.8; article inperiodical
  淡水(去离子水)

## Use advice
在利用这组数据进行生命周期评估时，必须确保分析的范围与有机溶剂脱盐中电渗析过程的具体使用相匹配。应根据处理的氯化钠数量仔细核算投入和产出流量。必须考虑到下游处理要求和浓盐水废流可能的环境影响。技术应用可能仅限于与螺旋缠绕电渗析系统兼容的某些类型的有机溶剂。

## Review details
清单： 内部审查通过几个迭代步骤完成，涉及原始数据验证、原始数据记录、代表性、完整性、与 ISO 14040 和 14044 有关的建模的一致性。

## Data sources
- Xue, N. et al. Carbon footprint analysis and carbon neutrality potential of desalination by electrodialysis for different applications. Water Res. 232, 119716 (2023).
