# 育肥猪生产 ; 动物生产

Dataset: ILCD process, Unit process, single operation
Geography: LN-CN
Reference year: 2010
Classification: Unit processes / Materials production / Agricultural production means
Functional unit: The evaluation unit was 1000 fattening pigs
Generated by: 杨瑞, 1632707028@qq.com
Owner: 天工LCI数据工作小组
Review: Dependent internal review by 天工LCI数据工作小组
Amounts: no units in this file; such an amount is in the reference unit of its flow, which a separate flow dataset defines
copyright: false
licenseType: Free of charge for all users and uses

## General comment
根据调查，由于仔猪抵抗力较低，其保育舍需要 耗电保温，耗电量平均为 15 kWh·head-1。

## Geography
辽宁省 2010 年玉米、大豆和小麦每公顷产量分 别为 ···

## Time period
辽宁省2010年玉米、大豆和小麦每公顷产量分别为······

## Technology and included processes
评价内容是：动物生长过程中猪舍耗电所产生的污染物 排放；

## Technical purpose
该数据集旨在用于农业动物生产领域的环境影响评估，特别是对辽宁省大规模育肥猪生产过程的评估。数据涉及为满足仔猪生长所需条件的能耗要求，以及生产过程中与全球变暖、酸化和富营养化相关的潜在环境影响。

## Reference product
- pig: 1000; measured
  1000头育肥猪

## Inputs
- Electricity: 54000; measured
- feed: 308000; measured

## Outputs
All rows: measured
- carbon dioxide (fossil),carbon dioxide (fossil): 1605
- carbon monoxide (fossil): 23.25
- nitrogen, total (excluding N2): 96.9
  1氮氧化物
- sulfur oxides: 148.95
  1硫氧化物
- methane (biogenic): 39

## Deviations from the LCI method approaches
本研究以辽宁省规模化育肥猪养殖场为对象，应 用 LCA 方法对育肥猪生产的环境影响进行评估

## Data selection and combination
本文数据来自辽宁省36家规模化育肥猪养殖场调查；并参照《辽宁统计年鉴》提供的相关数据计算出育 肥猪生产过程中全球变暖、环境酸化和富营养化的影 响潜力。

## Use advice
用户应专门将此数据应用于育肥猪生产过程的环境评估，不得用于其他类型的动物养殖。必须考虑保育舍的电力消耗数据对污染的重要贡献。使用这些数据时，用户必须注意，它代表了2010年辽宁省农业产量的特定背景，并可能需要更新以进行当前评估。此外，用户必须承认生命周期评估（LCA）方法论框架作为环境影响研究的基础，并相应地调整其模型，确保满足LCA的方法论要求。

## Review details
清单： 内部审查通过几个迭代步骤完成，涉及原始数据验证、原始数据记录、代表性、完整性、与 ISO 14040 和 14044 有关的建模的一致性。

## Data sources
- 刘鸣达, 赵妍, 刘显军, & 王耀晶. 辽宁省育肥猪生产环境影响的生命周期评价. 农业环境科学学报 31, 1250–1255 (2012).
