# 白灰采烧;冶金白灰;白灰采烧（Z11）

Dataset: ILCD process, Unit process, single operation
Geography: CN
Reference year: 1998
Classification: Materials production / Metals and semimetals
Generated by: 付翔, 1162850692@qq.com
Owner: 天工LCI数据工作小组
Review: Dependent internal review by 天工LCI数据工作小组
Amounts: no units in this file; such an amount is in the reference unit of its flow, which a separate flow dataset defines
copyright: false
licenseType: Free of charge for all users and uses

## General comment
来自表 4-15 Z11 钢厂生产吨材环境负荷编目表

## Time period
论文提到钢铁企业环境总体数据为1998年的吨钢环境基础数据。

## Technical purpose
冶金白灰，来源于白灰采烧（Z11）工艺，用于钢铁生产设施中。该材料是生产过程中不可缺少的一部分，用于在金属精炼过程中去除杂质，因此，它是制造高品质钢铁产品所必需的组分。

## Reference product
- Metallurgical ash: 182; measured
  冶金白灰

## Inputs
- Energy, geothermal, converted: 790133; measured

## Outputs
All rows: measured
- Dust (unspecified, from stack): 0.379
- sulfur dioxide: 0.036
- cyanide: 7.7e-5
- Hydrocarbons, aliphatic, alkanes, unspecified: 0.000238
  石油类
- Suspended solids, unspecified: 0.143289
- chemical oxygen demand: 0.092964
- Spoil (deposited, hibernating in ground, non elementary flow): 6.916

## Use advice
在利用这组数据进行钢铁生产的生命周期评估（LCA）时，请注意，环境负荷数据对应的基准年为1998年。用户应考虑自该时期以来的技术进步和生产过程的变化。至关重要的是检查环境影响是否已更新以反映当前标准。另外，如果涉及到钢铁或冶金白灰的回收，请确保其在评估中的包含或排除与LCA研究的目标和范围保持一致。

## Review details
清单： 内部审查通过几个迭代步骤完成，涉及原始数据验证、原始数据记录、代表性、完整性、与 ISO 14040 和 14044 有关的建模的一致性。

## Data sources
- 周和敏. 钢铁材料生产过程环境协调性评价研究. (北京工业大学, 2001).
