# Lithographicink|Rosinmodifiedphenolicresin,solventoil,organicpigment,alkydresin|Offset ink dry process|greater than or equal to5000 t/a / 平版油墨|松香改性酚醛树脂、溶剂油、有机颜料、醇酸树脂|胶印油墨干法|大于等于0.5万吨/年

Dataset: ILCD process, Unit process, single operation
Geography: CN
Reference year: 2019
Classification: Materials production / Organic chemicals
Generated by: The data was created by the Office of the Second National Pollution Source Census of the Ministry of Ecology and Environment, and the data was organized by the TianGong Plan team for ILCD format / 生态环境部第二次全国污染源普查工作办公室创建数据，天工计划团队常慧敏整理数据为ILCD格式
Owner: Tiangong LCI Data Working Group / 天工LCI数据工作小组
Amounts: no units in this file; such an amount is in the reference unit of its flow, which a separate flow dataset defines
copyright: false
licenseType: Free of charge for all users and uses

## Technology and included processes
the Technical of end-of-pipe management technology for pollution particles (PM2.5 - PM10)isCyclone dust removal + bag filter，Its Technical efficiency of end-of-pipe management90

## Reference product
- Planographic Printing Ink: 1000; calculated
  源文件中描述为为平版油墨，此处对其进行了匹配工作，将其匹配到LCAflow库里面相最符合的流，污染物指标备注为工业废气量

## Outputs
- Exhaust gas: 9890; calculated
  污染物指标工业废气量的末端治理技术是/，其效率为0。原文件中描述污染物类别为废气，污染物指标为工业废气量，此处对其进行了匹配工作，将其匹配到LCAflow库里面相最符合的流，污染物指标备注为工业废气量
- particles (PM2.5 - PM10): 0.0445; calculated
  污染物指标颗粒物的末端治理技术是袋式除尘，其效率为90，末端治理设施实际运行率（k值）计算公式为k=处理设施年耗电量（千瓦时）/(设备额定功率（千瓦）×设备运行时间（小时））。原文件中描述污染物类别为废气，污染物指标为颗粒物，此处对其进行了匹配工作，将其匹配到LCAflow库里面相最符合的流，污染物指标备注为颗粒物
- particles (PM2.5 - PM10): 0.0445; calculated
  污染物指标颗粒物的末端治理技术是旋风+布袋，其效率为90，末端治理设施实际运行率（k值）计算公式为k=处理设施年耗电量（千瓦时）/(设备额定功率（千瓦）×设备运行时间（小时））。原文件中描述污染物类别为废气，污染物指标为颗粒物，此处对其进行了匹配工作，将其匹配到LCAflow库里面相最符合的流，污染物指标备注为颗粒物

## Data sources
- 第二次全国污染源普查产排污核算系数手册（试用版）,二级代码26,四级代码2642文件，在完整版文件中第4111页
