# 废聚丙烯（PP）回收; 再生聚丙烯; 机械回收; 废聚丙烯

Dataset: ILCD process, Unit process, black box
Geography: TJ-CN
Reference year: 2016
Valid until: 2016
Classification: Unit processes / End-of-life treatment / Material recycling
Functional unit: 1 ton of waste Polypropylene
Generated by: 程晓宇, xiaoyucheng@email.ncu.edu.cn
Owner: 天工LCI数据工作小组
Review: Dependent internal review by 天工LCI数据工作小组
Amounts: no units in this file; such an amount is in the reference unit of its flow, which a separate flow dataset defines
copyright: false
licenseType: Free of charge for all users and uses

## General comment
校准后，选择2016年的相应工艺数据来评估废塑料机械回收的环境影响。

## Geography
ZEDA位于天津西南部，是中国最大的可再生资源加工产业园区。

## Time period
文献中只说明是2016年。

## Technical purpose
通过废聚丙烯机械回收工艺得到的再生聚丙烯主要用作各种塑料制品的原料。这包括汽车零件、塑料容器、花园家具和地毯纤维等物品。所述的机械回收过程体现了大规模回收操作中的行业标准做法，特定于需要二级级别材料（通常是批量采购）的应用。

## Reference product
- Polypropylene Wastes: 1000; input; measured

## Inputs
- Water for industrial use: 420; measured
- Electricity: 1065.53; measured
- natural gas; 44.1 MJ/kg: 45.6; measured

## Outputs
All rows: measured
- particles (>PM10): 0.48
- non-methane volatile organic compounds: 0.31
- Suspended solids, unspecified,Suspended solids, unspecified: 0.01271
- chemical oxygen demand: 0.09421
- biological oxygen demand: 0.02013
- Ammonia Nitrogen: 0.00786
- Phosphorus: 0.00068
- Oils, unspecified: 0.0004
- waste water - untreated: 302
- General Solid Waste: 92.81
- Hazardous Solid Waste: 3.8
- Recycled Polypropylene Granules: 902.6

## Data selection and combination
2016年，再生塑料产量为327千吨，涵盖了所有主要塑料类别。

## Data treatment and extrapolations
校准

## Use advice
使用此数据集时，用户应确保考虑来自2016年天津ZEDA的校准过程数据，这反映了那一年的回收输出和环境影响。用户应注意所提供的数据反映了当时废聚丙烯机械回收的表现，并且如果用于预测未来的影响，必须谨慎应用。应考虑季节和操作变化，并可能需要进行调整，以适应各自的回收环境和技术进步。

## Review details
清单： 内部审查通过几个迭代步骤完成，涉及原始数据验证、原始数据记录、代表性、完整性、与 ISO 14040 和 14044 有关的建模的一致性。

## Data sources
- Chen, Y. et al. Life cycle assessment of end-of-life treatments of waste plastics in China. Resources, Conservation and Recycling 146, 348–357 (2019).
