# 白炭黑生产;白炭黑粉末;气相法;一甲基三氯硅烷

Dataset: ILCD process, Unit process, single operation
Geography: CN
Classification: Unit processes / Materials production / Inorganic chemicals
Generated by: 刘晓华, lxh01311@163.com
Owner: 天工LCI数据工作小组
Review: Dependent internal review by 天工LCI数据工作小组
Amounts: no units in this file; such an amount is in the reference unit of its flow, which a separate flow dataset defines
licenseType: Free of charge for all users and uses

## General comment
该数据集代表的材料为使用气相法和一甲基三氯硅烷为前体制得的白炭黑粉末。这种白炭黑主要用作橡胶制品的增强填料，包括轮胎，在油漆、油墨、化妆品和食品产品中用作增稠剂或抗结块剂。

## Reference product
- Silica: 1000
  白炭黑

## Inputs
- Electricity: 8510.4
  电力
- sodium hydroxide: 366.5
  烧碱
- water: 5338
  新鲜水
- compressed air: 5367.6
  压缩空气
- Methyl Silicochloroform: 2033.8
  一甲基三氯硅烷
- Hydrogen: 76.3
  氢气

## Outputs
- hydrogen chloride: 4675.3
  氯化氢
- chemical oxygen demand: 1983.2
  化学需氧量
- carbon dioxide (fossil): 5655
  二氧化碳 原文未区分bio和fossil，根据专家判断此处为fossil

## Use advice
使用本数据集时，请考虑到生产过程基于气相法，可能不代表白炭黑的其他生产方法。由于生产过程可能存在的变异性，应对特定装置的确切排放和资源使用进行核实。方法学建议包括确保在适用的情况下考虑到下游加工或回收阶段。用户应根据使用白炭黑的产品的特定应用和寿命对使用阶段行为进行建模。

## Review details
清单： 内部审查通过几个迭代步骤完成，涉及原始数据验证、原始数据记录、代表性、完整性、与 ISO 14040 和 14044 有关的建模的一致性。

## Data sources
- 内蒙古恒业成有机硅有限公司年产3000吨气相法白炭黑项目
