# 污泥处理与处置|填埋

Dataset: ILCD process, Unit process, single operation
Geography: CN
Classification: Materials production / Other mineralic materials
Generated by: Jin Sitian, 2331276@tongji.edu.cn
Review: Dependent internal review by Tiangong LCI Data Working Group
Amounts: no units in this file; such an amount is in the reference unit of its flow, which a separate flow dataset defines

## Reference product
- Sludge: 1000; input; estimated
  1 t 含水率 80%污泥

## Outputs
All rows: calculated
- carbon dioxide: 49.62
- methane: 14.87
- nitrous oxide: 0.001
- Nitrogen oxides: 0.13
- sulfur dioxide: 0.03
- carbon monoxide: 0.02
- hydrocarbons (unspecified): 0.002
- particles (PM10): 0.005
- hydrogen sulfide: 0.006
- ammonia: 0.004
- chemical oxygen demand: 0.13
- nitrogen, total (excluding N2): 0.009
- phosphorus, total: 0.001
- ammonium: 0.006
- mercury: 3e-7, 0.0008 (2 entries)
- lead: 2e-5, 0.04 (2 entries)
- cadmium: 8e-7, 0.002 (2 entries)
- nickel: 6e-6, 0.007 (2 entries)
- zinc: 6e-5, 0.4 (2 entries)
- copper: 7e-6, 0.04 (2 entries)
- chromium: 8e-6, 0.06 (2 entries)
- tin: 0.005, 0.005 (2 entries)
- Waste (solid): 750

## Review details
Inventory: The internal review was done by several iteration steps concerning raw data validation, raw data documentation, representativity, completeness and consistency of modelling with regard to ISO 14040 and 14044.

## Data sources
- 基于LCA和AHP的污泥处理技术的综合性能评价
