# Organicsilicon|Chloromethane,silicapowder,methylcrudemonomer|Synthesis of silicone monomers|All sizes / 有机硅|氯甲烷、硅粉、甲基粗单体|有机硅单体合成|所有规模

Dataset: ILCD process, Unit process, single operation
Geography: CN
Reference year: 2019
Classification: Materials production / Organic chemicals
Generated by: The data was created by the Office of the Second National Pollution Source Census of the Ministry of Ecology and Environment, and the data was organized by the TianGong Plan team for ILCD format / 生态环境部第二次全国污染源普查工作办公室创建数据，天工计划团队常慧敏整理数据为ILCD格式
Owner: Tiangong LCI Data Working Group / 天工LCI数据工作小组
Amounts: no units in this file; such an amount is in the reference unit of its flow, which a separate flow dataset defines
copyright: false
licenseType: Free of charge for all users and uses

## Technology and included processes
the Technical of end-of-pipe management technology for pollution chemical oxygen demandisChemical treatment + physical chemical treatment，Its Technical efficiency of end-of-pipe management50

## Reference product
- Organic Silicone: 1000; calculated
  源文件中描述为为有机硅，此处对其进行了匹配工作，将其匹配到LCAflow库里面相最符合的流，污染物指标备注为工业废气量

## Outputs
All rows: calculated
- Exhaust gas: 161
  污染物指标工业废气量的末端治理技术是/，其效率为0。原文件中描述污染物类别为废气，污染物指标为工业废气量，此处对其进行了匹配工作，将其匹配到LCAflow库里面相最符合的流，污染物指标备注为工业废气量
- volatile organic compound: 0.383315
  污染物指标挥发性有机物的末端治理技术是直接燃烧法，其效率为84.5，末端治理设施实际运行率（k值）计算公式为k=处理设施运行时间(小时/年)/正常生产时间(小时/年)。原文件中描述污染物类别为废气，污染物指标为挥发性有机物，此处对其进行了匹配工作，将其匹配到LCAflow库里面相最符合的流，污染物指标备注为挥发性有机物
- volatile organic compound: 0.39568
  污染物指标挥发性有机物的末端治理技术是热力燃烧法，其效率为84，末端治理设施实际运行率（k值）计算公式为k=处理设施运行时间(小时/年)/正常生产时间(小时/年)。原文件中描述污染物类别为废气，污染物指标为挥发性有机物，此处对其进行了匹配工作，将其匹配到LCAflow库里面相最符合的流，污染物指标备注为挥发性有机物
- volatile organic compound: 0.482235
  污染物指标挥发性有机物的末端治理技术是催化燃烧法，其效率为80.5，末端治理设施实际运行率（k值）计算公式为k=处理设施运行时间(小时/年)/正常生产时间(小时/年)。原文件中描述污染物类别为废气，污染物指标为挥发性有机物，此处对其进行了匹配工作，将其匹配到LCAflow库里面相最符合的流，污染物指标备注为挥发性有机物
- volatile organic compound: 0.482235
  污染物指标挥发性有机物的末端治理技术是蓄热式催化燃烧法，其效率为80.5，末端治理设施实际运行率（k值）计算公式为k=处理设施运行时间(小时/年)/正常生产时间(小时/年)。原文件中描述污染物类别为废气，污染物指标为挥发性有机物，此处对其进行了匹配工作，将其匹配到LCAflow库里面相最符合的流，污染物指标备注为挥发性有机物
- particles (PM2.5 - PM10): 0.00539
  污染物指标颗粒物的末端治理技术是袋式除尘，其效率为98.9，末端治理设施实际运行率（k值）计算公式为k=处理设施运行时间(小时/年)/正常生产时间(小时/年)。原文件中描述污染物类别为废气，污染物指标为颗粒物，此处对其进行了匹配工作，将其匹配到LCAflow库里面相最符合的流，污染物指标备注为颗粒物
- Waste water: 1695
  污染物指标废水量的末端治理技术是/，其效率为0。原文件中描述污染物类别为废水，污染物指标为废水量，此处对其进行了匹配工作，将其匹配到LCAflow库里面相最符合的流，污染物指标备注为废水量
- chemical oxygen demand: 0.84741
  污染物指标化学需氧量的末端治理技术是物理化学处理法，其效率为39.9，末端治理设施实际运行率（k值）计算公式为k=处理设施运行时间(小时/年)/正常生产时间(小时/年)。原文件中描述污染物类别为废水，污染物指标为化学需氧量，此处对其进行了匹配工作，将其匹配到LCAflow库里面相最符合的流，污染物指标备注为化学需氧量
- chemical oxygen demand: 0.705
  污染物指标化学需氧量的末端治理技术是化学处理法+物理化学处理法，其效率为50，末端治理设施实际运行率（k值）计算公式为k=处理设施运行时间(小时/年)/正常生产时间(小时/年)。原文件中描述污染物类别为废水，污染物指标为化学需氧量，此处对其进行了匹配工作，将其匹配到LCAflow库里面相最符合的流，污染物指标备注为化学需氧量

## Data sources
- 第二次全国污染源普查产排污核算系数手册（试用版）,二级代码26,四级代码2614文件，在完整版文件中第4111页
