# 湿蒸法棉布染整加工|印染棉布|拉幅定型

Dataset: ILCD process, Unit process, single operation
Geography: SZ-JS-CN
Reference year: 2012
Classification: Materials production / Other mineralic materials
Generated by: Yingfan Duan, 1300925579@qq.com
Review: Dependent internal review by Tiangong LCI Data Working Group
Amounts: no units in this file; such an amount is in the reference unit of its flow, which a separate flow dataset defines
copyright: false

## General comment
煤被用于蒸汽和导热油锅炉中以分别产生蒸汽和较高的操作温度。根据所调研企业的清洁生产报告，两种类型锅炉煤消耗量比为17:1。烧毛和拉幅定型两个工序需要消耗煤通过导热油锅炉加热汽油以提供油温，假设其耗煤量为1:1。而汽油作为导热介质在相应管道中循环流动，基本无损耗也不产生相应的污染物排放，将汽油生产过程的物料使用和污染物排放情况平均分配到这两个过程中。

## Geography
本研究选取江苏省某印染企业为重点调研对象，该企业位于长三角经济圈中的常熟。

## Inputs
- Electricity: 967; measured
- Crude coal: 306; calculated
- Fuel Oil: 6.53
- heavy fuel oil: 1.96
- diesel: 8.98
- Coke Oven Gas: 12
- natural gas: 0.153
- Gasoline (regular): 1400
- Cotton: 167; measured
- Softener: 250
- river water: 3100
- Water (fresh water): 555; measured

## Outputs
- carbon dioxide: 947; calculated
- carbon monoxide: 0.739
- sulfur dioxide: 4.96; estimated
- methane: 3.2; calculated
- Nitrogen oxides: 1.436
- nitrous oxide: 0.0102; calculated
- Dust (unspecified, from stack): 2.51; estimated
- ammonia: 2.49e-5
- non-methane volatile organic compounds: 0.00357
- waste water - untreated: 1850
- chemical oxygen demand: 2.12; measured
- Suspended solids, unspecified: 0.282; measured
- volatile organic compound: 0.265
- lead: 2.4e-5
- mercury: 5.05e-7
- fluorine: 4.55e-6
- cadmium: 8.91e-7
- arsenic: 2.06e-5

## Review details
Inventory: The internal review was done by several iteration steps concerning raw data validation, raw data documentation, representativity, completeness and consistency of modelling with regard to ISO 14040 and 14044.; Documentation: The review of the documentation was performed by Ecobilan and is in compliance with ISO 14040 and 14044. The data set documentation is correct in view of the appropriateness of the information provided. It includes all relevant information in view of data quality and scope of application of the respective LCI result.

## Data sources
- 朱亚楠. 棉布连续轧染工艺生命周期环境影响评价. (南京大学, 2012).
