# 土壤修复;异位修复;化学氧化;施工准备;材料运输;设备和材料运抵现场

Dataset: ILCD process, Unit process, single operation
Geography: AH-CN
Reference year: 2023
Classification: Other Services / Repair and maintenance
Generated by: 桑春晖, sangch@mail.bnu.edu.cn
Owner: 天工LCI数据工作小组
Review: Dependent internal review by 天工LCI数据工作小组
Amounts: no units in this file; such an amount is in the reference unit of its flow, which a separate flow dataset defines
copyright: false
licenseType: Free of charge for all users and uses

## General comment
场地29437.9 m3 污染土壤修复所需材料和药剂共计1186吨，总运输距离15公里

## Geography
安徽省合肥市受重金属和有机物复合污染的钢铁厂地块

## Technology and included processes
修复过程中用到的所有设备、材料、药剂等运送到现场

## Technical purpose
该数据集代表了通过化学氧化进行的异位土壤修复工艺。该过程专门用于重金属和有机污染物污染的工业场地的修复。本案例针对安徽省合肥市的一个钢铁厂地块，并反映了29,437.9立方米受污染土壤的处理，其中包括为修复过程准备施工和运输距离15公里的1186吨材料和化学药剂。

## Reference product
- Equipment and Materials Arriving on Site: 1.186e6; estimated
  运输土壤修复所需材料和药剂

## Inputs
- transport in t*km: 17790; estimated

## Use advice
使用此数据集的用户应考虑到所提供的信息是特定于所提及的场地（安徽省合肥市的钢铁厂），且在没有调整的情况下可能不直接适用于其他环境。在将此过程适应到其他地点时，应考虑当地土壤组成、具体存在的污染物以及场地条件等因素。还应注意材料和化学品需求、运输距离以及项目规模可能会有显著变化。在整个生命周期评估中，还应考虑修复过程后任何残余材料的回收或处理。

## Review details
清单： 内部审查通过几个迭代步骤完成，涉及原始数据验证、原始数据记录、代表性、完整性、与 ISO 14040 和 14044 有关的建模的一致性。

## Data sources
- 桑春晖,杨欣桐,李香兰等.基于SEFA方法的异位土壤修复环境足迹分析——以某钢铁厂为例[J].中国环境科学,2023,43(10):
