# clinker production|clinker|new suspension preheater kiln

Dataset: ILCD process, Unit process, single operation
Geography: CN
Classification: Materials production / Other mineralic materials
Generated by: Siqi Yang
Amounts: no units in this file; such an amount is in the reference unit of its flow, which a separate flow dataset defines
copyright: false

## General comment
The grinding of raw materials and calcinating for clinker are closely linked as one complete procedural phase in the new suspension preheater (NSP) kiln. In addition, the residual heat from the kiln in the calcinating process is used to dry or bake raw materials in the grinding phase with the addition of coal powder.
The NSP kiln is a production system of high efficiency, good production continuity, high output, and low overall energy consumption. In addition, with better dust collection and noise elimination equipment, the production system of the NSP kiln can greatly reduce the consumption of resources and pollutant emissions.

## Model description
The system boundaries include the preparative phase yielding raw meal (including grinding) and the calcinating phase yielding clinker.

## Reference product
- clinker: 1000
  Cement clinker

## Inputs
All rows: measured
- limestone, crushed, for mill: 1497.2
  Limestone
- clay: 276.5
  Clay
- iron, powder: 80.8
  Iron powder
- Water (fresh water): 45.6
  Water (water content): water contained in the input materials.
- oxygen: 400
  O2
- hard coal, run-of-mine: 150
  Coal

## Outputs
All rows: measured
- particles (> PM10): 4
  Dust. The particle size is not specified. Here we treat it as PM>10.
- carbon dioxide: 799.8
  CO2
- sulfur dioxide: 0.6
  SO2
- Nitrogen oxides: 2.4
  NOx
- water vapour: 45.6
  Vapor
- Waste, solid, from cement production: 103.9
  Others. The original text did not specify what substance it is, so let's assume it is the soild waste.

## Data sources
- Dan Hu, Zhen Guo, Zhen Wang, & Qiang Xiao. (2015). Metabolism analysis and eco-environmental impact assessment of two typical cement production systems in Chinese enterprises. Ecological Informatics 26, 70–77.
