# 电力生产 ; 混合电力 ; 广东

Dataset: ILCD process, Unit process, single operation
Geography: GD-CN
Reference year: 2019
Classification: Unit processes / Energy carriers and technologies / Electricity
Generated by: 熊若熙, xiongrx0126@163.com
Owner: 天工LCI数据工作小组
Review: Dependent internal review by 天工LCI数据工作小组
Amounts: no units in this file; such an amount is in the reference unit of its flow, which a separate flow dataset defines
copyright: false
licenseType: Free of charge for all users and uses

## General comment
混合电力产生形式包括火力发电、水力发电、风力发电、核能发电和太阳能发电

## Technical purpose
广东的混合电力用途广泛，涉及住宅、商业和工业部门。包括日常用电需求，如照明、供暖和制冷系统，以及运行机械、电子设备和为需要可靠电力供应的工业操作提供动力。

## Reference product
- Electricity: 3.6; missing unimportant
  [{'text': '3.6', 'type': 'text'}]

## Inputs
All rows: missing unimportant
- electricity for thermal power: 2.44121
  [{'text': '3.6', 'type': 'text'}]
- electricity from hydroelectric power plant: 0.282233
  [{'text': '3.6', 'type': 'text'}]
- electricity for nuclear power: 0.786272
  [{'text': '3.6', 'type': 'text'}]
- electricity from wind power: 0.0526068
  [{'text': '3.6', 'type': 'text'}]
- electricity for solar power: 0.0376776
  [{'text': '3.6', 'type': 'text'}]

## Use advice
在使用此数据进行生命周期评估时，用户应考虑电力来源的具体组合及其各自的环境影响。必须考虑地区差异，如广东电力组合中可再生能源和非可再生能源的比例。在适用的情况下，应考虑包括回收过程，并应假设组合中各种发电技术的假定操作寿命。建议用户定期更新数据，以反映能源组合和技术进步的变化。

## Review details
清单： 内部审查通过几个迭代步骤完成，涉及原始数据验证、原始数据记录、代表性、完整性、与 ISO 14040 和 14044 有关的建模的一致性。

## Data sources
- 能源统计年鉴2020
