# 六氟磷酸锂生产; 六氟磷酸锂 ; 无氟气法

Dataset: ILCD process
Geography: JS-CN
Reference year: 2023
Classification: Unit processes / Materials production / Inorganic chemicals
Functional unit: 1 ton lithium hexafluorophosphate product
Generated by: 刘晓华, lxh01311@163.com
Owner: 天工LCI数据工作小组
Review: Dependent internal review by 天工LCI数据工作小组
Amounts: no units in this file; such an amount is in the reference unit of its flow, which a separate flow dataset defines
copyright: false
licenseType: Free of charge for all users and uses

## General comment
采用无氟气法生产的六氟磷酸锂通常用作锂离子电池的电解质，这些电池为智能手机、笔记本电脑和电动汽车等电子设备供电。这种高纯度化合物对电池性能和寿命至关重要。

## Reference product
- Lithium hexafluorophosphate: 1000; measured
  六氟磷酸锂

## Inputs
All rows: measured
- Phosphorus Pentachloride: 1373
  五氯化磷
- Anhydrous Hydrogen Fluoride: 2058
  无水氟化氢
- Lithium fluoride: 171
  氟化锂
- sodium hydroxide: 67
  氢氧化钠
- Nitrogen: 2000
  氮气
- water: 18780
  水
- Electricity: 13.392
  电
- Steam: 500
  蒸汽

## Outputs
All rows: measured
- Hydrochloric Acid（31%）: 1333
  副产 31%盐酸
- Hydrogen Fluoride: 1097
  副产 45%氟化氢
- hydrogen fluoride: 4.8
  氟化氢（排放到大气）
- hydrogen chloride: 6
  氯化氢（排放到大气）
- Water: 17257
  水（排放到水体）
- hydrogen fluoride: 45
  氟化氢（排放到水体）
- hydrogen chloride: 54
  氯化氢（排放到水体）

## Use advice
在使用这些数据进行含有六氟磷酸锂产品的生命周期评估时，需考虑材料的来源和纯度。确保考虑采用无氟气法的生产阶段相关的环境影响。这可能会影响与其他生产工艺相比的整体环境足迹。同时，也应考虑包含此物质的产品的未来回收可能性和生命周期终端场景。

## Review details
清单： 内部审查通过几个迭代步骤完成，涉及原始数据验证、原始数据记录、代表性、完整性、与 ISO 14040 和 14044 有关的建模的一致性。

## Data sources
- 六氟磷酸锂全生命周期环境影响评价研究 - 中国知网.
