# 铝电解碳阳极生产 ; 碳阳极 ; 石油焦 ; 2009年

Dataset: ILCD process, Unit process, single operation
Geography: CN
Reference year: 2021
Classification: Unit processes / Materials production / Non-energetic raw materials
Generated by: 蔡梓萌, caizm6178@163.com
Owner: 天工LCI数据工作小组
Review: Dependent internal review by 天工LCI数据工作小组
Amounts: no units in this file; such an amount is in the reference unit of its flow, which a separate flow dataset defines
copyright: false
licenseType: Free of charge for all users and uses

## General comment
本数据集代表了使用石油焦生产碳阳极的工艺过程，该过程是铝电解中不可或缺的一部分。这些碳阳极通常用于生产原铝的冶炼过程。由于铝的重量轻、耐用性强以及导电特性，这种物质对航空航天、汽车、建筑和电力等各个行业至关重要。

## Time period
文献发表日期

## Reference product
- anode, for metal electrolysis: 1000; software or database
  anode

## Inputs
All rows: software or database
- electricity, high voltage, aluminium industry: 759.6
  electricty
- heavy fuel oil: 69
  fuel oil
- coal tar: 220
  coal tar pitch
- Petroleum Coke: 1140
  petroleum coak
- coal gas: 1290

## Data selection and combination
本研究的数据参考了PA、SA、电力等背景数据的LCA数据。PA数据来自统计数据源，SA数据主要来自文献。背景数据主要来自中国科学院生态环境研究中心CASRCEES 2018建立的中国本地化LCA数据库，涵盖能源、材料、交通、废物管理等LCA数据。

## Use advice
生命周期评估(LCA)数据使用者应注意，数据集基于2009年的技术和实践，应相应地使用以确保评估环境性能的时效性。PA和SA数据必须根据它们衍生的统计来源和文献进行考虑。用户在使用数据进行铝生产环境评估时，应确保将2009年后可能发生的过程技术或生产实践的任何更新情况纳入考虑范围。后台数据用户应参考中国科学院生态环境研究中心2018年建立的CAS RCEES数据库以获取中国本土化的LCA数据，并应在其影响评估中仔细考虑区域性和技术特点。

## Review details
清单： 内部审查通过几个迭代步骤完成，涉及原始数据验证、原始数据记录、代表性、完整性、与 ISO 14040 和 14044 有关的建模的一致性。

## Data sources
- Ding, N., Liu, N., Lu, B. & Yang, J. Life cycle greenhouse gas emissions of aluminum based on regional industrial transfer in China. J. Ind. Ecol. 25, 1657–1672 (2021).
