# 灰水回用｜灰水｜光催化

Dataset: ILCD process, Unit process, black box
Geography: ES
Classification: Unit processes / End-of-life treatment / Waste water treatment
Generated by: 榕
Owner: 天工LCI数据工作小组
Review: Dependent internal review by 天工LCI数据工作小组
Amounts: no units in this file; such an amount is in the reference unit of its flow, which a separate flow dataset defines
copyright: ['opt4ROkqig']
licenseType: Free of charge for all users and uses

## General comment
光催化灰水回用的优点包括高效、无化学药剂残留、无二次污染、操作简单等。然而，该技术也存在一些挑战，如高能耗、设备成本较高、催化剂的稳定性和寿命等问题。

## Technology and included processes
光催化反应器（APRIA Systems S.L. Photolab LED/160）由 1.00 L 夹套环形反应器、5.00 L 混合罐和 40 个 LED LZ1-00U600 （LED Engin）组成。LED 发出的波长介于 365 nm 和 370 nm 之间，总功率介于 1.00 W 和 100 W 之间。使用风扇（San Ace 80，Sanyo Denki）将 LED 的温度控制在合适的范围内（20.0 °C-30.0 °C），以保持恒定的辐射时间和较长的灯泡寿命。用 UV-1800 分光光度计（岛津）在 223 纳米波长处对 SDBS 的浓度进行定量。光催化处理后得到的废 TiO2 被送往城市垃圾填埋场。

## Technical purpose
光催化灰水回用工艺旨在有效地回收使用水资源，强调高效率、无化学残留物和零二次污染。这些特点使得该系统适用于不同领域，包括住宅、商业和工业设施，在水资源短缺的环境中，水资源保护和回用至关重要。

## Reference product
- greywater: 1; input; estimated

## Inputs
- freshwater,freshwater: 0.2
- titanium dioxide: 0.1; measured
- Electricity: 26.3
  Aeration
- Electricity: 135
  Light source
- Electricity: 8.17
  Pumping
- Electricity: 0.32
  Stirring

## Outputs
- Exhausted TiO2: 0.1; measured
- waste water - treated: 1; estimated

## Use advice
在使用光催化灰水回用数据集时，应仔细考虑应用该技术的具体环境。使用者应考虑能耗、设备成本以及使用的光催化剂稳定性和寿命的潜在变化。特别注意的是，数据集不包括废光催化剂（例如TiO2）的处理或处置，应另行寻找废弃阶段的数据，包括填埋场影响。

## Review details
清单： 内部审查通过几个迭代步骤完成，涉及原始数据验证、原始数据记录、代表性、完整性、与 ISO 14040 和 14044 有关的建模的一致性。

## Data sources
- Dominguez, S. et al. LCA of greywater management within a water circular economy restorative thinking framework. SCIENCE OF THE TOTAL ENVIRONMENT 621, 1047–1056 (2018).
