# 牛奶生产 ; 粪便处理 ; 种养一体化奶牛场(IPBS)

Dataset: ILCD process, Unit process, single operation
Geography: QD-SD-CN
Reference year: 2016
Classification: Unit processes / End-of-life treatment / Material recycling
Functional unit: The 1t FPCM corrected for protein and fat content was selected as the evaluation unit
Generated by: 杨瑞, 1632707028@qq.com
Owner: 天工LCI数据工作小组
Review: Dependent internal review by 天工LCI数据工作小组
Amounts: no units in this file; such an amount is in the reference unit of its flow, which a separate flow dataset defines
copyright: false
licenseType: Free of charge for all users and uses

## General comment
在粪便处理环节,2 种模式的粪便处理方式相同,粪便均采用堆肥制成有机肥,尿液污水进入氧化塘经无害化处理制成液 体肥,此环节投入主要是电和柴油(表 8).此环节的排 放包括粪肥储存排放、有机肥生产能耗排放.尿液污 水在氧化塘中的温室气体排放较小[25],可忽略.

## Geography
于 2020 年 7 月~8 月在山东省青岛市进行奶牛 场问卷调查.

## Time period
从 2016 年,山东开始实施青贮玉米种植补贴 政策,是国内最早实施该补贴政策的省份之一,补贴 标准为 20~50 元/t.2019 年,山东省青贮玉米种植面 积达 1.41 万 hm2,占全国的 7.3%.

## Technology and included processes
研究地区主要有 2 种牛奶生产模式:IPBS 和 non-IPBS.non-IPBS 中,养殖场只有饲养 环节和粪污处理环节,饲料全部来源于购买,粪便堆 肥制成有机肥后全销售给果农和菜农.IPBS 中,养殖 场增加青贮玉米种植环节,有机肥、液体肥主要施用 于场内农田,剩余部分销售给果农和菜农等.2 种模 式的区别:1)养殖场青贮玉米的来源不同,导致饲料 运输距离和饲料成本不同;2)有机肥、液体肥的利用 途径不同,运输距离不同.本研究共调研奶牛场 109 家,剔除不符合研究问卷后,得 83 份有效问卷,其中 non-IPBS 为 38 家,IPBS 为 45 家.

## Technical purpose
所描述的工艺流程用于牛奶生产和粪便管理，作为种养一体化系统（IPBS）的一部分。具体而言，它涉及将动物废物通过堆肥处理制成有机肥，以及在氧化塘中无害化处理后将尿液污水转化为液体肥料。该系统实施在同时种植青贮玉米的奶牛场，这对奶牛的喂养是不可分割的一部分。

## Reference product
- milk: 1000; estimated
  作为参考定量，非实际输出

## Inputs
All rows: measured
- waste water - untreated: 10753
  尿液污水（IPBS模式）
- Electricity: 4.7088
- Diesel: 0.002493
- unspecified: 2.76
  土地占用（IPBS模式）
- manure: 1868
  粪便（IPBS模式）

## Outputs
- organic fertilizer: 728; measured
  有机肥（IPBS模式）
- Fertilizer: 10215; measured
  液体肥（IPBS模式）

## Use advice
使用数据集时，重要的是要考虑诸如电力和柴油作为输入的方法论边界条件以及在肥料生产过程中相关的能耗和排放。在氧化塘中尿液污水的温室气体排放被视为可以忽略的，可以不在详细报告中体现。使用数据时，应将其应用于类似的综合奶牛养殖和青贮玉米种植环境中，同时考虑中国山东省的青贮玉米种植补贴情况。在适用的情况下，数据集应用于以1吨FPCM（经蛋白质和脂肪含量校正的牛奶）为评价单位的生命周期评价模型。

## Review details
清单： 内部审查通过几个迭代步骤完成，涉及原始数据验证、原始数据记录、代表性、完整性、与 ISO 14040 和 14044 有关的建模的一致性。

## Data sources
- 黄显雷, 师博扬, 张英楠, 龙昭宇, & 尹昌斌. 基于生命周期视角的种养一体化奶牛场环境经济效益评估. 中国环境科学 41, 3944–3955 (2021).
