# 铝电解电容器生产 ; 铝电解电容器（25V 4700uf）

Dataset: ILCD process, Unit process, black box
Geography: NT-JS-CN
Reference year: 2020
Classification: Unit processes / Materials production / Metals and semimetals
Generated by: 谢金良, jinliang.research@gmail.com
Owner: 天工LCI数据工作小组
Review: Dependent internal review by 天工LCI数据工作小组
Amounts: no units in this file; such an amount is in the reference unit of its flow, which a separate flow dataset defines
copyright: false
licenseType: Free of charge for all users and uses

## General comment
这一工业过程数据涉及25V 4700uf铝电解电容器的生产。铝电解电容器作为电子电路中的无源组件，用于储存电荷，通常应用于电源装置、消费电子、汽车电子和通信设备中。它们可用于需要大电容值和相对较高电压等级的情况。

## Time period
数据来自于在2020年进行的调研

## Reference product
- Aluminum Electrolytic Capacitors: 10000; measured
  aluminum electrolytic capacitors (qualified) (10000 pcs)

## Inputs
All rows: measured
- electricity, high voltage, aluminium industry: 12507.3
- Aluminum ingots(anode): 342.88
  Al ingots (anode) ; Al smelting preparation (anode)
- Aluminum ingots(cathode): 182.02
  Al ingots (cathode)
- Lead, in ground: 25.31
  Lead from assembly (including sleeving)
- case from assembly (including sleeving): 612.27
- polysulfide, sealing compound: 166.24
  Sealing cover from assembly (including sleeving)
- Sleeve: 35.8
  sleeve from assembly (including sleeving)
- Armature Winding: 25.31
  tab from winding ; 绕组接线片
- sealing tape, aluminium/PE, 50 mm wide: 2.7
  tape from winding
- Separator Paper Coil,Separator Paper Coil: 102.46
  Separator paper coil
- water, deionised: 87996.5
  deionized water
- tap water: 49376.4
  tape water
- electrolyte, KOH, LiOH additive: 312.13
  Electrolyte (soak); The complete composition of electrolyte is 69% main solvent (1,4-butyrolactone), 26% auxiliary solvent (ammonium tetramethylsuccinate), and 5% solute (water). The electrolyte here is assumed to consist of 95% the main solvent and 5% solutes to simplify the analysis of environmental impacts.
- phosphoric acid, industrial grade, without water, in 85% solution state: 92.38
- Perboric acid: 16.79
  perboric acid; HBO3; 过硼酸
- hydrochloric acid, without water, in 30% solution state: 126.39
  HCl (31%)
- Nitrogen: 0.65
  N2 gas (final annealing)
- sodium hydroxide, without water, in 50% solution state: 142.42
  NaOH (30%)
- ammonium nitrate: 1.48
  Ammonium nitrate; 硝酸氢铵
- nitric acid, without water, in 50% solution state: 37.92
  HNO3 (98%)
- Cold Rolling Oil: 12.56
  rolling oil (cold rolling)
- Ammonium Citrate: 32.33
  Ammonium citrate (formation process); 柠檬酸铵
- Ammonium Pentaborate: 8.87
  Ammonium pentaborate (formation process); 五硼酸铵
- Argon-40: 0.094
  Ar gas (Al smelting preparation)

## Outputs
All rows: measured
- Aluminium Phosphate: 11.9
  Aluminium phosphate (AlPO4) (production of anode formed foil); The environmental impacts from the production stage are all allocated to the capacitors. The by-product AlPO4 in production of anode formed foil is taken as an economical treatment method to address the production waste because of the limited amount and the simplified analysis.
- aluminium scrap, new: 42.25
  Al scraps; The environmental impacts on the specialized recycling processing of the flows are ignored.
- Scraps of Separator Paper: 0.062
  Scraps of separator paper; The environmental impacts on the specialized recycling processing of the flows are ignored.
- Sludge (Sewage Treatment): 11.198
  sludge (Sewage treatment); The environmental impacts on the specialized landfill of the sludge are ignored.
- wastewater, average: 75087
  wastewater
- Total Phosphorus (TP): 0.028
  total phosphorous (TP) (production of anode formed foil); 总磷 (污染物);
- total nitrogen: 0.126
  total nitrogen (TN); 总氮 (污染物)
- Suspended solids, unspecified: 1.057
- chemical oxygen demand: 3.215
- Biochemical Oxygen Demand: 0.403
  Biochemical Oxygen Demand (BOD) (Production of Al blank foil); 生化需氧量 (水体污染物)
- ammonia: 0.334
  Ammonia nitrogen (NH3-N)
- Dust: 0.194
  dust (Al smelting preparation)
- Hydrochloric acid: 0.621
- Sulfuric acid: 0.067
- Nitrogen oxides: 0.077
- ammonia: 0.07
- Aluminum Electrolytic Capacitors (Waste): 6281.67
  aluminum electrolytic capacitors (waste) ; The environmental impacts on the specialized recycling processing of the flows are ignored.

## Data selection and combination
三种 AEC 的材料信息和性能参数均来自被调查的制造商。此外，通过对 AEC 行业的几家工厂进行实地调研，获得了铝坯箔制造（由铝锭制成）、阳极/阴极箔制造（由铝坯箔制成）和电容器制造的原始数据。由于技术保密原因，无法直接从供应商处获得 PHAEC 阴极箔制造的 LCI 数据。因此，考虑到两者的相似性，根据 PAECs 阴极箔的涂层工艺数据调整 PHAECs 阴极铝箔的制造 LCI。在运输阶段，主要原材料从材料产地到电容器制造商的数据以及电容器制成品从制造商到客户的数据均来自制造商的供应链系统。使用阶段的能耗是根据 AEC 的物理方程和电气参数计算得出的。为确保分析的完整性，在分析和计算的基础上获得报废阶段的数据。基本数据的参考年份约为 2016 年。基本数据（即铝锭、分离纸、运输、电力和水）来自 Gabi 数据库（版本：10.6.1.35）。此外，一些背景数据，包括 3，4-乙烯二氧噻吩（EDOT）、己二酸铵、柠檬酸铵等，在 Gabi 数据库中无法获得。它们是根据 Gabi 数据库中现有原材料在材料制备过程中发生的化学反应估算出来的。用于制造 PHAECs 的分散溶液（PEDOT:PSS，1%wt）的制备过程数据是根据实验室数据按比例计算的。三种 AEC 的详细 LCI 数据和物质流的单位影响见辅助信息 B 的第 5-7 张和第 2 张。

## Use advice
使用这个数据集时，用户应注意以下方法指导：考虑未涵盖在所提供数据内的生产废物处理的纳入、对于因某些化学品的LCI数据估算而欠低估的环境影响进行调整，确保为满足多种反应条件而计算额外的能源和原材料输入。另外，还应考虑由于副反应及后续处理过程可能带来的潜在环境风险。请注意，由于缺失的LCI数据可能会导致实际工业生产中环境影响的某种程度的低估，且由于涉及的数量有限，对整体LCA结果的影响被认为不显著。

## Review details
清单： 内部审查通过几个迭代步骤完成，涉及原始数据验证、原始数据记录、代表性、完整性、与 ISO 14040 和 14044 有关的建模的一致性。

## Data sources
- Zhang, C., Zheng, Y., Huang, H., Liu, Z. & Jing, J. Environmental impact assessment of aluminum electrolytic capacitors in a product family from the manufacturer’s perspective. Int. J. Life Cycle Assess. (2022)
