# cement production|cement, ordinary portland cement, 42.5MPa|new dry process, low-temperature waste heat power generation technology, 2000 t/d|fly ash

Dataset: ILCD process, Unit process, black box
Geography: HLJ-CN
Reference year: 2008
Classification: Materials production / Other mineralic materials
Generated by: Siqi Yang
Amounts: no units in this file; such an amount is in the reference unit of its flow, which a separate flow dataset defines
copyright: false

## General comment
Laboratory data. New dry process low temperature waste heat power generation.
The cement is produced by burning carbide slag generated by the acetylene industry in Heilongjiang.
The new dry production line for low-temperature waste heat power generation uses the exhaust gas waste heat from the cooler at the kiln head and the preheater at the kiln tail, which is about 350°C, as the heating energy source. The low-pressure backpressure steam turbine is used for low-temperature waste heat power generation. An AQC waste heat boiler (vertical structure) is installed between the kiln head cooler and the waste gas fan, with a settling chamber before the AQC boiler. An SP waste heat boiler is installed between the kiln tail rotary kiln outlet and the high-temperature fan.
The AQC boiler adopts the middle section air extraction with recycled waste gas method, and the original waste gas extraction port is changed into two extraction ports, with one high-temperature extraction port located in the front and one low-temperature extraction port located in the rear. The high-temperature hot air from the front extraction port is recovered after some fly ash is collected in the settling chamber and sent to the AQC boiler, while the low-temperature extraction port is mixed with the AQC boiler outlet air and processed by the original cement production line dust removal system. The waste gas at the kiln tail is cooled and heated by the SP boiler to around 230°C, and a part of it is sent to the raw material mill of the original system by the high-temperature fan, while the other part is humidified in the humidification tower before being sent to the tail gas dust collector. If the power generation system stops operating, the waste gas enters the high-temperature fan through the waste gas pipeline of the original system to ensure the stable operation of the cement production line.
Through heat exchange, the boiler produces superheated steam, which is sent to the mixed steam cylinder for mixing and then enters the steam turbine for power generation through the superheated steam pipeline. The low-pressure steam from the steam turbine enters the condenser, where the steam condenses into water, which flows into the hot water well and is then pumped into the vacuum deaerator by a water pump. The water is then pumped into the AQC boiler for circulation by the feedwater pump.

## Geography
Mudanjiang New Material Technology Co., Ltd.

## Model description
Using the usability of cement with a compressive strength of 42.5 MPa after 28 days, which corresponds to 1 kg, as the functional unit, i.e. 1FU = 42.5 kg MPa. The evaluation scope covers raw material preparation, clinker calcination, and cement production. The environmental impact caused by the consumption of clay resources is not considered. Iron powder is a correction material and its environmental impact is not considered. The waste mainly includes nitrogen oxides, sulfur dioxide, carbon dioxide, and dust in the output of the product system.

## Reference product
- cement, ordinary portland cement, 42.5MPa: 1000
  42.5 Ordinary silicate cement

## Inputs
- limestone, crushed, for mill: 1104.4
  Limestone
- gypsum (desulphurized): 58.7
  Gypsum
- ash: 319.4
  Fly ash
- hard coal: 100.526
  Standard coal. The original data is 0.0934kg standard coal, here converted to hard coal, the conversion formula is 1kg hard coal = 0.929kg standard coal.
- electricity, medium voltage: 211.32
  Electricity

## Outputs
- particles (> PM10): 0.249
  Dust
- sulfur dioxide: 0.3893
  Sulfur dioxide
- Nitrogen oxides: 1.557
- carbon dioxide: 813.1
  Carbon dioxide

## Data selection and combination
Based on the energy-saving technology transformation design of the new dry process waste heat utilization of Mudanjiang New Material Technology Co., Ltd., the input and output data of the determined product system were collected, and the data was calculated and quantified.
(1) Available waste heat conditions: There are two 2000t/d new dry process production lines. To ensure the quality of waste heat, the inlet air of the waste heat furnace at the kiln head is extracted from the middle of the cooler, with an air volume of 2x170329Nm^3/h. The waste gas temperature is 360°C, and the waste heat utilization temperature range is 360~86°C, with a heat of 12302E+4kJ/h. The inlet air of the tail preheater is 2x203147Nm^3/h, and the waste gas temperature is 350°C. Considering the heat consumption of coal grinding, the waste heat utilization range is 350-205°C, with a heat of 7927E+4kJ/h.
(2) Installed capacity: The waste heat at the kiln tail is utilized to set up two kiln tail waste heat boilers, which can produce 2x13.5t/h-1.35Mpa-320℃ superheated steam. The waste heat at the kiln head cooler is utilized to set up two kiln head waste heat boilers, which can produce 2x9.0t/h-1.35Mpa-345℃ superheated steam and 62t/h-170℃ hot water. Among them, 44t/h of hot water is supplied to the kiln head and tail waste heat boilers to produce main steam, and 18t/h is supplied to the flash steam production of the turbine room. According to the main steam quality produced by the waste heat boiler, a back-pressure steam turbine is selected, with a main steam parameter of 1.25MPa-320℃. The head and tail waste heat boilers together produce 45t/h of main steam, and the head boiler produces 5t/h of low-pressure steam. Calculated based on the overall efficiency of the turbine and generator of 80.5%, the average waste heat power generation is 8600kW.
(3) Energy-saving electricity: According to the actual operation of the low-temperature waste heat power plant and the power generation efficiency, the average power generation of the power plant is 8600kW. Calculated based on a year-round operation of 7200 hours, the annual power generation is 6192E+4kWh. Subtracting the power plant's own use rate of 7.8%, which is 483E+4kWh, the actual electricity supplied by the waste heat power plant to the production line is 5709E+4kWh.
(4) Reduce emissions: A disturbance-type separator is installed at the inlet of the waste heat boiler flue gas, which is conducive to the settling of dust in the waste gas, reducing the dust content in the cement kiln waste gas by nearly 50%. Since thermal power is used in the north for power generation, saving electricity reduces the emissions of CO2, SO2, and NOx caused by coal combustion during power generation.
Through the above analysis, the data for the environmental impact assessment catalog analysis of the cement industry under the low-temperature waste heat power generation scheme of the new dry process was obtained.

## Data sources
- 于淼. (2008). 黑龙江水泥工业可持续发展研究 [硕士, 哈尔滨工业大学].
