# Cement production ; Total of all wind farm

Dataset: ILCD process, Unit process, single operation
Geography: NMG-CN
Reference year: 2017
Classification: Materials production / Other mineralic materials
Functional unit: The functional unit is 1.5 MW wind turbine
LCI method principle: Attributional
LCI method approaches: Allocation
Generated by: Yunzhi Zhao, ll10088@163.com
Owner: Tiangong LCI Data Working Group
Review: Dependent internal review by Tiangong LCI Data Working Group
Amounts: no units in this file; such an amount is in the reference unit of its flow, which a separate flow dataset defines
copyright: false
licenseType: Free of charge for all users and uses

## General comment
The data set presents information relevant to the production of cement and the operation of a total wind farm. It is specifically applicable to the analysis of environmental impacts and substitution effects for a wind farm with 33 domestic turbines, each with a capacity of 1.5 MW, used in generating renewable energy. This information may support studies and development related to the sustainability of wind power generation, particularly in regions similar to the northeast of Inner Mongolia where wind installations are prevalent.

## Geography
The data regarding the parameters of wind power has been collected from Wang (2012). A wind farm equipped with 33 domestic 1.5 megawatts (MW) wind turbines is regarded as a case study to analyze the environmental impact and its substitution effects. The wind farm is located in the northeast of Inner Mongolia, the province in which most of China’s wind power is installed (Xia and Song, 2017).

## Reference product
- Cement: 1; article inperiodical

## Inputs
- Energy, geothermal, converted: 6.72672; article inperiodical

## Outputs
- carbon dioxide: 604; article inperiodical
- sulfur dioxide: 0.372; article inperiodical
- nitrous oxide: 1.92; article inperiodical
- particles (PM2.5 - PM10): 0.341; article inperiodical

## Deviations from the LCI method approaches
The life cycle inventory for wind power is illustrated as follows. The production and manufacturing stage include the production of wind turbines, substations, and cables, which consume a large amount of energy and emit pollutants (Xue et al., 2015).

## Use advice
Users of this data set should account for geographic specificity when applying the environmental impact and substitution analyses to other regions. Consideration should be given to the methodological advice regarding the inclusion or exclusion of recycling practices in the assessment and the modeling of use phase behavior for wind turbines. Users should note that the life cycle inventory data covers the production and manufacturing stage, including the production of wind turbines, substations, and cables, and their associated energy consumption and emissions as detailed by Xue et al. (2015). The functional unit for assessment is defined as a 1.5 MW wind turbine.

## Review details
Inventory: The internal review was done by several iteration steps concerning raw data validation, raw data documentation, representativity, completeness and consistency of modelling with regard to ISO 14040 and 14044.

## Data sources
- Li, H., Jiang, H.-D., Dong, K.-Y., Wei, Y.-M. & Liao, H. A comparative analysis of the life cycle environmental emissions from wind and coal power: Evidence from China. Journal of Cleaner Production 248, 119192 (2020).
