# 氧化铝再生与聚氯化铝生产 ; 聚氯化铝 ; 酸溶解法 ; 二次铝渣

Dataset: ILCD process, Unit process, single operation
Geography: CN
Reference year: 2021
Classification: Unit processes / Materials production / Inorganic chemicals
Generated by: 谢金良, jinliang.research@gmail.com
Owner: 天工LCI数据工作小组
Review: Dependent internal review by 天工LCI数据工作小组
Amounts: no units in this file; such an amount is in the reference unit of its flow, which a separate flow dataset defines
copyright: false
licenseType: Free of charge for all users and uses

## General comment
The parameters such as temperature and yield of these three processes were based on experimental results. Life cycle inventory data were from the average data of aluminum industries in China and calculation based on material balance. The electricity type in this study was coal based, which is in line with the actual situation of China’s aluminum industry. The metal aluminum in secondary aluminum dross (SAD) can be recovered until 1 wt % is left through grinding and sieving. Chlorides in the solution were recovered through concentration and crystallization. Calcium chloride was used to remove fluoride. Ammonia was absorbed by hydrochloric acid and used to produce ammonium chloride. Methane produced from aluminum carbide was used as fuel gas to obtain energy. Chloride and fluoride were dissolved in water during the pretreatment. Hydrochloric acid was then used for the deactivation of active aluminum components and the dissolution of alumina. After curing at a certain temperature and duration, poly aluminum chloride can be obtained. Because of the low content and complex composition, the remaining metal chlorides were regarded as waste and landfilled. In this scenario, the active aluminum component was also completely deactivated. The recovery rate of alumina was 95%.

## Time period
文献发表于2021年9月

## Technical purpose
该工艺用于回收二次铝渣（SAD），生产氧化铝和聚氯化铝（PAC）。通过这一过程再生的氧化铝可用于铝金属生产等应用，以及作为各种铝化合物的前体。生产的聚氯化铝通常用作自来水和污水处理厂的絮凝剂。

## Reference product
- Secondary Aluminum Dross: 1000; input; measured
  secondary aluminium dross

## Inputs
- electricity, high voltage, aluminium industry: 720.72; measured
- hydrochloric acid, without water, in 30% solution state: 2710; measured
- calcium chloride: 43.82; measured
- Water, unspecified natural origin: 937.48; measured
  water

## Outputs
All rows: measured
- Residue from Filtration: 365.87
  residue from filtration
- Ammonia: 0.98
  ammonia (emissions)
- Dust from Grinding and Sieving: 0.01
  dust from grinding and sieving
- aluminium: 45.9
  aluminium (recycled resources)
- sodium chloride, powder: 81.73
- potassium chloride: 22.49
- fluorspar: 30.82
  calcium fluoride
- ammonium chloride: 260.63
- Polyaluminium Chloride: 1562.49
  polyaluminum chloride

## Use advice
使用此生命周期评估数据时，请确保根据所包含的截止系统模型遵守截止规则，仅关注铝生命周期内与SAD回收相关的环境影响，不包括运输。考虑与中国铝工业实践一致的煤电使用。回收过程序列—包括磨碎、筛分、浓缩、结晶和固化应准确反映，最后将含量低的复杂金属氯化物视为废物处理应考虑在内。需要将95%的氧化铝回收率纳入材料平衡计算。

## Review details
清单： 内部审查通过几个迭代步骤完成，涉及原始数据验证、原始数据记录、代表性、完整性、与 ISO 14040 和 14044 有关的建模的一致性。

## Data sources
- Zhu, X. & Jin, Q. Comparison of Three Emerging Dross Recovery Processes in China’s Aluminum Industry from the Perspective of Life Cycle Assessment. ACS Sustainable Chem. Eng. 9, 6776–6787 (2021).
