# 土壤修复;异位修复;热脱附;案例1;污染土挖掘;挖掘出的土壤

Dataset: ILCD process, Unit process, single operation
Geography: JS-CN
Reference year: 2017
Classification: Unit processes / Other Services / Repair and maintenance
Generated by: 王宁, wang_ning@caep.org.cn
Owner: 天工LCI数据工作小组
Review: Dependent internal review by 天工LCI数据工作小组
Amounts: no units in this file; such an amount is in the reference unit of its flow, which a separate flow dataset defines
copyright: false
licenseType: Free of charge for all users and uses

## General comment
使用挖掘机将污染土壤挖掘出来

## Technology and included processes
场地污染无土壤方量为61135m3，挖掘机效率为44.6 m3/ h，耗油量为22l/h

## Technical purpose
该数据集描述了在位热脱附用于土壤修复的应用。它适用于场地存在受污染土壤且需要治疗的情况。该过程涉及挖掘受污染的土壤并随后处理以除去污染物。

## Reference product
- Excavated soil,Excavated soil: 61135; measured

## Inputs
- Diesel,Diesel: 30.1563; measured

## Use advice
该数据集的用户应考虑指定的受污染土壤体积（61,135立方米）和挖掘过程的操作参数（效率为每小时44.6立方米，燃油消耗为每小时22升），以便在生命周期评估中进行准确建模。评估时必须包括所有主要原材料和必要的能源消耗作为输入输出流。

## Review details
清单： 内部审查通过几个迭代步骤完成，涉及原始数据验证、原始数据记录、代表性、完整性、与 ISO 14040 和 14044 有关的建模的一致性。

## Data sources
- Song, Y. et al. Environmental and socio-economic sustainability appraisal of contaminated land remediation strategies: A case study at a mega-site in China. Science of The Total Environment 610–611, 391–401 (2018).
