# 铝再生 ; 再生铝锭 ; 废铝 ; 2010年

Dataset: ILCD process, Unit process, single operation
Geography: CN
Reference year: 2021
Classification: Unit processes / Materials production / Metals and semimetals
Generated by: 蔡梓萌, caizm6178@163.com
Owner: 天工LCI数据工作小组
Review: Dependent internal review by 天工LCI数据工作小组
Amounts: no units in this file; such an amount is in the reference unit of its flow, which a separate flow dataset defines
copyright: false
licenseType: Free of charge for all users and uses

## General comment
该过程生产的再生铝锭主要用于生产可接受二级质量铝的产品。这些应用包括但不限于汽车部件、建筑材料、家用物品，以及在某些情况下的包装材料。再生铝锭也可作为生产铝合金的原材料，考虑到回收过程中使用的废铝的不同属性。

## Time period
文献发表日期

## Reference product
- secondary aluminium ingot: 1000; missing unimportant
  ingot

## Inputs
- electricity, high voltage, aluminium industry: 925.2; missing unimportant
  electricity
- aluminium scrap, unspecified: 1350; missing unimportant
  aluminum scrap

## Data selection and combination
本研究的数据参考了PA、SA、电力等背景数据的LCA数据。PA数据来自统计数据源，SA数据主要来自文献。背景数据主要来自中国科学院生态环境研究中心CASRCEES 2018建立的中国本地化LCA数据库，涵盖能源、材料、交通、废物管理等LCA数据。

## Use advice
使用此LCA数据集时，必须包含数据年份（2010年），以保持时间上的准确性。由于技术和回收实践可能的变化，后续的LCA研究可能需要使用更新的数据来源。用户应根据铝的具体应用情境，适当分配生命周期结束时的回收信用或负担。电力和其他背景数据的包含需要仔细考虑，以反映中国当前的能源组合和技术标准，特别是在与全球或区域平均值进行比较时。

## Review details
清单： 内部审查通过几个迭代步骤完成，涉及原始数据验证、原始数据记录、代表性、完整性、与 ISO 14040 和 14044 有关的建模的一致性。

## Data sources
- Ding, N., Liu, N., Lu, B. & Yang, J. Life cycle greenhouse gas emissions of aluminum based on regional industrial transfer in China. J. Ind. Ecol. 25, 1657–1672 (2021).
