# Mining and in situ leaching|bastnaesite route|IAD

Dataset: ILCD process, Unit process, single operation
Geography: CN
Reference year: 2014
Classification: Materials production / Other mineralic materials
Functional unit: The functional unit of this study is the production of 1 kg of the basket REO from each corresponding mineralogical and processing route.
LCI method principle: Attributional
LCI method approaches: Allocation - market value
Generated by: Tao Wang, twang@iue.ac.cn
Review: Dependent internal review by Tiangong LCI Data Working Group
Amounts: no units in this file; such an amount is in the reference unit of its flow, which a separate flow dataset defines
copyright: false

## Geography
Seven Southern Provinces

## Technology and included processes
In this study, the REE production system was analyzed from mining up to and including solvent extraction which contains product finishing processes such as precipitation and calcination

## Reference product
- REO: 1; article inperiodical

## Inputs
All rows: article inperiodical
- Digger: 1.15
  excavation, hydraulic digger [allocatable product]
- Limestone: 0.005
- Ammonium sulfate: 8.25, 0.101 (2 entries)
- sulphuric acid: 0.525
- Ammonium bicarbonate: 3.35
- heat: 0.702
- Electricity: 10.5
- Land Transformation: 1.1
- water: 1
- mineral extraction site: 0.0955
- Land Transformation: 895
  to mineral extraction site
- lanthanum: 0.5305
- cerium: 0.062
- praseodymium: 0.109
- neodymium: 0.34
- samarium: 0.0885
- europium: 0.018
- gadolinium: 0.117
  Gadolinium
- gadolinium: 0.0135
  Terbium
- Dysprosium: 0.073
- Yttrium: 0.4315
- kaolinite: 0.765

## Outputs
- sulfate: 6.5; article inperiodical
- ammonia: 0.34; article inperiodical
- carbon dioxide (fossil): 0.46; article inperiodical
- aluminium: 1.88; article inperiodical

## Deviations from the LCI method approaches
In this study, the REE production system was analyzed from mining up to and including solvent extraction which contains product finishing processes such as precipitation and calcination (Fig. 1). The other categories assessed in the literature review were mineral type, radioactivity, waste treatment, and co-mining. For mineral type, it was noted that the mineralogy accounted for in each study was different, which makes comparison difficult. For radioactivity, we marked with an X those studies which exemplified radioactivity flows in the LCI (if provided). For waste, we distinguished those LCIs which quantified waste treatment flows. For co-mining, since all REE are co-products of each other, this column is meant to highlight the co-products in addition to REE.

## Review details
Inventory: The internal review was done by several iteration steps concerning raw data validation, raw data documentation, representativity, completeness and consistency of modelling with regard to ISO 14040 and 14044.; Documentation: The review of the documentation was performed by Ecobilan and is in compliance with ISO 14040 and 14044. The data set documentation is correct in view of the appropriateness of the information provided. It includes all relevant information in view of data quality and scope of application of the respective LCI result.

## Data sources
- Bailey, G. et al. Review and new life cycle assessment for rare earth production from bastnäsite, ion adsorption clays and lateritic monazite. Resources, Conservation and Recycling 155, 104675 (2020).
