# Electro-silver|Anodeclay|Wet pretreatment + pyromelting + electrolysis|All sizes / 电银|阳极泥|湿法预处理+火法熔炼+电解|所有规模

Dataset: ILCD process, Unit process, single operation
Geography: CN
Reference year: 2019
Classification: Materials production / Metals and semimetals
Generated by: The data was created by the Office of the Second National Pollution Source Census of the Ministry of Ecology and Environment, and the data was organized by the TianGong Plan team for ILCD format / 生态环境部第二次全国污染源普查工作办公室创建数据，天工计划团队常慧敏整理数据为ILCD格式
Owner: Tiangong LCI Data Working Group / 天工LCI数据工作小组
Amounts: no units in this file; such an amount is in the reference unit of its flow, which a separate flow dataset defines
copyright: false
licenseType: Free of charge for all users and uses

## Technology and included processes
the Technical of end-of-pipe management technology for pollution particles (PM2.5 - PM10)isCombined dust removal (two-stage dynamic wave + wet demisting)，Its Technical efficiency of end-of-pipe management99.5

## Reference product
- Telegraphic Transfer: 1000; calculated
  源文件中描述为为电银，此处对其进行了匹配工作，将其匹配到LCAflow库里面相最符合的流，污染物指标备注为工业废水量

## Outputs
All rows: calculated
- Waste water: 100070
  污染物指标工业废水量的末端治理技术是/，末端治理设施实际运行率（k值）计算公式为k=废水治理设施年正常运行时间（小时）/企业年正常生产时间（小时）。原文件中描述污染物类别为废水，污染物指标为工业废水量，此处对其进行了匹配工作，将其匹配到LCAflow库里面相最符合的流，污染物指标备注为工业废水量
- chemical oxygen demand: 2.34757
  污染物指标化学需氧量的末端治理技术是化学沉淀法，其效率为40，末端治理设施实际运行率（k值）计算公式为k=废水治理设施年正常运行时间（小时）/企业年正常生产时间（小时）。原文件中描述污染物类别为废水，污染物指标为化学需氧量，此处对其进行了匹配工作，将其匹配到LCAflow库里面相最符合的流，污染物指标备注为化学需氧量
- chemical oxygen demand: 1.17378
  污染物指标化学需氧量的末端治理技术是化学混凝法，其效率为70，末端治理设施实际运行率（k值）计算公式为k=废水治理设施年正常运行时间（小时）/企业年正常生产时间（小时）。原文件中描述污染物类别为废水，污染物指标为化学需氧量，此处对其进行了匹配工作，将其匹配到LCAflow库里面相最符合的流，污染物指标备注为化学需氧量
- Ammonia Nitrogen: 0.610911
  污染物指标氨氮的末端治理技术是化学沉淀法，其效率为10，末端治理设施实际运行率（k值）计算公式为k=废水治理设施年正常运行时间（小时）/企业年正常生产时间（小时）。原文件中描述污染物类别为废水，污染物指标为氨氮，此处对其进行了匹配工作，将其匹配到LCAflow库里面相最符合的流，污染物指标备注为氨氮
- Ammonia Nitrogen: 0.543032
  污染物指标氨氮的末端治理技术是化学混凝法，其效率为20，末端治理设施实际运行率（k值）计算公式为k=废水治理设施年正常运行时间（小时）/企业年正常生产时间（小时）。原文件中描述污染物类别为废水，污染物指标为氨氮，此处对其进行了匹配工作，将其匹配到LCAflow库里面相最符合的流，污染物指标备注为氨氮
- Nitrogen, organic bound: 1.19149
  污染物指标总氮的末端治理技术是化学沉淀法，其效率为10，末端治理设施实际运行率（k值）计算公式为k=废水治理设施年正常运行时间（小时）/企业年正常生产时间（小时）。原文件中描述污染物类别为废水，污染物指标为总氮，此处对其进行了匹配工作，将其匹配到LCAflow库里面相最符合的流，污染物指标备注为总氮
- Nitrogen, organic bound: 1.0591
  污染物指标总氮的末端治理技术是化学混凝法，其效率为20，末端治理设施实际运行率（k值）计算公式为k=废水治理设施年正常运行时间（小时）/企业年正常生产时间（小时）。原文件中描述污染物类别为废水，污染物指标为总氮，此处对其进行了匹配工作，将其匹配到LCAflow库里面相最符合的流，污染物指标备注为总氮
- cadmium: 0.007275
  污染物指标镉的末端治理技术是化学沉淀法，其效率为85，末端治理设施实际运行率（k值）计算公式为k=废水治理设施年正常运行时间（小时）/企业年正常生产时间（小时）。原文件中描述污染物类别为废水，污染物指标为镉，此处对其进行了匹配工作，将其匹配到LCAflow库里面相最符合的流，污染物指标备注为镉
- cadmium: 0.002425
  污染物指标镉的末端治理技术是化学混凝法，其效率为95，末端治理设施实际运行率（k值）计算公式为k=废水治理设施年正常运行时间（小时）/企业年正常生产时间（小时）。原文件中描述污染物类别为废水，污染物指标为镉，此处对其进行了匹配工作，将其匹配到LCAflow库里面相最符合的流，污染物指标备注为镉
- lead: 0.101168
  污染物指标铅的末端治理技术是化学沉淀法，其效率为85，末端治理设施实际运行率（k值）计算公式为k=废水治理设施年正常运行时间（小时）/企业年正常生产时间（小时）。原文件中描述污染物类别为废水，污染物指标为铅，此处对其进行了匹配工作，将其匹配到LCAflow库里面相最符合的流，污染物指标备注为铅
- lead: 0.0337225
  污染物指标铅的末端治理技术是化学混凝法，其效率为95，末端治理设施实际运行率（k值）计算公式为k=废水治理设施年正常运行时间（小时）/企业年正常生产时间（小时）。原文件中描述污染物类别为废水，污染物指标为铅，此处对其进行了匹配工作，将其匹配到LCAflow库里面相最符合的流，污染物指标备注为铅
- arsenic: 0.0875085
  污染物指标砷的末端治理技术是化学沉淀法，其效率为85，末端治理设施实际运行率（k值）计算公式为k=废水治理设施年正常运行时间（小时）/企业年正常生产时间（小时）。原文件中描述污染物类别为废水，污染物指标为砷，此处对其进行了匹配工作，将其匹配到LCAflow库里面相最符合的流，污染物指标备注为砷
- arsenic: 0.0291695
  污染物指标砷的末端治理技术是化学混凝法，其效率为95，末端治理设施实际运行率（k值）计算公式为k=废水治理设施年正常运行时间（小时）/企业年正常生产时间（小时）。原文件中描述污染物类别为废水，污染物指标为砷，此处对其进行了匹配工作，将其匹配到LCAflow库里面相最符合的流，污染物指标备注为砷
- Exhaust gas: 180147
  污染物指标工业废气量的末端治理技术是/，末端治理设施实际运行率（k值）计算公式为k=废气治理设施年正常运行时间（小时）/企业年正常生产时间（小时）。原文件中描述污染物类别为废气，污染物指标为工业废气量，此处对其进行了匹配工作，将其匹配到LCAflow库里面相最符合的流，污染物指标备注为工业废气量
- Nitrogen oxides: 10.98
  污染物指标氮氧化物的末端治理技术是/，末端治理设施实际运行率（k值）计算公式为k=废气治理设施年正常运行时间（小时）/企业年正常生产时间（小时）。原文件中描述污染物类别为废气，污染物指标为氮氧化物，此处对其进行了匹配工作，将其匹配到LCAflow库里面相最符合的流，污染物指标备注为氮氧化物
- sulfur dioxide: 28.545
  污染物指标二氧化硫的末端治理技术是其它（碱喷淋），其效率为90，末端治理设施实际运行率（k值）计算公式为k=废气治理设施年正常运行时间（小时）/企业年正常生产时间（小时）。原文件中描述污染物类别为废气，污染物指标为二氧化硫，此处对其进行了匹配工作，将其匹配到LCAflow库里面相最符合的流，污染物指标备注为二氧化硫
- sulfur dioxide: 28.545
  污染物指标二氧化硫的末端治理技术是双碱法，其效率为90，末端治理设施实际运行率（k值）计算公式为k=废气治理设施年正常运行时间（小时）/企业年正常生产时间（小时）。原文件中描述污染物类别为废气，污染物指标为二氧化硫，此处对其进行了匹配工作，将其匹配到LCAflow库里面相最符合的流，污染物指标备注为二氧化硫
- sulfur dioxide: 42.8175
  污染物指标二氧化硫的末端治理技术是石灰/石膏法，其效率为85，末端治理设施实际运行率（k值）计算公式为k=废气治理设施年正常运行时间（小时）/企业年正常生产时间（小时）。原文件中描述污染物类别为废气，污染物指标为二氧化硫，此处对其进行了匹配工作，将其匹配到LCAflow库里面相最符合的流，污染物指标备注为二氧化硫
- sulfur dioxide: 57.09
  污染物指标二氧化硫的末端治理技术是石灰石/石膏法，其效率为80，末端治理设施实际运行率（k值）计算公式为k=废气治理设施年正常运行时间（小时）/企业年正常生产时间（小时）。原文件中描述污染物类别为废气，污染物指标为二氧化硫，此处对其进行了匹配工作，将其匹配到LCAflow库里面相最符合的流，污染物指标备注为二氧化硫
- particles (PM2.5 - PM10): 159.485
  污染物指标颗粒物的末端治理技术是湿法除尘（喷淋塔），其效率为90，末端治理设施实际运行率（k值）计算公式为k=废气治理设施年正常运行时间（小时）/企业年正常生产时间（小时）。原文件中描述污染物类别为废气，污染物指标为颗粒物，此处对其进行了匹配工作，将其匹配到LCAflow库里面相最符合的流，污染物指标备注为颗粒物
- particles (PM2.5 - PM10): 159.485
  污染物指标颗粒物的末端治理技术是湿法除尘（文丘里），其效率为90，末端治理设施实际运行率（k值）计算公式为k=废气治理设施年正常运行时间（小时）/企业年正常生产时间（小时）。原文件中描述污染物类别为废气，污染物指标为颗粒物，此处对其进行了匹配工作，将其匹配到LCAflow库里面相最符合的流，污染物指标备注为颗粒物
- particles (PM2.5 - PM10): 79.7425
  污染物指标颗粒物的末端治理技术是静电除尘（湿式除雾），其效率为95，末端治理设施实际运行率（k值）计算公式为k=废气治理设施年正常运行时间（小时）/企业年正常生产时间（小时）。原文件中描述污染物类别为废气，污染物指标为颗粒物，此处对其进行了匹配工作，将其匹配到LCAflow库里面相最符合的流，污染物指标备注为颗粒物
- particles (PM2.5 - PM10): 15.9485
  污染物指标颗粒物的末端治理技术是湿法除尘（动力波），其效率为99，末端治理设施实际运行率（k值）计算公式为k=废气治理设施年正常运行时间（小时）/企业年正常生产时间（小时）。原文件中描述污染物类别为废气，污染物指标为颗粒物，此处对其进行了匹配工作，将其匹配到LCAflow库里面相最符合的流，污染物指标备注为颗粒物
- particles (PM2.5 - PM10): 7.97425
  污染物指标颗粒物的末端治理技术是组合除尘（文丘里+湿式除雾+喷淋塔），其效率为99.5，末端治理设施实际运行率（k值）计算公式为k=废气治理设施年正常运行时间（小时）/企业年正常生产时间（小时）。原文件中描述污染物类别为废气，污染物指标为颗粒物，此处对其进行了匹配工作，将其匹配到LCAflow库里面相最符合的流，污染物指标备注为颗粒物
- particles (PM2.5 - PM10): 7.97425
  污染物指标颗粒物的末端治理技术是组合除尘（二级动力波+湿式除雾），其效率为99.5，末端治理设施实际运行率（k值）计算公式为k=废气治理设施年正常运行时间（小时）/企业年正常生产时间（小时）。原文件中描述污染物类别为废气，污染物指标为颗粒物，此处对其进行了匹配工作，将其匹配到LCAflow库里面相最符合的流，污染物指标备注为颗粒物

## Data sources
- 第二次全国污染源普查产排污核算系数手册（试用版）,四级代码3222文件，在完整版文件中第5093页
