# 生产流程

Dataset: ILCD process
Geography: SC-CN
Classification: Materials production / Other mineralic materials
Generated by: 洪溥, 15695258655@163.com
Review: Dependent internal review by 天工LCI数据工作小组
Amounts: no units in this file; such an amount is in the reference unit of its flow, which a separate flow dataset defines

## Geography
我国页岩气开采工作目前集中在四川及重庆地区，选取四川及重庆的数据进行LCA计算。

## Inputs
- Diesel: 1189; min 1479; max 906; uniform; article inperiodical
  运输废水

## Outputs
- waste water - untreated: 268000; min 268000; max 205000; uniform; article inperiodical
  全生命周期生产阶段产生的废水
- methane: 72018.8; min 89569.6; max 55073.2; article inperiodical
  四川页岩气生产过程中的泄露率依据文献为0.089%

## Review details
清单： 内部审查通过几个迭代步骤完成，涉及原始数据验证、原始数据记录、代表性、完整性、与 ISO 14040 和 14044 有关的建模的一致性。

## Data sources
- 李琋, 毛红敏 & 王兵. 涪陵页岩气开发生命周期温室气体排放估算. 油气田环境保护 31, 1–7 (2021).
