# 温室西红柿生产

Dataset: ILCD process, Unit process, black box
Geography: NL
Reference year: 2014
Valid until: 2015
Classification: Unit processes / Materials production / Agricultural production means
Functional unit: One ton of tomatoes
Generated by: 朱娴, zzhu0918@163.com
Owner: 天工LCI数据工作小组
Review: Dependent internal review by 天工LCI数据工作小组
Amounts: no units in this file; such an amount is in the reference unit of its flow, which a separate flow dataset defines
copyright: false
licenseType: Free of charge for all users and uses

## General comment
在生长阶段灌溉施肥，施入农药，修剪；成熟后收获果实

## Geography
位于加贝斯西南约24公里处的Chenchou。突尼斯荷兰合资农场esertjoy

## Time period
该番茄品种生产周期2014.9-2015.6

## Technical purpose
所描述的温室西红柿生产过程用于在受控环境条件下栽培番茄。这些番茄适合鲜食，也可以进一步加工成酱料、果汁或罐头产品。该基础设施专门设计用于保证生产的一致性，尽管外部气候变化，便于西红柿全年可用。

## Reference product
- Tomato: 39; measured

## Inputs
All rows: measured
- Nitrogenous fertilizer: 48.085
- Potassium fertilizer: 7.61399
- Pesticide: 1.654
- Electricity: 2995.2
- Pit Methane (in MJ): 220
- Plastic (unspecified): 2.2

## Outputs
- ammonia: 0.105; measured
- Plastic (unspecified): 0.4; measured
- nitrogen dioxide: 0.119; measured

## Use advice
使用此LCA数据时，请确保考虑特定的温室栽培技术，包括灌溉、施肥、施药和修剪。考虑位于Chenchou，接近加贝斯的区域特性，这可能会影响产量和环境影响。应当注意2014年9月至2015年6月的生产周期时间范围，以确定其时间相关性。超出此时期的外推需要仔细考虑农业实践或技术进步的变化。数据代表收获的一吨番茄，可相应地扩展到更大的生产量。

## Review details
清单： 内部审查通过几个迭代步骤完成，涉及原始数据验证、原始数据记录、代表性、完整性、与 ISO 14040 和 14044 有关的建模的一致性。
