# PolyvinylChloride|Calciumcarbide,hydrogenchloride|Electricstonemethod|All sizes / 聚氯乙烯|电石、氯化氢|电石法|所有规模

Dataset: ILCD process, Unit process, single operation
Geography: CN
Reference year: 2019
Classification: Materials production / Inorganic chemicals
Generated by: The data was created by the Office of the Second National Pollution Source Census of the Ministry of Ecology and Environment, and the data was organized by the TianGong Plan team for ILCD format / 生态环境部第二次全国污染源普查工作办公室创建数据，天工计划团队常慧敏整理数据为ILCD格式
Owner: Tiangong LCI Data Working Group / 天工LCI数据工作小组
Review: Dependent internal review by Tiangong LCI Data Working Group / 天工LCI数据工作小组
Amounts: no units in this file; such an amount is in the reference unit of its flow, which a separate flow dataset defines
copyright: false
licenseType: Free of charge for all users and uses

## General comment
the Technical of end-of-pipe management technology for pollution mercuryisAdsorption/catalytic combustion method，Its Technical efficiency of end-of-pipe management90

## Reference product
- Polyvinyl chloride: 1000; calculated
  源文件中描述为为聚氯乙烯，此处对其进行了匹配工作，将其匹配到LCAflow库里面相最符合的流，污染物指标备注为废水排放量

## Outputs
All rows: calculated
- Waste water: 19100
  污染物指标废水排放量的末端治理技术是/，其效率为0。原文件中描述污染物类别为废水，污染物指标为废水排放量，此处对其进行了匹配工作，将其匹配到LCAflow库里面相最符合的流，污染物指标备注为废水排放量
- chemical oxygen demand: 6.72
  污染物指标化学需氧量的末端治理技术是A2/O工艺，其效率为70，末端治理设施实际运行率（k值）计算公式为K=设施年耗电量(千瓦时/年)/设备设计耗电量(千瓦时/年)。原文件中描述污染物类别为废水，污染物指标为化学需氧量，此处对其进行了匹配工作，将其匹配到LCAflow库里面相最符合的流，污染物指标备注为化学需氧量
- chemical oxygen demand: 5.6
  污染物指标化学需氧量的末端治理技术是生物接触氧化法，其效率为75，末端治理设施实际运行率（k值）计算公式为K=设施年耗电量(千瓦时/年)/设备设计耗电量(千瓦时/年)。原文件中描述污染物类别为废水，污染物指标为化学需氧量，此处对其进行了匹配工作，将其匹配到LCAflow库里面相最符合的流，污染物指标备注为化学需氧量
- chemical oxygen demand: 8.96
  污染物指标化学需氧量的末端治理技术是活性污泥法，其效率为60，末端治理设施实际运行率（k值）计算公式为K=设施年耗电量(千瓦时/年)/设备设计耗电量(千瓦时/年)。原文件中描述污染物类别为废水，污染物指标为化学需氧量，此处对其进行了匹配工作，将其匹配到LCAflow库里面相最符合的流，污染物指标备注为化学需氧量
- chemical oxygen demand: 6.72
  污染物指标化学需氧量的末端治理技术是厌氧水解类，其效率为70，末端治理设施实际运行率（k值）计算公式为K=设施年耗电量(千瓦时/年)/设备设计耗电量(千瓦时/年)。原文件中描述污染物类别为废水，污染物指标为化学需氧量，此处对其进行了匹配工作，将其匹配到LCAflow库里面相最符合的流，污染物指标备注为化学需氧量
- Ammonia Nitrogen: 0.0603
  污染物指标氨氮的末端治理技术是A2/O工艺，其效率为70，末端治理设施实际运行率（k值）计算公式为K=设施年耗电量(千瓦时/年)/设备设计耗电量(千瓦时/年)。原文件中描述污染物类别为废水，污染物指标为氨氮，此处对其进行了匹配工作，将其匹配到LCAflow库里面相最符合的流，污染物指标备注为氨氮
- Ammonia Nitrogen: 0.0804
  污染物指标氨氮的末端治理技术是活性污泥法，其效率为60，末端治理设施实际运行率（k值）计算公式为K=设施年耗电量(千瓦时/年)/设备设计耗电量(千瓦时/年)。原文件中描述污染物类别为废水，污染物指标为氨氮，此处对其进行了匹配工作，将其匹配到LCAflow库里面相最符合的流，污染物指标备注为氨氮
- Ammonia Nitrogen: 0.0603
  污染物指标氨氮的末端治理技术是厌氧水解类，其效率为70，末端治理设施实际运行率（k值）计算公式为K=设施年耗电量(千瓦时/年)/设备设计耗电量(千瓦时/年)。原文件中描述污染物类别为废水，污染物指标为氨氮，此处对其进行了匹配工作，将其匹配到LCAflow库里面相最符合的流，污染物指标备注为氨氮
- Ammonia Nitrogen: 0.05025
  污染物指标氨氮的末端治理技术是生物接触氧化法，其效率为75，末端治理设施实际运行率（k值）计算公式为K=设施年耗电量(千瓦时/年)/设备设计耗电量(千瓦时/年)。原文件中描述污染物类别为废水，污染物指标为氨氮，此处对其进行了匹配工作，将其匹配到LCAflow库里面相最符合的流，污染物指标备注为氨氮
- phosphorus, total: 0.001104
  污染物指标总磷的末端治理技术是A2/O工艺，其效率为40，末端治理设施实际运行率（k值）计算公式为K=设施年耗电量(千瓦时/年)/设备设计耗电量(千瓦时/年)。原文件中描述污染物类别为废水，污染物指标为总磷，此处对其进行了匹配工作，将其匹配到LCAflow库里面相最符合的流，污染物指标备注为总磷
- phosphorus, total: 0.001196
  污染物指标总磷的末端治理技术是厌氧水解类，其效率为35，末端治理设施实际运行率（k值）计算公式为K=设施年耗电量(千瓦时/年)/设备设计耗电量(千瓦时/年)。原文件中描述污染物类别为废水，污染物指标为总磷，此处对其进行了匹配工作，将其匹配到LCAflow库里面相最符合的流，污染物指标备注为总磷
- phosphorus, total: 0.000552
  污染物指标总磷的末端治理技术是化学沉淀法，其效率为70，末端治理设施实际运行率（k值）计算公式为K=设施年耗电量(千瓦时/年)/设备设计耗电量(千瓦时/年)。原文件中描述污染物类别为废水，污染物指标为总磷，此处对其进行了匹配工作，将其匹配到LCAflow库里面相最符合的流，污染物指标备注为总磷
- phosphorus, total: 0.000552
  污染物指标总磷的末端治理技术是化学混凝法，其效率为70，末端治理设施实际运行率（k值）计算公式为K=设施年耗电量(千瓦时/年)/设备设计耗电量(千瓦时/年)。原文件中描述污染物类别为废水，污染物指标为总磷，此处对其进行了匹配工作，将其匹配到LCAflow库里面相最符合的流，污染物指标备注为总磷
- phosphorus, total: 0.001196
  污染物指标总磷的末端治理技术是生物接触氧化法，其效率为35，末端治理设施实际运行率（k值）计算公式为K=设施年耗电量(千瓦时/年)/设备设计耗电量(千瓦时/年)。原文件中描述污染物类别为废水，污染物指标为总磷，此处对其进行了匹配工作，将其匹配到LCAflow库里面相最符合的流，污染物指标备注为总磷
- Nitrogen, organic bound: 0.1065
  污染物指标总氮的末端治理技术是A2/O工艺，其效率为70，末端治理设施实际运行率（k值）计算公式为K=设施年耗电量(千瓦时/年)/设备设计耗电量(千瓦时/年)。原文件中描述污染物类别为废水，污染物指标为总氮，此处对其进行了匹配工作，将其匹配到LCAflow库里面相最符合的流，污染物指标备注为总氮
- Nitrogen, organic bound: 0.142
  污染物指标总氮的末端治理技术是活性污泥法，其效率为60，末端治理设施实际运行率（k值）计算公式为K=设施年耗电量(千瓦时/年)/设备设计耗电量(千瓦时/年)。原文件中描述污染物类别为废水，污染物指标为总氮，此处对其进行了匹配工作，将其匹配到LCAflow库里面相最符合的流，污染物指标备注为总氮
- Nitrogen, organic bound: 0.08875
  污染物指标总氮的末端治理技术是生物接触氧化法，其效率为75，末端治理设施实际运行率（k值）计算公式为K=设施年耗电量(千瓦时/年)/设备设计耗电量(千瓦时/年)。原文件中描述污染物类别为废水，污染物指标为总氮，此处对其进行了匹配工作，将其匹配到LCAflow库里面相最符合的流，污染物指标备注为总氮
- Nitrogen, organic bound: 0.1065
  污染物指标总氮的末端治理技术是厌氧水解类，其效率为70，末端治理设施实际运行率（k值）计算公式为K=设施年耗电量(千瓦时/年)/设备设计耗电量(千瓦时/年)。原文件中描述污染物类别为废水，污染物指标为总氮，此处对其进行了匹配工作，将其匹配到LCAflow库里面相最符合的流，污染物指标备注为总氮
- Petroleum-related waste: 0.000558
  污染物指标石油类的末端治理技术是上浮分离，其效率为70，末端治理设施实际运行率（k值）计算公式为K=设施年耗电量(千瓦时/年)/设备设计耗电量(千瓦时/年)。原文件中描述污染物类别为废水，污染物指标为石油类，此处对其进行了匹配工作，将其匹配到LCAflow库里面相最符合的流，污染物指标备注为石油类
- Mercury: 0.0002825
  污染物指标汞的末端治理技术是化学沉淀法，其效率为75，末端治理设施实际运行率（k值）计算公式为K=设施年耗电量(千瓦时/年)/设备设计耗电量(千瓦时/年)。原文件中描述污染物类别为废水，污染物指标为汞，此处对其进行了匹配工作，将其匹配到LCAflow库里面相最符合的流，污染物指标备注为汞
- Mercury: 0.000791
  污染物指标汞的末端治理技术是氧化还原法，其效率为30，末端治理设施实际运行率（k值）计算公式为K=设施年耗电量(千瓦时/年)/设备设计耗电量(千瓦时/年)。原文件中描述污染物类别为废水，污染物指标为汞，此处对其进行了匹配工作，将其匹配到LCAflow库里面相最符合的流，污染物指标备注为汞
- Mercury: 0.0002825
  污染物指标汞的末端治理技术是化学混凝法，其效率为75，末端治理设施实际运行率（k值）计算公式为K=设施年耗电量(千瓦时/年)/设备设计耗电量(千瓦时/年)。原文件中描述污染物类别为废水，污染物指标为汞，此处对其进行了匹配工作，将其匹配到LCAflow库里面相最符合的流，污染物指标备注为汞
- Exhaust gas: 12500
  污染物指标废气总量的末端治理技术是/，其效率为0。原文件中描述污染物类别为废气，污染物指标为废气总量，此处对其进行了匹配工作，将其匹配到LCAflow库里面相最符合的流，污染物指标备注为废气总量
- particles (PM2.5 - PM10): 0.3395
  污染物指标颗粒物的末端治理技术是静电除尘，其效率为95，末端治理设施实际运行率（k值）计算公式为K=设施年耗电量(千瓦时/年)/设备设计耗电量(千瓦时/年)。原文件中描述污染物类别为废气，污染物指标为颗粒物，此处对其进行了匹配工作，将其匹配到LCAflow库里面相最符合的流，污染物指标备注为颗粒物
- particles (PM2.5 - PM10): 0.3395
  污染物指标颗粒物的末端治理技术是旋风+布袋，其效率为95，末端治理设施实际运行率（k值）计算公式为K=设施年耗电量(千瓦时/年)/设备设计耗电量(千瓦时/年)。原文件中描述污染物类别为废气，污染物指标为颗粒物，此处对其进行了匹配工作，将其匹配到LCAflow库里面相最符合的流，污染物指标备注为颗粒物
- particles (PM2.5 - PM10): 0.3395
  污染物指标颗粒物的末端治理技术是袋式除尘，其效率为95，末端治理设施实际运行率（k值）计算公式为K=设施年耗电量(千瓦时/年)/设备设计耗电量(千瓦时/年)。原文件中描述污染物类别为废气，污染物指标为颗粒物，此处对其进行了匹配工作，将其匹配到LCAflow库里面相最符合的流，污染物指标备注为颗粒物
- volatile organic compound: 1.2765
  污染物指标挥发性有机物的末端治理技术是蓄热式热力燃烧法，其效率为85，末端治理设施实际运行率（k值）计算公式为K=设施年耗电量(千瓦时/年)/设备设计耗电量(千瓦时/年)。原文件中描述污染物类别为废气，污染物指标为挥发性有机物，此处对其进行了匹配工作，将其匹配到LCAflow库里面相最符合的流，污染物指标备注为挥发性有机物
- volatile organic compound: 3.404
  污染物指标挥发性有机物的末端治理技术是吸附/催化燃烧法，其效率为60，末端治理设施实际运行率（k值）计算公式为K=设施年耗电量(千瓦时/年)/设备设计耗电量(千瓦时/年)。原文件中描述污染物类别为废气，污染物指标为挥发性有机物，此处对其进行了匹配工作，将其匹配到LCAflow库里面相最符合的流，污染物指标备注为挥发性有机物
- volatile organic compound: 3.404
  污染物指标挥发性有机物的末端治理技术是冷凝法，其效率为60，末端治理设施实际运行率（k值）计算公式为K=设施年耗电量(千瓦时/年)/设备设计耗电量(千瓦时/年)。原文件中描述污染物类别为废气，污染物指标为挥发性有机物，此处对其进行了匹配工作，将其匹配到LCAflow库里面相最符合的流，污染物指标备注为挥发性有机物
- volatile organic compound: 5.957
  污染物指标挥发性有机物的末端治理技术是低温等离子体，其效率为30，末端治理设施实际运行率（k值）计算公式为K=设施年耗电量(千瓦时/年)/设备设计耗电量(千瓦时/年)。原文件中描述污染物类别为废气，污染物指标为挥发性有机物，此处对其进行了匹配工作，将其匹配到LCAflow库里面相最符合的流，污染物指标备注为挥发性有机物
- volatile organic compound: 1.2765
  污染物指标挥发性有机物的末端治理技术是直接燃烧法，其效率为85，末端治理设施实际运行率（k值）计算公式为K=设施年耗电量(千瓦时/年)/设备设计耗电量(千瓦时/年)。原文件中描述污染物类别为废气，污染物指标为挥发性有机物，此处对其进行了匹配工作，将其匹配到LCAflow库里面相最符合的流，污染物指标备注为挥发性有机物
- mercury: 0.00249
  污染物指标汞的末端治理技术是吸附/催化燃烧法，其效率为90，末端治理设施实际运行率（k值）计算公式为K=设施年耗电量(千瓦时/年)/设备设计耗电量(千瓦时/年)。原文件中描述污染物类别为废气，污染物指标为汞，此处对其进行了匹配工作，将其匹配到LCAflow库里面相最符合的流，污染物指标备注为汞

## Use advice
This dataset is derived from the Pollution Source Census Report and contains information on pollution emissions and related products. However, it does not include data on energy or chemical consumption, nor does it provide information on waste or co-product generation. When utilizing this dataset, please supplement the missing data based on actual conditions before use
该数据集来源于污染源普查报告，包含污染物排放及相关产品信息，但不包含能源或化学品消耗数据，也不提供废弃物或共生产物产生信息。在使用该数据集时，请根据实际情况补充缺失数据后再使用。

## Review details
Inventory: The internal review was done by several iteration steps concerning raw data validation, raw data documentation, representativity, completeness and consistency of modelling with regard to ISO 14040 and 14044.
清单： 内部审查通过几个迭代步骤完成，涉及原始数据验证、原始数据记录、代表性、完整性、与 ISO 14040 和 14044 有关的建模的一致性。

## Data sources
- 第二次全国污染源普查产排污核算系数手册（试用版）,二级代码26,四级代码2651文件，在完整版文件中第4111页
