# 市政污水处理｜废水处理｜厌氧和好氧处理

Dataset: ILCD process, Unit process, single operation
Geography: SC-CN
Classification: Unit processes / End-of-life treatment / Wastewater treatment
Generated by: 黄润垚, runyaoh@163.com
Owner: 天工LCI数据工作小组
Review: Dependent internal review by 天工LCI数据工作小组
Amounts: no units in this file; such an amount is in the reference unit of its flow, which a separate flow dataset defines
copyright: ['opt4ROkqig']
licenseType: Free of charge for all users and uses

## General comment
厌氧处理阶段采用厌氧生物反应器，如厌氧池或厌氧发酵罐，有机物在无氧环境下被分解成较小的有机物和气体。而好氧处理阶段通常采用好氧生物反应器，如活性污泥法或生物膜法，通过氧气和好氧微生物的作用，进一步氧化有机物和氨氮，使污水达到排放标准。

## Technology and included processes
市政污水处理中，厌氧和好氧处理工艺具有以下技术特性：厌氧处理：反应器设计： 厌氧处理通常使用厌氧池或厌氧发酵罐等反应器，提供无氧环境，以促进厌氧微生物对有机物的降解。操作条件： 在厌氧条件下，控制温度、pH值和进水有机物浓度等参数是必要的，以确保厌氧微生物的活性和反应效率。好氧处理：反应器设计： 好氧处理通常采用活性污泥法或生物膜法等反应器，提供充足的氧气和适宜的环境，促进好氧微生物对有机物和氨氮的氧化。操作条件： 在好氧条件下，控制氧气供应、混合速率和溶解氧浓度等参数是关键，以维持好氧微生物的生长和活性。相关上游和下游过程：上游过程： 包括污水预处理，如筛网过滤、格栅过滤和沉淀，以去除大颗粒物和沉淀物。下游过程： 可能包括沉淀、过滤等步骤，用于分离和去除生物团块和悬浮物，最终得到符合排放标准的处理水。

## Technical purpose
该过程涉及厌氧和好氧处理单元，用于处理污水以去除或降低有机物、营养物质和污染物。它适用于寻求有效生物降解和有机物稳定的工业污水处理设施。

## Reference product
- Wastewater: 0.0019; input; measured

## Inputs
All rows: measured
- chemical oxygen demand: 0.151
- nitrogen trifluoride: 0.0122
- nitrogen monoxide: 0.0024
- nitrogen, total (excluding N2): 0.0186
- Phosphorus: 0.0017
- Electricity: 2.41
- acetic acid: 0.0329
- antimony: 0.0011
- polyacrylonitrile fibres (PAN): 0.0005
- Polyferric chloride: 0.0186, 0.0814 (2 entries)
- Limestone: 0.0223
- sodium hypochlorite: 0.0404

## Outputs
All rows: measured
- chemical oxygen demand: 0.0152
- nitrogen trifluoride: 0.0003
- nitrogen monoxide: 0.0075
- nitrogen, total (excluding N2): 0.0079
- Phosphorus: 0.0002
- carbon dioxide (biogenic): 0.073
- methane (biogenic): 0.00534
- nitrous oxide: 3.9e-5, 0.389 (2 entries)

## Use advice
使用此数据集进行生命周期评估时，应注意划分厌氧和好氧处理阶段之间的边界条件。确保准确核算两个阶段的能耗、产生的沼气以及任何潜在的排放。对于回收或资源回收相关的场景，包括考虑污泥处理和潜在的营养物恢复。

## Review details
清单： 内部审查通过几个迭代步骤完成，涉及原始数据验证、原始数据记录、代表性、完整性、与 ISO 14040 和 14044 有关的建模的一致性。

## Data sources
- Yang, Z. et al. Assessment of upgrading WWTP in southwest China: Towards a cleaner production. Journal of Cleaner Production 326, 129381 (2021).
