# cement production|cement, ordinary portland cement, 42.5MPa|mechanical shaft kiln

Dataset: ILCD process, Unit process, black box
Geography: CN
Reference year: 2005
Classification: Materials production / Other mineralic materials
Generated by: Siqi Yang
Amounts: no units in this file; such an amount is in the reference unit of its flow, which a separate flow dataset defines
copyright: false

## General comment
Typical mechanized vertical kiln cement plant.
The production process of the vertical kiln is relatively simple. One of the raw materials, limestone, enters the crushed stone storage after crushing. The raw clay and iron powder enter the dry clay storage and iron powder storage respectively after drying. Fuel anthracite is crushed by the coal crusher (sometimes also dried) to enter the raw material storage, at the bottom of the storage by the downstream, metering equipment in proportion to the exact match and sent to the raw material mill grinding. After the qualified grinding, the raw material enters the raw material storage for homogenization and storage. The homogenized raw meal is combined with a suitable amount of water after metering, forming balls in the raw meal ball-making system, and then sent to the upper part of the vertical kiln, sprinkled into the kiln through the material distributor, and clinkered. The clinker from the kiln is stored in the clinic storage; the mixed material is also stored in the storage after baking in the drier; the gypsum is crushed and entered the gypsum storage. After being metered, the clinker, mixed materials, and a suitable amount of gypsum are sent to the cement plant for proportionate grinding. The ground cement is sent to the cement warehouse for inspection and final packaging or bulk delivery.

## Model description
Taking the usage performance of cement with a compressive strength of 42.5 MPa at 28 days per 1 kg as the functional unit, that is IFu=42.5 kgMPa. The research scope is defined as: raw material pretreatment, raw material grinding, clinker calcination, clinker grinding, cement homogenization, and cement storage.

## Reference product
- cement, ordinary portland cement, 42.5MPa: 1000
  P.O. IFu=42.5kg MPa。

## Inputs
All rows: measured
- limestone, crushed, for mill: 1093.8
  Limestone
- clay: 159.6
  Clay
- gypsum (desulphurized): 51.9
  Gupsum
- hard coal: 210.201
  Standard coal. The original data is 0.1953kg standard coal, here converted to hard coal, the conversion formula is 1kg hard coal = 0.929kg standard coal.
- electricity, medium voltage: 298.8
  Electricity

## Outputs
- particles (> PM10): 0.6; measured
  Dust, with an unspecified particle size, is treated as PM > 10 micrometers in diameter.
- sulfur dioxide: 0.3993; measured
  Sulfur dioxide. Considering the actual operating conditions of domestic cement plants and the development trend for the foreseeable future, the statistical average of measured data is adopted for this evaluation.
- Nitrogen oxides: 0.8225; measured
  Nitrogen oxides. Considering the actual operating conditions of domestic cement plants and the development trend for the foreseeable future, the statistical average of measured data is adopted for this evaluation.
- carbon dioxide: 1070.3; measured
  Carbon dioxide. Considering the actual operating conditions of domestic cement plants and the development trend for the foreseeable future, the statistical average of measured data is adopted for this evaluation.

## Data sources
- 曹晓润. (2005). 低环境负荷型水泥的生态环境评价 [硕士, 武汉理工大学].
