# 页岩气生产;场地准备阶段;淡水蓄水池建设

Dataset: ILCD process, Unit process, black box
Geography: SC-CN
Reference year: 2014
Valid until: 2016
Classification: Systems / Construction
Generated by: 洪溥, 15695258655@163.com
Owner: 天工LCI数据工作小组
Review: Dependent internal review by 天工LCI数据工作小组
Amounts: no units in this file; such an amount is in the reference unit of its flow, which a separate flow dataset defines
licenseType: Free of charge for all users and uses

## General comment
淡水蓄水池建设过程是页岩气提取早期阶段准备工地中不可或缺的一部分。其主要目的是为中国四川和重庆地区普遍的水力压裂作业提供可靠的水源。该淡水池是储存水力压裂过程所需大量水量的必要设施。

## Geography
我国页岩气开采工作目前集中在四川及重庆地区，选取四川及重庆的数据进行LCA计算。

## Time period
原始数据时间介于2014-2016之间

## Reference product
- Retention pond: 7500; min 10000; max 2800; uniform; measured
  场地准备阶段--淡水蓄水池体积

## Inputs
- waterproof fabric: 2627; min 1163; max 3366; uniform; measured
  场地准备阶段--淡水蓄水池建设所用防水布

## Use advice
使用该数据集进行生命周期评估（LCA）计算时，用户应考虑数据的技术适用性和时间相关性。由于原始数据在2014至2016年间收集，用户必须评估当前实践是否有显著变化，并相应调整数据。必须解决排除或考虑对水循环利用及其后续储存的问题，以反映该过程的具体条件。除非有更多区域数据可用于LCA模型的精细化，否则应保持数据到四川和重庆的地域专用性。

## Review details
清单： 内部审查通过几个迭代步骤完成，涉及原始数据验证、原始数据记录、代表性、完整性、与 ISO 14040 和 14044 有关的建模的一致性。

## Data sources
- Wang, J., Liu, M., McLellan, B. C., Tang, X. & Feng, L. Environmental impacts of shale gas development in China: A hybrid life cycle analysis. Resources, Conservation and Recycling 120, 38–45 (2017).
