# Rawmaterialfeeding|Biologicalnaturalgas|Biomass|Anaerobic fermentation + biogas purification|All sizes / 原料进料|生物天然气|生物质|厌氧发酵+沼气提纯|所有规模|采用粪便作为原料生产沼气或生物天然气，在进料工段的产污系数

Dataset: ILCD process, Unit process, single operation
Geography: CN
Reference year: 2019
Classification: Energy carriers and technologies / Renewable fuels
Generated by: The data was created by the Office of the Second National Pollution Source Census of the Ministry of Ecology and Environment, and the data was organized by the TianGong Plan team for ILCD format / 生态环境部第二次全国污染源普查工作办公室创建数据，天工计划团队常慧敏整理数据为ILCD格式
Owner: Tiangong LCI Data Working Group / 天工LCI数据工作小组
Amounts: no units in this file; such an amount is in the reference unit of its flow, which a separate flow dataset defines
copyright: false
licenseType: Free of charge for all users and uses

## Technology and included processes
the Technical of end-of-pipe management technology for pollution BiomassisBiological filtration method，Its Technical efficiency of end-of-pipe management67，The formula for calculating the actual operation rate (k-value) of the end-of-pipe treatment facility is k = opreating time of treatment facilities (hours/year) / normal production time (hours/year)

## Reference product
- Biomass: 1000; input; calculated
  源文件中描述为为生物质，此处对其进行了匹配工作，将其匹配到LCAflow库里面相最符合的流

## Outputs
- hydrogen sulfide: 0.00066; calculated
  污染物指标硫化氢的末端治理技术是生物过滤法，其效率为67，末端治理设施实际运行率（k值）计算公式为k=工艺废气净化装置耗电量（千瓦时/年）/（工艺废气净化装置额定功率（千瓦）×工艺废气净化装置运行时间（小时/年））。原文件中描述污染物类别为废气，污染物指标为硫化氢，此处对其进行了匹配工作，将其匹配到LCAflow库里面相最符合的流
- ammonia: 0.00425; calculated
  污染物指标氨的末端治理技术是生物过滤法，其效率为50，末端治理设施实际运行率（k值）计算公式为k=工艺废气净化装置耗电量（千瓦时/年）/（工艺废气净化装置额定功率（千瓦）×工艺废气净化装置运行时间（小时/年））。原文件中描述污染物类别为废气，污染物指标为氨，此处对其进行了匹配工作，将其匹配到LCAflow库里面相最符合的流

## Data sources
- 第二次全国污染源普查产排污核算系数手册（试用版）,二级代码45,四级代码4513文件，在完整版文件中第2498页
