# 合成树脂生产 ; 整个风电场

Dataset: ILCD process, Unit process, single operation
Geography: NMG-CN
Reference year: 2017
Classification: Materials production / Organic chemicals
Functional unit: The functional unit is 1.5 MW wind turbine
LCI method principle: Attributional
LCI method approaches: Allocation
Generated by: 赵云志, ll10088@163.com
Owner: 天工LCI数据工作小组
Review: Dependent internal review by 天工LCI数据工作小组
Amounts: no units in this file; such an amount is in the reference unit of its flow, which a separate flow dataset defines
copyright: false
licenseType: Free of charge for all users and uses

## General comment
该数据集代表合成树脂生产过程，用于风电场中风力涡轮机部件的创建和维护。此外，它还涵盖了风电全生命周期清单，包括生产风力涡轮机、变电站和电缆的环境影响，特别关注内蒙古东北部33台国产1.5兆瓦风力涡轮机的风电场案例。该数据集支持环境影响评估，并有助于分析可再生能源领域尤其是风电装置的替代效应。

## Geography
风电功率参数的数据来自Wang ( 2012 )。以装有33台国产1.5兆瓦( MW )风电机组的风电场为案例，分析其环境影响及其替代效应。该风电场位于我国风电装机最多的省份- -内蒙古东北部。

## Reference product
- Resin: 1; article inperiodical

## Inputs
- Energy, geothermal, converted: 32.4282; article inperiodical

## Outputs
- carbon dioxide: 690; article inperiodical
- sulfur dioxide: 4.16; article inperiodical
- nitrous oxide: 2.8; article inperiodical
- carbon monoxide: 91.07; article inperiodical

## Deviations from the LCI method approaches
风电的生命周期清单如下所示。生产制造阶段包括风电机组、变电站、电缆的生产，这些设备消耗大量能源，排放污染物( Xue et al . , 2015)。

## Use advice
在使用此数据集进行生命周期评估（LCA）时，用户应考虑合成树脂在风力涡轮机中应用的特定范围，并确保与定义为1.5兆瓦风轮机的功能单元保持一致。应当注意根据参考研究中呈现的方法论框架（Wang 2012；Xia和Song, 2017；Xue等，2015）一致地应用数据，包括考量风电基础设施的生产制造阶段能源消耗和污染物排放的环境影响。

## Review details
清单： 内部审查通过几个迭代步骤完成，涉及原始数据验证、原始数据记录、代表性、完整性、与 ISO 14040 和 14044 有关的建模的一致性。

## Data sources
- Li, H., Jiang, H.-D., Dong, K.-Y., Wei, Y.-M. & Liao, H. A comparative analysis of the life cycle environmental emissions from wind and coal power: Evidence from China. Journal of Cleaner Production 248, 119192 (2020).
