# 水泥生产;水泥, 硅酸盐水泥

Dataset: ILCD process, Unit process, black box
Geography: CN
Reference year: 2008
Classification: Unit processes / Materials production / Other mineralic materials
Generated by: #REF!, ysqsophia@gmail.com
Owner: 天工LCI数据工作小组
Review: Dependent internal review by 天工LCI数据工作小组
Amounts: no units in this file; such an amount is in the reference unit of its flow, which a separate flow dataset defines
copyright: false
licenseType: Free of charge for all users and uses

## General comment
水泥生产过程。

## Geography
http://documents.ieaghg.org/index.php/s/YKm6B7zikUpPgGA?path=%2F2008

## Technical purpose
该数据集涉及生产硅酸盐水泥的工业过程。硅酸盐水泥是混凝土、砂浆、灰泥及非特种填缝料的基本成分，适用于各种建筑应用，包括基础设施、商业和住宅建筑，在建筑行业中不可或缺。

## Reference product
- cement, portland cement: 1000
  水泥产品。数据来源于IEA温室气体研发计划（IEA GHG）的技术报告《Cement Industry中的CO2捕捉》（2008年）。在线可获取：http://documents.ieaghg.org/index.php/s/YKm6B7zikUpPgGA?path=%2F2008（访问日期：2017年9月5日）。

## Inputs
- hard coal; 26.3 MJ/kg: 63.3
  煤炭。数据来源于IEA温室气体研发计划（IEA GHG）的技术报告《Cement Industry中的CO2捕捉》（2008年）。在线可获取：http://documents.ieaghg.org/index.php/s/YKm6B7zikUpPgGA?path=%2F2008（访问日期：2017年9月5日）。
- Petroleum Coke: 31.9
  石油焦。数据来源于IEA温室气体研发计划（IEA GHG）的技术报告《Cement Industry中的CO2捕捉》（2008年）。在线可获取：http://documents.ieaghg.org/index.php/s/YKm6B7zikUpPgGA?path=%2F2008（访问日期：2017年9月5日）。
- Electricity: 290.916
  电。数据来源于IEA温室气体研发计划（IEA GHG）的技术报告《Cement Industry中的CO2捕捉》（2008年）。在线可获取：http://documents.ieaghg.org/index.php/s/YKm6B7zikUpPgGA?path=%2F2008（访问日期：2017年9月5日）。
- limestone, crushed, for mill: 1245.97
  石灰石。数据来源于IEA温室气体研发计划（IEA GHG）的技术报告《Cement Industry中的CO2捕捉》（2008年）。在线可获取：http://documents.ieaghg.org/index.php/s/YKm6B7zikUpPgGA?path=%2F2008（访问日期：2017年9月5日）。
- ferric oxide: 7.47
  氧化铁。数据来源于IEA温室气体研发计划（IEA GHG）的技术报告《Cement Industry中的CO2捕捉》（2008年）。在线可获取：http://documents.ieaghg.org/index.php/s/YKm6B7zikUpPgGA?path=%2F2008（访问日期：2017年9月5日）。
- gypsum stone (CaSO4-dihydrate): 40
  石膏。数据来源于IEA温室气体研发计划（IEA GHG）的技术报告《Cement Industry中的CO2捕捉》（2008年）。在线可获取：http://documents.ieaghg.org/index.php/s/YKm6B7zikUpPgGA?path=%2F2008（访问日期：2017年9月5日）。

## Outputs
- carbon dioxide (fossil): 728.4
  CO2排放。数据来源于IEA温室气体研发计划（IEA GHG）的技术报告《Cement Industry中的CO2捕捉》（2008年）。在线可获取：http://documents.ieaghg.org/index.php/s/YKm6B7zikUpPgGA?path=%2F2008（访问日期：2017年9月5日）。
- sulfur dioxide: 2.28
  SO2排放。数据是根据IEA温室气体研发计划（IEA GHG）的技术报告设计进行计算的。报告题为《水泥工业中的二氧化碳捕集》（2008年）。在线可获取链接：http://documents.ieaghg.org/index.php/s/YKm6B7zikUpPgGA?path=%2F2008（访问日期：2017年9月5日）。
- nitrogen dioxide: 4.56
  NO2排放。数据是根据IEA温室气体研发计划（IEA GHG）的技术报告设计进行计算的。报告题为《水泥工业中的二氧化碳捕集》（2008年）。在线可获取链接：http://documents.ieaghg.org/index.php/s/YKm6B7zikUpPgGA?path=%2F2008（访问日期：2017年9月5日）。
- particles (PM2.5): 0.0219
  颗粒<2.5um。数据来自ecoinvent数据库，版本为Ecoinvent Database v3。在线可获取链接：http://www.ecoinvent.org/database/ecoinvent-33/ecoinvent-33.html（访问日期：2018年4月15日）。
- particles (> PM10): 0.0052
  颗粒>10um。数据来自ecoinvent数据库，版本为Ecoinvent Database v3。在线可获取链接：http://www.ecoinvent.org/database/ecoinvent-33/ecoinvent-33.html（访问日期：2018年4月15日）。
- particles (PM2.5 - PM10): 0.0072
  颗粒>2.5um，<10um。数据来自ecoinvent数据库，版本为Ecoinvent Database v3。在线可获取链接：http://www.ecoinvent.org/database/ecoinvent-33/ecoinvent-33.html（访问日期：2018年4月15日）。

## Sampling procedure
生产能力设定为每年生产1百万吨水泥，水泥产品中熟料的比例为91%。

## Use advice
在使用此数据集进行生命周期评估时，用户必须考虑生产硅酸盐水泥的具体工艺和技术，包括如果适用，纳入废物利用或替代原材料的使用。在LCA中应考虑到熟料比例，因为它与水泥生产的环境影响密切相关。方法学考虑还应包括地理和时间相关性，因为实践和技术可能随着地区和时间的不同而变化。

## Review details
清单： 内部审查通过几个迭代步骤完成，涉及原始数据验证、原始数据记录、代表性、完整性、与 ISO 14040 和 14044 有关的建模的一致性。

## Data sources
- Jing An, Richard S. Middleton, & Yingnan Li. (2019). Environmental Performance Analysis of Cement Production with CO2 Capture and Storage Technology in a Life-Cycle Perspective. Sustainability 11, 2626.
