# Basin simulation | Marine carbonate rocks 6000-10000m | Dynamic simulation technology

Dataset: ILCD process, Unit process, single operation
Geography: XJ-CN
Reference year: 2022
Classification: Materials production / Other mineralic materials
LCI method principle: Attributional
LCI method approaches: Consequential
Generated by: Shikang Kang, 908798159@qq.com
Review: Dependent internal review by Tiangong LCI Data Working Group
Amounts: no units in this file; such an amount is in the reference unit of its flow, which a separate flow dataset defines
copyright: false

## General comment
In view of the complex reservoir-forming characteristics of the Cambrian ultra-deep petroleum system in Tarim Basin, the evolution process of "source-circle-reservoir" of Cambrian is discussed by using dynamic simulation technology, and the evolution history of "generation-migration-accumulation-adjustment" of oil and gas in the ultra-deep petroleum system is revealed

## Geography
Tarim Basin

## Time period
Publication time of literature

## Technology and included processes
The reservoir-forming dynamics simulation of ultra-deep petroleum system in Bachu uplift and Tabei uplift in platform basin area is carried out, and the channel and direction of oil and gas filling and migration in each period are restricted by setting the time of typical profile geological conditions.

## Reference product
- natural gas: 30200; max 30200; uniform; article inperiodical
  吾松格尔组 （6597～6835ｍ）的 天 然 气 产 量

## Outputs
- natural gas: 0.2; log-normal; article inperiodical
  整体成熟度
- natural gas: 0.00055; log-normal; article inperiodical
  HI的平均值

## Data selection and combination
The thermal evolution history, hydrocarbon generation history and migration and accumulation history of Cambrian ultra-deep "source-circle-reservoir" system in Tarim Basin are analyzed by using basin simulation technique. Combined with the fluid streamline simulation results at critical moments, the hydrocarbon filling process of Cambrian ultra-deep petroleum system is discussed in order to provide relevant basis for ultra-deep oil and gas exploration in Tarim Basin

## Data treatment and extrapolations
The overall maturity of source rocks in Tabei slope belt, Shuntuoguole low uplift and Maigaiti slope belt is less than 2%, which is in a high maturity stage and still has good hydrocarbon generation potential at present

## Review details
Inventory: The internal review was done by several iteration steps concerning raw data validation, raw data documentation, representativity, completeness and consistency of modelling with regard to ISO 14040 and 14044.; Documentation: The review of the documentation was performed by Ecobilan and is in compliance with ISO 14040 and 14044. The data set documentation is correct in view of the appropriateness of the information provided. It includes all relevant information in view of data quality and scope of application of the respective LCI result.

## Data sources
- 李斌;张欣;郭强;吕海涛;杨素举;徐勤琪;彭军; 塔里木盆地寒武系超深层含油气系统盆地模拟. 石油学报 804–815 (2022).
