# 畜禽养殖 ; 粪便处理阶段 ; 蛋鸡养殖小区

Dataset: ILCD process, Unit process, single operation
Geography: SD-CN
Reference year: 2014
Classification: Unit processes / Materials production / Agricultural production means
Functional unit: 1kg chicken
Generated by: 杨瑞, 1632707028@qq.com
Owner: 天工LCI数据工作小组
Review: Dependent internal review by 天工LCI数据工作小组
Amounts: no units in this file; such an amount is in the reference unit of its flow, which a separate flow dataset defines
copyright: false
licenseType: Free of charge for all users and uses

## General comment
畜禽粪便处理方式包括干清粪、水冲粪、垫料处理。水冲粪处理方式受《水 污染防治行动计划》（简称水十条）[88]和新《环保法》等严格约束，呈逐年下降 趋势；垫料方式的污染物排放少、对环境危害小，经过简单堆肥后可直接施用于 田地，但其受经济成本制约度较高，常见于禽舍粪便处理；干清粪对环境的危害 介于两者之间，经济成本较低[89,90]。

## Geography
本研究于 2014~2015 年，针对畜禽饲养周期、肉料比、饲料配方、饲料消耗 量、煤和电的消耗量等，先后对山东省高密正大种猪场、莱西市知双奶牛场、即 墨市段泊岚镇姜家坡村养猪场、即墨市刘家庄镇畜禽养殖场、日照市莒县长岭镇 上官庄村、莒县寨里河镇东兴农牧公司、莒县峤山镇东辰奶牛场、莒县峤山镇刘 家义水养猪场、诸城市外贸有限责任公司凤凰父母代种鸭场，新疆阜康宏发养殖 专业合作社、九运街镇旭鸿蛋鸡合作社、九运街镇六运村自成养殖场、中澳控股 集团有限公司、德州市庆云县洼于村、山东省庆云县四柳社区肉牛养殖基地、德 州市庆云青年鸡养殖基地、庆云县永利禽业蛋鸡育成公司、庆云县兴晨青年鸡养 殖专业合作社、庆云县东泰肉鸡养殖专业合作社、河北省盐山县博远饲料有限公 司、盐山县大华人饲料有限公司、无棣县六和饲料有限公司、中澳东方希望饲料 公司等地进行了实地调研。

## Technology and included processes
本文将畜禽养殖生命周期 分为饲料作物种植、饲料加工、畜禽饲养、粪便处理、屠宰、运输等 6 个阶段。 畜禽养殖的生命周期具体流程如图 2-1 所示。由于部分数据的缺乏和基础条件的 限制，未对农药、地膜、饲料添加剂等生产、运输、使用进行分析，其他相关的 基础设施建设、运输工具生产、人力成本所引起的环境影响也不再考虑的范畴内。

## Technical purpose
本数据集涉及畜禽养殖蛋鸡养殖区的粪便处理方式，包括干清粪、水冲粪和垫料处理。干清粪在环境影响和经济成本方面表现中等。垫料处理能降低污染物排放，对环境较友好，且处理后的堆肥可以直接作为肥料使用，但经济成本较高。水冲粪处理方式由于环保法规的严格限制，正逐渐减少。这些信息对于农业和环境领域的利益相关者至关重要，帮助他们理解和优化废弃物管理实践，确保遵守环境法律，并减少与禽类繁殖操作相关的生态影响。

## Reference product
- manure: 0.0892857; input; calculated
  根据文献中畜禽排放系数计算

## Outputs
- methane (biogenic): 0.00107; measured
  蛋鸡养殖小区
- nitrous oxide: 0.00107; measured
  蛋鸡养殖小区
- ammonia: 0.00667; measured
  蛋鸡养殖小区

## Use advice
使用此数据集进行生命周期评估或相关研究时，用户应注意粪便处理实践在不同地区可能存在的差异，因为不同地区采用的处理方法可能会有所不同。数据应结合其他环境措施和法规（例如《水污染防治行动计划》）使用。还应考虑粪便处理选项的经济影响和技术可行性。在界定系统边界时必须特别注意，尤其考虑到处理后的粪便可以替代商业肥料的潜在用途，这可能在生命周期清单中带来抵消效果。

## Review details
清单： 内部审查通过几个迭代步骤完成，涉及原始数据验证、原始数据记录、代表性、完整性、与 ISO 14040 和 14044 有关的建模的一致性。

## Data sources
- 周景月. 基于生命周期评价的畜禽养殖环境影响分析. (青岛科技大学, 2017).
