# 铝电解 ; 液态原铝 ; 拜耳法-火电 ; 冶金用氧化铝

Dataset: ILCD process, Partly terminated system
Geography: CN
Reference year: 2011
Classification: Unit processes / Materials production / Metals and semimetals
Generated by: 谢金良, jinliang.research@gmail.com
Owner: 天工LCI数据工作小组
Review: Dependent internal review by 天工LCI数据工作小组
Amounts: no units in this file; such an amount is in the reference unit of its flow, which a separate flow dataset defines
copyright: false
licenseType: Free of charge for all users and uses

## General comment
该工艺生产的液态原铝作为高质量铝产品的原料，如航空航天部件、汽车零部件、建筑材料和电导体使用。在电解过程中使用的冶金用氧化铝是通过拜耳法生产的，该方法涉及将铝矿石提炼为氧化铝，主要以火电为能源。

## Time period
学位论文完成日期

## Reference product
- aluminium, primary, liquid: 1000; missing unimportant

## Outputs
- carbon dioxide (fossil),carbon dioxide (fossil): 10188.4; missing unimportant

## Use advice
在生命周期评估中，环境影响的重点是铝产品制造过程中的资源消耗、能源使用和废弃物排放。由于运输、使用和回收过程对环境的影响相对较小，因此在本评估中不予考虑。生命周期边界从铝土矿开采一直到原铝的生产，包括铝土的开采、氧化铝的生产、阳极的生产和铝电解过程。如石灰石、沥青这类辅助材料的开采、生产和运输过程被排除在评价系统之外。

## Review details
清单： 内部审查通过几个迭代步骤完成，涉及原始数据验证、原始数据记录、代表性、完整性、与 ISO 14040 和 14044 有关的建模的一致性。

## Data sources
- 李贵奇. 基于生命周期思想的环境评估模型及其在铝工业中的应用. (中南大学, 2011).
