# Industrialfattyacids|Oilgrease|Hydrolysis|All sizes / 工业用脂肪酸|油脂|水解工艺|所有规模

Dataset: ILCD process, Unit process, single operation
Geography: CN
Reference year: 2019
Classification: Materials production / Organic chemicals
Generated by: The data was created by the Office of the Second National Pollution Source Census of the Ministry of Ecology and Environment, and the data was organized by the TianGong Plan team for ILCD format / 生态环境部第二次全国污染源普查工作办公室创建数据，天工计划团队常慧敏整理数据为ILCD格式
Owner: Tiangong LCI Data Working Group / 天工LCI数据工作小组
Amounts: no units in this file; such an amount is in the reference unit of its flow, which a separate flow dataset defines
copyright: false
licenseType: Free of charge for all users and uses

## Technology and included processes
the Technical of end-of-pipe management technology for pollution Ammonia NitrogenisPhysicochemical treatment + biological treatment + activated sludge process，Its Technical efficiency of end-of-pipe management95

## Reference product
- Fatty Acid: 1000; calculated
  源文件中描述为为工业用脂肪酸，此处对其进行了匹配工作，将其匹配到LCAflow库里面相最符合的流，污染物指标备注为工业废水量

## Outputs
- Waste water: 1300; calculated
  污染物指标工业废水量的末端治理技术是/，其效率为0。原文件中描述污染物类别为废水，污染物指标为工业废水量，此处对其进行了匹配工作，将其匹配到LCAflow库里面相最符合的流，污染物指标备注为工业废水量
- chemical oxygen demand: 2.65; calculated
  污染物指标化学需氧量的末端治理技术是物理化学法+生物处理法+活性污泥法，其效率为90，末端治理设施实际运行率（k值）计算公式为k=设施年耗电量（千瓦时）/(设备功率(千瓦)×年运行小时数(小时))。原文件中描述污染物类别为废水，污染物指标为化学需氧量，此处对其进行了匹配工作，将其匹配到LCAflow库里面相最符合的流，污染物指标备注为化学需氧量
- Ammonia Nitrogen: 0.00735; calculated
  污染物指标氨氮的末端治理技术是物理化学法+生物处理法+活性污泥法，其效率为95，末端治理设施实际运行率（k值）计算公式为k=设施年耗电量（千瓦时）/(设备功率(千瓦)×年运行小时数(小时))。原文件中描述污染物类别为废水，污染物指标为氨氮，此处对其进行了匹配工作，将其匹配到LCAflow库里面相最符合的流，污染物指标备注为氨氮

## Data sources
- 第二次全国污染源普查产排污核算系数手册（试用版）,二级代码26,四级代码2662文件，在完整版文件中第4111页
