# 电力生产 ; 火电 ; 中国

Dataset: ILCD process, Unit process, single operation
Geography: CN
Reference year: 2019
Classification: Unit processes / Energy carriers and technologies / Electricity
Generated by: 熊若熙, xiongrx0126@163.com
Owner: 天工LCI数据工作小组
Review: Dependent internal review by 天工LCI数据工作小组
Amounts: no units in this file; such an amount is in the reference unit of its flow, which a separate flow dataset defines
copyright: false
licenseType: Free of charge for all users and uses

## General comment
火电发电包括原煤、洗煤、石油、天然气等十七种化石燃料。该过程只考虑直接发电过程，不考虑上游原材料开采加工和下游消费

## Time period
根据2019年能源统计年鉴数据计算

## Technical purpose
此数据集描述了中国通过烧煤、天然气、原油和天然气等十七种化石燃料进行火力发电的电力生产。它适用于评估直接发电操作的环境影响，不包括上游原材料提取、加工和下游电力消费的考虑。此数据可用于评价中国火力发电厂电力生产的环境影响。

## Reference product
- electricity for thermal power: 3.6; calculated

## Inputs
- Raw coal: 0.3937; calculated
- Other Washed Coal: 0.0089; calculated
- Gangue, in ground: 0.004726; calculated
- Coke oven gas: 0.003985; calculated
- blast furnace gas: 0.046959; calculated
- Converter gas: 0.006303; calculated
- Diesel: 4.63e-5; calculated
- natural gas: 0.0075069; calculated
- Coke: 5e-5
- fuel oil, unspecified: 3e-5
- naphtha: 2e-5
- Petroleum Coke: 0.00035
- refinery gas: 0.0001
- Natural gas, liquefied: 0.00044

## Outputs
- carbon dioxide (fossil): 0.834091; calculated
- sulfur dioxide: 0.000142247; calculated
- Nitrogen oxides: 0.000227013; calculated
- particles (> PM10): 2.89784e-5; calculated

## Data treatment and extrapolations
核算方法参考《企业温室气体排放核算方法与报告指南 发电设施》。不同形式发电量及燃料用量来自于《中国能源统计年鉴 2020》中的第三章（能源生产） 和第六章（地区能源平衡表）。用于计算二氧化碳排放因子的低位发热量、单位热值含碳量等燃料参数来自于《2019 年度中国区域电网二氧化碳基准线排放因子 OM 计算说明》、《企业温室气体排放核算方法与报告指南 发电设施》

## Use advice
此数据的用户应参考《企业温室气体排放核算方法与报告指南 发电设施》来进行核算。不同形式的发电量和燃料用量数据取自《中国能源统计年鉴 2020》的第三章(能源生产)和第六章(地区能源平衡表)。用于计算 CO2 排放因子的燃料参数，如低位发热量和单位热值含碳量，可以参考《2019 年度中国区域电网二氧化碳基准线排放因子 OM 计算说明》及上述指南。用户必须确保只将此数据用于指定的直接发电范围，而不是包括上游和下游过程在内的生命周期分析。

## Review details
清单： 内部审查通过几个迭代步骤完成，涉及原始数据验证、原始数据记录、代表性、完整性、与 ISO 14040 和 14044 有关的建模的一致性。

## Data sources
- 熊若熙. 中国电力生产和消费二氧化碳与污染物排放因子核算. (清华大学, 2023).
