# Rare earth Mining|dysprosium|B/M|REE containing ore

Dataset: ILCD process, Unit process, single operation
Geography: CN
Reference year: 2010
Valid until: 2019
Classification: Materials production / Other mineralic materials
Functional unit: The goal of this investigation is to compare environmental impacts related to the production of 1 kg Dy (functional unit) from IAC (Southern China), from B/M ore (Bayan Obo), and from an eudialyte deposit (Norra Kärr) using the LCA method
LCI method principle: Attributional
LCI method approaches: Allocation - mass
Generated by: Tao Wang, twang@iue.ac.cn
Review: Dependent internal review by Tiangong LCI Data Working Group
Amounts: no units in this file; such an amount is in the reference unit of its flow, which a separate flow dataset defines
copyright: false

## Geography
Southern China and Bayan Obo

## Technology and included processes
The goal of this investigation is to compare environmental impacts related to the production of 1 kg Dy (functional unit) from IAC (Southern China), from B/M ore (Bayan Obo), and from an eudialyte deposit (Norra Kärr) using the LCA method

## Reference product
- Raw ore: 1230; article inperiodical
  Raw ore. Input for next process: Crushing

## Inputs
- Electricity: 4.392; article inperiodical
  Value from iron mine, electricity mix 2014
- Diesel: 10.07; article inperiodical
  Diesel, burned in diesel-electric generating set. Diesel for mining truck
- Explosive: 0.233; article inperiodical
  Explosive. Blasting, 0.095 kg/t moved rock multiplied with stripping rate.
- transport in t*km,transport in t*km: 0.45; article inperiodical
  Diesel 150 km, oil and explosives 929 km. Transport, freight, lorry >32 metric ton, EURO3
- transport in t*km,transport in t*km: 1.11; software or database
  Transport, freight train, 1046 km
- lubricating oil, waste: 0.037; article inperiodical
  lubricating oil. Adapted to mining rat

## Outputs
- Dust (unspecified, from stack): 2.75; article inperiodical
  Dust (PM10), (PM2.5 - PM10), (PM2.5) Particles to air. Based on Arpacioglu and Er (2003) multiplied with stripping rate, distribution of dust analog Althaus et al. (2007a)
- Radioactive dust, waste: 1.324; article inperiodical
  Radioactive dust. Uranium (U238) [Radioactive emissions to air], based on Th232 and U238 activity in the ore.
- Water (river water from technosphere, waste water): 1492; article inperiodical
  Waste water [other emissions to fresh water, value from Mount Weld rare earth mine adapted to mining area.
- overburden (unspecified): 1226; article inperiodical
  Non-sulfidic overburden, off-site [Waste], calculation based on stripping rate.
- lubricating oil, waste: 0.037; estimated
  lubricating oil, waste. Waste mineral oil [Waste], incineration of hazardous waste is assumed

## Deviations from the LCI method approaches
In this study, an allocation method based on the mass of produced REEs combined with their market prices (based on an international metals market analysis and pricing index company ) are considered, as usual for metals with strongly different prices. As the ores have different compositions, the allocation factor has to be assessed individually for each site.

## Review details
Inventory: The internal review was done by several iteration steps concerning raw data validation, raw data documentation, representativity, completeness and consistency of modelling with regard to ISO 14040 and 14044.; Documentation: The review of the documentation was performed by Ecobilan and is in compliance with ISO 14040 and 14044. The data set documentation is correct in view of the appropriateness of the information provided. It includes all relevant information in view of data quality and scope of application of the respective LCI result.

## Data sources
- Zapp, P., Marx, J., Schreiber, A., Friedrich, B. & Voßenkaul, D. Comparison of dysprosium production from different resources by life cycle assessment. Resources, Conservation and Recycling 130, 248–259 (2018).
