# 修复后土壤;农药污染土壤;异位修复;水泥窑协同处置;不含土壤挖掘过程

Dataset: ILCD process, Unit process, single operation
Geography: JS-CN
Reference year: 2022
Classification: Unit processes / Other Services / Repair and maintenance
Functional unit: we defined the functional unit as the remediation of 1 ton of organically contaminated soil
Generated by: 杨欣桐, yangxt@caep.org.cn
Owner: 天工LCI数据工作小组
Review: Dependent internal review by 天工LCI数据工作小组
Amounts: no units in this file; such an amount is in the reference unit of its flow, which a separate flow dataset defines
copyright: false
licenseType: Free of charge for all users and uses

## General comment
将满足或经过预处理后满足入窑要求的固体废物投入水泥窑，在进行水泥熟料生产的同时实现对固体废物的无害化处置过程。

## Geography
研究场地是中国东部江苏省的一个废弃橡胶厂。需要修复的受污染土壤的现场总体积为29313 m3

## Technology and included processes
水泥窑联合处置，用于污染土壤处置的水泥厂位于距离场地49公里的地方，有两条干法回转窑生产线，日产熟料5000吨。经过筛分的污染土壤将用卡车运输到水泥厂的气密储存仓库进行临时储存，然后随后通过一个特殊的传送带送入预煅烧炉。预煅烧炉中的生料温度高达700◦C，受污染的土壤将在进入回转窑之前被干燥和加热。回转窑内火焰温度超过1800◦C，这对于将PAHs转化为H2O和CO2是非常有效的。受污染土壤中的无机成分将在1450的温度下完全融入熟料中◦并随后在熟料冷却器中冷却以结合到水泥生产过程中。

## Technical purpose
此过程用于农药污染土壤的异位修复，采用水泥窑协同处置技术。适用于需要解毒和稳定化的土壤，能够在高温下处理，无需先进行土壤挖掘。适合具备适宜窑炉的工业设施，如水泥厂，它们可以将土壤修复整合到熟料生产线中，从而同时产出水泥熟料和修复后的土壤。

## Reference product
- Remediated soil: 1000; measured

## Inputs
- Electricity: 62.136; measured
- transport in t*km: 49; measured
  For the cement kiln co-processing scenario, the cement plant selected for contaminated soil disposal is located 49 km from the study site
- Coal,Coal,Coal: 65.83; measured
- Excavated soil,Excavated soil: 1000; measured
  与大多数从污染土壤挖掘开始的污染土壤修复LCA不同，我们将系统边界设置为在污染土壤被挖掘和筛分后，但仍留在场地内后开始。

## Use advice
在使用该数据集进行污染土壤修复生命周期评价（LCA）时，应注意系统边界的定义，即始于土壤被挖掘和筛选后仍留在现场之后。不包括最初的挖掘过程。要考虑能源消耗、运输至水泥厂的过程、废气排放和废物管理。确保通过与选定的水泥窑的能力相匹配来验证技术适用性，特别是完成有机污染物的完全分解以及将无机成分融入熟料所需的温度曲线。

## Review details
清单： 内部审查通过几个迭代步骤完成，涉及原始数据验证、原始数据记录、代表性、完整性、与 ISO 14040 和 14044 有关的建模的一致性。

## Data sources
- Tian L ,Mingchao H ,Lu Y , et al. Life cycle assessment-based decision-making for thermal remediation of contaminated soil in a regional perspective [J]. Journal of Cleaner Production, 2023, 392
