# 巷道掘进;开采煤炭

Dataset: ILCD process, Unit process, single operation
Geography: LF-SX-CN
Reference year: 2022
Classification: Energy carriers and technologies / Energetic raw materials
Generated by: 尹琳琳, yinlinlin0623@163.com
Owner: 天工LCI数据工作小组
Review: Dependent internal review by 天工LCI数据工作小组
Amounts: no units in this file; such an amount is in the reference unit of its flow, which a separate flow dataset defines
licenseType: Free of charge for all users and uses

## General comment
M煤矿的煤炭开采过程包括巷道掘进，是能源生产和各种煤化工产品的主要原材料供应过程。这份数据集描述了更大规模煤炭提取系统内的单一操作单位过程。该矿产的煤炭可用于发电、钢铁生产以及作为各种工业过程中的还原剂等多种用途。

## Geography
M 煤矿的年产量为120万t，每年实际工作时间按360d计，则该工作面共需 499d开采完成。M煤矿一个工作面的开采过程中，设备的安装与撤回的时间各为半个月，在一年的生产中，掘进的时间为11个月，回采的时间为10个月。

## Technology and included processes
煤炭开采中巷道掘进

## Reference product
- carbon dioxide (fossil): 4.49773e7; uniform; article inperiodical
  根据M煤矿煤炭开采全生 命周期内各个阶段的时间进度安排以及整个工作面的开采时间,计算得出这一工作面开采的全生命周期中巷道掘进中消耗60788.40mw·h的电量产生的CO2排放量。

## Inputs
- Electricity: 2.18838e8; uniform; article inperiodical
  根据M煤矿煤炭开采全生 命周期内各个阶段的时间进度安排以及整个工作面的开采时间,计算得出这一工作面开采的全生命周期中巷道掘进的电力消耗量。

## Use advice
在使用此数据集时，需要注意不同采矿活动之间的时间分配可能会影响整体环境影响评估结果。请仔细审查报告中提及的掘进和采矿时间——在一年内分别为11个月和10个月——确保这反映了在进行生命周期评估时的实际运营情况。还需考虑设备安装和撤回各半个月的时间，以准确地表示这些活动的基于时间的分配。

## Review details
清单： 内部审查通过几个迭代步骤完成，涉及原始数据验证、原始数据记录、代表性、完整性、与 ISO 14040 和 14044 有关的建模的一致性。
