# primary copper production|Copper cathode|Flash smelting|copper concentrate

Dataset: ILCD process, Unit process, single operation
Geography: CN
Reference year: 2019
Classification: Materials production / Other mineralic materials
Functional unit: the production of one ton of standard Cu cathode
LCI method principle: Attributional
LCI method approaches: Allocation - market value; Substitution
Generated by: Peng Wang, 2867919560@qq.com
Review: Dependent internal review by Tiangong LCI Data Working Group
Amounts: no units in this file; such an amount is in the reference unit of its flow, which a separate flow dataset defines
copyright: false

## Geography
by investigating facility-level data from four typical Chinese Cu smelters|geographically covering Anhui, Jiangxi, Henan and Yunnan Province

## Time period
referencing the China Cu production and smelting process distribution summarized by Zhou (2019)

## Technology and included processes
Among which, Smelter A is the largest smelter in the world with annual output of Cu cathode more than 1000 kt. Its smelting technology is “Flash smelting” which employs oxygenated air to promote autogenous conditions and is currently used by around half of the smelters worldwide (Hanniala et al., 1999) and plus Peirce-Smith (PS) converting. As an offshoot of “Flash smelting”, “Double-Flash” (i.e., Flash smelting and Flash converting) was also covered in the study, and is applied by Smelter B with its annual output of Cu cathode around 400 kt. It combines “Flash smelting” with flash converting process to replace conventional PS converting process (Chaubal et al., 1989 ). The smelting technology applied by Smelter C is ISA smeltingplus PS converting, with its annual output of Cu cathode around 500 kt. Unlike “Flash smelting”, it is a kind of “Bath smelting” that features the insertion of a lance into the slag to inject oxygen enriched air into the molten bath. This modification creates turbulence that increases the productivity of the reaction with feed materials (Arthur and Edwards, 2003). The Oxygen-enriched bottom-blowing (also termed as SKS) smelting technology (plus Flash converting) applied by Smelter D with its annual output of Cu cathode around 300 kt also belongs to “Bath smelting”. It is a newly developed intensified smelting technology further to ISA smelting technology. Significant advantages of this technology mainly come from its bottom blowing techniques, and its intellectua

## Reference product
- copper: 1000; measured

## Inputs
- Oil sand (100% bitumen) (in MJ): 2914; software or database
  Crude oil
- Hard coal: 26424; software or database
- Lignite EU-27: 583; software or database
  Lignite
- Natural gas, at consumer EU-27: 6468; software or database
  Natural gas
- Uranium natural: 535; software or database
  Uranium natural需要补充
- primary energy from hydro power: 5927; software or database
  Primary energy from hydro power
- primary energy from solar energy: 550; software or database
  Primary energy from solar energy
- primary energy from wind power: 631; software or database
  Primary energy from wind power
- Copper ore: 73226; measured
  Copper ore – Pyro route
- Limestone: 450; measured
  Limestone (calcium carbonate)
- quartz sand: 198; measured
  Quartz sand (silica sand; silicon dioxide)
- freshwater: 4.07701e6; measured
  Water
- Copper-containing slag: 198.2; measured
  Secondary copper-containing materials需要补充

## Outputs
- Overburden (deposited, hibernating in ground, non elementary flow): 4821; measured
  Overburden (deposited)
- Tailings (deposited, hibernating in ground, non elementary flow): 104823; measured
  Tailings (deposited)
- Slag: 0.0049; measured
  Slag (deposited)
- Waste rock: 276371; measured
  Waste rock需要补充
- Hazardous waste (deposited, hibernating in ground, non elementary flow): 3500; measured
  Hazardous waste (deposited)
- carbon dioxide (fossil): 3950; software or database
  CO2
- methane: 7.5; software or database
  CH4
- nitrous oxide: 0.459; software or database
  N2O
- Nitrogen oxides: 20.5; software or database
  NOx需要补充
- sulfur oxides: 10.1; software or database
  SO2
- non-methane volatile organic compounds: 1.79; software or database
  non-methane volatile organic compounds 需要补充
- carbon monoxide: 7.32; software or database
- particles (> PM10): 0.645; software or database
- particles (PM10): 3.67; software or database
- particles (PM2.5 - PM10): 1.1; software or database
- particles (PM2.5): 2.16; software or database
- arsenic: 1460, 3820 (2 entries); software or database
  Arsenic
- copper: 1830, 3490 (2 entries); software or database
  Copper
- lead: 1290, 1510 (2 entries); software or database
  Lead
- ammonium: 769; software or database
  Ammonium/ammonia
- magnesium: 0.159; software or database
  Nitrate (NO3 )
- phosphate: 2660; software or database
  Phosphate (PO43 )
- Biological oxygen demand: 496; software or database
  Biological oxygen demand (BOD)需要补充
- chemical oxygen demand: 5.34; software or database
  Chemical oxygen demand (COD)

## Deviations from the LCI method approaches
The Life CycleInventory Assessment (LCIA) was performed using the CML (Center for Methodological Development) 2001 method developed by University of Leiden in Netherland (Guine ́e, 2001), mainly due to its wide acceptance in the global LCA community.

## Data selection and combination
Background data on production of energy, fuels and auxiliary materials were obtained from GaBi-Database (Sphera database, 2021), covering China-specific data. Moreover, global average or European data were used as the best available proxy data for some auxiliary materials production such as barium sulfate (used as fill-forming agent in fire-refining process) due to the lack of related Chinese data.

## Data treatment and extrapolations
All collected foreground data were modeled using GaBi-Software (Sphera, 2021), followed by a plausibilitycheck for mass balance and completeness of emission inventory.

## Review details
Inventory: The internal review was done by several iteration steps concerning raw data validation, raw data documentation, representativity, completeness and consistency of modelling with regard to ISO 14040 and 14044.; Documentation: The review of the documentation was performed by Ecobilan and is in compliance with ISO 14040 and 14044. The data set documentation is correct in view of the appropriateness of the information provided. It includes all relevant information in view of data quality and scope of application of the respective LCI result.

## Data sources
- Lu, T., Tikana, L., Herrmann, C., Ma, Y. & Jia, J. Environmental hotspot analysis of primary copper production in China and its future improvement potentials. Journal of Cleaner Production 370, 133458 (2022).
