# Ultrapure water preparation | Electrodeionization, spiral-wound, wastewater discharge, CN

Dataset: ILCD process, Unit process, single operation
Geography: CN
Reference year: 2022
Classification: Materials production / Other mineralic materials
Functional unit: 1 t ultrapure water
Generated by: Jiaqi Lu, wilsherelu@foxmail.com
Review: Dependent internal review by Tiangong LCI Data Working Group
Amounts: no units in this file; such an amount is in the reference unit of its flow, which a separate flow dataset defines
copyright: false

## Reference product
- Ultrapure water: 1000; article inperiodical
  超纯水产品

## Inputs
- electricity mix: 4.32; article inperiodical
- Electrodeionization components: 1.25e-5; article inperiodical
  EDI组件
- Reverse Osmosis Inlet Water: 1330; article inperiodical
  RO进水

## Outputs
- waste water - treated: 360; article inperiodical
  排水，可回用到RO
- Electrodeionization components: 1.25e-5; article inperiodical
  EDI组件废弃

## Review details
Inventory: The internal review was done by several iteration steps concerning raw data validation, raw data documentation, representativity, completeness and consistency of modelling with regard to ISO 14040 and 14044.; Documentation: The review of the documentation was performed by Ecobilan and is in compliance with ISO 14040 and 14044. The data set documentation is correct in view of the appropriateness of the information provided. It includes all relevant information in view of data quality and scope of application of the respective LCI result.

## Data sources
- Yuan, Y. et al. Deduction of carbon footprint for membrane desalination processes towards carbon neutrality: A case study on electrodeionization for ultrapure water preparation. Desalination 559, 116648 (2023).
