# 电力生产 ; 混合电力 ; 上海

Dataset: ILCD process, Unit process, single operation
Geography: SH-CN
Reference year: 2019
Classification: Unit processes / Energy carriers and technologies / Electricity
Generated by: 熊若熙, xiongrx0126@163.com
Owner: 天工LCI数据工作小组
Review: Dependent internal review by 天工LCI数据工作小组
Amounts: no units in this file; such an amount is in the reference unit of its flow, which a separate flow dataset defines
copyright: false
licenseType: Free of charge for all users and uses

## General comment
混合电力产生形式包括火力发电、水力发电、风力发电、核能发电和太阳能发电

## Technical purpose
通过这种混合过程产生的电力在上海的住宅、商业和工业部门有各种应用。它包括由火力（煤炭、天然气）、水力、风力、核能和太阳能资源产生的电力。

## Reference product
- Electricity: 3.6; missing unimportant
  [{'text': '3.6', 'type': 'text'}]

## Inputs
All rows: missing unimportant
- electricity for thermal power: 3.49248
  [{'text': '3.6', 'type': 'text'}]
- electricity from hydroelectric power plant: 0
  [{'text': '3.6', 'type': 'text'}]
- electricity for nuclear power: 0
  [{'text': '3.6', 'type': 'text'}]
- electricity from wind power: 0.073116
  [{'text': '3.6', 'type': 'text'}]
- electricity for solar power: 0.0344088
  [{'text': '3.6', 'type': 'text'}]

## Use advice
在使用这个数据集进行生命周期评估时，考虑特定的电力生成来源组合，因为它对环境影响有不同的影响。负担分配应基于实际的发电组合和区域电网信息。注意，这种组合随时间而变化，可能需要更新以用于未来的评估。

## Review details
清单： 内部审查通过几个迭代步骤完成，涉及原始数据验证、原始数据记录、代表性、完整性、与 ISO 14040 和 14044 有关的建模的一致性。

## Data sources
- 能源统计年鉴2020
