# 修复后土壤;原位修复;电化学修复;处理15天

Dataset: ILCD process, Unit process, black box
Geography: ES
Reference year: 2021
Classification: Other Services / Repair and maintenance
Functional unit: Soil polluted with 150 mg of 2,4-D per kg of dry soil remediation after 15 days of treatment.
Generated by: 杨欣桐, yangxt@caep.org.cn
Owner: 天工LCI数据工作小组
Review: Dependent internal review by 天工LCI数据工作小组
Amounts: no units in this file; such an amount is in the reference unit of its flow, which a separate flow dataset defines
copyright: false
licenseType: Free of charge for all users and uses

## General comment
将电场施加到放置在土壤中的电极上，产生许多化学、电化学、电动和热变化，减少土壤中所含污染物的影响，将其从土壤中消耗掉或转化为危害较小的物种。

## Time period
文献发表时间

## Technology and included processes
土壤修复活动直接由电网供电，在恒电位模式下工作，提供1.0 V cm−1的恒定电位梯度。

## Technical purpose
该过程用于原位土壤修复，以减少农药等污染物的危害程度。电化学处理旨在治疗被有机化合物污染的土壤，特别是针对受2,4-D农药污染的土壤修复。在需要直接在现场降解或化学转化污染物，且无需挖掘和运输的情况下，这是最佳的选择，确保对周围环境的干扰最小化。

## Reference product
- Remediated soil: 1; measured
  Soil polluted with 150 mg of 2,4-D per kg of dry soil remediation after 15 days of treatment.

## Inputs
All rows: measured
- Graphite: 0.37
  Electrodes
- polymethyl methacrylate (PMMA) beads,polymethyl methacrylate (PMMA) beads: 2.5
  Mock-up
- Electronic Control of Safety Airbag: 0.02
  Cable
- Polyethylene: 0.05
  Electronic
- Steel: 0.7
  conditioner
- Silicon Chromium Alloy: 0.25
  Hardware
- Cable: 0.05
- contaminated soil: 1
  Soil polluted with 150 mg of 2,4-D per kg of dry soil

## Use advice
在使用此LCA数据时，考虑电化学过程使用的电源，并确保其与原始研究一致以保持准确性。由于评估省略了电极材料的再利用或回收以及修复后冲洗废水的处理，如有必要请在LCA模型中调整以考虑这些因素。此外，由于研究忽略了农药氧化成二氧化碳的过程和因蒸发量低而引起的空气污染，如果这些方面与评估目标相关，用户应将这些因素纳入考虑。电极之间的距离及其惰性（石墨）应当被考虑，因为它影响氧化潜力和处理效率。最后，数据集特定于受150 mg/kg 2,4-D污染的土壤；对于其他污染物或浓度，假设和结果可能会有所不同，应相应调整。

## Review details
清单： 内部审查通过几个迭代步骤完成，涉及原始数据验证、原始数据记录、代表性、完整性、与 ISO 14040 和 14044 有关的建模的一致性。

## Data sources
- Fernández-Marchante C.M. et al. Can the green energies improve the sustainability of electrochemically-assisted soil remediation processes. Science of the Total Environment 803 (2022) 149991
