# 瓦楞纸箱生产;瓦楞纸板;分切、印刷、包装

Dataset: ILCD process, Unit process, single operation
Geography: CN
Reference year: 2017
Classification: Unit processes / Materials production / Paper and cardboards
Generated by: 刘晓华, lxh01311@163.com
Owner: 天工LCI数据工作小组
Review: Dependent internal review by 天工LCI数据工作小组
Amounts: no units in this file; such an amount is in the reference unit of its flow, which a separate flow dataset defines
copyright: false
licenseType: Free of charge for all users and uses

## General comment
该数据集涉及瓦楞纸箱的制造过程，该过程包括通过切割、印刷和包装操作生产瓦楞纸板。这些纸箱通常用于商品的包装和运输，因为它们的重量轻、耐用性强、可定制性强。它们在电子、食品和消费产品等各种行业中都有广泛的应用。

## Reference product
- corrugated board boxes: 1000; missing unimportant
  瓦楞纸箱

## Inputs
All rows: missing unimportant
- Electricity: 120.632
  电力
- water: 290.5
  新鲜水
- corrguted cardboard: 1032.6
  瓦楞纸板
- steel: 5.3
  铁钉
- ink: 2.5
  油墨

## Outputs
- chemical oxygen demand: 258; missing unimportant
  化学需氧量
- Industrial Hazardous waste: 36.6; missing unimportant
  危险废物
- Industrial Hazardous waste: 36.6; missing unimportant
  含油墨危险废物

## Use advice
在使用该数据集进行生命周期评估时，重要的是要考虑瓦楞纸箱的整个生命周期，包括原材料获取（如纸张）、生产过程（切割、印刷和包装）、分销、使用和终生场景（回收或处置）。如果瓦楞纸箱是回收计划的一部分，应特别注意回收率和回收效率。应考虑数据的地理和技术范围，以确保其代表性适用于预期的研究区域。与数据集关联的假设和限制应在研究中清楚理解并记录。

## Review details
清单： 内部审查通过几个迭代步骤完成，涉及原始数据验证、原始数据记录、代表性、完整性、与 ISO 14040 和 14044 有关的建模的一致性。

## Data sources
- 80万平方米纸箱生产加工项目环评报告
