# 熟料生产|熟料, 高贝利特硫铝酸盐水泥熟料|混合固废

Dataset: ILCD process, 碳排放因子（LCI结果）
Geography: CN
Reference year: 2022
Classification: Materials production / Other mineralic materials
LCI method principle: Other
Generated by: 郭静
Amounts: no units in this file; such an amount is in the reference unit of its flow, which a separate flow dataset defines
copyright: false

## General comment
以固体废弃物石油焦脱硫灰渣、粉煤灰、电石渣和低品位铝土矿为原料制备高贝利特硫铝酸盐水泥熟料。

## Model description
功能单元未知，根据文献数据推测为1t熟料。水泥生产的全生命周期包括原料的开采以及将原料生产成水泥的全过程。在水泥生产的过程中主要考虑水泥生产工艺的“两磨一烧”和各种燃料的消耗量（主要是煤炭）对环境直接输出的二氧化碳，以及水泥生产所消耗的电量对环境间接输出的二氧化碳。石油焦脱硫灰渣、粉煤灰、电石渣在高贝利特硫铝酸盐水泥熟料生产中不计算其原料开采的碳足迹，这里主要考虑矾土的开采。

## Reference product
- clinker, high belite sulpho-aluminate cement clinker: 1000
  高贝利特硫铝酸盐水泥熟料（GF-HBSAC）

## Inputs
All rows: article inperiodical
- Petroleum coke ash residue, desulfurized: 450
  石油焦脱硫灰渣。青岛石油炼化厂生产石油焦经过脱硫后的产物。
- ash: 170
  粉煤灰
- Carbide slag: 380
  电石渣
- bauxite: 190
  铝矾土
- hard coal: 115
  煤耗
- electricity, medium voltage: 342
  电耗

## Outputs
- carbon dioxide: 550.29; estimated
  碳排放。参照商品和服务在生命周期内的温室气体排放评价规范（PAS2050:2008）和政府间气候变化专门委员会（IPCC）国家温室气体清单指南%提供的碳排放因子，采用简化的LCA方法核算上述水泥款料的碳排放量（涉及到的碳排放因子及碳足迹的质量均为CO2质量）。

## Cut-off and completeness
只关注水泥熟料生产的碳足迹。

## Data treatment and extrapolations
碳排放值：CO2质量，单元过程碳足迹数据累加。

## Sampling procedure
石油焦脱硫灰渣是青岛石油炼化厂生产石油焦经过脱硫后的产物。

## Data sources
- 光文涛, 隋晓萌, 王鹏刚, 田砾, & 赵明海. (2022). 采用固废制备的高贝利特硫铝酸盐水泥碳足迹核算与分析. 青岛理工大学学报, 43(4), 34–40.
