# Production stage | Oil and gas | Horizontal well | Drilling

Dataset: ILCD process, Unit process, single operation
Geography: LN-CN
Reference year: 2006
Classification: Materials production / Other mineralic materials
LCI method principle: Attributional
LCI method approaches: Consequential
Generated by: zimeng li, 1577978537@qq.com
Review: Dependent internal review by Tiangong LCI Data Working Group
Amounts: no units in this file; such an amount is in the reference unit of its flow, which a separate flow dataset defines
copyright: false

## General comment
The horizontal well drilling technology has been proved to be an effective method to improve oil recovery through long-term practice

## Geography
The Huanxiling Oilfield in Jianghan Oilfield is located in the southern section of the western slope of the Liaohe Depression

## Time period
On June 12,2006, new wells in huanxiling oilfield of our country began to put into production

## Technology and included processes
The design and improvement of horizontal well technology in Huanxiling Oilfield have been tailored to local conditions, drilling several horizontal wells in its main wellbore, forming branches of horizontal wells, increasing the oilfield's production efficiency, and promoting the progress and improvement of China's oil recovery technology and methods.

## Reference product
- LPG - liquefied petroleum gas: 21100; uniform; article inperiodical
  日产油吨数

## Outputs
- LPG - liquefied petroleum gas: 22000; uniform; article inperiodical
  每天日产液吨数
- LPG - liquefied petroleum gas: 3840; uniform; article inperiodical
  日产气

## Review details
Inventory: The internal review was done by several iteration steps concerning raw data validation, raw data documentation, representativity, completeness and consistency of modelling with regard to ISO 14040 and 14044.; Documentation: The review of the documentation was performed by Ecobilan and is in compliance with ISO 14040 and 14044. The data set documentation is correct in view of the appropriateness of the information provided. It includes all relevant information in view of data quality and scope of application of the respective LCI result.

## Data sources
- 浅析水平井钻井技术在石油开发中的应用 - 中国知网.
