# Electricity/electricalenergy+heatenergy|Coal|Pulverized coal boiler|450~749 MW / \|电能/电能+热能|煤炭|煤粉锅炉|450～749兆瓦

Dataset: ILCD process, Partly terminated system
Geography: CN
Reference year: 2019
Classification: Materials production / Other mineralic materials
Generated by: The data was created by the Office of the Second National Pollution Source Census of the Ministry of Ecology and Environment, and the data was organized by the TianGong Plan team for ILCD format / 生态环境部第二次全国污染源普查工作办公室创建数据，天工计划团队常慧敏整理数据为ILCD格式
Amounts: no units in this file; such an amount is in the reference unit of its flow, which a separate flow dataset defines
copyright: false

## Technology and included processes
the Technical of end-of-pipe management technology for pollution CoalisHigh-efficiency electrostatic precipitation + others (wet desulfurization synergy)①，Its Technical efficiency of end-of-pipe management0.00056Aar+99.972
污染物指标颗粒物的末端治理技术是高效静电除尘+其他（湿法脱硫协同）①，其效率为0.00056Aar+99.972，末端治理设施实际运行率（k值）计算公式为除尘设施年实际运行小时数/机组年实际运行小时数，①高效颗粒物末端治理技术：采取高效电源供电、低低温电除尘、超净电袋、高效袋式除尘、湿法脱硫协同、湿式电除尘等技术，满足《燃煤电厂超低排放烟气
治理工程技术规范》（HJ2053-2026）相关要求。

## Reference product
- Coal: 1000; input; calculated
  原文件中描述污染物类别为Product，污染物指标为煤炭，此处对其进行了匹配工作，将其匹配到LCAflow库里面相最符合的流，污染物指标备注为颗粒物

## Outputs
All rows: calculated
- particles (PM2.5 - PM10): nan, nan, nan, nan, nan, nan, nan, nan, nan, nan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 (18 entries)
  原文件中描述污染物类别为废气，污染物指标为颗粒物，此处对其进行了匹配工作，将其匹配到LCAflow库里面相最符合的流，污染物指标备注为颗粒物
- sulfur dioxide: nan, nan, nan, nan, nan, nan, nan, nan (8 entries)
  原文件中描述污染物类别为废气，污染物指标为二氧化硫，此处对其进行了匹配工作，将其匹配到LCAflow库里面相最符合的流，污染物指标备注为二氧化硫
- Nitrogen oxides: 1.01
  原文件中描述污染物类别为废气，污染物指标为氮氧化物（低氮燃烧法，煤炭干燥无灰基挥发分小于等于10%），此处对其进行了匹配工作，将其匹配到LCAflow库里面相最符合的流，污染物指标备注为氮氧化物（低氮燃烧法，煤炭干燥无灰基挥发分小于等于10%）
- Nitrogen oxides: 0.71625, 1.4325 (2 entries)
  原文件中描述污染物类别为废气，污染物指标为氮氧化物（低氮燃烧法，10%小于煤炭干燥无灰基挥发分小于等于20%），此处对其进行了匹配工作，将其匹配到LCAflow库里面相最符合的流，污染物指标备注为氮氧化物（低氮燃烧法，10%小于煤炭干燥无灰基挥发分小于等于20%）
- Nitrogen oxides: 0.4862, 0.715 (2 entries)
  原文件中描述污染物类别为废气，污染物指标为氮氧化物（低氮燃烧法，20%小于煤炭干燥无灰基挥发分小于等于37%），此处对其进行了匹配工作，将其匹配到LCAflow库里面相最符合的流，污染物指标备注为氮氧化物（低氮燃烧法，20%小于煤炭干燥无灰基挥发分小于等于37%）
- Nitrogen oxides: 0.434, 0.5425 (2 entries)
  原文件中描述污染物类别为废气，污染物指标为氮氧化物（低氮燃烧法，煤炭干燥无灰基挥发分>37%），此处对其进行了匹配工作，将其匹配到LCAflow库里面相最符合的流，污染物指标备注为氮氧化物（低氮燃烧法，煤炭干燥无灰基挥发分>37%）
- Nitrogen oxides: 0.7575, 1.515 (2 entries)
  原文件中描述污染物类别为废气，污染物指标为氮氧化物（低氮燃烧法-SNCR，煤炭干燥无灰基挥发分小于等于10%），此处对其进行了匹配工作，将其匹配到LCAflow库里面相最符合的流，污染物指标备注为氮氧化物（低氮燃烧法-SNCR，煤炭干燥无灰基挥发分小于等于10%）
- Nitrogen oxides: 0.5474, 0.9775 (2 entries)
  原文件中描述污染物类别为废气，污染物指标为氮氧化物（低氮燃烧法-SNCR，10%小于煤炭干燥无灰基挥发分小于等于20%），此处对其进行了匹配工作，将其匹配到LCAflow库里面相最符合的流，污染物指标备注为氮氧化物（低氮燃烧法-SNCR，10%小于煤炭干燥无灰基挥发分小于等于20%）
- Nitrogen oxides: 0.508, 0.889 (2 entries)
  原文件中描述污染物类别为废气，污染物指标为氮氧化物（低氮燃烧法-SNCR，20%小于煤炭干燥无灰基挥发分小于等于37%），此处对其进行了匹配工作，将其匹配到LCAflow库里面相最符合的流，污染物指标备注为氮氧化物（低氮燃烧法-SNCR，20%小于煤炭干燥无灰基挥发分小于等于37%）
- Nitrogen oxides: 0.5075, 0.7105 (2 entries)
  原文件中描述污染物类别为废气，污染物指标为氮氧化物（低氮燃烧法-SNCR，煤炭干燥无灰基挥发分>37%），此处对其进行了匹配工作，将其匹配到LCAflow库里面相最符合的流，污染物指标备注为氮氧化物（低氮燃烧法-SNCR，煤炭干燥无灰基挥发分>37%）
- mercury: nan
  原文件中描述污染物类别为废气，污染物指标为汞及其化合物，此处对其进行了匹配工作，将其匹配到LCAflow库里面相最符合的流，污染物指标备注为汞及其化合物
- volatile organic compound: nan
  原文件中描述污染物类别为废气，污染物指标为挥发性有机物，此处对其进行了匹配工作，将其匹配到LCAflow库里面相最符合的流，污染物指标备注为挥发性有机物

## Data sources
- 第二次全国污染源普查产排污核算系数手册（试用版）,四级代码4411、4412文件，在完整版文件中第5275页
