# RawMaterialYard|Ironore,lime,cokepowder,coalpowder,etc.|Ironore,lime,cokepowder,coalpowder,etc.|Mechanizedrawmaterialsiteandyard|All sizes / 原料堆场|铁矿、石灰、焦粉、煤粉等|铁矿、石灰、焦粉、煤粉等|机械化原料场地、堆场|所有规模

Dataset: ILCD process, Unit process, single operation
Geography: CN
Reference year: 2019
Classification: Materials production / Non-energetic raw materials
Generated by: The data was created by the Office of the Second National Pollution Source Census of the Ministry of Ecology and Environment, and the data was organized by the TianGong Plan team for ILCD format / 生态环境部第二次全国污染源普查工作办公室创建数据，天工计划团队常慧敏整理数据为ILCD格式
Owner: Tiangong LCI Data Working Group / 天工LCI数据工作小组
Amounts: no units in this file; such an amount is in the reference unit of its flow, which a separate flow dataset defines
copyright: false
licenseType: Free of charge for all users and uses

## Technology and included processes
the treatment technology for the pollution of particles (PM2.5 - PM10)didn't offered

## Reference product
- Iron ore powder: 1000; input; calculated
  源文件中描述为为铁矿、石灰、焦粉、煤粉等，此处对其进行了匹配工作，将其匹配到LCAflow库里面相最符合的流，污染物指标备注为无组织颗粒物①

## Outputs
- particles (PM2.5 - PM10): nan; calculated
  污染物指标无组织颗粒物的末端治理技术未说明，优。原文件中描述污染物类别为废气，污染物指标为无组织颗粒物，此处对其进行了匹配工作，将其匹配到LCAflow库里面相最符合的流，污染物指标备注为无组织颗粒物①
- particles (PM2.5 - PM10): nan; calculated
  污染物指标无组织颗粒物的末端治理技术未说明，良。原文件中描述污染物类别为废气，污染物指标为无组织颗粒物，此处对其进行了匹配工作，将其匹配到LCAflow库里面相最符合的流，污染物指标备注为无组织颗粒物①
- particles (PM2.5 - PM10): nan; calculated
  污染物指标无组织颗粒物的末端治理技术未说明，中。原文件中描述污染物类别为废气，污染物指标为无组织颗粒物，此处对其进行了匹配工作，将其匹配到LCAflow库里面相最符合的流，污染物指标备注为无组织颗粒物①
- particles (PM2.5 - PM10): nan; calculated
  污染物指标无组织颗粒物的末端治理技术未说明，差。原文件中描述污染物类别为废气，污染物指标为无组织颗粒物，此处对其进行了匹配工作，将其匹配到LCAflow库里面相最符合的流，污染物指标备注为无组织颗粒物①

## Data sources
- 第二次全国污染源普查产排污核算系数手册（试用版）,四级代码3110文件，在完整版文件中第4111页
