# Electricity/electricalenergy+heatenergy|Coal|Circulating fluidized bed boiler|450~749 MW / 电能/电能+热能|煤炭|循环流化床锅炉|450～749兆瓦

Dataset: ILCD process, Unit process, single operation
Geography: CN
Reference year: 2019
Classification: Energy carriers and technologies / Electricity
Generated by: The data was created by the Office of the Second National Pollution Source Census of the Ministry of Ecology and Environment, and the data was organized by the TianGong Plan team for ILCD format / 生态环境部第二次全国污染源普查工作办公室创建数据，天工计划团队常慧敏整理数据为ILCD格式
Owner: Tiangong LCI Data Working Group / 天工LCI数据工作小组
Review: Dependent internal review by Tiangong LCI Data Working Group / 天工LCI数据工作小组
Amounts: no units in this file; such an amount is in the reference unit of its flow, which a separate flow dataset defines
copyright: false
licenseType: Free of charge for all users and uses

## General comment
the Technical of end-of-pipe management technology for pollution volatile organic compoundis/

## Reference product
- Coal: 1000; input; calculated
  源文件中描述为为煤炭，此处对其进行了匹配工作，将其匹配到LCAflow库里面相最符合的流，污染物指标备注为颗粒物

## Outputs
All rows: calculated
- particles (PM2.5 - PM10): nan
  污染物指标颗粒物的末端治理技术是电袋组合，其效率为0.0045Aar+0.027Sar+99.7，末端治理设施实际运行率（k值）计算公式为除尘设施年实际运行小时数/机组年实际运行小时数。原文件中描述污染物类别为废气，污染物指标为颗粒物，此处对其进行了匹配工作，将其匹配到LCAflow库里面相最符合的流，污染物指标备注为颗粒物
- particles (PM2.5 - PM10): nan
  污染物指标颗粒物的末端治理技术是高效电袋组合①，其效率为0.0015Aar+0.009Sar+99.9，末端治理设施实际运行率（k值）计算公式为除尘设施年实际运行小时数/机组年实际运行小时数，①高效颗粒物末端治理技术：采取高效电源供电、低低温电除尘、超净电袋、高效袋式除尘、湿法脱硫协同、湿式电除尘等技术，满足《燃煤电厂超低排放烟气
  治理工程技术规范》（HJ2053-2034）相关要求。
  。原文件中描述污染物类别为废气，污染物指标为颗粒物，此处对其进行了匹配工作，将其匹配到LCAflow库里面相最符合的流，污染物指标备注为颗粒物
- sulfur dioxide: nan
  污染物指标二氧化硫（炉内脱硫）的末端治理技术是/。原文件中描述污染物类别为废气，污染物指标为二氧化硫（炉内脱硫），此处对其进行了匹配工作，将其匹配到LCAflow库里面相最符合的流，污染物指标备注为二氧化硫（炉内脱硫）
- Nitrogen oxides: 1.52
  污染物指标氮氧化物（10%小于煤炭干燥无灰基挥发分小于等于20%）的末端治理技术是其他（直排）。原文件中描述污染物类别为废气，污染物指标为氮氧化物（10%小于煤炭干燥无灰基挥发分小于等于20%），此处对其进行了匹配工作，将其匹配到LCAflow库里面相最符合的流，污染物指标备注为氮氧化物（10%小于煤炭干燥无灰基挥发分小于等于20%）
- Nitrogen oxides: 1.52
  污染物指标氮氧化物（20%小于煤炭干燥无灰基挥发分小于等于37%）的末端治理技术是其他（直排）。原文件中描述污染物类别为废气，污染物指标为氮氧化物（20%小于煤炭干燥无灰基挥发分小于等于37%），此处对其进行了匹配工作，将其匹配到LCAflow库里面相最符合的流，污染物指标备注为氮氧化物（20%小于煤炭干燥无灰基挥发分小于等于37%）
- mercury: nan
  污染物指标汞及其化合物的末端治理技术是协同脱汞，其效率为25.73MHgar+84.12，末端治理设施实际运行率（k值）计算公式为取该机组除尘、脱硝脱硫K的最小值。原文件中描述污染物类别为废气，污染物指标为汞及其化合物，此处对其进行了匹配工作，将其匹配到LCAflow库里面相最符合的流，污染物指标备注为汞及其化合物
- volatile organic compound: nan
  污染物指标挥发性有机物的末端治理技术是/。原文件中描述污染物类别为废气，污染物指标为挥发性有机物，此处对其进行了匹配工作，将其匹配到LCAflow库里面相最符合的流，污染物指标备注为挥发性有机物

## Use advice
This dataset is derived from the Pollution Source Census Report and contains information on pollution emissions and related products. However, it does not include data on energy or chemical consumption, nor does it provide information on waste or co-product generation. When utilizing this dataset, please supplement the missing data based on actual conditions before use
该数据集来源于污染源普查报告，包含污染物排放及相关产品信息，但不包含能源或化学品消耗数据，也不提供废弃物或共生产物产生信息。在使用该数据集时，请根据实际情况补充缺失数据后再使用。

## Review details
Inventory: The internal review was done by several iteration steps concerning raw data validation, raw data documentation, representativity, completeness and consistency of modelling with regard to ISO 14040 and 14044.
清单： 内部审查通过几个迭代步骤完成，涉及原始数据验证、原始数据记录、代表性、完整性、与 ISO 14040 和 14044 有关的建模的一致性。

## Data sources
- 第二次全国污染源普查产排污核算系数手册（试用版）,四级代码4411、4412文件，在完整版文件中第5275页
