# 氧化铝再生 ; 冶金用氧化铝 ; 二次铝渣

Dataset: ILCD process, Unit process, single operation
Geography: CN
Reference year: 2020
Classification: Unit processes / Materials production / Metals and semimetals
Generated by: 熊若熙, xiongrx0126@163.com
Owner: 天工LCI数据工作小组
Review: Dependent internal review by 天工LCI数据工作小组
Amounts: no units in this file; such an amount is in the reference unit of its flow, which a separate flow dataset defines
copyright: false
licenseType: Free of charge for all users and uses

## General comment
从二次铝渣中回收氧化铝

## Time period
文献发表日期

## Technical purpose
从二次铝渣中回收的再生氧化铝主要用于冶金工业。它适用于通过霍尔-埃鲁法生产铝的应用，其中氧化铝在熔融冰晶石中进行电解，以及其他需要高纯度氧化铝的冶金工艺。

## Reference product
- aluminium oxide, metallurgical: 1000; missing unimportant
  alumina

## Inputs
All rows: missing unimportant
- electricity, high voltage, aluminium industry: 770.4
- Secondary Aluminum Dross: 1420
  Secondary aluminum dross
- sulfuric acid: 301
- Sodium hydroxide: 57
- steam, in chemical industry: 2210
  Steam
- natural gas, high pressure: 23.4
  Natural gas
- Water, unspecified natural origin: 1240

## Outputs
All rows: missing unimportant
- wastewater, average: 313
  Waste water
- Residue: 289
  Filter residue 搜不出来
- Dust: 0.0158
- ammonia: 0.0893
- chromium: 0.00132
  Chromium
- Bromine: 0.00114
- carbon monoxide (fossil),carbon monoxide (fossil): 0.86
- hydrogen fluoride: 0.00147
- hydrogen sulfide: 0.00357
- sulfur dioxide: 2.77
- Propane: 0.00199
- Xylene: 0.0916
- particles (PM2.5 - PM10): 3.74e-6
  Particulate matters 10
- particles (PM2.5): 0.99
  Particulate matters 2.5
- BOD5, Biological Oxygen Demand: 0.00139
  Biochemical oxygen demand
- chemical oxygen demand: 0.26

## Use advice
在将此数据集纳入生命周期评估时，确保清楚定义边界，包括从二次铝渣中获取氧化铝的过程及其在冶金工业中的后续使用。考虑一级和二级氧化铝生产过程之间可能存在的潜在环境影响差异。应该对系统边界的排除事项，如运行阶段或产品寿命末期的回收影响，进行理由说明并记录下来。

## Review details
清单： 内部审查通过几个迭代步骤完成，涉及原始数据验证、原始数据记录、代表性、完整性、与 ISO 14040 和 14044 有关的建模的一致性。

## Data sources
- Zhu, X., Jin, Q. & Ye, Z. Life cycle environmental and economic assessment of alumina recovery from secondary aluminum dross in China. J. Clean. Prod. 277, (2020).
