# 养猪生产 ; 盆周山地区农户散养

Dataset: ILCD process, Unit process, single operation
Geography: SC-CN
Reference year: 2006
Classification: Unit processes / Materials production / Agricultural production means
Functional unit: In this study, the functional unit (FU) was defined as "1kg pig carcass", which included skin, bone and fat. Foreign studies generally only considered lean meat, but in China's consumption mode, skin and viscera were also fully utilized as edible foods. The concept of carcass was adopted in this study. Although the bone included in this study is an inedible part, it can play a certain compensative role because it does not contain internal organs. In addition, the current data can be easily converted into carcass weight, so it is more in line with the actual situation.
Generated by: 杨瑞, 1632707028@qq.com
Owner: 天工LCI数据工作小组
Review: Dependent internal review by 天工LCI数据工作小组
Amounts: no units in this file; such an amount is in the reference unit of its flow, which a separate flow dataset defines
copyright: false
licenseType: Free of charge for all users and uses

## General comment
在四川，农户散养提供了大约79.5%的商品猪，在四川养猪业中具有重要的地位。主要情景状态和参数设定为 ①饲料以自种玉米、蔬菜和其他农副产物为主，辅以少量浓缩饲料（豆粕70%、 菜籽粕10%），不足部分采集野草作为饲料补充。耕地面积假设为0.2067平方公顷/户。② 出栏猪数量平均3头/户，品种多数为土杂猪（地方母猪与外种猪杂交，少数为中国地方品种）屠宰率平均为70% ③饲养管理方式粗放，饲养期长，猪平均饲养240d左右,出栏重平均为100kg ④粪便处理和利用: 采用厌氧粪池存贮,80%还田,其 中48%在农忙季节直接还田,长期存贮量占32% (不定时还田)。20%粪水在粪池中或还田时渗漏,渗出水COD为50mg/L.

## Geography
粪水量数据来自对川东、川北和四川西南盆地周边区个典型性散养农户的调查

## Technology and included processes
包括原料生产、运输和养猪生产过程，但没有包括猪的屠宰、加工及包装、运输过程。没有包括养猪设备、机械和建筑方面，对小于总量5%或环境关联性小的材料进行了剔除。药品的生产、使用和污染排放没有考虑。鱼粉和氨基酸生产没考虑

## Technical purpose
本数据适用于评估四川盆周山地区农户散养养猪的环境影响。散养系统主要以自产的玉米、蔬菜和其他农副产品为饲料，辅以少量浓缩饲料，适合于研究四川省养猪业的传统粗放养殖模式，提供营养物质生产、温室气体排放和粪便管理等环境透明度信息。

## Reference product
- pig: 1; measured
  猪肉

## Inputs
- Electricity: 0.329143; calculated
  情景A(农户散养）

## Outputs
- ammonia: 0.01003; measured
  情景A(农户散养）
- nitrous oxide: 0.0002736
  情景A(农户散养）
- methane (biogenic): 0.031169; calculated
  情景A(农户散养）

## Deviations from the LCI method approaches
本研究采用LCA方法学和情景分析法相结合的方式对四川三种典型的养猪生产 情景进行系统的环境影响评估，探索这种分析方法应用于当前养猪生产环境影响评估 时的具体算法，并揭示各种养猪生产系统中的环境友好和不利方面以及其不可更新能 源利用效率。研究结果有助于对养猪业环境影响态势的认识，并为养猪可持续发展模 式的建立提供参考。

## Data selection and combination
各种情景下的养猪生产过程的污染排放清单中，主要分析粪便和尿液养分的产生量及主要的温室气体产生量，对恶臭气体、噪声和病原体的环境污染，因目前缺少其 对健康的影响潜势方面的量化数据，没有进行分析。动物生产过程的废物排放参考近年的研究文献，结合调查中收集的数据进行校正，以基本反映四川实际。其中，NH3的排放量估计是综合了多个文献的研究成果

## Data treatment and extrapolations
1）由于各地养猪模式十分复杂，无法在同类模式中取得完全一致的数据，因此根据相关文献、年鉴和设定情景间与环境污染有关的主要差异，在剔除可疑数据的基础上计算出同类情景中的平均数据。2）动物生产过程的废物排放数据来源有两类，一类是直接由调查和文献中得到，另一类是根据文献资料反推得到。为保证数据质量，对部分偏离均值较大的生产中实际产生量数据进行了试验验证和专家咨询，并通过多种途径的文献互相参照比较进行校正。

## Use advice
使用生命周期评估数据时，需调整分析工具来跟踪和汇总投入，如自种作物及副产品、浓缩饲料成分、耕地面积以及屠宰率、平均胴体重量等畜产出度量指标。粪便处理、储存和田间施用的做法需要重点关注。确保任何建模都反映了盆周山地区特有的自由放养、粗放农业风格。NH3等排放量应根据多份文献来源估算。此数据集不包括猪的屠宰、加工和运输过程，同时还应排除对环境影响较小的材料考虑。

## Review details
清单： 内部审查通过几个迭代步骤完成，涉及原始数据验证、原始数据记录、代表性、完整性、与 ISO 14040 和 14044 有关的建模的一致性。

## Data sources
- 白林. 四川养猪业清洁生产系统LCA及猪粪资源化利用关键技术研究. (四川农业大学, 2007).
