# 大黄鱼育苗;大黄鱼苗;网箱养殖;仅鲜杂鱼饲养

Dataset: ILCD process, Unit process, black box
Geography: ND-FJ-CN
Reference year: 2017
Valid until: 2018
Classification: Unit processes / Materials production / Food and renewable raw materials
Functional unit: 1 live-weight ton of large yellow croaker
LCI method principle: Attributional
LCI method approaches: Allocation - mass
Generated by: 吴康妮, wukangni@xmu.stu.edu.cn
Owner: 天工LCI数据工作小组
Review: Dependent internal review by 天工LCI数据工作小组
Amounts: no units in this file; such an amount is in the reference unit of its flow, which a separate flow dataset defines
copyright: false
licenseType: Free of charge for all users and uses

## General comment
该系统包括能源生产（红色）、饲料生产（绿色）、水产养殖生产主链（蓝色）和其他投入品的生产（紫色）。

## Geography
宁德市地级市由若干区县组成，其中福定市(a)、霞浦县(B)、福安市(C)、交城区(D)临海，纳入了我们的评估范围。2017年8月和2018年1月，我们在该地区随机抽取了321户家庭，分析了2016年期间从事海水养殖生产的292户家庭的数据。

## Time period
文献未具体说明采样时间，研究者于 2017 年 8月份和2018年1月份在宁德市沿海进行入户访谈

## Technology and included processes
大黄鱼网箱苗种培育技术，海区选择中小风浪区，低潮时水深≥8 m，潮流畅通，流速≤1.5 m/s，流向平直稳定；流速偏 大的可通过技术措施加以控制的海区也可以作为养殖区； 水质应符合 GB 11607 的规定，水温：8 ℃～31 ℃；盐度：13 ～ 35。 单个网箱面积16 m 2～100 m 2 ,网深4.0 m～8.0 m。网衣网目3 mm～15 mm，根据鱼体规格调整大小，以不逃鱼为原则。养殖饲料仅使用鲜杂鱼成分饵料。

## Technical purpose
该数据集代表使用网箱养殖方式并且仅以鲜杂鱼为饲料的大黄鱼育苗过程。这一水产养殖过程主要适用于周围宁德市区域的海水养殖设施，专注于培育高需求的海鲜产品。

## Model description
文献参考了ecoinvent数据库（v.3.5）。为了解释所研究系统的可变性，在R软件（v.3.3.2）进行了蒙特卡罗模拟，使用copula函数对 LCA 中单位过程变量之间的相关性进行建模，解决了过程变量之间的相关性。在R软件中使用蒙特卡洛模拟，每个单元过程由一组输入参数、地理位置和成长阶段的相关矩阵表征，在模拟中使用了2000次迭代，并考虑了由于固有的不确定性、分散性和不代表性而导致的单元过程的可变性。通过假设变异系数为5 %来包括固有的不确定性，价差由主要和次要数据计算，并使用谱系方法解决不代表性。通过在每次迭代中使用依赖抽样来包括过程链之间的相关性，以及过程之间的相关性

## Reference product
- Big juveniles of Large Yellow Croake: 3.5; measured
  数据来源于实际调研18户数据的平均值

## Inputs
All rows: measured
- heat: 486.7
  数据来源于实际调研18户数据的平均值
- Electricity: 1330.56
  数据来源于实际调研18户数据的平均值
- Fry feed: 1.4
  数据来源于实际调研18户数据的平均值
- Liquid Oxygen: 0.8
  数据来源于实际调研18户数据的平均值
- calcium carbonate: 14.4
  数据来源于实际调研18户数据的平均值
- chlorine: 0.01
  数据来源于实际调研18户数据的平均值
- transport in t*km: 0.7
  数据来源于实际调研18户数据的平均值

## Deviations from the LCI method approaches
整个数据分析过程中采用质量分配，遵循英国标准学会推荐的指南

## Data selection and combination
数据来源于实际调研数据的平均值

## Data treatment and extrapolations
文献研究者从调查数据和科学文献两方面构建了海水养殖生产的生命周期清单。通过收集生长阶段的主要数据和辅助数据，以模拟苗种和幼体生产等其他过程。

## Sampling procedure
在中国福建省宁德市入户调研大黄鱼养殖115户，其中18户用于此条数据的模型计算

## Use advice
在使用该数据集进行生命周期评估（LCA）时，请确保根据数据收集区域定义地理和方法学边界，包含宁德市的福定市、霞浦县、福安市和交城区。请注意，所评估的家庭具体参与了2016年的海上网箱水产养殖。该数据集应考虑所使用的特定饲料类型（鲜杂鱼）以及能源、饲料和其他输入品的生产，这些都通过颜色代码进行了区分。任何系统扩展或分配程序也应考虑当地特定的实践和抽样的292户家庭的数据。

## Review details
清单： 内部审查通过几个迭代步骤完成，涉及原始数据验证、原始数据记录、代表性、完整性、与 ISO 14040 和 14044 有关的建模的一致性。

## Data sources
- Marín, T. et al. Resource Use in Mariculture: A Case Study in Southeastern China. Sustainability 11, (2019).
