# 锂精矿生产;锂精矿;特定浓缩工艺;锂矿、碳酸钠、氢氧化钠、氧化石蜡皂

Dataset: ILCD process, Unit process, single operation
Geography: SC-CN
Classification: Materials production / Non-energetic raw materials
Functional unit: Produce 1kg of lithium concentrate
Generated by: 陈鑫, xinchen@mail.nankai.edu.cn
Owner: 天工LCI数据工作小组
Review: Dependent internal review by 天工LCI数据工作小组
Amounts: no units in this file; such an amount is in the reference unit of its flow, which a separate flow dataset defines
copyright: false
licenseType: Free of charge for all users and uses

## General comment
锂精矿是经过特定浓缩工艺的中间产品。 可由锂辉石、锂云母、含锂卤水制备。

## Geography
阿坝州安泰矿业有限公司

## Technical purpose
本数据集描述的特定浓缩工艺生产的锂精矿是电池、陶瓷、玻璃和润滑脂制造中的中间产品。它从锂辉石、锂云母和富锂卤水等来源提炼而来。这种高质量的精矿适用于高科技应用和能量存储解决方案。

## Reference product
- Lithium concentrates: 1
  研究参考四川省阿坝州安泰矿业有限公司生产数据（年产量10万吨）

## Inputs
- Oxidized Paraffin Soap: 0.0132
  研究参考四川省阿坝州安泰矿业有限公司生产数据（年产量10万吨）
- Spodumene: 5.6
  研究参考四川省阿坝州安泰矿业有限公司生产数据（年产量10万吨）
- Sodium carbonate: 0.0072
  研究参考四川省阿坝州安泰矿业有限公司生产数据（年产量10万吨）
- sodium hydroxide: 0.0054
  研究参考四川省阿坝州安泰矿业有限公司生产数据（年产量10万吨）
- Electricity: 0.14832
  研究参考四川省阿坝州安泰矿业有限公司生产数据（年产量10万吨）
- diesel: 0.0003
  研究参考四川省阿坝州安泰矿业有限公司生产数据（年产量10万吨）

## Data selection and combination
研究参考的是四川省一家年产10万吨锂精矿的锂矿企业（阿坝州安泰矿业有限公司）

## Use advice
使用本生命周期评价数据的用户应注意，数据集中详细描述的生产环境代表了阿坝州安泰矿业有限公司年产10万吨锂精矿的生产能力。根据使用的具体浓缩技术和锂矿企业的区域环境对数据进行适应性调整是相关的。在利用此数据进行环境影响评估或供应链分析时，考虑技术适应性以及其他区域或技术差异至关重要。用户还应意识到系统边界的问题，比如在比较研究中确保一致性是否包括或排除运输等方面。

## Review details
清单： 内部审查通过几个迭代步骤完成，涉及原始数据验证、原始数据记录、代表性、完整性、与 ISO 14040 和 14044 有关的建模的一致性。

## Data sources
- Feng, T., Guo, W., Li, Q., Meng, Z. & Liang, W. Life cycle assessment of lithium nickel cobalt manganese oxide batteries and lithium iron phosphate batteries for electric vehicles in China. Journal of Energy Storage52, 104767 (2022).
