# 机舱罩的制造 ; 一个1.5 MW 风轮机的机舱罩

Dataset: ILCD process, Unit process, single operation
Geography: NMG-CN
Reference year: 2017
Classification: Systems / Other machines
Functional unit: The functional unit is 1.5 MW wind turbine
LCI method principle: Attributional
LCI method approaches: Allocation
Generated by: 赵云志, ll10088@163.com
Owner: 天工LCI数据工作小组
Review: Dependent internal review by 天工LCI数据工作小组
Amounts: no units in this file; such an amount is in the reference unit of its flow, which a separate flow dataset defines
copyright: false
licenseType: Free of charge for all users and uses

## General comment
所描述的机舱罩制造过程专门用于1.5兆瓦风力涡轮机的生产，这些涡轮机是风电场的组成部分。这些风力涡轮机通过将风能转化为电能来发电，从而产生可再生能源。机舱罩用于保护涡轮机机舱内部的重要机械和电气部件，使其免受环境因素的影响。

## Geography
风电功率参数的数据来自Wang ( 2012 )。以装有33台国产1.5兆瓦( MW )风电机组的风电场为案例，分析其环境影响及其替代效应。该风电场位于我国风电装机最多的省份- -内蒙古东北部。

## Reference product
- Nacelle cover: 1; article inperiodical

## Inputs
- Fiber glass: 800; article inperiodical
  fiber glass
- Resin: 1200; article inperiodical

## Deviations from the LCI method approaches
风电的生命周期清单如下所示。生产制造阶段包括风电机组、变电站、电缆的生产，这些设备消耗大量能源，排放污染物( Xue et al . , 2015)。

## Use advice
使用此数据集时，建议用户将制造阶段的能源和材料消耗以及相关排放量整合到整个风电场的更广泛环境影响评估中。此外，应关注与风力涡轮机末端生命周期处理相关的方法学考虑，包括机舱罩的回收和处置，而且应定量分析替代效应以理解风电与传统能源相比的环境效益。

## Review details
清单： 内部审查通过几个迭代步骤完成，涉及原始数据验证、原始数据记录、代表性、完整性、与 ISO 14040 和 14044 有关的建模的一致性。

## Data sources
- Li, H., Jiang, H.-D., Dong, K.-Y., Wei, Y.-M. & Liao, H. A comparative analysis of the life cycle environmental emissions from wind and coal power: Evidence from China. Journal of Cleaner Production 248, 119192 (2020).
