# Sintering|Sinter|Sintering

Dataset: ILCD process, Unit process, single operation
Geography: CN
Classification: Materials production / Other mineralic materials
Generated by: Fuxiang, 1162850692@qq.com
Review: Dependent internal review by Tiangong LCI Data Working Group
Amounts: no units in this file; such an amount is in the reference unit of its flow, which a separate flow dataset defines
copyright: false

## Geography
The data of the BF-BOF pathway were obtained from the large-scale integrated steel plants in China with an attached coking plant and EAF plant.

## Reference product
- Sinter: 1164.4; measured

## Inputs
All rows: measured
- Coke breeze: 48.9
- Iron ore: 237
  Iron ore (Domestic)
- Iron ore: 655.3
  Iron ore (Import)
- dolomite: 8.7
- quicklime: 49.6
  Quicklime
- Water (fresh water): 100
- Coke oven gas: 15.4
  COG
- Linz-Donawitz gas: 3
  LDG
- anthracite: 37.4
  Anthracite
- Electricity: 329.4

## Review details
Inventory: The internal review was done by several iteration steps concerning raw data validation, raw data documentation, representativity, completeness and consistency of modelling with regard to ISO 14040 and 14044.; Documentation: The review of the documentation was performed by Ecobilan and is in compliance with ISO 14040 and 14044. The data set documentation is correct in view of the appropriateness of the information provided. It includes all relevant information in view of data quality and scope of application of the respective LCI result.

## Data sources
- The carbon reduction potential of hydrogen in the low carbon transition of the iron and steel industry: The case of China
