# 直接还原铁生产;直接还原铁;氢气+天然气直接还原

Dataset: ILCD process, Unit process, single operation
Geography: CN
Classification: Energy carriers and technologies / Other non-renewable fuels
Generated by: 付翔, 1162850692@qq.com
Owner: 天工LCI数据工作小组
Review: Dependent internal review by 天工LCI数据工作小组
Amounts: no units in this file; such an amount is in the reference unit of its flow, which a separate flow dataset defines
copyright: false
licenseType: Free of charge for all users and uses

## General comment
使用氢气和天然气组合的直接还原铁（DRI）生产过程旨在生产后续钢铁制造过程中使用的铁原料。这种方法在寻求减少碳排放的操作中尤为相关，因为与传统的基于煤炭的还原方法相比，氢气可能会降低碳足迹。此过程适用于有天然气和氢基础设施的地区，并旨在满足随后的钢铁制造阶段所需的技术规格。

## Geography
The average operating data of Coal-DR, NG-DR (MID), and NG-DR (ENE) demonstration projects in China are used as the benchmark for the LCI of DR routes.

## Reference product
- Direct Reduced Iron: 1000; calculated
  DRI

## Inputs
All rows: calculated
- Pellet: 1357.3
  Pellets
- Water (fresh water): 900
  The average operating data of Coal-DR, NG-DR (MID), and NG-DR (ENE) demonstration projects in China are used as the benchmark for the LCI of DR routes. LCI of COG-DR and H-DR routes, which is not scaled-up in China are estimated based on Coal-DR routes combined with literature data from simulations, laboratory tests, and process modeling in
- oxygen: 25
  (same comment as for Water (fresh water))
- Natural gas, at consumer EU-27: 215
  (same comment as for Water (fresh water))
- hydrogen: 270
  (same comment as for Water (fresh water))
- Electricity: 488.16
  (same comment as for Water (fresh water))

## Outputs
- Dust (unspecified, from stack): 0.1; calculated
  (same comment as for Water (fresh water))
- carbon dioxide: 235; calculated
  (same comment as for Water (fresh water))

## Data treatment and extrapolations
LCI of COG-DR and H-DR routes, which is not scaled-up in China are estimated based on Coal-DR routes combined with literature data from simulations, laboratory tests, and process modeling in Table 9 [49,50]. The LCI of Coal-DR is obtai

## Use advice
在使用氢气和天然气直接还原铁（DRI）生产的生命周期清单（LCI）数据时，用户应考虑数据的区域背景—具体来说，就是来自中国示范项目的平均运行数据。由于中国的COG-DR和H-DR路线的LCI是估算而非直接测量得出的，应谨慎对待。用户应仔细阅读来自模拟、实验室测试和过程建模的文献数据（参考表9 [49,50]）以了解估计的假设和条件。当将结果外推至不同的技术或地理背景时，这一点尤其重要。此外，任何生命周期评价模型都应反映这些DRI路线在使用阶段的特定行为以及环境性能上的潜在差异。

## Review details
清单： 内部审查通过几个迭代步骤完成，涉及原始数据验证、原始数据记录、代表性、完整性、与 ISO 14040 和 14044 有关的建模的一致性。

## Data sources
- The carbon reduction potential of hydrogen in the low carbon transition of the iron and steel industry: The case of China
