# 市政污水处理;污水;厌氧-缺氧-好氧（A2/O）

Dataset: ILCD process, Unit process, single operation
Geography: CN
Classification: Unit processes / End-of-life treatment / Waste water treatment
Generated by: 于晨阳, yuchenyang0506@foxmail.com
Owner: 天工LCI数据工作小组
Review: Dependent internal review by 天工LCI数据工作小组
Amounts: no units in this file; such an amount is in the reference unit of its flow, which a separate flow dataset defines
copyright: ['opt4ROkqig']
licenseType: Free of charge for all users and uses

## General comment
厌氧-缺氧-好氧（A2/O）工艺是一种常用的生物处理技术，用于废水处理。该工艺将处理过程分为三个阶段：厌氧、缺氧和好氧。在厌氧阶段，有机物质被微生物在无氧条件下部分降解。然后，在缺氧环境下，氮气被释放并进行硝化作用。最后，在好氧条件下，微生物进一步氧化有机物并脱除氮气和磷酸盐。A2/O工艺能够高效地去除有机物、氮和磷，是一种广泛应用于城市和工业污水处理的成熟技术，具有较高的处理效率和较低的能耗。

## Geography
17 WWTPs in China

## Technology and included processes
厌氧/缺氧/好氧（A2O）工艺首先通过厌氧阶段将有机物质部分降解，然后在缺氧条件下进行氮气释放和硝化作用，最后在好氧条件下进一步氧化有机物质和进行氮磷去除。这一系列步骤通过控制不同的反应条件，使废水中的有机物、氮和磷得到高效处理，完成废水的净化。

## Technical purpose
该数据集描述了在中国的17个污水处理厂（WWTPs）中采用的A2/O工艺进行城市污水处理。A2/O工艺融合了厌氧、缺氧和好氧阶段，旨在有效降低在排放回环境之前，污水中的有机污染物、氮和磷的含量。这种系统通常应用于城市环境中，需要处理来自居住、商业和工业来源的大量污水和废水。

## Reference product
- Wastewater: 1; input; measured

## Inputs
- Electricity: 1.404; measured
- methanol: 0.062; measured
- Polyacrylamide: 0.06164; measured
- Polyaluminium Chloride: 0.11; measured

## Outputs
All rows: measured
- chemical oxygen demand: 0.02032
- biological oxygen demand: 0.00158
- ammonia: 0.00028
- nitrogen, total (excluding N2): 0.00973
- phosphorus, total: 0.00013
- Suspended solids, unspecified,Suspended solids, unspecified,Suspended solids, unspecified: 0.00388
- methane (biogenic),methane (biogenic): 0.01158
  原文未区分biogenic和fossil，根据专家判断此处为biogenic。
- nitrous oxide: 0.00034

## Use advice
使用该数据集的用户应注意，它代表了中国17个不同污水处理厂中A2/O市政污水处理过程的性能，因此，可能对于具有不同污水特性和监管框架的区域适用性有限。为了准确使用这些数据，用户应确保所应用数据的污水特性与数据集中A2/O过程所处理的污水特性密切匹配。此外，在模拟污水处理的环境影响时，用户应考虑A2/O工艺的具体技术设置及其运行参数，因为它可能因设施而异。

## Review details
清单： 内部审查通过几个迭代步骤完成，涉及原始数据验证、原始数据记录、代表性、完整性、与 ISO 14040 和 14044 有关的建模的一致性。

## Data sources
- Chen, W., Zhang, Q., Hu, L., Geng, Y. & Liu, C. Understanding the greenhouse gas emissions from China’s wastewater treatment plants: Based on life cycle assessment coupled with statistical data. Ecotoxicology and environmental safety 259, 115007 (2023).
