# clinker production|clinker|new dry process, 5000 t/d

Dataset: ILCD process, Unit process, black box
Geography: GD-CN
Reference year: 2009
Classification: Materials production / Other mineralic materials
Generated by: Siqi Yang
Amounts: no units in this file; such an amount is in the reference unit of its flow, which a separate flow dataset defines
copyright: false

## General comment
A new type of dry production process for cement clinker. The average records of raw material consumption and energy consumption are kept.

## Geography
Guangzhou Zhujiang Cement Plant

## Model description
Production of 1 ton of clinker is defined as 1 functional unit. The starting point of the lifecycle is set as the entry of raw materials into the plant, and the endpoint is set as the clinker burning stage.

## Reference product
- clinker: 1000
  Clinker

## Inputs
All rows: measured
- limestone, crushed, for mill: 1300
  Limestone
- clay: 100
  Clay
- gypsum (desulphurized): 70
  Gupsum
- iron ore: 21
  Iron ore
- hard coal, run-of-mine: 110
  Coal
- electricity, medium voltage: 378
  Electricity

## Outputs
- carbon dioxide (fossil): 277; calculated
  CO2 (fossil fuel burning)
- carbon dioxide: 647; calculated
  CO2 (limestone decomposition)
- sulfur dioxide: 0.31; measured
  SO2
- Nitrogen oxides: 1.88; measured
  NOx
- particles (> PM10): 0.025; measured
  Dust, with an unspecified particle size, is treated as PM > 10 micrometers in diameter.

## Data sources
- 周奇, 黄启飞, 王琪, & 李丽. (2009). 废皮革水泥窑共处置生命周期评价. 环境科学研究, 22(4), 506–510.
