# Electricity production ; Electricity ; Thermal power (58.6%) + hydropower (34.9%) + wind power (4.8%) + solar power (1.7%)

Dataset: ILCD process, Partly terminated system
Geography: HUN-CN
Reference year: 2019
Classification: Energy carriers and technologies / Electricity
LCI method principle: Other
Generated by: Ruoxi Xiong, xiongrx0126@163.com
Owner: Tiangong LCI Data Working Group
Review: Dependent internal review by Tiangong LCI Data Working Group
Amounts: no units in this file; such an amount is in the reference unit of its flow, which a separate flow dataset defines
copyright: false
licenseType: Free of charge for all users and uses

## General comment
Forms of electricity generation include thermal power, hydropower, wind power and solar power

## Time period
Calculated based on data from the 2019 Energy Statistics Yearbook

## Technical purpose
The industrial process described is used for the production of electricity through a mix of sources: thermal power (58.6%), hydropower (34.9%), wind power (4.8%), and solar power (1.7%). This electricity is utilized for a wide range of applications including residential, commercial, industrial, and transportation sectors, depending on the electrical grid and distribution systems in place.

## Reference product
- Electricity: 3.6; calculated

## Outputs
- carbon dioxide: 0.482; calculated
- sulfur dioxide: 8.1e-5; calculated
- Nitrogen oxides: 0.000129406; calculated
- Dust (unspecified, from stack): 1.7427e-5; calculated

## Data treatment and extrapolations
For the accounting method, please refer to the "Enterprise Greenhouse Gas Emissions Accounting Methods and Reporting Guidelines for Power Generation Facilities". Different forms of power generation and fuel consumption come from Chapter 3 (Energy Production) and Chapter 6 (Regional Energy Balance Sheet) in the "China Energy Statistical Yearbook 2020". The fuel parameters such as low calorific value and carbon content per unit calorific value used to calculate the carbon dioxide emission factor come from the "2019 China Regional Power Grid Carbon Dioxide Baseline Emission Factor Calculation Instructions OM" and the "Enterprise Greenhouse Gas Emission Accounting Method and Reporting Guide for Power Generation Facilities" 》

## Use advice
When utilizing the dataset, it is necessary to ensure that the carbon emission factor is applied correctly for the indicated types of power generation. The calculation should reference the methodological guidelines provided by the 'Enterprise Greenhouse Gas Emissions Accounting Methods and Reporting Guidelines for Power Generation Facilities'. It is important to account for regional variations and specific years of statistical data as indicated by the 2020 China Energy Statistical Yearbook. Users must consider the technological relevance of this dataset to their specific applications and ensure appropriate modeling of use phase behavior for each type of power generation.

## Review details
Inventory: The internal review was done by several iteration steps concerning raw data validation, raw data documentation, representativity, completeness and consistency of modelling with regard to ISO 14040 and 14044.

## Data sources
- 熊若熙. 中国电力生产和消费二氧化碳与污染物排放因子核算. (清华大学, 2023).
