# East China (Hentai) Corn Production | Corn Cultivation (N2)

Dataset: ILCD process
Geography: ZB-SD-CN
Reference year: 2003
Valid until: 2004
Classification: Materials production / Other mineralic materials
Functional unit: 1t
Generated by: Haoran Zhang, hrzhang@whu.edu.cn
Review: Dependent internal review by Tiangong LCI Data Working Group
Amounts: no units in this file; such an amount is in the reference unit of its flow, which a separate flow dataset defines
copyright: false

## Geography
Hengtai County

## Reference product
- maize: 1000

## Outputs
All rows: article inperiodical
- water: 244
  N2
- carbon monoxide: 0.31
  N2
- Nitrogen oxides: 0.26, 2.81 (2 entries)
  N2
- carbon dioxide (fossil): 1244.75
  N2
- methane (fossil): 1.05
  N2
- sulfur dioxide: 2.83
  N2
- ammonia: 3.5
  N2
- nitrate: 3.64
  N2
- ammonium: 0.6
  N2
- nitrogen, total (excluding N2): 0.05
  N2
- phosphorus, total: 0.04
  N2
- chemical oxygen demand: 0.44
  N2

## Deviations from the LCI method approaches
The study starts from the mining of ores and energy related to the life cycle of summer maize. The termination boundary is the output of pollutants and agricultural products during crop planting management."

"The accounting system boundary i

## Data selection and combination
The energy and water consumption in the raw material and agricultural input stages are based on the 'China Statistical Yearbook' (2005-2008), 'China Environmental Yearbook' (2004-2006), and 'China Energy Statistical Yearbook' (2004-2006). The data related to the planting stage comes from field records. Main atmospheric pollutants and water pollutants include SO2, CH4, CO2, CO, N2O, COD, NH3, and NOx, etc. The emission coefficients come from domestic publicly published literature

## Data treatment and extrapolations
Divided into three steps: characterization, normalization, and weighted assessment."

## Sampling procedure
Four nitrogen application treatments from the fertilizer experiment of summer maize in 2003-2004 at the Shandong Hantai Experimental Station of China Agricultural University were selected as typical research subjects. The four nitrogen fertilizer application rates were 0, 100, 200, 300 kg·hm-2·a-1, represented as N0, N1, N2, N3 respectively.

## Review details
Inventory: The internal review was done by several iteration steps concerning raw data validation, raw data documentation, representativity, completeness and consistency of modelling with regard to ISO 14040 and 14044.; Documentation: The review of the documentation was performed by Ecobilan and is in compliance with ISO 14040 and 14044. The data set documentation is correct in view of the appropriateness of the information provided. It includes all relevant information in view of data quality and scope of application of the respective LCI result.

## Data sources
- 王明新吴文良夏训峰．2010．华北高产粮区夏玉米生命周期环境影响评价［Ｊ］．环境科学学报30（6）：1339—1344
