# 烧结矿生产;烧结矿;烧结（Z11）

Dataset: ILCD process, Unit process, single operation
Geography: CN
Reference year: 1998
Classification: Materials production / Other mineralic materials
Generated by: 付翔, 1162850692@qq.com
Owner: 天工LCI数据工作小组
Review: Dependent internal review by 天工LCI数据工作小组
Amounts: no units in this file; such an amount is in the reference unit of its flow, which a separate flow dataset defines
copyright: false
licenseType: Free of charge for all users and uses

## General comment
来自表 4-15 Z11 钢厂生产吨材环境负荷编目表

## Time period
论文提到钢铁企业环境总体数据为1998年的吨钢环境基础数据。

## Technical purpose
烧结矿生产过程通常用于钢铁工业，用于生产烧结矿，这是制造钢铁所必需的重要原料。该过程涉及将铁矿石粉末与助熔剂和焦炭细粒团聚成适用于高炉的较大颗粒。

## Reference product
- Sinter: 1906.46; measured
  烧结矿

## Inputs
- Energy, geothermal, converted: 4314.28; measured
- water: 12487; measured
- Refined Iron Ore: 1456.88; measured
  精选矿

## Outputs
All rows: measured
- Dust (unspecified, from stack): 3.233
  烟尘
- Dust (unspecified, from stack): 1.46
- sulfur dioxide: 1.131
- Suspended solids, unspecified: 0.636758
- chemical oxygen demand: 0.100242
- Dust (unspecified, from stack): 72.236
  集尘
- Spoil (deposited, hibernating in ground, non elementary flow): 72.445

## Use advice
在使用烧结矿生产数据集进行生命周期评估时，重要的是确保数据准确对应于被评估设施的具体技术规格和操作实践。注意区域差异、时间相关性（此处数据代表1998年）以及与您研究的目标和范围的方法论一致性。如果必要，考虑更新数据以反映技术进步和当前的环境性能。

## Review details
清单： 内部审查通过几个迭代步骤完成，涉及原始数据验证、原始数据记录、代表性、完整性、与 ISO 14040 和 14044 有关的建模的一致性。

## Data sources
- 周和敏. 钢铁材料生产过程环境协调性评价研究. (北京工业大学, 2001).
