# Soil remediation ; In-situ remediation ; Enhanced bioremediation ; Equipment operation ; Heating & Cooling

Dataset: ILCD process, Unit process, single operation
Geography: SH-CN
Classification: Other Services / Repair and maintenance
Generated by: Xiao Meng, xiaomeng@mail
Owner: Tiangong LCI Data Working Group
Review: Dependent internal review by Tiangong LCI Data Working Group
Amounts: no units in this file; such an amount is in the reference unit of its flow, which a separate flow dataset defines
licenseType: Free of charge for all users and uses

## General comment
CHC+ISB is used for site remediation, and during the equipment operation phase, the heating and cooling process takes place.

## Geography
The aquifer in a certain area in Shanghai, China, is uniformly contaminated with chlorinated volatile organic compounds (CVOCs), with a surface area of 20,000 m2 and a depth of 50 m, with the water table located at a depth of 30 m.

## Technical purpose
CHC+ISB process, as described, is utilized for in-situ soil and groundwater remediation at sites contaminated with chlorinated volatile organic compounds (CVOCs). It is specifically applied in environmental engineering projects aiming to decontaminate aquifers. The process entails using equipment to regulate temperature through heating and cooling to enhance microbial degradation of pollutants in the soil. This technique is appropriate for large-scale remediation efforts such as the 20,000 m2 area at a depth of 50 m, with water table at 30 m depth, in Shanghai, China.

## Reference product
- Cooling groundwater: 600000; measured
  加热冷却后的污染地下水

## Inputs
- Electricity: 1.5552e8; software or database

## Use advice
When utilizing this data for the CHC+ISB in-situ remediation process, ensure that the scope of the LCA includes the full lifecycle of the remediation project, including equipment manufacturing, operation, and decommissioning. Considerations should include the specific energy consumption and emissions during the heating and cooling phases. The data is specific to the context of an aquifer in Shanghai with defined dimensions and contamination levels; adjustments may be necessary for applications in different contexts or with different CVOC concentration profiles. It is imperative to include in the LCA model the possible environmental impacts of the temperature regulation on the aquifer's ecosystem.

## Review details
Inventory: The internal review was done by several iteration steps concerning raw data validation, raw data documentation, representativity, completeness and consistency of modelling with regard to ISO 14040 and 14044.

## Data sources
- Ni, Z. et al. Comparative Life-Cycle Assessment of Aquifer Thermal Energy Storage Integrated with in Situ Bioremediation of Chlorinated Volatile Organic Compounds. Environ. Sci. Technol. 54, 3039–3049 (2020).
