# Electricity/electricalenergy+heatenergy|Coal|Layerburningfurnace|less than or equal to8 MW / 电能/电能+热能|煤炭|层燃炉|小于等于8兆瓦

Dataset: ILCD process, Unit process, single operation
Geography: CN
Reference year: 2019
Classification: Energy carriers and technologies / Heat and steam
Generated by: The data was created by the Office of the Second National Pollution Source Census of the Ministry of Ecology and Environment, and the data was organized by the TianGong Plan team for ILCD format / 生态环境部第二次全国污染源普查工作办公室创建数据，天工计划团队常慧敏整理数据为ILCD格式
Owner: Tiangong LCI Data Working Group / 天工LCI数据工作小组
Review: Dependent internal review by Tiangong LCI Data Working Group / 天工LCI数据工作小组
Amounts: no units in this file; such an amount is in the reference unit of its flow, which a separate flow dataset defines
copyright: false
licenseType: Free of charge for all users and uses

## General comment
the Technical of end-of-pipe management technology for pollution volatile organic compoundis/

## Reference product
- Coal: 1000; input; calculated
  源文件中描述为为煤炭，此处对其进行了匹配工作，将其匹配到LCAflow库里面相最符合的流，污染物指标备注为工业废气量（烟煤）

## Outputs
All rows: calculated
- Exhaust gas: 10290
  污染物指标工业废气量（烟煤）的末端治理技术是其他（直排）。原文件中描述污染物类别为废气，污染物指标为工业废气量（烟煤），此处对其进行了匹配工作，将其匹配到LCAflow库里面相最符合的流，污染物指标备注为工业废气量（烟煤）
- Exhaust gas: 10197
  污染物指标工业废气量（无烟煤）的末端治理技术是其他（直排）。原文件中描述污染物类别为废气，污染物指标为工业废气量（无烟煤），此处对其进行了匹配工作，将其匹配到LCAflow库里面相最符合的流，污染物指标备注为工业废气量（无烟煤）
- Exhaust gas: 5915
  污染物指标工业废气量（褐煤）的末端治理技术是其他（直排）。原文件中描述污染物类别为废气，污染物指标为工业废气量（褐煤），此处对其进行了匹配工作，将其匹配到LCAflow库里面相最符合的流，污染物指标备注为工业废气量（褐煤）
- particles (PM2.5 - PM10): nan
  污染物指标颗粒物（烟煤）的末端治理技术是静电除尘，其效率为0.049Aar+97.75，末端治理设施实际运行率（k值）计算公式为除尘设施年实际运行小时数/机组年实际运行小时数。原文件中描述污染物类别为废气，污染物指标为颗粒物（烟煤），此处对其进行了匹配工作，将其匹配到LCAflow库里面相最符合的流，污染物指标备注为颗粒物（烟煤）
- particles (PM2.5 - PM10): nan
  污染物指标颗粒物（烟煤）的末端治理技术是电袋组合，其效率为0.0465Aar+98.0，末端治理设施实际运行率（k值）计算公式为除尘设施年实际运行小时数/机组年实际运行小时数。原文件中描述污染物类别为废气，污染物指标为颗粒物（烟煤），此处对其进行了匹配工作，将其匹配到LCAflow库里面相最符合的流，污染物指标备注为颗粒物（烟煤）
- particles (PM2.5 - PM10): nan
  污染物指标颗粒物（烟煤）的末端治理技术是袋式除尘，其效率为0.044Aar+98.1，末端治理设施实际运行率（k值）计算公式为除尘设施年实际运行小时数/机组年实际运行小时数。原文件中描述污染物类别为废气，污染物指标为颗粒物（烟煤），此处对其进行了匹配工作，将其匹配到LCAflow库里面相最符合的流，污染物指标备注为颗粒物（烟煤）
- particles (PM2.5 - PM10): nan
  污染物指标颗粒物（烟煤）的末端治理技术是高效静电除尘①，其效率为0.0098Aar+99.55，末端治理设施实际运行率（k值）计算公式为除尘设施年实际运行小时数/机组年实际运行小时数，①高效颗粒物末端治理技术：采取高效电源供电、低低温电除尘、超净电袋、高效袋式除尘、湿法脱硫协同、湿式电除尘等技术，满足《燃煤电厂超低排放烟气
  治理工程技术规范》（HJ2053-2220）相关要求。
  。原文件中描述污染物类别为废气，污染物指标为颗粒物（烟煤），此处对其进行了匹配工作，将其匹配到LCAflow库里面相最符合的流，污染物指标备注为颗粒物（烟煤）
- particles (PM2.5 - PM10): nan
  污染物指标颗粒物（烟煤）的末端治理技术是高效电袋组合①，其效率为0.0093Aar+99.6，末端治理设施实际运行率（k值）计算公式为除尘设施年实际运行小时数/机组年实际运行小时数，①高效颗粒物末端治理技术：采取高效电源供电、低低温电除尘、超净电袋、高效袋式除尘、湿法脱硫协同、湿式电除尘等技术，满足《燃煤电厂超低排放烟气
  治理工程技术规范》（HJ2053-2221）相关要求。
  。原文件中描述污染物类别为废气，污染物指标为颗粒物（烟煤），此处对其进行了匹配工作，将其匹配到LCAflow库里面相最符合的流，污染物指标备注为颗粒物（烟煤）
- particles (PM2.5 - PM10): nan
  污染物指标颗粒物（烟煤）的末端治理技术是高效袋式除尘①，其效率为0.0088Aar+99.62，末端治理设施实际运行率（k值）计算公式为除尘设施年实际运行小时数/机组年实际运行小时数，①高效颗粒物末端治理技术：采取高效电源供电、低低温电除尘、超净电袋、高效袋式除尘、湿法脱硫协同、湿式电除尘等技术，满足《燃煤电厂超低排放烟气
  治理工程技术规范》（HJ2053-2222）相关要求。
  。原文件中描述污染物类别为废气，污染物指标为颗粒物（烟煤），此处对其进行了匹配工作，将其匹配到LCAflow库里面相最符合的流，污染物指标备注为颗粒物（烟煤）
- particles (PM2.5 - PM10): nan
  污染物指标颗粒物（烟煤）的末端治理技术是高效静电除尘+其他（湿法脱硫协同）①，其效率为0.00392Aar+99.82，末端治理设施实际运行率（k值）计算公式为除尘设施年实际运行小时数/机组年实际运行小时数，①高效颗粒物末端治理技术：采取高效电源供电、低低温电除尘、超净电袋、高效袋式除尘、湿法脱硫协同、湿式电除尘等技术，满足《燃煤电厂超低排放烟气
  治理工程技术规范》（HJ2053-2223）相关要求。
  。原文件中描述污染物类别为废气，污染物指标为颗粒物（烟煤），此处对其进行了匹配工作，将其匹配到LCAflow库里面相最符合的流，污染物指标备注为颗粒物（烟煤）
- particles (PM2.5 - PM10): nan
  污染物指标颗粒物（烟煤）的末端治理技术是高效电袋组合+其他（湿法脱硫协同）①，其效率为0.00372Aar+99.84，末端治理设施实际运行率（k值）计算公式为除尘设施年实际运行小时数/机组年实际运行小时数，①高效颗粒物末端治理技术：采取高效电源供电、低低温电除尘、超净电袋、高效袋式除尘、湿法脱硫协同、湿式电除尘等技术，满足《燃煤电厂超低排放烟气
  治理工程技术规范》（HJ2053-2224）相关要求。
  。原文件中描述污染物类别为废气，污染物指标为颗粒物（烟煤），此处对其进行了匹配工作，将其匹配到LCAflow库里面相最符合的流，污染物指标备注为颗粒物（烟煤）
- particles (PM2.5 - PM10): nan
  污染物指标颗粒物（烟煤）的末端治理技术是高效袋式除尘+其他（湿法脱硫协同）①，其效率为0.00352Aar+99.848，末端治理设施实际运行率（k值）计算公式为除尘设施年实际运行小时数/机组年实际运行小时数，①高效颗粒物末端治理技术：采取高效电源供电、低低温电除尘、超净电袋、高效袋式除尘、湿法脱硫协同、湿式电除尘等技术，满足《燃煤电厂超低排放烟气
  治理工程技术规范》（HJ2053-2225）相关要求。
  。原文件中描述污染物类别为废气，污染物指标为颗粒物（烟煤），此处对其进行了匹配工作，将其匹配到LCAflow库里面相最符合的流，污染物指标备注为颗粒物（烟煤）
- particles (PM2.5 - PM10): nan
  污染物指标颗粒物（烟煤）的末端治理技术是高效静电除尘+其他（湿式电除尘）①，其效率为0.00196Aar+99.91，末端治理设施实际运行率（k值）计算公式为除尘设施年实际运行小时数/机组年实际运行小时数，①高效颗粒物末端治理技术：采取高效电源供电、低低温电除尘、超净电袋、高效袋式除尘、湿法脱硫协同、湿式电除尘等技术，满足《燃煤电厂超低排放烟气
  治理工程技术规范》（HJ2053-2226）相关要求。
  。原文件中描述污染物类别为废气，污染物指标为颗粒物（烟煤），此处对其进行了匹配工作，将其匹配到LCAflow库里面相最符合的流，污染物指标备注为颗粒物（烟煤）
- particles (PM2.5 - PM10): nan
  污染物指标颗粒物（烟煤）的末端治理技术是高效电袋组合+其他（湿式电除尘）①，其效率为0.00186Aar+99.92，末端治理设施实际运行率（k值）计算公式为除尘设施年实际运行小时数/机组年实际运行小时数，①高效颗粒物末端治理技术：采取高效电源供电、低低温电除尘、超净电袋、高效袋式除尘、湿法脱硫协同、湿式电除尘等技术，满足《燃煤电厂超低排放烟气
  治理工程技术规范》（HJ2053-2227）相关要求。
  。原文件中描述污染物类别为废气，污染物指标为颗粒物（烟煤），此处对其进行了匹配工作，将其匹配到LCAflow库里面相最符合的流，污染物指标备注为颗粒物（烟煤）
- particles (PM2.5 - PM10): nan
  污染物指标颗粒物（烟煤）的末端治理技术是高效袋式除尘+其他（湿式电除尘）①，其效率为0.00176Aar+99.924，末端治理设施实际运行率（k值）计算公式为除尘设施年实际运行小时数/机组年实际运行小时数，①高效颗粒物末端治理技术：采取高效电源供电、低低温电除尘、超净电袋、高效袋式除尘、湿法脱硫协同、湿式电除尘等技术，满足《燃煤电厂超低排放烟气
  治理工程技术规范》（HJ2053-2228）相关要求。
  。原文件中描述污染物类别为废气，污染物指标为颗粒物（烟煤），此处对其进行了匹配工作，将其匹配到LCAflow库里面相最符合的流，污染物指标备注为颗粒物（烟煤）
- particles (PM2.5 - PM10): nan
  污染物指标颗粒物（烟煤）的末端治理技术是高效静电除尘+其他（湿法脱硫协同）+其他（湿式电除尘）①，其效率为0.000784Aar+99.964，末端治理设施实际运行率（k值）计算公式为除尘设施年实际运行小时数/机组年实际运行小时数，①高效颗粒物末端治理技术：采取高效电源供电、低低温电除尘、超净电袋、高效袋式除尘、湿法脱硫协同、湿式电除尘等技术，满足《燃煤电厂超低排放烟气
  治理工程技术规范》（HJ2053-2229）相关要求。
  。原文件中描述污染物类别为废气，污染物指标为颗粒物（烟煤），此处对其进行了匹配工作，将其匹配到LCAflow库里面相最符合的流，污染物指标备注为颗粒物（烟煤）
- particles (PM2.5 - PM10): nan
  污染物指标颗粒物（烟煤）的末端治理技术是高效电袋组合+其他（湿法脱硫协同）+其他（湿式电除尘）①，其效率为0.000744Aar+99.968，末端治理设施实际运行率（k值）计算公式为除尘设施年实际运行小时数/机组年实际运行小时数，①高效颗粒物末端治理技术：采取高效电源供电、低低温电除尘、超净电袋、高效袋式除尘、湿法脱硫协同、湿式电除尘等技术，满足《燃煤电厂超低排放烟气
  治理工程技术规范》（HJ2053-2230）相关要求。
  。原文件中描述污染物类别为废气，污染物指标为颗粒物（烟煤），此处对其进行了匹配工作，将其匹配到LCAflow库里面相最符合的流，污染物指标备注为颗粒物（烟煤）
- particles (PM2.5 - PM10): nan
  污染物指标颗粒物（烟煤）的末端治理技术是高效袋式除尘+其他（湿法脱硫协同）+其他（湿式电除尘）①，其效率为0.000704Aar+99.9696，末端治理设施实际运行率（k值）计算公式为除尘设施年实际运行小时数/机组年实际运行小时数，①高效颗粒物末端治理技术：采取高效电源供电、低低温电除尘、超净电袋、高效袋式除尘、湿法脱硫协同、湿式电除尘等技术，满足《燃煤电厂超低排放烟气
  治理工程技术规范》（HJ2053-2231）相关要求。
  。原文件中描述污染物类别为废气，污染物指标为颗粒物（烟煤），此处对其进行了匹配工作，将其匹配到LCAflow库里面相最符合的流，污染物指标备注为颗粒物（烟煤）
- particles (PM2.5 - PM10): nan
  污染物指标颗粒物（烟煤）的末端治理技术是静电除尘+其他（湿法脱硫协同），其效率为0.0196Aar+99.10，末端治理设施实际运行率（k值）计算公式为除尘设施年实际运行小时数/机组年实际运行小时数。原文件中描述污染物类别为废气，污染物指标为颗粒物（烟煤），此处对其进行了匹配工作，将其匹配到LCAflow库里面相最符合的流，污染物指标备注为颗粒物（烟煤）
- particles (PM2.5 - PM10): nan
  污染物指标颗粒物（烟煤）的末端治理技术是电袋组合+其他（湿法脱硫协同），其效率为0.0186Aar+99.20，末端治理设施实际运行率（k值）计算公式为除尘设施年实际运行小时数/机组年实际运行小时数。原文件中描述污染物类别为废气，污染物指标为颗粒物（烟煤），此处对其进行了匹配工作，将其匹配到LCAflow库里面相最符合的流，污染物指标备注为颗粒物（烟煤）
- particles (PM2.5 - PM10): nan
  污染物指标颗粒物（烟煤）的末端治理技术是袋式除尘+其他（湿法脱硫协同），其效率为0.0176Aar+99.24，末端治理设施实际运行率（k值）计算公式为除尘设施年实际运行小时数/机组年实际运行小时数。原文件中描述污染物类别为废气，污染物指标为颗粒物（烟煤），此处对其进行了匹配工作，将其匹配到LCAflow库里面相最符合的流，污染物指标备注为颗粒物（烟煤）
- particles (PM2.5 - PM10): nan
  污染物指标颗粒物（烟煤）的末端治理技术是静电除尘+其他（湿式电除尘），其效率为0.0098Aar+99.55，末端治理设施实际运行率（k值）计算公式为除尘设施年实际运行小时数/机组年实际运行小时数。原文件中描述污染物类别为废气，污染物指标为颗粒物（烟煤），此处对其进行了匹配工作，将其匹配到LCAflow库里面相最符合的流，污染物指标备注为颗粒物（烟煤）
- particles (PM2.5 - PM10): nan
  污染物指标颗粒物（烟煤）的末端治理技术是电袋组合+其他（湿式电除尘），其效率为0.0093Aar+99.60，末端治理设施实际运行率（k值）计算公式为除尘设施年实际运行小时数/机组年实际运行小时数。原文件中描述污染物类别为废气，污染物指标为颗粒物（烟煤），此处对其进行了匹配工作，将其匹配到LCAflow库里面相最符合的流，污染物指标备注为颗粒物（烟煤）
- particles (PM2.5 - PM10): nan
  污染物指标颗粒物（烟煤）的末端治理技术是袋式除尘+其他（湿式电除尘），其效率为0.0088Aar+99.62，末端治理设施实际运行率（k值）计算公式为除尘设施年实际运行小时数/机组年实际运行小时数。原文件中描述污染物类别为废气，污染物指标为颗粒物（烟煤），此处对其进行了匹配工作，将其匹配到LCAflow库里面相最符合的流，污染物指标备注为颗粒物（烟煤）
- particles (PM2.5 - PM10): nan
  污染物指标颗粒物（烟煤）的末端治理技术是静电除尘+其他（湿法脱硫协同）+其他（湿式电除尘），其效率为0.00392Aar+99.82，末端治理设施实际运行率（k值）计算公式为除尘设施年实际运行小时数/机组年实际运行小时数。原文件中描述污染物类别为废气，污染物指标为颗粒物（烟煤），此处对其进行了匹配工作，将其匹配到LCAflow库里面相最符合的流，污染物指标备注为颗粒物（烟煤）
- particles (PM2.5 - PM10): nan
  污染物指标颗粒物（烟煤）的末端治理技术是电袋组合+其他（湿法脱硫协同）+其他（湿式电除尘），其效率为0.00372Aar+99.84，末端治理设施实际运行率（k值）计算公式为除尘设施年实际运行小时数/机组年实际运行小时数。原文件中描述污染物类别为废气，污染物指标为颗粒物（烟煤），此处对其进行了匹配工作，将其匹配到LCAflow库里面相最符合的流，污染物指标备注为颗粒物（烟煤）
- particles (PM2.5 - PM10): nan
  污染物指标颗粒物（烟煤）的末端治理技术是袋式除尘+其他（湿法脱硫协同）+其他（湿式电除尘），其效率为0.00352Aar+99.848，末端治理设施实际运行率（k值）计算公式为除尘设施年实际运行小时数/机组年实际运行小时数。原文件中描述污染物类别为废气，污染物指标为颗粒物（烟煤），此处对其进行了匹配工作，将其匹配到LCAflow库里面相最符合的流，污染物指标备注为颗粒物（烟煤）
- particles (PM2.5 - PM10): nan
  污染物指标颗粒物（无烟煤）的末端治理技术是静电除尘，其效率为0.049Aar+97.75，末端治理设施实际运行率（k值）计算公式为除尘设施年实际运行小时数/机组年实际运行小时数。原文件中描述污染物类别为废气，污染物指标为颗粒物（无烟煤），此处对其进行了匹配工作，将其匹配到LCAflow库里面相最符合的流，污染物指标备注为颗粒物（无烟煤）
- particles (PM2.5 - PM10): nan
  污染物指标颗粒物（无烟煤）的末端治理技术是电袋组合，其效率为0.0465Aar+98.0，末端治理设施实际运行率（k值）计算公式为除尘设施年实际运行小时数/机组年实际运行小时数。原文件中描述污染物类别为废气，污染物指标为颗粒物（无烟煤），此处对其进行了匹配工作，将其匹配到LCAflow库里面相最符合的流，污染物指标备注为颗粒物（无烟煤）
- particles (PM2.5 - PM10): nan
  污染物指标颗粒物（无烟煤）的末端治理技术是袋式除尘，其效率为0.044Aar+98.1，末端治理设施实际运行率（k值）计算公式为除尘设施年实际运行小时数/机组年实际运行小时数。原文件中描述污染物类别为废气，污染物指标为颗粒物（无烟煤），此处对其进行了匹配工作，将其匹配到LCAflow库里面相最符合的流，污染物指标备注为颗粒物（无烟煤）
- particles (PM2.5 - PM10): nan
  污染物指标颗粒物（无烟煤）的末端治理技术是高效静电除尘①，其效率为0.0098Aar+99.55，末端治理设施实际运行率（k值）计算公式为除尘设施年实际运行小时数/机组年实际运行小时数，①高效颗粒物末端治理技术：采取高效电源供电、低低温电除尘、超净电袋、高效袋式除尘、湿法脱硫协同、湿式电除尘等技术，满足《燃煤电厂超低排放烟气
  治理工程技术规范》（HJ2053-2232）相关要求。
  。原文件中描述污染物类别为废气，污染物指标为颗粒物（无烟煤），此处对其进行了匹配工作，将其匹配到LCAflow库里面相最符合的流，污染物指标备注为颗粒物（无烟煤）
- particles (PM2.5 - PM10): nan
  污染物指标颗粒物（无烟煤）的末端治理技术是高效电袋组合①，其效率为0.0093Aar+99.6，末端治理设施实际运行率（k值）计算公式为除尘设施年实际运行小时数/机组年实际运行小时数，①高效颗粒物末端治理技术：采取高效电源供电、低低温电除尘、超净电袋、高效袋式除尘、湿法脱硫协同、湿式电除尘等技术，满足《燃煤电厂超低排放烟气
  治理工程技术规范》（HJ2053-2233）相关要求。
  。原文件中描述污染物类别为废气，污染物指标为颗粒物（无烟煤），此处对其进行了匹配工作，将其匹配到LCAflow库里面相最符合的流，污染物指标备注为颗粒物（无烟煤）
- particles (PM2.5 - PM10): nan
  污染物指标颗粒物（无烟煤）的末端治理技术是高效袋式除尘①，其效率为0.0088Aar+99.62，末端治理设施实际运行率（k值）计算公式为除尘设施年实际运行小时数/机组年实际运行小时数，①高效颗粒物末端治理技术：采取高效电源供电、低低温电除尘、超净电袋、高效袋式除尘、湿法脱硫协同、湿式电除尘等技术，满足《燃煤电厂超低排放烟气
  治理工程技术规范》（HJ2053-2234）相关要求。
  。原文件中描述污染物类别为废气，污染物指标为颗粒物（无烟煤），此处对其进行了匹配工作，将其匹配到LCAflow库里面相最符合的流，污染物指标备注为颗粒物（无烟煤）
- particles (PM2.5 - PM10): nan
  污染物指标颗粒物（褐煤）的末端治理技术是静电除尘，其效率为0.049Aar+97.75，末端治理设施实际运行率（k值）计算公式为除尘设施年实际运行小时数/机组年实际运行小时数。原文件中描述污染物类别为废气，污染物指标为颗粒物（褐煤），此处对其进行了匹配工作，将其匹配到LCAflow库里面相最符合的流，污染物指标备注为颗粒物（褐煤）
- particles (PM2.5 - PM10): nan
  污染物指标颗粒物（褐煤）的末端治理技术是电袋组合，其效率为0.0465Aar+98.0，末端治理设施实际运行率（k值）计算公式为除尘设施年实际运行小时数/机组年实际运行小时数。原文件中描述污染物类别为废气，污染物指标为颗粒物（褐煤），此处对其进行了匹配工作，将其匹配到LCAflow库里面相最符合的流，污染物指标备注为颗粒物（褐煤）
- particles (PM2.5 - PM10): nan
  污染物指标颗粒物（褐煤）的末端治理技术是袋式除尘，其效率为0.044Aar+98.1，末端治理设施实际运行率（k值）计算公式为除尘设施年实际运行小时数/机组年实际运行小时数。原文件中描述污染物类别为废气，污染物指标为颗粒物（褐煤），此处对其进行了匹配工作，将其匹配到LCAflow库里面相最符合的流，污染物指标备注为颗粒物（褐煤）
- particles (PM2.5 - PM10): nan
  污染物指标颗粒物（褐煤）的末端治理技术是高效静电除尘①，其效率为0.0098Aar+99.55，末端治理设施实际运行率（k值）计算公式为除尘设施年实际运行小时数/机组年实际运行小时数，①高效颗粒物末端治理技术：采取高效电源供电、低低温电除尘、超净电袋、高效袋式除尘、湿法脱硫协同、湿式电除尘等技术，满足《燃煤电厂超低排放烟气
  治理工程技术规范》（HJ2053-2235）相关要求。
  。原文件中描述污染物类别为废气，污染物指标为颗粒物（褐煤），此处对其进行了匹配工作，将其匹配到LCAflow库里面相最符合的流，污染物指标备注为颗粒物（褐煤）
- particles (PM2.5 - PM10): nan
  污染物指标颗粒物（褐煤）的末端治理技术是高效电袋组合①，其效率为0.0093Aar+99.6，末端治理设施实际运行率（k值）计算公式为除尘设施年实际运行小时数/机组年实际运行小时数，①高效颗粒物末端治理技术：采取高效电源供电、低低温电除尘、超净电袋、高效袋式除尘、湿法脱硫协同、湿式电除尘等技术，满足《燃煤电厂超低排放烟气
  治理工程技术规范》（HJ2053-2236）相关要求。
  。原文件中描述污染物类别为废气，污染物指标为颗粒物（褐煤），此处对其进行了匹配工作，将其匹配到LCAflow库里面相最符合的流，污染物指标备注为颗粒物（褐煤）
- particles (PM2.5 - PM10): nan
  污染物指标颗粒物（褐煤）的末端治理技术是高效袋式除尘①，其效率为0.0088Aar+99.62，末端治理设施实际运行率（k值）计算公式为除尘设施年实际运行小时数/机组年实际运行小时数，①高效颗粒物末端治理技术：采取高效电源供电、低低温电除尘、超净电袋、高效袋式除尘、湿法脱硫协同、湿式电除尘等技术，满足《燃煤电厂超低排放烟气
  治理工程技术规范》（HJ2053-2237）相关要求。
  。原文件中描述污染物类别为废气，污染物指标为颗粒物（褐煤），此处对其进行了匹配工作，将其匹配到LCAflow库里面相最符合的流，污染物指标备注为颗粒物（褐煤）
- sulfur dioxide: nan
  污染物指标二氧化硫（烟煤，无炉内脱硫）的末端治理技术是石灰石/石膏法，其效率为4.2857Sar+84.57，末端治理设施实际运行率（k值）计算公式为脱硫设施年实际运行小时数/机组年实际运行小时数。原文件中描述污染物类别为废气，污染物指标为二氧化硫（烟煤，无炉内脱硫），此处对其进行了匹配工作，将其匹配到LCAflow库里面相最符合的流，污染物指标备注为二氧化硫（烟煤，无炉内脱硫）
- sulfur dioxide: nan
  污染物指标二氧化硫（烟煤，无炉内脱硫）的末端治理技术是石灰/石膏法，其效率为4.2857Sar+84.57，末端治理设施实际运行率（k值）计算公式为脱硫设施年实际运行小时数/机组年实际运行小时数。原文件中描述污染物类别为废气，污染物指标为二氧化硫（烟煤，无炉内脱硫），此处对其进行了匹配工作，将其匹配到LCAflow库里面相最符合的流，污染物指标备注为二氧化硫（烟煤，无炉内脱硫）
- sulfur dioxide: nan
  污染物指标二氧化硫（烟煤，无炉内脱硫）的末端治理技术是氨法，其效率为4.2857Sar+84.57，末端治理设施实际运行率（k值）计算公式为脱硫设施年实际运行小时数/机组年实际运行小时数。原文件中描述污染物类别为废气，污染物指标为二氧化硫（烟煤，无炉内脱硫），此处对其进行了匹配工作，将其匹配到LCAflow库里面相最符合的流，污染物指标备注为二氧化硫（烟煤，无炉内脱硫）
- sulfur dioxide: nan
  污染物指标二氧化硫（烟煤，无炉内脱硫）的末端治理技术是其他（电石渣法），其效率为5.1429Sar+82.86，末端治理设施实际运行率（k值）计算公式为脱硫设施年实际运行小时数/机组年实际运行小时数。原文件中描述污染物类别为废气，污染物指标为二氧化硫（烟煤，无炉内脱硫），此处对其进行了匹配工作，将其匹配到LCAflow库里面相最符合的流，污染物指标备注为二氧化硫（烟煤，无炉内脱硫）
- sulfur dioxide: nan
  污染物指标二氧化硫（烟煤，无炉内脱硫）的末端治理技术是其他（钠碱法），其效率为5.1429Sar+82.86，末端治理设施实际运行率（k值）计算公式为脱硫设施年实际运行小时数/机组年实际运行小时数。原文件中描述污染物类别为废气，污染物指标为二氧化硫（烟煤，无炉内脱硫），此处对其进行了匹配工作，将其匹配到LCAflow库里面相最符合的流，污染物指标备注为二氧化硫（烟煤，无炉内脱硫）
- sulfur dioxide: nan
  污染物指标二氧化硫（烟煤，无炉内脱硫）的末端治理技术是双碱法，其效率为5.1429Sar+82.86，末端治理设施实际运行率（k值）计算公式为脱硫设施年实际运行小时数/机组年实际运行小时数。原文件中描述污染物类别为废气，污染物指标为二氧化硫（烟煤，无炉内脱硫），此处对其进行了匹配工作，将其匹配到LCAflow库里面相最符合的流，污染物指标备注为二氧化硫（烟煤，无炉内脱硫）
- sulfur dioxide: nan
  污染物指标二氧化硫（烟煤，无炉内脱硫）的末端治理技术是氧化镁法，其效率为4.2857Sar+84.57，末端治理设施实际运行率（k值）计算公式为脱硫设施年实际运行小时数/机组年实际运行小时数。原文件中描述污染物类别为废气，污染物指标为二氧化硫（烟煤，无炉内脱硫），此处对其进行了匹配工作，将其匹配到LCAflow库里面相最符合的流，污染物指标备注为二氧化硫（烟煤，无炉内脱硫）
- sulfur dioxide: nan
  污染物指标二氧化硫（烟煤，无炉内脱硫）的末端治理技术是烟气循环流化床法，其效率为8.1429Sar+78.57，末端治理设施实际运行率（k值）计算公式为脱硫设施年实际运行小时数/机组年实际运行小时数。原文件中描述污染物类别为废气，污染物指标为二氧化硫（烟煤，无炉内脱硫），此处对其进行了匹配工作，将其匹配到LCAflow库里面相最符合的流，污染物指标备注为二氧化硫（烟煤，无炉内脱硫）
- sulfur dioxide: nan
  污染物指标二氧化硫（烟煤，无炉内脱硫）的末端治理技术是其他（湿法脱硫除尘一体化），其效率为4.2857Sar+84.57，末端治理设施实际运行率（k值）计算公式为脱硫设施年实际运行小时数/机组年实际运行小时数。原文件中描述污染物类别为废气，污染物指标为二氧化硫（烟煤，无炉内脱硫），此处对其进行了匹配工作，将其匹配到LCAflow库里面相最符合的流，污染物指标备注为二氧化硫（烟煤，无炉内脱硫）
- sulfur dioxide: nan
  污染物指标二氧化硫（烟煤，无炉内脱硫）的末端治理技术是高效石灰石/石膏法②，其效率为0.5Sar+98.2，末端治理设施实际运行率（k值）计算公式为脱硫设施年实际运行小时数/机组年实际运行小时数，②高效二氧化硫末端治理技术：采取空塔提效、强化气液传质、改善pH值分区等措施，满足《燃煤电厂超低排放烟气治理工程技术规范》（HJ2053-2174）相
  关要求。
  。原文件中描述污染物类别为废气，污染物指标为二氧化硫（烟煤，无炉内脱硫），此处对其进行了匹配工作，将其匹配到LCAflow库里面相最符合的流，污染物指标备注为二氧化硫（烟煤，无炉内脱硫）
- sulfur dioxide: nan
  污染物指标二氧化硫（烟煤，无炉内脱硫）的末端治理技术是高效石灰/石膏法②，其效率为0.5Sar+98.2，末端治理设施实际运行率（k值）计算公式为脱硫设施年实际运行小时数/机组年实际运行小时数，②高效二氧化硫末端治理技术：采取空塔提效、强化气液传质、改善pH值分区等措施，满足《燃煤电厂超低排放烟气治理工程技术规范》（HJ2053-2175）相
  关要求。
  。原文件中描述污染物类别为废气，污染物指标为二氧化硫（烟煤，无炉内脱硫），此处对其进行了匹配工作，将其匹配到LCAflow库里面相最符合的流，污染物指标备注为二氧化硫（烟煤，无炉内脱硫）
- sulfur dioxide: nan
  污染物指标二氧化硫（烟煤，无炉内脱硫）的末端治理技术是高效氨法②，其效率为0.5Sar+98.2，末端治理设施实际运行率（k值）计算公式为脱硫设施年实际运行小时数/机组年实际运行小时数，②高效二氧化硫末端治理技术：采取空塔提效、强化气液传质、改善pH值分区等措施，满足《燃煤电厂超低排放烟气治理工程技术规范》（HJ2053-2176）相
  关要求。
  。原文件中描述污染物类别为废气，污染物指标为二氧化硫（烟煤，无炉内脱硫），此处对其进行了匹配工作，将其匹配到LCAflow库里面相最符合的流，污染物指标备注为二氧化硫（烟煤，无炉内脱硫）
- sulfur dioxide: nan
  污染物指标二氧化硫（烟煤，无炉内脱硫）的末端治理技术是其他（高效电石渣法）②，其效率为0.6Sar+98，末端治理设施实际运行率（k值）计算公式为脱硫设施年实际运行小时数/机组年实际运行小时数，②高效二氧化硫末端治理技术：采取空塔提效、强化气液传质、改善pH值分区等措施，满足《燃煤电厂超低排放烟气治理工程技术规范》（HJ2053-2177）相
  关要求。
  。原文件中描述污染物类别为废气，污染物指标为二氧化硫（烟煤，无炉内脱硫），此处对其进行了匹配工作，将其匹配到LCAflow库里面相最符合的流，污染物指标备注为二氧化硫（烟煤，无炉内脱硫）
- sulfur dioxide: nan
  污染物指标二氧化硫（烟煤，无炉内脱硫）的末端治理技术是其他（高效钠碱法）②，其效率为0.6Sar+98，末端治理设施实际运行率（k值）计算公式为脱硫设施年实际运行小时数/机组年实际运行小时数，②高效二氧化硫末端治理技术：采取空塔提效、强化气液传质、改善pH值分区等措施，满足《燃煤电厂超低排放烟气治理工程技术规范》（HJ2053-2178）相
  关要求。
  。原文件中描述污染物类别为废气，污染物指标为二氧化硫（烟煤，无炉内脱硫），此处对其进行了匹配工作，将其匹配到LCAflow库里面相最符合的流，污染物指标备注为二氧化硫（烟煤，无炉内脱硫）
- sulfur dioxide: nan
  污染物指标二氧化硫（烟煤，无炉内脱硫）的末端治理技术是高效双碱法②，其效率为0.6Sar+98，末端治理设施实际运行率（k值）计算公式为脱硫设施年实际运行小时数/机组年实际运行小时数，②高效二氧化硫末端治理技术：采取空塔提效、强化气液传质、改善pH值分区等措施，满足《燃煤电厂超低排放烟气治理工程技术规范》（HJ2053-2179）相
  关要求。
  。原文件中描述污染物类别为废气，污染物指标为二氧化硫（烟煤，无炉内脱硫），此处对其进行了匹配工作，将其匹配到LCAflow库里面相最符合的流，污染物指标备注为二氧化硫（烟煤，无炉内脱硫）
- sulfur dioxide: nan
  污染物指标二氧化硫（烟煤，无炉内脱硫）的末端治理技术是高效氧化镁法②，其效率为0.5Sar+98.2，末端治理设施实际运行率（k值）计算公式为脱硫设施年实际运行小时数/机组年实际运行小时数，②高效二氧化硫末端治理技术：采取空塔提效、强化气液传质、改善pH值分区等措施，满足《燃煤电厂超低排放烟气治理工程技术规范》（HJ2053-2180）相
  关要求。
  。原文件中描述污染物类别为废气，污染物指标为二氧化硫（烟煤，无炉内脱硫），此处对其进行了匹配工作，将其匹配到LCAflow库里面相最符合的流，污染物指标备注为二氧化硫（烟煤，无炉内脱硫）
- sulfur dioxide: nan
  污染物指标二氧化硫（烟煤，无炉内脱硫）的末端治理技术是高效烟气循环流化床法②，其效率为0.95Sar+97.5，末端治理设施实际运行率（k值）计算公式为脱硫设施年实际运行小时数/机组年实际运行小时数，②高效二氧化硫末端治理技术：采取空塔提效、强化气液传质、改善pH值分区等措施，满足《燃煤电厂超低排放烟气治理工程技术规范》（HJ2053-2181）相
  关要求。
  。原文件中描述污染物类别为废气，污染物指标为二氧化硫（烟煤，无炉内脱硫），此处对其进行了匹配工作，将其匹配到LCAflow库里面相最符合的流，污染物指标备注为二氧化硫（烟煤，无炉内脱硫）
- sulfur dioxide: nan
  污染物指标二氧化硫（烟煤，无炉内脱硫）的末端治理技术是其他（高效湿法脱硫除尘一体化）②，其效率为0.5Sar+98.2，末端治理设施实际运行率（k值）计算公式为脱硫设施年实际运行小时数/机组年实际运行小时数，②高效二氧化硫末端治理技术：采取空塔提效、强化气液传质、改善pH值分区等措施，满足《燃煤电厂超低排放烟气治理工程技术规范》（HJ2053-2182）相
  关要求。
  。原文件中描述污染物类别为废气，污染物指标为二氧化硫（烟煤，无炉内脱硫），此处对其进行了匹配工作，将其匹配到LCAflow库里面相最符合的流，污染物指标备注为二氧化硫（烟煤，无炉内脱硫）
- sulfur dioxide: nan
  污染物指标二氧化硫（烟煤，炉内脱硫）的末端治理技术是高效石灰石/石膏法②，其效率为0.5Sar+97.8，末端治理设施实际运行率（k值）计算公式为脱硫设施年实际运行小时数/机组年实际运行小时数，②高效二氧化硫末端治理技术：采取空塔提效、强化气液传质、改善pH值分区等措施，满足《燃煤电厂超低排放烟气治理工程技术规范》（HJ2053-2183）相
  关要求。
  。原文件中描述污染物类别为废气，污染物指标为二氧化硫（烟煤，炉内脱硫），此处对其进行了匹配工作，将其匹配到LCAflow库里面相最符合的流，污染物指标备注为二氧化硫（烟煤，炉内脱硫）
- sulfur dioxide: nan
  污染物指标二氧化硫（烟煤，炉内脱硫）的末端治理技术是高效石灰/石膏法②，其效率为0.5Sar+97.8，末端治理设施实际运行率（k值）计算公式为脱硫设施年实际运行小时数/机组年实际运行小时数，②高效二氧化硫末端治理技术：采取空塔提效、强化气液传质、改善pH值分区等措施，满足《燃煤电厂超低排放烟气治理工程技术规范》（HJ2053-2184）相
  关要求。
  。原文件中描述污染物类别为废气，污染物指标为二氧化硫（烟煤，炉内脱硫），此处对其进行了匹配工作，将其匹配到LCAflow库里面相最符合的流，污染物指标备注为二氧化硫（烟煤，炉内脱硫）
- sulfur dioxide: nan
  污染物指标二氧化硫（烟煤，炉内脱硫）的末端治理技术是高效氨法②，其效率为0.5Sar+97.8，末端治理设施实际运行率（k值）计算公式为脱硫设施年实际运行小时数/机组年实际运行小时数，②高效二氧化硫末端治理技术：采取空塔提效、强化气液传质、改善pH值分区等措施，满足《燃煤电厂超低排放烟气治理工程技术规范》（HJ2053-2185）相
  关要求。
  。原文件中描述污染物类别为废气，污染物指标为二氧化硫（烟煤，炉内脱硫），此处对其进行了匹配工作，将其匹配到LCAflow库里面相最符合的流，污染物指标备注为二氧化硫（烟煤，炉内脱硫）
- sulfur dioxide: nan
  污染物指标二氧化硫（烟煤，炉内脱硫）的末端治理技术是其他（高效电石渣法）②，其效率为0.6Sar+97.6，末端治理设施实际运行率（k值）计算公式为脱硫设施年实际运行小时数/机组年实际运行小时数，②高效二氧化硫末端治理技术：采取空塔提效、强化气液传质、改善pH值分区等措施，满足《燃煤电厂超低排放烟气治理工程技术规范》（HJ2053-2186）相
  关要求。
  。原文件中描述污染物类别为废气，污染物指标为二氧化硫（烟煤，炉内脱硫），此处对其进行了匹配工作，将其匹配到LCAflow库里面相最符合的流，污染物指标备注为二氧化硫（烟煤，炉内脱硫）
- sulfur dioxide: nan
  污染物指标二氧化硫（烟煤，炉内脱硫）的末端治理技术是其他（高效钠碱法）②，其效率为0.6Sar+97.6，末端治理设施实际运行率（k值）计算公式为脱硫设施年实际运行小时数/机组年实际运行小时数，②高效二氧化硫末端治理技术：采取空塔提效、强化气液传质、改善pH值分区等措施，满足《燃煤电厂超低排放烟气治理工程技术规范》（HJ2053-2187）相
  关要求。
  。原文件中描述污染物类别为废气，污染物指标为二氧化硫（烟煤，炉内脱硫），此处对其进行了匹配工作，将其匹配到LCAflow库里面相最符合的流，污染物指标备注为二氧化硫（烟煤，炉内脱硫）
- sulfur dioxide: nan
  污染物指标二氧化硫（烟煤，炉内脱硫）的末端治理技术是高效双碱法②，其效率为0.6Sar+97.6，末端治理设施实际运行率（k值）计算公式为脱硫设施年实际运行小时数/机组年实际运行小时数，②高效二氧化硫末端治理技术：采取空塔提效、强化气液传质、改善pH值分区等措施，满足《燃煤电厂超低排放烟气治理工程技术规范》（HJ2053-2188）相
  关要求。
  。原文件中描述污染物类别为废气，污染物指标为二氧化硫（烟煤，炉内脱硫），此处对其进行了匹配工作，将其匹配到LCAflow库里面相最符合的流，污染物指标备注为二氧化硫（烟煤，炉内脱硫）
- sulfur dioxide: nan
  污染物指标二氧化硫（烟煤，炉内脱硫）的末端治理技术是高效氧化镁法②，其效率为0.5Sar+97.8，末端治理设施实际运行率（k值）计算公式为脱硫设施年实际运行小时数/机组年实际运行小时数，②高效二氧化硫末端治理技术：采取空塔提效、强化气液传质、改善pH值分区等措施，满足《燃煤电厂超低排放烟气治理工程技术规范》（HJ2053-2189）相
  关要求。
  。原文件中描述污染物类别为废气，污染物指标为二氧化硫（烟煤，炉内脱硫），此处对其进行了匹配工作，将其匹配到LCAflow库里面相最符合的流，污染物指标备注为二氧化硫（烟煤，炉内脱硫）
- sulfur dioxide: nan
  污染物指标二氧化硫（烟煤，炉内脱硫）的末端治理技术是高效烟气循环流化床法②，其效率为0.95Sar+97，末端治理设施实际运行率（k值）计算公式为脱硫设施年实际运行小时数/机组年实际运行小时数，②高效二氧化硫末端治理技术：采取空塔提效、强化气液传质、改善pH值分区等措施，满足《燃煤电厂超低排放烟气治理工程技术规范》（HJ2053-2190）相
  关要求。
  。原文件中描述污染物类别为废气，污染物指标为二氧化硫（烟煤，炉内脱硫），此处对其进行了匹配工作，将其匹配到LCAflow库里面相最符合的流，污染物指标备注为二氧化硫（烟煤，炉内脱硫）
- sulfur dioxide: nan
  污染物指标二氧化硫（烟煤，炉内脱硫）的末端治理技术是其他（高效湿法脱硫除尘一体化）②，其效率为0.5Sar+97.8，末端治理设施实际运行率（k值）计算公式为脱硫设施年实际运行小时数/机组年实际运行小时数，②高效二氧化硫末端治理技术：采取空塔提效、强化气液传质、改善pH值分区等措施，满足《燃煤电厂超低排放烟气治理工程技术规范》（HJ2053-2191）相
  关要求。
  。原文件中描述污染物类别为废气，污染物指标为二氧化硫（烟煤，炉内脱硫），此处对其进行了匹配工作，将其匹配到LCAflow库里面相最符合的流，污染物指标备注为二氧化硫（烟煤，炉内脱硫）
- sulfur dioxide: nan
  污染物指标二氧化硫（烟煤，炉内脱硫）的末端治理技术是石灰石/石膏法，其效率为4.2857Sar+81.14，末端治理设施实际运行率（k值）计算公式为脱硫设施年实际运行小时数/机组年实际运行小时数。原文件中描述污染物类别为废气，污染物指标为二氧化硫（烟煤，炉内脱硫），此处对其进行了匹配工作，将其匹配到LCAflow库里面相最符合的流，污染物指标备注为二氧化硫（烟煤，炉内脱硫）
- sulfur dioxide: nan
  污染物指标二氧化硫（烟煤，炉内脱硫）的末端治理技术是石灰/石膏法，其效率为4.2857Sar+81.14，末端治理设施实际运行率（k值）计算公式为脱硫设施年实际运行小时数/机组年实际运行小时数。原文件中描述污染物类别为废气，污染物指标为二氧化硫（烟煤，炉内脱硫），此处对其进行了匹配工作，将其匹配到LCAflow库里面相最符合的流，污染物指标备注为二氧化硫（烟煤，炉内脱硫）
- sulfur dioxide: nan
  污染物指标二氧化硫（烟煤，炉内脱硫）的末端治理技术是氨法，其效率为4.2857Sar+81.14，末端治理设施实际运行率（k值）计算公式为脱硫设施年实际运行小时数/机组年实际运行小时数。原文件中描述污染物类别为废气，污染物指标为二氧化硫（烟煤，炉内脱硫），此处对其进行了匹配工作，将其匹配到LCAflow库里面相最符合的流，污染物指标备注为二氧化硫（烟煤，炉内脱硫）
- sulfur dioxide: nan
  污染物指标二氧化硫（烟煤，炉内脱硫）的末端治理技术是其他（电石渣法），其效率为5.1429Sar+79.43，末端治理设施实际运行率（k值）计算公式为脱硫设施年实际运行小时数/机组年实际运行小时数。原文件中描述污染物类别为废气，污染物指标为二氧化硫（烟煤，炉内脱硫），此处对其进行了匹配工作，将其匹配到LCAflow库里面相最符合的流，污染物指标备注为二氧化硫（烟煤，炉内脱硫）
- sulfur dioxide: nan
  污染物指标二氧化硫（烟煤，炉内脱硫）的末端治理技术是其他（钠碱法），其效率为5.1429Sar+79.43，末端治理设施实际运行率（k值）计算公式为脱硫设施年实际运行小时数/机组年实际运行小时数。原文件中描述污染物类别为废气，污染物指标为二氧化硫（烟煤，炉内脱硫），此处对其进行了匹配工作，将其匹配到LCAflow库里面相最符合的流，污染物指标备注为二氧化硫（烟煤，炉内脱硫）
- sulfur dioxide: nan
  污染物指标二氧化硫（烟煤，炉内脱硫）的末端治理技术是双碱法，其效率为5.1429Sar+79.43，末端治理设施实际运行率（k值）计算公式为脱硫设施年实际运行小时数/机组年实际运行小时数。原文件中描述污染物类别为废气，污染物指标为二氧化硫（烟煤，炉内脱硫），此处对其进行了匹配工作，将其匹配到LCAflow库里面相最符合的流，污染物指标备注为二氧化硫（烟煤，炉内脱硫）
- sulfur dioxide: nan
  污染物指标二氧化硫（烟煤，炉内脱硫）的末端治理技术是氧化镁法，其效率为4.2857Sar+81.14，末端治理设施实际运行率（k值）计算公式为脱硫设施年实际运行小时数/机组年实际运行小时数。原文件中描述污染物类别为废气，污染物指标为二氧化硫（烟煤，炉内脱硫），此处对其进行了匹配工作，将其匹配到LCAflow库里面相最符合的流，污染物指标备注为二氧化硫（烟煤，炉内脱硫）
- sulfur dioxide: nan
  污染物指标二氧化硫（烟煤，炉内脱硫）的末端治理技术是烟气循环流化床法，其效率为8.1429Sar+74.29，末端治理设施实际运行率（k值）计算公式为脱硫设施年实际运行小时数/机组年实际运行小时数。原文件中描述污染物类别为废气，污染物指标为二氧化硫（烟煤，炉内脱硫），此处对其进行了匹配工作，将其匹配到LCAflow库里面相最符合的流，污染物指标备注为二氧化硫（烟煤，炉内脱硫）
- sulfur dioxide: nan
  污染物指标二氧化硫（烟煤，炉内脱硫）的末端治理技术是其他（湿法脱硫除尘一体化），其效率为4.2857Sar+81.14，末端治理设施实际运行率（k值）计算公式为脱硫设施年实际运行小时数/机组年实际运行小时数。原文件中描述污染物类别为废气，污染物指标为二氧化硫（烟煤，炉内脱硫），此处对其进行了匹配工作，将其匹配到LCAflow库里面相最符合的流，污染物指标备注为二氧化硫（烟煤，炉内脱硫）
- sulfur dioxide: nan
  污染物指标二氧化硫（无烟煤，无炉内脱硫）的末端治理技术是高效石灰石/石膏法②，其效率为0.5Sar+98.2，末端治理设施实际运行率（k值）计算公式为脱硫设施年实际运行小时数/机组年实际运行小时数，②高效二氧化硫末端治理技术：采取空塔提效、强化气液传质、改善pH值分区等措施，满足《燃煤电厂超低排放烟气治理工程技术规范》（HJ2053-2192）相
  关要求。
  。原文件中描述污染物类别为废气，污染物指标为二氧化硫（无烟煤，无炉内脱硫），此处对其进行了匹配工作，将其匹配到LCAflow库里面相最符合的流，污染物指标备注为二氧化硫（无烟煤，无炉内脱硫）
- sulfur dioxide: nan
  污染物指标二氧化硫（无烟煤，无炉内脱硫）的末端治理技术是高效石灰/石膏法②，其效率为0.5Sar+98.2，末端治理设施实际运行率（k值）计算公式为脱硫设施年实际运行小时数/机组年实际运行小时数，②高效二氧化硫末端治理技术：采取空塔提效、强化气液传质、改善pH值分区等措施，满足《燃煤电厂超低排放烟气治理工程技术规范》（HJ2053-2193）相
  关要求。
  。原文件中描述污染物类别为废气，污染物指标为二氧化硫（无烟煤，无炉内脱硫），此处对其进行了匹配工作，将其匹配到LCAflow库里面相最符合的流，污染物指标备注为二氧化硫（无烟煤，无炉内脱硫）
- sulfur dioxide: nan
  污染物指标二氧化硫（无烟煤，无炉内脱硫）的末端治理技术是高效氨法②，其效率为0.5Sar+98.2，末端治理设施实际运行率（k值）计算公式为脱硫设施年实际运行小时数/机组年实际运行小时数，②高效二氧化硫末端治理技术：采取空塔提效、强化气液传质、改善pH值分区等措施，满足《燃煤电厂超低排放烟气治理工程技术规范》（HJ2053-2194）相
  关要求。
  。原文件中描述污染物类别为废气，污染物指标为二氧化硫（无烟煤，无炉内脱硫），此处对其进行了匹配工作，将其匹配到LCAflow库里面相最符合的流，污染物指标备注为二氧化硫（无烟煤，无炉内脱硫）
- sulfur dioxide: nan
  污染物指标二氧化硫（无烟煤，无炉内脱硫）的末端治理技术是其他（高效电石渣法）②，其效率为0.6Sar+98，末端治理设施实际运行率（k值）计算公式为脱硫设施年实际运行小时数/机组年实际运行小时数，②高效二氧化硫末端治理技术：采取空塔提效、强化气液传质、改善pH值分区等措施，满足《燃煤电厂超低排放烟气治理工程技术规范》（HJ2053-2195）相
  关要求。
  。原文件中描述污染物类别为废气，污染物指标为二氧化硫（无烟煤，无炉内脱硫），此处对其进行了匹配工作，将其匹配到LCAflow库里面相最符合的流，污染物指标备注为二氧化硫（无烟煤，无炉内脱硫）
- sulfur dioxide: nan
  污染物指标二氧化硫（无烟煤，无炉内脱硫）的末端治理技术是其他（高效钠碱法）②，其效率为0.6Sar+98，末端治理设施实际运行率（k值）计算公式为脱硫设施年实际运行小时数/机组年实际运行小时数，②高效二氧化硫末端治理技术：采取空塔提效、强化气液传质、改善pH值分区等措施，满足《燃煤电厂超低排放烟气治理工程技术规范》（HJ2053-2196）相
  关要求。
  。原文件中描述污染物类别为废气，污染物指标为二氧化硫（无烟煤，无炉内脱硫），此处对其进行了匹配工作，将其匹配到LCAflow库里面相最符合的流，污染物指标备注为二氧化硫（无烟煤，无炉内脱硫）
- sulfur dioxide: nan
  污染物指标二氧化硫（无烟煤，无炉内脱硫）的末端治理技术是高效双碱法②，其效率为0.6Sar+98，末端治理设施实际运行率（k值）计算公式为脱硫设施年实际运行小时数/机组年实际运行小时数，②高效二氧化硫末端治理技术：采取空塔提效、强化气液传质、改善pH值分区等措施，满足《燃煤电厂超低排放烟气治理工程技术规范》（HJ2053-2197）相
  关要求。
  。原文件中描述污染物类别为废气，污染物指标为二氧化硫（无烟煤，无炉内脱硫），此处对其进行了匹配工作，将其匹配到LCAflow库里面相最符合的流，污染物指标备注为二氧化硫（无烟煤，无炉内脱硫）
- sulfur dioxide: nan
  污染物指标二氧化硫（无烟煤，无炉内脱硫）的末端治理技术是高效氧化镁法②，其效率为0.5Sar+98.2，末端治理设施实际运行率（k值）计算公式为脱硫设施年实际运行小时数/机组年实际运行小时数，②高效二氧化硫末端治理技术：采取空塔提效、强化气液传质、改善pH值分区等措施，满足《燃煤电厂超低排放烟气治理工程技术规范》（HJ2053-2198）相
  关要求。
  。原文件中描述污染物类别为废气，污染物指标为二氧化硫（无烟煤，无炉内脱硫），此处对其进行了匹配工作，将其匹配到LCAflow库里面相最符合的流，污染物指标备注为二氧化硫（无烟煤，无炉内脱硫）
- sulfur dioxide: nan
  污染物指标二氧化硫（无烟煤，无炉内脱硫）的末端治理技术是高效烟气循环流化床法②，其效率为0.95Sar+97.5，末端治理设施实际运行率（k值）计算公式为脱硫设施年实际运行小时数/机组年实际运行小时数，②高效二氧化硫末端治理技术：采取空塔提效、强化气液传质、改善pH值分区等措施，满足《燃煤电厂超低排放烟气治理工程技术规范》（HJ2053-2199）相
  关要求。
  。原文件中描述污染物类别为废气，污染物指标为二氧化硫（无烟煤，无炉内脱硫），此处对其进行了匹配工作，将其匹配到LCAflow库里面相最符合的流，污染物指标备注为二氧化硫（无烟煤，无炉内脱硫）
- sulfur dioxide: nan
  污染物指标二氧化硫（无烟煤，无炉内脱硫）的末端治理技术是其他（高效湿法脱硫除尘一体化）②，其效率为0.5Sar+98.2，末端治理设施实际运行率（k值）计算公式为脱硫设施年实际运行小时数/机组年实际运行小时数，②高效二氧化硫末端治理技术：采取空塔提效、强化气液传质、改善pH值分区等措施，满足《燃煤电厂超低排放烟气治理工程技术规范》（HJ2053-2200）相
  关要求。
  。原文件中描述污染物类别为废气，污染物指标为二氧化硫（无烟煤，无炉内脱硫），此处对其进行了匹配工作，将其匹配到LCAflow库里面相最符合的流，污染物指标备注为二氧化硫（无烟煤，无炉内脱硫）
- sulfur dioxide: nan
  污染物指标二氧化硫（无烟煤，无炉内脱硫）的末端治理技术是石灰石/石膏法，其效率为4.2857Sar+84.57，末端治理设施实际运行率（k值）计算公式为脱硫设施年实际运行小时数/机组年实际运行小时数。原文件中描述污染物类别为废气，污染物指标为二氧化硫（无烟煤，无炉内脱硫），此处对其进行了匹配工作，将其匹配到LCAflow库里面相最符合的流，污染物指标备注为二氧化硫（无烟煤，无炉内脱硫）
- sulfur dioxide: nan
  污染物指标二氧化硫（无烟煤，无炉内脱硫）的末端治理技术是石灰/石膏法，其效率为4.2857Sar+84.57，末端治理设施实际运行率（k值）计算公式为脱硫设施年实际运行小时数/机组年实际运行小时数。原文件中描述污染物类别为废气，污染物指标为二氧化硫（无烟煤，无炉内脱硫），此处对其进行了匹配工作，将其匹配到LCAflow库里面相最符合的流，污染物指标备注为二氧化硫（无烟煤，无炉内脱硫）
- sulfur dioxide: nan
  污染物指标二氧化硫（无烟煤，无炉内脱硫）的末端治理技术是氨法，其效率为4.2857Sar+84.57，末端治理设施实际运行率（k值）计算公式为脱硫设施年实际运行小时数/机组年实际运行小时数。原文件中描述污染物类别为废气，污染物指标为二氧化硫（无烟煤，无炉内脱硫），此处对其进行了匹配工作，将其匹配到LCAflow库里面相最符合的流，污染物指标备注为二氧化硫（无烟煤，无炉内脱硫）
- sulfur dioxide: nan
  污染物指标二氧化硫（无烟煤，无炉内脱硫）的末端治理技术是其他（电石渣法），其效率为5.1429Sar+82.86，末端治理设施实际运行率（k值）计算公式为脱硫设施年实际运行小时数/机组年实际运行小时数。原文件中描述污染物类别为废气，污染物指标为二氧化硫（无烟煤，无炉内脱硫），此处对其进行了匹配工作，将其匹配到LCAflow库里面相最符合的流，污染物指标备注为二氧化硫（无烟煤，无炉内脱硫）
- sulfur dioxide: nan
  污染物指标二氧化硫（无烟煤，无炉内脱硫）的末端治理技术是其他（钠碱法），其效率为5.1429Sar+82.86，末端治理设施实际运行率（k值）计算公式为脱硫设施年实际运行小时数/机组年实际运行小时数。原文件中描述污染物类别为废气，污染物指标为二氧化硫（无烟煤，无炉内脱硫），此处对其进行了匹配工作，将其匹配到LCAflow库里面相最符合的流，污染物指标备注为二氧化硫（无烟煤，无炉内脱硫）
- sulfur dioxide: nan
  污染物指标二氧化硫（无烟煤，无炉内脱硫）的末端治理技术是双碱法，其效率为5.1429Sar+82.86，末端治理设施实际运行率（k值）计算公式为脱硫设施年实际运行小时数/机组年实际运行小时数。原文件中描述污染物类别为废气，污染物指标为二氧化硫（无烟煤，无炉内脱硫），此处对其进行了匹配工作，将其匹配到LCAflow库里面相最符合的流，污染物指标备注为二氧化硫（无烟煤，无炉内脱硫）
- sulfur dioxide: nan
  污染物指标二氧化硫（无烟煤，无炉内脱硫）的末端治理技术是氧化镁法，其效率为4.2857Sar+84.57，末端治理设施实际运行率（k值）计算公式为脱硫设施年实际运行小时数/机组年实际运行小时数。原文件中描述污染物类别为废气，污染物指标为二氧化硫（无烟煤，无炉内脱硫），此处对其进行了匹配工作，将其匹配到LCAflow库里面相最符合的流，污染物指标备注为二氧化硫（无烟煤，无炉内脱硫）
- sulfur dioxide: nan
  污染物指标二氧化硫（无烟煤，无炉内脱硫）的末端治理技术是烟气循环流化床法，其效率为8.1429Sar+78.57，末端治理设施实际运行率（k值）计算公式为脱硫设施年实际运行小时数/机组年实际运行小时数。原文件中描述污染物类别为废气，污染物指标为二氧化硫（无烟煤，无炉内脱硫），此处对其进行了匹配工作，将其匹配到LCAflow库里面相最符合的流，污染物指标备注为二氧化硫（无烟煤，无炉内脱硫）
- sulfur dioxide: nan
  污染物指标二氧化硫（无烟煤，无炉内脱硫）的末端治理技术是其他（湿法脱硫除尘一体化），其效率为4.2857Sar+84.57，末端治理设施实际运行率（k值）计算公式为脱硫设施年实际运行小时数/机组年实际运行小时数。原文件中描述污染物类别为废气，污染物指标为二氧化硫（无烟煤，无炉内脱硫），此处对其进行了匹配工作，将其匹配到LCAflow库里面相最符合的流，污染物指标备注为二氧化硫（无烟煤，无炉内脱硫）
- sulfur dioxide: nan
  污染物指标二氧化硫（无烟煤，炉内脱硫）的末端治理技术是高效石灰石/石膏法②，其效率为0.5Sar+97.8，末端治理设施实际运行率（k值）计算公式为脱硫设施年实际运行小时数/机组年实际运行小时数，②高效二氧化硫末端治理技术：采取空塔提效、强化气液传质、改善pH值分区等措施，满足《燃煤电厂超低排放烟气治理工程技术规范》（HJ2053-2201）相
  关要求。
  。原文件中描述污染物类别为废气，污染物指标为二氧化硫（无烟煤，炉内脱硫），此处对其进行了匹配工作，将其匹配到LCAflow库里面相最符合的流，污染物指标备注为二氧化硫（无烟煤，炉内脱硫）
- sulfur dioxide: nan
  污染物指标二氧化硫（无烟煤，炉内脱硫）的末端治理技术是高效石灰/石膏法②，其效率为0.5Sar+97.8，末端治理设施实际运行率（k值）计算公式为脱硫设施年实际运行小时数/机组年实际运行小时数，②高效二氧化硫末端治理技术：采取空塔提效、强化气液传质、改善pH值分区等措施，满足《燃煤电厂超低排放烟气治理工程技术规范》（HJ2053-2202）相
  关要求。
  。原文件中描述污染物类别为废气，污染物指标为二氧化硫（无烟煤，炉内脱硫），此处对其进行了匹配工作，将其匹配到LCAflow库里面相最符合的流，污染物指标备注为二氧化硫（无烟煤，炉内脱硫）
- sulfur dioxide: nan
  污染物指标二氧化硫（无烟煤，炉内脱硫）的末端治理技术是高效氨法②，其效率为0.5Sar+97.8，末端治理设施实际运行率（k值）计算公式为脱硫设施年实际运行小时数/机组年实际运行小时数，②高效二氧化硫末端治理技术：采取空塔提效、强化气液传质、改善pH值分区等措施，满足《燃煤电厂超低排放烟气治理工程技术规范》（HJ2053-2203）相
  关要求。
  。原文件中描述污染物类别为废气，污染物指标为二氧化硫（无烟煤，炉内脱硫），此处对其进行了匹配工作，将其匹配到LCAflow库里面相最符合的流，污染物指标备注为二氧化硫（无烟煤，炉内脱硫）
- sulfur dioxide: nan
  污染物指标二氧化硫（无烟煤，炉内脱硫）的末端治理技术是其他（高效电石渣法）②，其效率为0.6Sar+97.6，末端治理设施实际运行率（k值）计算公式为脱硫设施年实际运行小时数/机组年实际运行小时数，②高效二氧化硫末端治理技术：采取空塔提效、强化气液传质、改善pH值分区等措施，满足《燃煤电厂超低排放烟气治理工程技术规范》（HJ2053-2204）相
  关要求。
  。原文件中描述污染物类别为废气，污染物指标为二氧化硫（无烟煤，炉内脱硫），此处对其进行了匹配工作，将其匹配到LCAflow库里面相最符合的流，污染物指标备注为二氧化硫（无烟煤，炉内脱硫）
- sulfur dioxide: nan
  污染物指标二氧化硫（无烟煤，炉内脱硫）的末端治理技术是其他（高效钠碱法）②，其效率为0.6Sar+97.6，末端治理设施实际运行率（k值）计算公式为脱硫设施年实际运行小时数/机组年实际运行小时数，②高效二氧化硫末端治理技术：采取空塔提效、强化气液传质、改善pH值分区等措施，满足《燃煤电厂超低排放烟气治理工程技术规范》（HJ2053-2205）相
  关要求。
  。原文件中描述污染物类别为废气，污染物指标为二氧化硫（无烟煤，炉内脱硫），此处对其进行了匹配工作，将其匹配到LCAflow库里面相最符合的流，污染物指标备注为二氧化硫（无烟煤，炉内脱硫）
- sulfur dioxide: nan
  污染物指标二氧化硫（无烟煤，炉内脱硫）的末端治理技术是高效双碱法②，其效率为0.6Sar+97.6，末端治理设施实际运行率（k值）计算公式为脱硫设施年实际运行小时数/机组年实际运行小时数，②高效二氧化硫末端治理技术：采取空塔提效、强化气液传质、改善pH值分区等措施，满足《燃煤电厂超低排放烟气治理工程技术规范》（HJ2053-2206）相
  关要求。
  。原文件中描述污染物类别为废气，污染物指标为二氧化硫（无烟煤，炉内脱硫），此处对其进行了匹配工作，将其匹配到LCAflow库里面相最符合的流，污染物指标备注为二氧化硫（无烟煤，炉内脱硫）
- sulfur dioxide: nan
  污染物指标二氧化硫（无烟煤，炉内脱硫）的末端治理技术是高效氧化镁法②，其效率为0.5Sar+97.8，末端治理设施实际运行率（k值）计算公式为脱硫设施年实际运行小时数/机组年实际运行小时数，②高效二氧化硫末端治理技术：采取空塔提效、强化气液传质、改善pH值分区等措施，满足《燃煤电厂超低排放烟气治理工程技术规范》（HJ2053-2207）相
  关要求。
  。原文件中描述污染物类别为废气，污染物指标为二氧化硫（无烟煤，炉内脱硫），此处对其进行了匹配工作，将其匹配到LCAflow库里面相最符合的流，污染物指标备注为二氧化硫（无烟煤，炉内脱硫）
- sulfur dioxide: nan
  污染物指标二氧化硫（无烟煤，炉内脱硫）的末端治理技术是高效烟气循环流化床法②，其效率为0.95Sar+97，末端治理设施实际运行率（k值）计算公式为脱硫设施年实际运行小时数/机组年实际运行小时数，②高效二氧化硫末端治理技术：采取空塔提效、强化气液传质、改善pH值分区等措施，满足《燃煤电厂超低排放烟气治理工程技术规范》（HJ2053-2208）相
  关要求。
  。原文件中描述污染物类别为废气，污染物指标为二氧化硫（无烟煤，炉内脱硫），此处对其进行了匹配工作，将其匹配到LCAflow库里面相最符合的流，污染物指标备注为二氧化硫（无烟煤，炉内脱硫）
- sulfur dioxide: nan
  污染物指标二氧化硫（无烟煤，炉内脱硫）的末端治理技术是其他（高效湿法脱硫除尘一体化）②，其效率为0.5Sar+97.8，末端治理设施实际运行率（k值）计算公式为脱硫设施年实际运行小时数/机组年实际运行小时数，②高效二氧化硫末端治理技术：采取空塔提效、强化气液传质、改善pH值分区等措施，满足《燃煤电厂超低排放烟气治理工程技术规范》（HJ2053-2209）相
  关要求。
  。原文件中描述污染物类别为废气，污染物指标为二氧化硫（无烟煤，炉内脱硫），此处对其进行了匹配工作，将其匹配到LCAflow库里面相最符合的流，污染物指标备注为二氧化硫（无烟煤，炉内脱硫）
- sulfur dioxide: nan
  污染物指标二氧化硫（无烟煤，炉内脱硫）的末端治理技术是石灰石/石膏法，其效率为4.2857Sar+81.14，末端治理设施实际运行率（k值）计算公式为脱硫设施年实际运行小时数/机组年实际运行小时数。原文件中描述污染物类别为废气，污染物指标为二氧化硫（无烟煤，炉内脱硫），此处对其进行了匹配工作，将其匹配到LCAflow库里面相最符合的流，污染物指标备注为二氧化硫（无烟煤，炉内脱硫）
- sulfur dioxide: nan
  污染物指标二氧化硫（无烟煤，炉内脱硫）的末端治理技术是石灰/石膏法，其效率为4.2857Sar+81.14，末端治理设施实际运行率（k值）计算公式为脱硫设施年实际运行小时数/机组年实际运行小时数。原文件中描述污染物类别为废气，污染物指标为二氧化硫（无烟煤，炉内脱硫），此处对其进行了匹配工作，将其匹配到LCAflow库里面相最符合的流，污染物指标备注为二氧化硫（无烟煤，炉内脱硫）
- sulfur dioxide: nan
  污染物指标二氧化硫（无烟煤，炉内脱硫）的末端治理技术是氨法，其效率为4.2857Sar+81.14，末端治理设施实际运行率（k值）计算公式为脱硫设施年实际运行小时数/机组年实际运行小时数。原文件中描述污染物类别为废气，污染物指标为二氧化硫（无烟煤，炉内脱硫），此处对其进行了匹配工作，将其匹配到LCAflow库里面相最符合的流，污染物指标备注为二氧化硫（无烟煤，炉内脱硫）
- sulfur dioxide: nan
  污染物指标二氧化硫（无烟煤，炉内脱硫）的末端治理技术是其他（电石渣法），其效率为5.1429Sar+79.43，末端治理设施实际运行率（k值）计算公式为脱硫设施年实际运行小时数/机组年实际运行小时数。原文件中描述污染物类别为废气，污染物指标为二氧化硫（无烟煤，炉内脱硫），此处对其进行了匹配工作，将其匹配到LCAflow库里面相最符合的流，污染物指标备注为二氧化硫（无烟煤，炉内脱硫）
- sulfur dioxide: nan
  污染物指标二氧化硫（无烟煤，炉内脱硫）的末端治理技术是其他（钠碱法），其效率为5.1429Sar+79.43，末端治理设施实际运行率（k值）计算公式为脱硫设施年实际运行小时数/机组年实际运行小时数。原文件中描述污染物类别为废气，污染物指标为二氧化硫（无烟煤，炉内脱硫），此处对其进行了匹配工作，将其匹配到LCAflow库里面相最符合的流，污染物指标备注为二氧化硫（无烟煤，炉内脱硫）
- sulfur dioxide: nan
  污染物指标二氧化硫（无烟煤，炉内脱硫）的末端治理技术是双碱法，其效率为5.1429Sar+79.43，末端治理设施实际运行率（k值）计算公式为脱硫设施年实际运行小时数/机组年实际运行小时数。原文件中描述污染物类别为废气，污染物指标为二氧化硫（无烟煤，炉内脱硫），此处对其进行了匹配工作，将其匹配到LCAflow库里面相最符合的流，污染物指标备注为二氧化硫（无烟煤，炉内脱硫）
- sulfur dioxide: nan
  污染物指标二氧化硫（无烟煤，炉内脱硫）的末端治理技术是氧化镁法，其效率为4.2857Sar+81.14，末端治理设施实际运行率（k值）计算公式为脱硫设施年实际运行小时数/机组年实际运行小时数。原文件中描述污染物类别为废气，污染物指标为二氧化硫（无烟煤，炉内脱硫），此处对其进行了匹配工作，将其匹配到LCAflow库里面相最符合的流，污染物指标备注为二氧化硫（无烟煤，炉内脱硫）
- sulfur dioxide: nan
  污染物指标二氧化硫（无烟煤，炉内脱硫）的末端治理技术是烟气循环流化床法，其效率为8.1429Sar+74.29，末端治理设施实际运行率（k值）计算公式为脱硫设施年实际运行小时数/机组年实际运行小时数。原文件中描述污染物类别为废气，污染物指标为二氧化硫（无烟煤，炉内脱硫），此处对其进行了匹配工作，将其匹配到LCAflow库里面相最符合的流，污染物指标备注为二氧化硫（无烟煤，炉内脱硫）
- sulfur dioxide: nan
  污染物指标二氧化硫（无烟煤，炉内脱硫）的末端治理技术是其他（湿法脱硫除尘一体化），其效率为4.2857Sar+81.14，末端治理设施实际运行率（k值）计算公式为脱硫设施年实际运行小时数/机组年实际运行小时数。原文件中描述污染物类别为废气，污染物指标为二氧化硫（无烟煤，炉内脱硫），此处对其进行了匹配工作，将其匹配到LCAflow库里面相最符合的流，污染物指标备注为二氧化硫（无烟煤，炉内脱硫）
- sulfur dioxide: nan
  污染物指标二氧化硫（褐煤，无炉内脱硫）的末端治理技术是高效石灰石/石膏法②，其效率为0.5Sar+98.2，末端治理设施实际运行率（k值）计算公式为脱硫设施年实际运行小时数/机组年实际运行小时数，②高效二氧化硫末端治理技术：采取空塔提效、强化气液传质、改善pH值分区等措施，满足《燃煤电厂超低排放烟气治理工程技术规范》（HJ2053-2210）相
  关要求。
  。原文件中描述污染物类别为废气，污染物指标为二氧化硫（褐煤，无炉内脱硫），此处对其进行了匹配工作，将其匹配到LCAflow库里面相最符合的流，污染物指标备注为二氧化硫（褐煤，无炉内脱硫）
- sulfur dioxide: nan
  污染物指标二氧化硫（褐煤，无炉内脱硫）的末端治理技术是高效石灰/石膏法②，其效率为0.5Sar+98.2，末端治理设施实际运行率（k值）计算公式为脱硫设施年实际运行小时数/机组年实际运行小时数，②高效二氧化硫末端治理技术：采取空塔提效、强化气液传质、改善pH值分区等措施，满足《燃煤电厂超低排放烟气治理工程技术规范》（HJ2053-2211）相
  关要求。
  。原文件中描述污染物类别为废气，污染物指标为二氧化硫（褐煤，无炉内脱硫），此处对其进行了匹配工作，将其匹配到LCAflow库里面相最符合的流，污染物指标备注为二氧化硫（褐煤，无炉内脱硫）
- sulfur dioxide: nan
  污染物指标二氧化硫（褐煤，无炉内脱硫）的末端治理技术是高效氨法②，其效率为0.5Sar+98.2，末端治理设施实际运行率（k值）计算公式为脱硫设施年实际运行小时数/机组年实际运行小时数，②高效二氧化硫末端治理技术：采取空塔提效、强化气液传质、改善pH值分区等措施，满足《燃煤电厂超低排放烟气治理工程技术规范》（HJ2053-2212）相
  关要求。
  。原文件中描述污染物类别为废气，污染物指标为二氧化硫（褐煤，无炉内脱硫），此处对其进行了匹配工作，将其匹配到LCAflow库里面相最符合的流，污染物指标备注为二氧化硫（褐煤，无炉内脱硫）
- sulfur dioxide: nan
  污染物指标二氧化硫（褐煤，无炉内脱硫）的末端治理技术是其他（高效电石渣法）②，其效率为0.6Sar+98，末端治理设施实际运行率（k值）计算公式为脱硫设施年实际运行小时数/机组年实际运行小时数，②高效二氧化硫末端治理技术：采取空塔提效、强化气液传质、改善pH值分区等措施，满足《燃煤电厂超低排放烟气治理工程技术规范》（HJ2053-2213）相
  关要求。
  。原文件中描述污染物类别为废气，污染物指标为二氧化硫（褐煤，无炉内脱硫），此处对其进行了匹配工作，将其匹配到LCAflow库里面相最符合的流，污染物指标备注为二氧化硫（褐煤，无炉内脱硫）
- sulfur dioxide: nan
  污染物指标二氧化硫（褐煤，无炉内脱硫）的末端治理技术是其他（高效钠碱法）②，其效率为0.6Sar+98，末端治理设施实际运行率（k值）计算公式为脱硫设施年实际运行小时数/机组年实际运行小时数，②高效二氧化硫末端治理技术：采取空塔提效、强化气液传质、改善pH值分区等措施，满足《燃煤电厂超低排放烟气治理工程技术规范》（HJ2053-2214）相
  关要求。
  。原文件中描述污染物类别为废气，污染物指标为二氧化硫（褐煤，无炉内脱硫），此处对其进行了匹配工作，将其匹配到LCAflow库里面相最符合的流，污染物指标备注为二氧化硫（褐煤，无炉内脱硫）
- sulfur dioxide: nan
  污染物指标二氧化硫（褐煤，无炉内脱硫）的末端治理技术是高效双碱法②，其效率为0.6Sar+98，末端治理设施实际运行率（k值）计算公式为脱硫设施年实际运行小时数/机组年实际运行小时数，②高效二氧化硫末端治理技术：采取空塔提效、强化气液传质、改善pH值分区等措施，满足《燃煤电厂超低排放烟气治理工程技术规范》（HJ2053-2215）相
  关要求。
  。原文件中描述污染物类别为废气，污染物指标为二氧化硫（褐煤，无炉内脱硫），此处对其进行了匹配工作，将其匹配到LCAflow库里面相最符合的流，污染物指标备注为二氧化硫（褐煤，无炉内脱硫）
- sulfur dioxide: nan
  污染物指标二氧化硫（褐煤，无炉内脱硫）的末端治理技术是高效氧化镁法②，其效率为0.5Sar+98.2，末端治理设施实际运行率（k值）计算公式为脱硫设施年实际运行小时数/机组年实际运行小时数，②高效二氧化硫末端治理技术：采取空塔提效、强化气液传质、改善pH值分区等措施，满足《燃煤电厂超低排放烟气治理工程技术规范》（HJ2053-2216）相
  关要求。
  。原文件中描述污染物类别为废气，污染物指标为二氧化硫（褐煤，无炉内脱硫），此处对其进行了匹配工作，将其匹配到LCAflow库里面相最符合的流，污染物指标备注为二氧化硫（褐煤，无炉内脱硫）
- sulfur dioxide: nan
  污染物指标二氧化硫（褐煤，无炉内脱硫）的末端治理技术是高效烟气循环流化床法②，其效率为0.95Sar+97.5，末端治理设施实际运行率（k值）计算公式为脱硫设施年实际运行小时数/机组年实际运行小时数，②高效二氧化硫末端治理技术：采取空塔提效、强化气液传质、改善pH值分区等措施，满足《燃煤电厂超低排放烟气治理工程技术规范》（HJ2053-2217）相
  关要求。
  。原文件中描述污染物类别为废气，污染物指标为二氧化硫（褐煤，无炉内脱硫），此处对其进行了匹配工作，将其匹配到LCAflow库里面相最符合的流，污染物指标备注为二氧化硫（褐煤，无炉内脱硫）
- sulfur dioxide: nan
  污染物指标二氧化硫（褐煤，无炉内脱硫）的末端治理技术是其他（高效湿法脱硫除尘一体化）②，其效率为0.5Sar+98.2，末端治理设施实际运行率（k值）计算公式为脱硫设施年实际运行小时数/机组年实际运行小时数，②高效二氧化硫末端治理技术：采取空塔提效、强化气液传质、改善pH值分区等措施，满足《燃煤电厂超低排放烟气治理工程技术规范》（HJ2053-2218）相
  关要求。
  。原文件中描述污染物类别为废气，污染物指标为二氧化硫（褐煤，无炉内脱硫），此处对其进行了匹配工作，将其匹配到LCAflow库里面相最符合的流，污染物指标备注为二氧化硫（褐煤，无炉内脱硫）
- sulfur dioxide: nan
  污染物指标二氧化硫（褐煤，无炉内脱硫）的末端治理技术是石灰石/石膏法，其效率为4.2857Sar+84.57，末端治理设施实际运行率（k值）计算公式为脱硫设施年实际运行小时数/机组年实际运行小时数。原文件中描述污染物类别为废气，污染物指标为二氧化硫（褐煤，无炉内脱硫），此处对其进行了匹配工作，将其匹配到LCAflow库里面相最符合的流，污染物指标备注为二氧化硫（褐煤，无炉内脱硫）
- sulfur dioxide: nan
  污染物指标二氧化硫（褐煤，无炉内脱硫）的末端治理技术是石灰/石膏法，其效率为4.2857Sar+84.57，末端治理设施实际运行率（k值）计算公式为脱硫设施年实际运行小时数/机组年实际运行小时数。原文件中描述污染物类别为废气，污染物指标为二氧化硫（褐煤，无炉内脱硫），此处对其进行了匹配工作，将其匹配到LCAflow库里面相最符合的流，污染物指标备注为二氧化硫（褐煤，无炉内脱硫）
- sulfur dioxide: nan
  污染物指标二氧化硫（褐煤，无炉内脱硫）的末端治理技术是氨法，其效率为4.2857Sar+84.57，末端治理设施实际运行率（k值）计算公式为脱硫设施年实际运行小时数/机组年实际运行小时数。原文件中描述污染物类别为废气，污染物指标为二氧化硫（褐煤，无炉内脱硫），此处对其进行了匹配工作，将其匹配到LCAflow库里面相最符合的流，污染物指标备注为二氧化硫（褐煤，无炉内脱硫）
- sulfur dioxide: nan
  污染物指标二氧化硫（褐煤，无炉内脱硫）的末端治理技术是其他（电石渣法），其效率为5.1429Sar+82.86，末端治理设施实际运行率（k值）计算公式为脱硫设施年实际运行小时数/机组年实际运行小时数。原文件中描述污染物类别为废气，污染物指标为二氧化硫（褐煤，无炉内脱硫），此处对其进行了匹配工作，将其匹配到LCAflow库里面相最符合的流，污染物指标备注为二氧化硫（褐煤，无炉内脱硫）
- sulfur dioxide: nan
  污染物指标二氧化硫（褐煤，无炉内脱硫）的末端治理技术是其他（钠碱法），其效率为5.1429Sar+82.86，末端治理设施实际运行率（k值）计算公式为脱硫设施年实际运行小时数/机组年实际运行小时数。原文件中描述污染物类别为废气，污染物指标为二氧化硫（褐煤，无炉内脱硫），此处对其进行了匹配工作，将其匹配到LCAflow库里面相最符合的流，污染物指标备注为二氧化硫（褐煤，无炉内脱硫）
- sulfur dioxide: nan
  污染物指标二氧化硫（褐煤，无炉内脱硫）的末端治理技术是双碱法，其效率为5.1429Sar+82.86，末端治理设施实际运行率（k值）计算公式为脱硫设施年实际运行小时数/机组年实际运行小时数。原文件中描述污染物类别为废气，污染物指标为二氧化硫（褐煤，无炉内脱硫），此处对其进行了匹配工作，将其匹配到LCAflow库里面相最符合的流，污染物指标备注为二氧化硫（褐煤，无炉内脱硫）
- sulfur dioxide: nan
  污染物指标二氧化硫（褐煤，无炉内脱硫）的末端治理技术是氧化镁法，其效率为4.2857Sar+84.57，末端治理设施实际运行率（k值）计算公式为脱硫设施年实际运行小时数/机组年实际运行小时数。原文件中描述污染物类别为废气，污染物指标为二氧化硫（褐煤，无炉内脱硫），此处对其进行了匹配工作，将其匹配到LCAflow库里面相最符合的流，污染物指标备注为二氧化硫（褐煤，无炉内脱硫）
- sulfur dioxide: nan
  污染物指标二氧化硫（褐煤，无炉内脱硫）的末端治理技术是烟气循环流化床法，其效率为8.1429Sar+78.57，末端治理设施实际运行率（k值）计算公式为脱硫设施年实际运行小时数/机组年实际运行小时数。原文件中描述污染物类别为废气，污染物指标为二氧化硫（褐煤，无炉内脱硫），此处对其进行了匹配工作，将其匹配到LCAflow库里面相最符合的流，污染物指标备注为二氧化硫（褐煤，无炉内脱硫）
- sulfur dioxide: nan
  污染物指标二氧化硫（褐煤，无炉内脱硫）的末端治理技术是其他（湿法脱硫除尘一体化），其效率为4.2857Sar+84.57，末端治理设施实际运行率（k值）计算公式为脱硫设施年实际运行小时数/机组年实际运行小时数。原文件中描述污染物类别为废气，污染物指标为二氧化硫（褐煤，无炉内脱硫），此处对其进行了匹配工作，将其匹配到LCAflow库里面相最符合的流，污染物指标备注为二氧化硫（褐煤，无炉内脱硫）
- sulfur dioxide: nan
  污染物指标二氧化硫（褐煤，炉内脱硫）的末端治理技术是高效石灰石/石膏法②，其效率为0.5Sar+97.8，末端治理设施实际运行率（k值）计算公式为脱硫设施年实际运行小时数/机组年实际运行小时数，②高效二氧化硫末端治理技术：采取空塔提效、强化气液传质、改善pH值分区等措施，满足《燃煤电厂超低排放烟气治理工程技术规范》（HJ2053-2219）相
  关要求。
  。原文件中描述污染物类别为废气，污染物指标为二氧化硫（褐煤，炉内脱硫），此处对其进行了匹配工作，将其匹配到LCAflow库里面相最符合的流，污染物指标备注为二氧化硫（褐煤，炉内脱硫）
- sulfur dioxide: nan
  污染物指标二氧化硫（褐煤，炉内脱硫）的末端治理技术是高效石灰/石膏法②，其效率为0.5Sar+97.8，末端治理设施实际运行率（k值）计算公式为脱硫设施年实际运行小时数/机组年实际运行小时数，②高效二氧化硫末端治理技术：采取空塔提效、强化气液传质、改善pH值分区等措施，满足《燃煤电厂超低排放烟气治理工程技术规范》（HJ2053-2220）相
  关要求。
  。原文件中描述污染物类别为废气，污染物指标为二氧化硫（褐煤，炉内脱硫），此处对其进行了匹配工作，将其匹配到LCAflow库里面相最符合的流，污染物指标备注为二氧化硫（褐煤，炉内脱硫）
- sulfur dioxide: nan
  污染物指标二氧化硫（褐煤，炉内脱硫）的末端治理技术是高效氨法②，其效率为0.5Sar+97.8，末端治理设施实际运行率（k值）计算公式为脱硫设施年实际运行小时数/机组年实际运行小时数，②高效二氧化硫末端治理技术：采取空塔提效、强化气液传质、改善pH值分区等措施，满足《燃煤电厂超低排放烟气治理工程技术规范》（HJ2053-2221）相
  关要求。
  。原文件中描述污染物类别为废气，污染物指标为二氧化硫（褐煤，炉内脱硫），此处对其进行了匹配工作，将其匹配到LCAflow库里面相最符合的流，污染物指标备注为二氧化硫（褐煤，炉内脱硫）
- sulfur dioxide: nan
  污染物指标二氧化硫（褐煤，炉内脱硫）的末端治理技术是其他（高效电石渣法）②，其效率为0.6Sar+97.6，末端治理设施实际运行率（k值）计算公式为脱硫设施年实际运行小时数/机组年实际运行小时数，②高效二氧化硫末端治理技术：采取空塔提效、强化气液传质、改善pH值分区等措施，满足《燃煤电厂超低排放烟气治理工程技术规范》（HJ2053-2222）相
  关要求。
  。原文件中描述污染物类别为废气，污染物指标为二氧化硫（褐煤，炉内脱硫），此处对其进行了匹配工作，将其匹配到LCAflow库里面相最符合的流，污染物指标备注为二氧化硫（褐煤，炉内脱硫）
- sulfur dioxide: nan
  污染物指标二氧化硫（褐煤，炉内脱硫）的末端治理技术是其他（高效钠碱法）②，其效率为0.6Sar+97.6，末端治理设施实际运行率（k值）计算公式为脱硫设施年实际运行小时数/机组年实际运行小时数，②高效二氧化硫末端治理技术：采取空塔提效、强化气液传质、改善pH值分区等措施，满足《燃煤电厂超低排放烟气治理工程技术规范》（HJ2053-2223）相
  关要求。
  。原文件中描述污染物类别为废气，污染物指标为二氧化硫（褐煤，炉内脱硫），此处对其进行了匹配工作，将其匹配到LCAflow库里面相最符合的流，污染物指标备注为二氧化硫（褐煤，炉内脱硫）
- sulfur dioxide: nan
  污染物指标二氧化硫（褐煤，炉内脱硫）的末端治理技术是高效双碱法②，其效率为0.6Sar+97.6，末端治理设施实际运行率（k值）计算公式为脱硫设施年实际运行小时数/机组年实际运行小时数，②高效二氧化硫末端治理技术：采取空塔提效、强化气液传质、改善pH值分区等措施，满足《燃煤电厂超低排放烟气治理工程技术规范》（HJ2053-2224）相
  关要求。
  。原文件中描述污染物类别为废气，污染物指标为二氧化硫（褐煤，炉内脱硫），此处对其进行了匹配工作，将其匹配到LCAflow库里面相最符合的流，污染物指标备注为二氧化硫（褐煤，炉内脱硫）
- sulfur dioxide: nan
  污染物指标二氧化硫（褐煤，炉内脱硫）的末端治理技术是高效氧化镁法②，其效率为0.5Sar+97.8，末端治理设施实际运行率（k值）计算公式为脱硫设施年实际运行小时数/机组年实际运行小时数，②高效二氧化硫末端治理技术：采取空塔提效、强化气液传质、改善pH值分区等措施，满足《燃煤电厂超低排放烟气治理工程技术规范》（HJ2053-2225）相
  关要求。
  。原文件中描述污染物类别为废气，污染物指标为二氧化硫（褐煤，炉内脱硫），此处对其进行了匹配工作，将其匹配到LCAflow库里面相最符合的流，污染物指标备注为二氧化硫（褐煤，炉内脱硫）
- sulfur dioxide: nan
  污染物指标二氧化硫（褐煤，炉内脱硫）的末端治理技术是高效烟气循环流化床法②，其效率为0.95Sar+97，末端治理设施实际运行率（k值）计算公式为脱硫设施年实际运行小时数/机组年实际运行小时数，②高效二氧化硫末端治理技术：采取空塔提效、强化气液传质、改善pH值分区等措施，满足《燃煤电厂超低排放烟气治理工程技术规范》（HJ2053-2226）相
  关要求。
  。原文件中描述污染物类别为废气，污染物指标为二氧化硫（褐煤，炉内脱硫），此处对其进行了匹配工作，将其匹配到LCAflow库里面相最符合的流，污染物指标备注为二氧化硫（褐煤，炉内脱硫）
- sulfur dioxide: nan
  污染物指标二氧化硫（褐煤，炉内脱硫）的末端治理技术是其他（高效湿法脱硫除尘一体化）②，其效率为0.5Sar+97.8，末端治理设施实际运行率（k值）计算公式为脱硫设施年实际运行小时数/机组年实际运行小时数，②高效二氧化硫末端治理技术：采取空塔提效、强化气液传质、改善pH值分区等措施，满足《燃煤电厂超低排放烟气治理工程技术规范》（HJ2053-2227）相
  关要求。
  。原文件中描述污染物类别为废气，污染物指标为二氧化硫（褐煤，炉内脱硫），此处对其进行了匹配工作，将其匹配到LCAflow库里面相最符合的流，污染物指标备注为二氧化硫（褐煤，炉内脱硫）
- sulfur dioxide: nan
  污染物指标二氧化硫（褐煤，炉内脱硫）的末端治理技术是石灰石/石膏法，其效率为4.2857Sar+81.14，末端治理设施实际运行率（k值）计算公式为脱硫设施年实际运行小时数/机组年实际运行小时数。原文件中描述污染物类别为废气，污染物指标为二氧化硫（褐煤，炉内脱硫），此处对其进行了匹配工作，将其匹配到LCAflow库里面相最符合的流，污染物指标备注为二氧化硫（褐煤，炉内脱硫）
- sulfur dioxide: nan
  污染物指标二氧化硫（褐煤，炉内脱硫）的末端治理技术是石灰/石膏法，其效率为4.2857Sar+81.14，末端治理设施实际运行率（k值）计算公式为脱硫设施年实际运行小时数/机组年实际运行小时数。原文件中描述污染物类别为废气，污染物指标为二氧化硫（褐煤，炉内脱硫），此处对其进行了匹配工作，将其匹配到LCAflow库里面相最符合的流，污染物指标备注为二氧化硫（褐煤，炉内脱硫）
- sulfur dioxide: nan
  污染物指标二氧化硫（褐煤，炉内脱硫）的末端治理技术是氨法，其效率为4.2857Sar+81.14，末端治理设施实际运行率（k值）计算公式为脱硫设施年实际运行小时数/机组年实际运行小时数。原文件中描述污染物类别为废气，污染物指标为二氧化硫（褐煤，炉内脱硫），此处对其进行了匹配工作，将其匹配到LCAflow库里面相最符合的流，污染物指标备注为二氧化硫（褐煤，炉内脱硫）
- sulfur dioxide: nan
  污染物指标二氧化硫（褐煤，炉内脱硫）的末端治理技术是其他（电石渣法），其效率为5.1429Sar+79.43，末端治理设施实际运行率（k值）计算公式为脱硫设施年实际运行小时数/机组年实际运行小时数。原文件中描述污染物类别为废气，污染物指标为二氧化硫（褐煤，炉内脱硫），此处对其进行了匹配工作，将其匹配到LCAflow库里面相最符合的流，污染物指标备注为二氧化硫（褐煤，炉内脱硫）
- sulfur dioxide: nan
  污染物指标二氧化硫（褐煤，炉内脱硫）的末端治理技术是其他（钠碱法），其效率为5.1429Sar+79.43，末端治理设施实际运行率（k值）计算公式为脱硫设施年实际运行小时数/机组年实际运行小时数。原文件中描述污染物类别为废气，污染物指标为二氧化硫（褐煤，炉内脱硫），此处对其进行了匹配工作，将其匹配到LCAflow库里面相最符合的流，污染物指标备注为二氧化硫（褐煤，炉内脱硫）
- sulfur dioxide: nan
  污染物指标二氧化硫（褐煤，炉内脱硫）的末端治理技术是双碱法，其效率为5.1429Sar+79.43，末端治理设施实际运行率（k值）计算公式为脱硫设施年实际运行小时数/机组年实际运行小时数。原文件中描述污染物类别为废气，污染物指标为二氧化硫（褐煤，炉内脱硫），此处对其进行了匹配工作，将其匹配到LCAflow库里面相最符合的流，污染物指标备注为二氧化硫（褐煤，炉内脱硫）
- sulfur dioxide: nan
  污染物指标二氧化硫（褐煤，炉内脱硫）的末端治理技术是氧化镁法，其效率为4.2857Sar+81.14，末端治理设施实际运行率（k值）计算公式为脱硫设施年实际运行小时数/机组年实际运行小时数。原文件中描述污染物类别为废气，污染物指标为二氧化硫（褐煤，炉内脱硫），此处对其进行了匹配工作，将其匹配到LCAflow库里面相最符合的流，污染物指标备注为二氧化硫（褐煤，炉内脱硫）
- sulfur dioxide: nan
  污染物指标二氧化硫（褐煤，炉内脱硫）的末端治理技术是烟气循环流化床法，其效率为8.1429Sar+74.29，末端治理设施实际运行率（k值）计算公式为脱硫设施年实际运行小时数/机组年实际运行小时数。原文件中描述污染物类别为废气，污染物指标为二氧化硫（褐煤，炉内脱硫），此处对其进行了匹配工作，将其匹配到LCAflow库里面相最符合的流，污染物指标备注为二氧化硫（褐煤，炉内脱硫）
- sulfur dioxide: nan
  污染物指标二氧化硫（褐煤，炉内脱硫）的末端治理技术是其他（湿法脱硫除尘一体化），其效率为4.2857Sar+81.14，末端治理设施实际运行率（k值）计算公式为脱硫设施年实际运行小时数/机组年实际运行小时数。原文件中描述污染物类别为废气，污染物指标为二氧化硫（褐煤，炉内脱硫），此处对其进行了匹配工作，将其匹配到LCAflow库里面相最符合的流，污染物指标备注为二氧化硫（褐煤，炉内脱硫）
- Nitrogen oxides: 3.06
  污染物指标氮氧化物，煤炭干燥无灰基挥发分小于等于10%的末端治理技术是其他（直排），末端治理设施实际运行率（k值）计算公式为脱硝设施年实际运行小时数/机组年实际运行小时数。原文件中描述污染物类别为废气，污染物指标为氮氧化物，煤炭干燥无灰基挥发分小于等于10%，此处对其进行了匹配工作，将其匹配到LCAflow库里面相最符合的流，污染物指标备注为氮氧化物，煤炭干燥无灰基挥发分小于等于10%
- Nitrogen oxides: 0.612
  污染物指标氮氧化物，煤炭干燥无灰基挥发分小于等于10%的末端治理技术是高效选择性催化还原法（SCR）③，其效率为80，末端治理设施实际运行率（k值）计算公式为脱硝设施年实际运行小时数/机组年实际运行小时数，③高效氮氧化物末端治理技术：采取高效低氮燃烧技术、增设脱硝催化剂层数等措施，满足《燃煤电厂超低排放烟气治理工程技术规范》（HJ2053-2107）相关
  要求。。原文件中描述污染物类别为废气，污染物指标为氮氧化物，煤炭干燥无灰基挥发分小于等于10%，此处对其进行了匹配工作，将其匹配到LCAflow库里面相最符合的流，污染物指标备注为氮氧化物，煤炭干燥无灰基挥发分小于等于10%
- Nitrogen oxides: 0.765
  污染物指标氮氧化物，煤炭干燥无灰基挥发分小于等于10%的末端治理技术是选择性催化还原法（SCR），其效率为75，末端治理设施实际运行率（k值）计算公式为脱硝设施年实际运行小时数/机组年实际运行小时数。原文件中描述污染物类别为废气，污染物指标为氮氧化物，煤炭干燥无灰基挥发分小于等于10%，此处对其进行了匹配工作，将其匹配到LCAflow库里面相最符合的流，污染物指标备注为氮氧化物，煤炭干燥无灰基挥发分小于等于10%
- Nitrogen oxides: 3.06
  污染物指标氮氧化物，10%小于煤炭干燥无灰基挥发分小于等于20%的末端治理技术是其他（直排），末端治理设施实际运行率（k值）计算公式为脱硝设施年实际运行小时数/机组年实际运行小时数。原文件中描述污染物类别为废气，污染物指标为氮氧化物，10%小于煤炭干燥无灰基挥发分小于等于20%，此处对其进行了匹配工作，将其匹配到LCAflow库里面相最符合的流，污染物指标备注为氮氧化物，10%小于煤炭干燥无灰基挥发分小于等于20%
- Nitrogen oxides: 0.612
  污染物指标氮氧化物，10%小于煤炭干燥无灰基挥发分小于等于20%的末端治理技术是高效选择性催化还原法（SCR）③，其效率为80，末端治理设施实际运行率（k值）计算公式为脱硝设施年实际运行小时数/机组年实际运行小时数，③高效氮氧化物末端治理技术：采取高效低氮燃烧技术、增设脱硝催化剂层数等措施，满足《燃煤电厂超低排放烟气治理工程技术规范》（HJ2053-2108）相关
  要求。。原文件中描述污染物类别为废气，污染物指标为氮氧化物，10%小于煤炭干燥无灰基挥发分小于等于20%，此处对其进行了匹配工作，将其匹配到LCAflow库里面相最符合的流，污染物指标备注为氮氧化物，10%小于煤炭干燥无灰基挥发分小于等于20%
- Nitrogen oxides: 0.765
  污染物指标氮氧化物，10%小于煤炭干燥无灰基挥发分小于等于20%的末端治理技术是选择性催化还原法（SCR），其效率为75，末端治理设施实际运行率（k值）计算公式为脱硝设施年实际运行小时数/机组年实际运行小时数。原文件中描述污染物类别为废气，污染物指标为氮氧化物，10%小于煤炭干燥无灰基挥发分小于等于20%，此处对其进行了匹配工作，将其匹配到LCAflow库里面相最符合的流，污染物指标备注为氮氧化物，10%小于煤炭干燥无灰基挥发分小于等于20%
- Nitrogen oxides: 3.09
  污染物指标氮氧化物，20%小于煤炭干燥无灰基挥发分小于等于37%的末端治理技术是其他（直排），末端治理设施实际运行率（k值）计算公式为脱硝设施年实际运行小时数/机组年实际运行小时数。原文件中描述污染物类别为废气，污染物指标为氮氧化物，20%小于煤炭干燥无灰基挥发分小于等于37%，此处对其进行了匹配工作，将其匹配到LCAflow库里面相最符合的流，污染物指标备注为氮氧化物，20%小于煤炭干燥无灰基挥发分小于等于37%
- Nitrogen oxides: 0.618
  污染物指标氮氧化物，20%小于煤炭干燥无灰基挥发分小于等于37%的末端治理技术是高效选择性催化还原法（SCR）③，其效率为80，末端治理设施实际运行率（k值）计算公式为脱硝设施年实际运行小时数/机组年实际运行小时数，③高效氮氧化物末端治理技术：采取高效低氮燃烧技术、增设脱硝催化剂层数等措施，满足《燃煤电厂超低排放烟气治理工程技术规范》（HJ2053-2109）相关
  要求。。原文件中描述污染物类别为废气，污染物指标为氮氧化物，20%小于煤炭干燥无灰基挥发分小于等于37%，此处对其进行了匹配工作，将其匹配到LCAflow库里面相最符合的流，污染物指标备注为氮氧化物，20%小于煤炭干燥无灰基挥发分小于等于37%
- Nitrogen oxides: 0.7725
  污染物指标氮氧化物，20%小于煤炭干燥无灰基挥发分小于等于37%的末端治理技术是选择性催化还原法（SCR），其效率为75，末端治理设施实际运行率（k值）计算公式为脱硝设施年实际运行小时数/机组年实际运行小时数。原文件中描述污染物类别为废气，污染物指标为氮氧化物，20%小于煤炭干燥无灰基挥发分小于等于37%，此处对其进行了匹配工作，将其匹配到LCAflow库里面相最符合的流，污染物指标备注为氮氧化物，20%小于煤炭干燥无灰基挥发分小于等于37%
- Nitrogen oxides: 1.75
  污染物指标氮氧化物，煤炭干燥无灰基挥发分>37%的末端治理技术是其他（直排），末端治理设施实际运行率（k值）计算公式为脱硝设施年实际运行小时数/机组年实际运行小时数。原文件中描述污染物类别为废气，污染物指标为氮氧化物，煤炭干燥无灰基挥发分>37%，此处对其进行了匹配工作，将其匹配到LCAflow库里面相最符合的流，污染物指标备注为氮氧化物，煤炭干燥无灰基挥发分>37%
- Nitrogen oxides: 0.35
  污染物指标氮氧化物，煤炭干燥无灰基挥发分>37%的末端治理技术是高效选择性催化还原法（SCR）③，其效率为80，末端治理设施实际运行率（k值）计算公式为脱硝设施年实际运行小时数/机组年实际运行小时数，③高效氮氧化物末端治理技术：采取高效低氮燃烧技术、增设脱硝催化剂层数等措施，满足《燃煤电厂超低排放烟气治理工程技术规范》（HJ2053-2110）相关
  要求。。原文件中描述污染物类别为废气，污染物指标为氮氧化物，煤炭干燥无灰基挥发分>37%，此处对其进行了匹配工作，将其匹配到LCAflow库里面相最符合的流，污染物指标备注为氮氧化物，煤炭干燥无灰基挥发分>37%
- Nitrogen oxides: 0.4375
  污染物指标氮氧化物，煤炭干燥无灰基挥发分>37%的末端治理技术是选择性催化还原法（SCR），其效率为75，末端治理设施实际运行率（k值）计算公式为脱硝设施年实际运行小时数/机组年实际运行小时数。原文件中描述污染物类别为废气，污染物指标为氮氧化物，煤炭干燥无灰基挥发分>37%，此处对其进行了匹配工作，将其匹配到LCAflow库里面相最符合的流，污染物指标备注为氮氧化物，煤炭干燥无灰基挥发分>37%
- Nitrogen oxides: 1.83
  污染物指标氮氧化物（SNCR，煤炭干燥无灰基挥发分小于等于10%）的末端治理技术是其他（直排），末端治理设施实际运行率（k值）计算公式为脱硝设施年实际运行小时数/机组年实际运行小时数。原文件中描述污染物类别为废气，污染物指标为氮氧化物（SNCR，煤炭干燥无灰基挥发分小于等于10%），此处对其进行了匹配工作，将其匹配到LCAflow库里面相最符合的流，污染物指标备注为氮氧化物（SNCR，煤炭干燥无灰基挥发分小于等于10%）
- Nitrogen oxides: 0.5124
  污染物指标氮氧化物（SNCR，煤炭干燥无灰基挥发分小于等于10%）的末端治理技术是高效选择性催化还原法（SCR）③，其效率为72，末端治理设施实际运行率（k值）计算公式为脱硝设施年实际运行小时数/机组年实际运行小时数，③高效氮氧化物末端治理技术：采取高效低氮燃烧技术、增设脱硝催化剂层数等措施，满足《燃煤电厂超低排放烟气治理工程技术规范》（HJ2053-2111）相关
  要求。。原文件中描述污染物类别为废气，污染物指标为氮氧化物（SNCR，煤炭干燥无灰基挥发分小于等于10%），此处对其进行了匹配工作，将其匹配到LCAflow库里面相最符合的流，污染物指标备注为氮氧化物（SNCR，煤炭干燥无灰基挥发分小于等于10%）
- Nitrogen oxides: 0.6405
  污染物指标氮氧化物（SNCR，煤炭干燥无灰基挥发分小于等于10%）的末端治理技术是选择性催化还原法（SCR），其效率为65，末端治理设施实际运行率（k值）计算公式为脱硝设施年实际运行小时数/机组年实际运行小时数。原文件中描述污染物类别为废气，污染物指标为氮氧化物（SNCR，煤炭干燥无灰基挥发分小于等于10%），此处对其进行了匹配工作，将其匹配到LCAflow库里面相最符合的流，污染物指标备注为氮氧化物（SNCR，煤炭干燥无灰基挥发分小于等于10%）
- Nitrogen oxides: 1.83
  污染物指标氮氧化物（SNCR，10%小于煤炭干燥无灰基挥发分小于等于20%）的末端治理技术是其他（直排），末端治理设施实际运行率（k值）计算公式为脱硝设施年实际运行小时数/机组年实际运行小时数。原文件中描述污染物类别为废气，污染物指标为氮氧化物（SNCR，10%小于煤炭干燥无灰基挥发分小于等于20%），此处对其进行了匹配工作，将其匹配到LCAflow库里面相最符合的流，污染物指标备注为氮氧化物（SNCR，10%小于煤炭干燥无灰基挥发分小于等于20%）
- Nitrogen oxides: 0.5124
  污染物指标氮氧化物（SNCR，10%小于煤炭干燥无灰基挥发分小于等于20%）的末端治理技术是高效选择性催化还原法（SCR）③，其效率为72，末端治理设施实际运行率（k值）计算公式为脱硝设施年实际运行小时数/机组年实际运行小时数，③高效氮氧化物末端治理技术：采取高效低氮燃烧技术、增设脱硝催化剂层数等措施，满足《燃煤电厂超低排放烟气治理工程技术规范》（HJ2053-2112）相关
  要求。。原文件中描述污染物类别为废气，污染物指标为氮氧化物（SNCR，10%小于煤炭干燥无灰基挥发分小于等于20%），此处对其进行了匹配工作，将其匹配到LCAflow库里面相最符合的流，污染物指标备注为氮氧化物（SNCR，10%小于煤炭干燥无灰基挥发分小于等于20%）
- Nitrogen oxides: 0.6405
  污染物指标氮氧化物（SNCR，10%小于煤炭干燥无灰基挥发分小于等于20%）的末端治理技术是选择性催化还原法（SCR），其效率为65，末端治理设施实际运行率（k值）计算公式为脱硝设施年实际运行小时数/机组年实际运行小时数。原文件中描述污染物类别为废气，污染物指标为氮氧化物（SNCR，10%小于煤炭干燥无灰基挥发分小于等于20%），此处对其进行了匹配工作，将其匹配到LCAflow库里面相最符合的流，污染物指标备注为氮氧化物（SNCR，10%小于煤炭干燥无灰基挥发分小于等于20%）
- Nitrogen oxides: 1.52
  污染物指标氮氧化物（SNCR，20%小于煤炭干燥无灰基挥发分小于等于37%）的末端治理技术是其他（直排），末端治理设施实际运行率（k值）计算公式为脱硝设施年实际运行小时数/机组年实际运行小时数。原文件中描述污染物类别为废气，污染物指标为氮氧化物（SNCR，20%小于煤炭干燥无灰基挥发分小于等于37%），此处对其进行了匹配工作，将其匹配到LCAflow库里面相最符合的流，污染物指标备注为氮氧化物（SNCR，20%小于煤炭干燥无灰基挥发分小于等于37%）
- Nitrogen oxides: 0.456
  污染物指标氮氧化物（SNCR，20%小于煤炭干燥无灰基挥发分小于等于37%）的末端治理技术是高效选择性催化还原法（SCR）③，其效率为70，末端治理设施实际运行率（k值）计算公式为脱硝设施年实际运行小时数/机组年实际运行小时数，③高效氮氧化物末端治理技术：采取高效低氮燃烧技术、增设脱硝催化剂层数等措施，满足《燃煤电厂超低排放烟气治理工程技术规范》（HJ2053-2113）相关
  要求。。原文件中描述污染物类别为废气，污染物指标为氮氧化物（SNCR，20%小于煤炭干燥无灰基挥发分小于等于37%），此处对其进行了匹配工作，将其匹配到LCAflow库里面相最符合的流，污染物指标备注为氮氧化物（SNCR，20%小于煤炭干燥无灰基挥发分小于等于37%）
- Nitrogen oxides: 0.532
  污染物指标氮氧化物（SNCR，20%小于煤炭干燥无灰基挥发分小于等于37%）的末端治理技术是选择性催化还原法（SCR），其效率为65，末端治理设施实际运行率（k值）计算公式为脱硝设施年实际运行小时数/机组年实际运行小时数。原文件中描述污染物类别为废气，污染物指标为氮氧化物（SNCR，20%小于煤炭干燥无灰基挥发分小于等于37%），此处对其进行了匹配工作，将其匹配到LCAflow库里面相最符合的流，污染物指标备注为氮氧化物（SNCR，20%小于煤炭干燥无灰基挥发分小于等于37%）
- Nitrogen oxides: 0.89
  污染物指标氮氧化物（SNCR，煤炭干燥无灰基挥发分>37%）的末端治理技术是其他（直排），末端治理设施实际运行率（k值）计算公式为脱硝设施年实际运行小时数/机组年实际运行小时数。原文件中描述污染物类别为废气，污染物指标为氮氧化物（SNCR，煤炭干燥无灰基挥发分>37%），此处对其进行了匹配工作，将其匹配到LCAflow库里面相最符合的流，污染物指标备注为氮氧化物（SNCR，煤炭干燥无灰基挥发分>37%）
- Nitrogen oxides: 0.267
  污染物指标氮氧化物（SNCR，煤炭干燥无灰基挥发分>37%）的末端治理技术是高效选择性催化还原法（SCR）③，其效率为70，末端治理设施实际运行率（k值）计算公式为脱硝设施年实际运行小时数/机组年实际运行小时数，③高效氮氧化物末端治理技术：采取高效低氮燃烧技术、增设脱硝催化剂层数等措施，满足《燃煤电厂超低排放烟气治理工程技术规范》（HJ2053-2114）相关
  要求。。原文件中描述污染物类别为废气，污染物指标为氮氧化物（SNCR，煤炭干燥无灰基挥发分>37%），此处对其进行了匹配工作，将其匹配到LCAflow库里面相最符合的流，污染物指标备注为氮氧化物（SNCR，煤炭干燥无灰基挥发分>37%）
- Nitrogen oxides: 0.3115
  污染物指标氮氧化物（SNCR，煤炭干燥无灰基挥发分>37%）的末端治理技术是选择性催化还原法（SCR），其效率为65，末端治理设施实际运行率（k值）计算公式为脱硝设施年实际运行小时数/机组年实际运行小时数。原文件中描述污染物类别为废气，污染物指标为氮氧化物（SNCR，煤炭干燥无灰基挥发分>37%），此处对其进行了匹配工作，将其匹配到LCAflow库里面相最符合的流，污染物指标备注为氮氧化物（SNCR，煤炭干燥无灰基挥发分>37%）
- mercury: nan
  污染物指标汞及其化合物的末端治理技术是协同脱汞，其效率为25.73MHgar+84.12，末端治理设施实际运行率（k值）计算公式为取该机组除尘、脱硝脱硫K的最小值。原文件中描述污染物类别为废气，污染物指标为汞及其化合物，此处对其进行了匹配工作，将其匹配到LCAflow库里面相最符合的流，污染物指标备注为汞及其化合物
- volatile organic compound: nan
  污染物指标挥发性有机物的末端治理技术是/。原文件中描述污染物类别为废气，污染物指标为挥发性有机物，此处对其进行了匹配工作，将其匹配到LCAflow库里面相最符合的流，污染物指标备注为挥发性有机物

## Use advice
This dataset is derived from the Pollution Source Census Report and contains information on pollution emissions and related products. However, it does not include data on energy or chemical consumption, nor does it provide information on waste or co-product generation. When utilizing this dataset, please supplement the missing data based on actual conditions before use
该数据集来源于污染源普查报告，包含污染物排放及相关产品信息，但不包含能源或化学品消耗数据，也不提供废弃物或共生产物产生信息。在使用该数据集时，请根据实际情况补充缺失数据后再使用。

## Review details
Inventory: The internal review was done by several iteration steps concerning raw data validation, raw data documentation, representativity, completeness and consistency of modelling with regard to ISO 14040 and 14044.
清单： 内部审查通过几个迭代步骤完成，涉及原始数据验证、原始数据记录、代表性、完整性、与 ISO 14040 和 14044 有关的建模的一致性。

## Data sources
- 第二次全国污染源普查产排污核算系数手册（试用版）,四级代码4411、4412文件，在完整版文件中第5333页
