# Extraction well ; Groundwater ex-situ remediation ; Pump and treatment

Dataset: ILCD process, Unit process, single operation
Geography: JS-CN
Reference year: 2022
Classification: Unit processes / Other Services / Repair and maintenance
Generated by: Wang Ning, wang_ning@caep.org.cn
Owner: Tiangong LCI Data Working Group
Review: Dependent internal review by Tiangong LCI Data Working Group
Amounts: no units in this file; such an amount is in the reference unit of its flow, which a separate flow dataset defines
copyright: false
licenseType: Free of charge for all users and uses

## General comment
Construction of extraction wells using polyvinyl chloride、cement、sillica sand、steel、electricity

## Geography
a closed pesticide manufacturing plant located in Jiangsu Province, China.

## Technical purpose
The extraction wells constructed using polyvinyl chloride (PVC), cement, silica sand, steel, and electricity are intended for groundwater ex-situ remediation associated with a closed pesticide manufacturing plant in Jiangsu Province, China. These wells are part of a pump and treatment system designed to manage and remediate contaminated groundwater.

## Reference product
- Extraction wel: 1; measured

## Inputs
- Polyvinyl chloride: 38.1; measured
- cement, unspecified: 1074.88; measured
- quartz sand: 2836.86; measured
- Steel sections: 50; measured
- Electricity: 760.32; measured
- transport in t*km: 399.984; calculated

## Use advice
Users of the data set which describes the construction of extraction wells for groundwater remediation should consider the specific site conditions, such as contaminant type and concentration, when applying this data in life cycle assessments. It is essential to ensure compatibility with local environmental regulations and remedial objectives. The set data excludes the operations during the use phase, maintenance, and potential end-of-life recycling of materials. Users must model these aspects independently according to the specific situation of the remediation site.

## Review details
Inventory: The internal review was done by several iteration steps concerning raw data validation, raw data documentation, representativity, completeness and consistency of modelling with regard to ISO 14040 and 14044.

## Data sources
- Ding, D. et al. Assessing the environmental impacts and costs of biochar and monitored natural attenuation for groundwater heavily contaminated with volatile organic compounds. Science of The Total Environment 846, 157316 (2022).
