# 修复后土壤;挖掘填埋;铁路运输;废弃盐矿

Dataset: ILCD process, Unit process, black box
Geography: SI
Reference year: 2018
Classification: Unit processes / Other Services / Repair and maintenance
Functional unit: The functional unit was the management of 1.0 m3 of contaminated soil at the Old Zinc-Works site. A time horizon of 100 years was assumed.
Generated by: 杨欣桐, yangxt@caep.org.cn
Owner: 天工LCI数据工作小组
Review: Dependent internal review by 天工LCI数据工作小组
Amounts: no units in this file; such an amount is in the reference unit of its flow, which a separate flow dataset defines
copyright: false
licenseType: Free of charge for all users and uses

## General comment
挖掘和填埋是将受污染土壤挖掘出来,运至合适的场地填埋,以隔离有害物质。

## Geography
本研究涉及在Celje镇（斯洛文尼亚东部）的旧锌厂现场进行的修复活动。

## Technology and included processes
挖掘出的受污染土壤已从现场清除。挖出的坑被废石回填了。从现场挖出的受污染土壤被认为是通过铁路运到地下废物处理地点（假设地点在一些废弃的盐矿内）。

## Technical purpose
描述的工业过程涉及通过挖掘和填埋方法对受污染土壤的修复，专门针对诸如斯洛文尼亚Celje镇的旧锌厂这样的污染场地进行管理。该过程用于通过移除受污染的土壤、通过铁路运输、并在废弃的盐矿中安全填埋，从而隔离环境中的有害物质。这为工业场地恢复项目中有害材料的长期管理提供了解决方案。

## Reference product
- Remediated soil: 1; estimated

## Inputs
All rows: estimated
- Diesel,Diesel: 0.00169
  Soil excavation
- Electricity: 90.864
  Transport of contaminated soil to the underground waste disposal location, by rail (1000 km)
- Waste rock: 1
  Reclamation of the degraded site
- Diesel,Diesel: 0.00072
  Delivery of the ﬁll material (waste rock) (35 km)
- Diesel,Diesel: 0.00058
  Spreading and compaction of the waste rock
- Polyethylene,Polyethylene: 6.76
  Contaminated soil landﬁlling at the underground waste disposal location
- Wooden pallet (EURO): 9.41
  Contaminated soil landﬁlling at the underground waste disposal location
- Brick: 8.95
  Contaminated soil landﬁlling at the underground waste disposal location
- Mortar: 0.7
  Contaminated soil landﬁlling at the underground waste disposal location
- Electricity: 2.376
  Operation of the underground waste disposal location (illumination, ventilation)
- contaminated soil: 1

## Use advice
数据集用户必须考虑已为100年时间范围建模的土壤修复过程的具体环境。确保该过程适用于有关危险材料运输和填埋的当地地理和法规。如果在不同的环境中应用，用户应根据新场地的特点以及实际运输方式（如果与铁路不同）调整数据集。还应注意填埋场地的维护和监测，以及挖出材料的回收或再利用潜力。

## Review details
清单： 内部审查通过几个迭代步骤完成，涉及原始数据验证、原始数据记录、代表性、完整性、与 ISO 14040 和 14044 有关的建模的一致性。

## Data sources
- Pranjić M A ,Oprčkal P ,Mladenovič A , et al. Comparative Life Cycle Assessment of possible methods for the treatment of contaminated soil at an environmentally degraded site. Journal of Environmental Management, 2018, 218 497-508.
