# 合成石墨生产;合成石墨;炭黑、石油焦

Dataset: ILCD process, Unit process, single operation
Geography: YA-SC-CN
Classification: Materials production / Non-energetic raw materials
Functional unit: Produce 1kg of synthetic graphite
LCI method principle: Attributional
Generated by: 陈鑫, xinchen@mail.nankai.edu.cn
Owner: 天工LCI数据工作小组
Review: Dependent internal review by 天工LCI数据工作小组
Amounts: no units in this file; such an amount is in the reference unit of its flow, which a separate flow dataset defines
copyright: false
licenseType: Free of charge for all users and uses

## General comment
使用炭黑及石油焦经过一系列破碎、筛分、焙烧等处理合成人造石墨

## Geography
石棉县集能新材料有限公司

## Technology and included processes
将石油焦和炭黑混合后经过中碎、磨粉、筛分、焙烧、二次焙烧后合成石墨

## Technical purpose
通过该工业过程生产的合成石墨用于多种应用，包括但不限于：电弧炉电极、电动机电刷、锂离子电池阳极、电子设备中的散热器，以及在某些机械系统中作为润滑剂。合成石墨的高导电性和热阻性质使其适用于高级技术应用，特别是在可再生能源和电子行业。

## Reference product
- Graphite (anode and melting pot): 1
  数据来源于石棉县集能新材料有限公司环境影响评价报告

## Inputs
- Carbon Black: 1.01
  炭黑数据缺//数据来源于石棉县集能新材料有限公司环境影响评价报告
- Petroleum Coke: 0.118
  石油焦数据缺//数据来源于石棉县集能新材料有限公司环境影响评价报告
- Electricity: 15.516
  数据来源于石棉县集能新材料有限公司环境影响评价报告

## Data selection and combination
数据全部来源于石棉县集能新材料有限公司环境影响评价报告

## Data treatment and extrapolations
可能对数据进行了简单的乘除法处理

## Use advice
数据使用者在使用该数据集进行生命周期评估（LCA）时，应考虑合成石墨生产的特定阶段。确保所有系统边界清晰定义，特别是在包括或排除原材料获取步骤（如炭黑和石油焦的采购）时。中心过程前后的净化和可能的环境处理阶段也应纳入考虑。在进行比较性LCA研究时，确保功能单元（例如，生产的石墨质量）的一致性以及所分析过程的范围。该数据集已进行基本的算术运算；用户应验证计算是否符合对他们的LCA情景相关的更新的生产指标或假设。

## Review details
清单： 内部审查通过几个迭代步骤完成，涉及原始数据验证、原始数据记录、代表性、完整性、与 ISO 14040 和 14044 有关的建模的一致性。

## Data sources
- Yin, R., Hu, S. & Yang, Y. Life cycle inventories of the commonly used materials for lithium-ion batteries in China. Journal of Cleaner Production227, 960–971 (2019).
