# 废弃电渗析模块的处理;焚烧和填埋混合

Dataset: ILCD process, Unit process, single operation
Geography: CN
Reference year: 2023
Classification: End-of-life treatment / Other end-of-life services
Functional unit: 1 item of electrodialysis module
Generated by: 陆嘉麒, wilsherelu@foxmail.com
Owner: 天工LCI数据工作小组
Review: Dependent internal review by 天工LCI数据工作小组
Amounts: no units in this file; such an amount is in the reference unit of its flow, which a separate flow dataset defines
copyright: false
licenseType: Free of charge for all users and uses

## General comment
废弃电渗析模块处理的数据集代表了用过的电渗析组件处置的环境影响。电渗析组件通常用于水净化、海水淡化和废水处理过程中。它们是利用电势通过离子透过膜从溶液中分离带电颗粒的技术组件。

## Reference product
- waste incineration of plastics (unspecified) fraction in municipal solid waste (MSW): 1; input; article inperiodical
  废弃ED组件

## Outputs
All rows: article inperiodical
- waste incineration of plastics (unspecified) fraction in municipal solid waste (MSW): 0.65
  废弃阴离子交换膜
- waste incineration of plastics (unspecified) fraction in municipal solid waste (MSW): 0.73
  废弃阳离子交换膜
- waste incineration of plastics (unspecified) fraction in municipal solid waste (MSW): 1.8
  废弃钛涂钌阳极
- waste incineration of plastics (unspecified) fraction in municipal solid waste (MSW): 1.1
  废弃钛涂钌阴极
- waste incineration of plastics (unspecified) fraction in municipal solid waste (MSW): 8.5
  废弃阴极外壳（UPVC）
- waste incineration of plastics (unspecified) fraction in municipal solid waste (MSW): 49.8
  废弃外壳UPVC

## Use advice
在使用该数据集进行生命周期评估时，请确保指定的处置方法（焚烧和填埋的混合）与被评估的电渗析模块的实际终生处理方式相符合。如果实际操作中焚烧和填埋的比例有所不同，请调整数据集中的比例。考虑这些处理过程的地理特殊性，并在总体环境影响计算中考虑焚烧过程的任何排放和潜在的能量回收。

## Review details
清单： 内部审查通过几个迭代步骤完成，涉及原始数据验证、原始数据记录、代表性、完整性、与 ISO 14040 和 14044 有关的建模的一致性。

## Data sources
- Xue, N. et al. Carbon footprint analysis and carbon neutrality potential of desalination by electrodialysis for different applications. Water Res. 232, 119716 (2023).
