# Coppercontainingwasteliquid|Recycledcopper,copper-containingrecycledrawmaterials|Chemicalextraction|All sizes / 含铜废液|再生铜、含铜再生原料|化学提取|所有规模

Dataset: ILCD process, Unit process, single operation
Geography: CN
Reference year: 2019
Classification: Materials production / Metals and semimetals
Generated by: The data was created by the Office of the Second National Pollution Source Census of the Ministry of Ecology and Environment, and the data was organized by the TianGong Plan team for ILCD format / 生态环境部第二次全国污染源普查工作办公室创建数据，天工计划团队常慧敏整理数据为ILCD格式
Owner: Tiangong LCI Data Working Group / 天工LCI数据工作小组
Amounts: no units in this file; such an amount is in the reference unit of its flow, which a separate flow dataset defines
copyright: false
licenseType: Free of charge for all users and uses

## Technology and included processes
the Technical of end-of-pipe management technology for pollution chemical oxygen demandisAerobic biological treatment + anaerobic biological treatment，Its Technical efficiency of end-of-pipe management65，The formula for calculating the actual operation rate (k-value) of the end-of-pipe treatment facility is /

## Reference product
- Recycled Copper: 1000; input; calculated
  源文件中描述为为再生铜、含铜再生原料，此处对其进行了匹配工作，将其匹配到LCAflow库里面相最符合的流

## Outputs
All rows: calculated
- cadmium: 1.08e-6
  污染物指标镉的末端治理技术是物理化学处理法，其效率为10，末端治理设施实际运行率（k值）计算公式为k=废水治理设备运行时间（小时/间）。原文件中描述污染物类别为废水，污染物指标为镉，此处对其进行了匹配工作，将其匹配到LCAflow库里面相最符合的流
- Ammonia Nitrogen: 0.00188
  污染物指标氨氮的末端治理技术是好氧生物处理法+厌氧生物处理法，其效率为60，末端治理设施实际运行率（k值）计算公式为k=废水治理设备运行时间（小时/间）。原文件中描述污染物类别为废水，污染物指标为氨氮，此处对其进行了匹配工作，将其匹配到LCAflow库里面相最符合的流
- arsenic: 2.34e-6
  污染物指标砷的末端治理技术是物理化学处理法，其效率为10，末端治理设施实际运行率（k值）计算公式为k=废水治理设备运行时间（小时/间）。原文件中描述污染物类别为废水，污染物指标为砷，此处对其进行了匹配工作，将其匹配到LCAflow库里面相最符合的流
- lead: 2.52e-6
  污染物指标铅的末端治理技术是物理化学处理法，其效率为10，末端治理设施实际运行率（k值）计算公式为k=废水治理设备运行时间（小时/间）。原文件中描述污染物类别为废水，污染物指标为铅，此处对其进行了匹配工作，将其匹配到LCAflow库里面相最符合的流
- Chromium: 1.055e-5
  污染物指标铬的末端治理技术是物理化学处理法，其效率为50，末端治理设施实际运行率（k值）计算公式为k=废水治理设备运行时间（小时/间）。原文件中描述污染物类别为废水，污染物指标为铬，此处对其进行了匹配工作，将其匹配到LCAflow库里面相最符合的流
- chemical oxygen demand: 0.0504
  污染物指标化学需氧量的末端治理技术是好氧生物处理法+厌氧生物处理法，其效率为65，末端治理设施实际运行率（k值）计算公式为/。原文件中描述污染物类别为废水，污染物指标为化学需氧量，此处对其进行了匹配工作，将其匹配到LCAflow库里面相最符合的流

## Data sources
- 第二次全国污染源普查产排污核算系数手册（试用版）,二级代码42,四级代码4210文件，在完整版文件中第2461页
