# Trap pre-exploration | Source rocks and terrigenous marine source rocks | Natural gas exploration

Dataset: ILCD process, Unit process, single operation
Geography: GD-CN
Reference year: 1999
Classification: Materials production / Other mineralic materials
LCI method principle: Attributional
LCI method approaches: Consequential
Generated by: Shikang Kang, 908798159@qq.com
Review: Dependent internal review by Tiangong LCI Data Working Group
Amounts: no units in this file; such an amount is in the reference unit of its flow, which a separate flow dataset defines
copyright: false

## General comment
Delta coal measures source rocks and terrigenous marine source rocks are developed in Enping Formation of Baiyun Sag, and their potential lithologic stratigraphic traps have self-generating, self-storing and self-capping reservoir-forming conditions, which have great exploration potential. Prediction is the main reservoir-forming combination of Baiyun Sag and the main direction of natural gas exploration in deep water area.

## Geography
Baiyun Sag in Pearl River Mouth Basin

## Time period
Literature review mentioned that

## Technology and included processes
Lithologic stratigraphic traps of Enping Formation have reservoir-forming conditions: authigenic conditions, self-storage conditions and self-sealing conditions.

## Reference product
- natural gas: 4500; input; min 4000; max 5000; uniform; article inperiodical
  集体埋藏深度

## Inputs
- natural gas: 0.8; log-normal; article inperiodical
  储层孔隙度,数据为分布，量中填写的数据为取平均（取中值）的结果
- natural gas: 1.6; min 1.55; max 1.65; uniform; article inperiodical
  压力系数
- natural gas: 0.85; log-normal; article inperiodical
  孔隙空间,数据为分布，量中填写的数据为取平均（取中值）的结果

## Data selection and combination
The sedimentary conditions of Enping Formation in Baiyun Sag form moderate sand-land ratio, which is beneficial to the development of lithologic stratigraphic traps. At present, more than 20 potential large and medium-sized lithologic stratigraphic traps have been searched, including six types, such as stratigraphic overlap, nearshore subaqueous fan, beach bar, low-level fan, delta front foregroove wedge sandstone body and updip pinchout sandstone body.

## Data treatment and extrapolations
Delta coal measures source rocks and terrigenous marine source rocks are developed in Enping Formation of Baiyun Sag, and their potential lithologic and stratigraphic traps have reservoir-forming conditions of self-generation, self-storage and self-capping, which have great exploration potential. Prediction is the main reservoir-forming combination of Baiyun Sag and the main direction of natural gas exploration in deep water area

## Review details
Inventory: The internal review was done by several iteration steps concerning raw data validation, raw data documentation, representativity, completeness and consistency of modelling with regard to ISO 14040 and 14044.; Documentation: The review of the documentation was performed by Ecobilan and is in compliance with ISO 14040 and 14044. The data set documentation is correct in view of the appropriateness of the information provided. It includes all relevant information in view of data quality and scope of application of the respective LCI result.

## Data sources
- 张功成;陈莹;杨海长;韩银学;赵钊;杨东升;王龙颖;黄萱; 恩平组岩性地层圈闭——白云凹陷深水区天然气勘探新领域. 中国海上油气 1–9 (2015).
