# Bio-based methanol production | Methanol | PV/CCU-CH3OH route | CO2, H2

Dataset: ILCD process, Unit process, black box
Geography: CN
Classification: Materials production / Other mineralic materials
Functional unit: In this study, the functional unit is defined as 1 kg and 1 MJ of H2 carrier produced from coal, natural gas, and renewables.
LCI method principle: Attributional
Generated by: Zirui Tang, tangzirui123@gmail.com
Review: Dependent internal review by Tiangong LCI Data Working Group
Amounts: no units in this file; such an amount is in the reference unit of its flow, which a separate flow dataset defines
copyright: false

## General comment
The CO2-to-methanol technical route contains three key steps, namely capture of CO2, production of H2 by water electrolysis, and hydrogeneration of CO2 to synthesize methanol.

## Geography
The study assumes that both methanol and ammonia production plants are located in northwest China, where coal, natural gas and solar energy resources are abundant.

## Technology and included processes
We assume that the CO2 source is exhaust gas from power plant which supplies electricity and steam for system. As shown in Figure 1C, in the carbon capture stage, the flue gas enters the absorber under the drive of the fan. When sufficient CO2 has been absorbed, the solvent is pumped into the regeneration column where CO2 is separated from the absorber under the action of steam. In the H2 generation stage, water electrolysis is used to produce H2, which is powered by photovoltaic. At last, H2 and captured CO2 are sent into the methanol synthesis system where methanol is produced by the catalytic hydrogenation of captured CO2.

## Reference product
- Methanol: 1000; article inperiodical

## Inputs
All rows: article inperiodical
- electricity: 153.9
- Hydrogen: 190
- carbon dioxide: 1455
- Aluminium oxide: 0.012
- Copper oxide: 0.062
- zinc oxide: 0.029

## Outputs
- waste water - untreated: 630; article inperiodical

## Data selection and combination
The relevant data are collected from the Ravikumar's research work (Ravikumar et al., 2020).

## Data treatment and extrapolations
Take the average value from the reference, which summarizes common 14 scenarios based on literature reviews.

## Review details
Inventory: The internal review was done by several iteration steps concerning raw data validation, raw data documentation, representativity, completeness and consistency of modelling with regard to ISO 14040 and 14044.; Documentation: The review of the documentation was performed by Ecobilan and is in compliance with ISO 14040 and 14044. The data set documentation is correct in view of the appropriateness of the information provided. It includes all relevant information in view of data quality and scope of application of the respective LCI result.

## Data sources
- Zhu, R., Wang, Z., He, Y., Zhu, Y. & Cen, K. LCA comparison analysis for two types of H2 carriers: Methanol and ammonia. Int. J. Energy Res. 46, 11818–11833 (2022).
