# Sludge treatment and disposal|dewatering

Dataset: ILCD process, Unit process, single operation
Geography: QD-SD-CN
Classification: Materials production / Other mineralic materials
Functional unit: The functional unit is the base for the treatment comparison in the life-cycle inventory. The management of one tone of dry sludge (DS) is selected.
Generated by: Jin Sitian, 2331276@tongji.edu.cn
Review: Dependent internal review by Tiangong LCI Data Working Group
Amounts: no units in this file; such an amount is in the reference unit of its flow, which a separate flow dataset defines

## Geography
Maidao sewage treatment plant

## Reference product
- Sludge: 1000; input; estimated
  one tone of dry sludge (DS)

## Inputs
- Electricity: 221.544; measured
- Polyacrylamide: 4.31; measured

## Outputs
- waste water - untreated: 3; measured

## Review details
Inventory: The internal review was done by several iteration steps concerning raw data validation, raw data documentation, representativity, completeness and consistency of modelling with regard to ISO 14040 and 14044.

## Data sources
- Life-cycle environmental and economic assessment of sewage sludge treatment in China
