# 东北水稻生产 ; 水稻种植

Dataset: ILCD process, Unit process, single operation
Geography: SY-LN-CN
Reference year: 2016
Valid until: 2017
Classification: Unit processes / Materials production / Food and renewable raw materials
Functional unit: 1t
LCI method principle: Attributional
LCI method approaches: Consequential
Generated by: Haoran Zhang, hrzhang@whu.edu.cn
Owner: 天工LCI数据工作小组
Review: Dependent internal review by 天工LCI数据工作小组
Amounts: no units in this file; such an amount is in the reference unit of its flow, which a separate flow dataset defines
copyright: false
licenseType: Free of charge for all users and uses

## General comment
化肥、农药以 及农机的使用的资源消耗和污染排放

## Technology and included processes
以生产 1 t 稻谷为功能单位，规定起始边界为生 产化肥农药的矿石和化石能源开采，终止边界为水稻 种植阶段的污染物排放

## Technical purpose
该数据集代表中国东北地区水稻生产的生命周期。它涉及水稻种植的农业过程，包括化肥和农药的使用、机械燃料消耗、生产用电以及灌溉用水。此数据对于研究农业实践的环境影响评估特别是在指定区域的水稻种植情况具有相关性。

## Reference product
- rice: 1000; measured

## Inputs
- Diesel: 10.7; measured
- Electricity: 615.6; measured
- arable, non-irrigated: 1000.24; measured
- water: 1546.78; measured

## Outputs
All rows: measured
- carbon monoxide (fossil): 0.61
- carbon dioxide (fossil),carbon dioxide (fossil): -245.91
- nitrous oxide: 260.16, 0.03 (2 entries)
- sulfur dioxide: 0.16
- ammonium: 2.14
- methane (biogenic),methane (biogenic): 16.08
- phosphorus, total: 0.18
- ammonia: 1.36
- nitrate: 0.87
- copper: 0.0008
- zinc: 0.025
- mercury: 0.0001
- clopyralid: 0.01154
- pretilachlor: 0.012
- 1,2,3-Triazole: 0.00512
- dimethoate: 0.01231

## Deviations from the LCI method approaches
规定起始边界为生产化肥农药的矿石和化石能源开采，终止边界为水稻种植阶段的污染物排放

## Data selection and combination
共调查农户62户，调查内容包括化肥种类及用量、农药种类及用量、机械耗油、生产耗电、灌溉水量等相关信息

## Data treatment and extrapolations
采用当量系数法将同类污染物转化为参照物的环境影响潜力[22]，评价水稻生产的环境影响。

## Use advice
在使用该数据进行生命周期评估时，请确保正确应用了系统边界。数据覆盖了从化肥和农药生产的原材料开采到水稻种植阶段污染物的排放。如果要考虑到水稻的完整生命周期，用户应将此数据与有关下游过程的信息结合起来。关于转换环境影响的等效系数法，特别注意技术适用性时要留意，因为根据研究的目标和范围，方法论可能会有所不同。

## Review details
清单： 内部审查通过几个迭代步骤完成，涉及原始数据验证、原始数据记录、代表性、完整性、与 ISO 14040 和 14044 有关的建模的一致性。

## Data sources
- 常俊彦,宋明阳,于晓曼等.沈阳地区水稻生产的生态环境影响研究[J].农业环境科学学报,2018,37(08):1793-1801.
