# Ironmaking ; hot metal ; blast-furnace ironmaking ; sinter/pellets/lump ore/scrap

Dataset: ILCD process, Unit process, single operation
Geography: CN
Reference year: 2006
Classification: Unit processes / Materials production / Metals and semimetals
Generated by: Wanghuanyu, wanghuanyu00@126.com
Owner: Tiangong LCI Data Working Group
Review: Dependent internal review by Tiangong LCI Data Working Group
Amounts: no units in this file; such an amount is in the reference unit of its flow, which a separate flow dataset defines
copyright: false
licenseType: Free of charge for all users and uses

## General comment
The process described is associated with the production of hot metal through blast-furnace ironmaking. This process involves the transformation of iron ores (sinter, pellets, lump ore) and scrap metal into molten iron. It is typically used by the steel manufacturing industry as a primary step in the production of steel. This molten iron, or hot metal, is an essential raw material for steelmaking processes, particularly in integrated steel mills where it will be further processed into various steel products.

## Geography
Z1工厂同一名称的工艺过程

## Reference product
- iron: 1.8682; measured
  z01

## Inputs
- hard coal; 26.3 MJ/kg: 171.5; measured
  Coal injection
- Energy, geothermal, converted: 12221.3; measured
  z01

## Outputs
- Flue dust: 0.162; measured
  z01
- waste incineration of municipal solid waste (MSW): 304; measured
  z01

## Use advice
When utilizing this data set, users should take into account that the provided information pertains to a single operational unit process at Plant Z1 under a specific name. It is critical to verify that the technological parameters of the described process match the user's intended application, especially if the data is to be integrated into wider Life Cycle Assessments. Considerations should include the efficiency and technological age of the furnace, the origin of raw materials, and the specific energy consumption. Users should also be aware of potential variations or updates in the process technology when applying this data to ensure accuracy and relevance.

## Review details
Inventory: The internal review was done by several iteration steps concerning raw data validation, raw data documentation, representativity, completeness and consistency of modelling with regard to ISO 14040 and 14044.

## Data sources
- 刘微. LCI数据质量体系中的分析方法研究. (北京工业大学, 2006).
