# 太阳能电池加工 ; 多晶硅太阳能电池 ; 混合酸清洗晶片 ; 添加 p-n 结并覆盖沉积膜

Dataset: ILCD process, Unit process, single operation
Geography: CN
Reference year: 2017
Classification: Unit processes / Energy carriers and technologies / Renewable fuels
Functional unit: In this paper, a 1 kWp solar PV system consisting of five 200 Wmodules made of 54 multi-Si cells, each with a size of 156*156 mm2 and 16% efficiency, was used as the primary study object
LCI method principle: Attributional
LCI method approaches: Allocation
Generated by: 杨锦锋, yjfzfshn@163.com
Owner: 天工LCI数据工作小组
Review: Dependent internal review by 天工LCI数据工作小组
Amounts: no units in this file; such an amount is in the reference unit of its flow, which a separate flow dataset defines
copyright: false
licenseType: Free of charge for all users and uses

## General comment
多晶硅

## Geography
2011-2016年中国太阳能光伏产业生命周期环境影响评价

## Time period
文章发表

## Technology and included processes
用硝酸和盐酸等混合酸清洗晶圆，然后加入 p-n 节，再用沉积膜覆盖

## Technical purpose
通过此工艺生产的多晶硅太阳能电池主要用于太阳能光伏系统的建设。具体来说，该过程详细描述了用于1千瓦峰值（kWp）太阳能光伏系统的太阳能电池的生产，该系统由五个200瓦模块组成，每个模块由54个尺寸为156*156毫米2、效率为16％的多晶硅电池组成。这种光伏系统被用于将阳光转换为电能，应用范围广泛，从住宅和商业到规模庞大的太阳能发电站。

## Reference product
- Multi-Si solar cell,Multi-Si solar cell,Multi-Si solar cell: 1055; measured
  Multi-Si solar cell (KWp) (Multi-Si cell)

## Inputs
- Multi-Si wafer,Multi-Si wafer,Multi-Si wafer: 3.4203; measured
  Multi-Si wafer (Multi-Si cell)
- Electricity: 617.17; measured
  Electricity (Multi-Si cell)
- silver: 0.0936; software or database
  Silver (Multi-Si cell)
- aluminium: 0.427; software or database
  Aluminum (Multi-Si cell)
- hydrogen chloride gas: 0.5283; software or database
  Hydrogen chloride (Multi-Si cell)
- fluorine: 0.8608; software or database
  Hydrogen fluoride (Multi-Si cell)
- Nitric acid: 1.1426; software or database
  Nitric acid (Multi-Si cell)
- nitrogen: 7.3745; software or database
  Nitrogen (Multi-Si cell)
- sodium hydroxide: 0.2347; measured
  Sodium hydroxide(Multi-Si cell)
- Ammonia: 0.211; software or database
  Ammonia (Multi-Si cell)
- Phosphorus Oxychloride: 0.0189; measured
  Phosphorus oxychloride (Multi-Si cell)

## Outputs
- ammonia: 0.0202; measured
  Ammonia
- hydrogen chloride: 0.0061; measured
  Hydrogen chloride
- hydrogen fluoride: 0.0019; measured
  Hydrogen fluoride
- Nitrogen oxides: 0.0425; measured
  Oxynitride

## Deviations from the LCI method approaches
基于中国太阳能光伏生命周期评价的现有文献(Fu 等，2015; He，2013; Hong 等，2016; Li 和 Yu，2014; Li 和 Chang，2012; Liang，2012; Yang 等，2015; Yu 等，2017; Xie 等，2015) ，得到了一份生命周期清单

## Use advice
生命周期评价（LCA）从业者在使用这组数据分析太阳能光伏系统的环境影响时，应考虑与多晶硅太阳能电池生产相关的具体条件，包括使用混合酸清洗晶圆以及后续添加p-n结和沉积膜。建议用户针对当前生产技术和实践验证生命周期清单（LCI）的范围和时效性。此外，鉴于这份LCI基于2011至2016年的文献，并且太阳能光伏行业以快速创新和改进而闻名，应对2016年之后的技术变革和进步给予适当关注。

## Review details
清单： 内部审查通过几个迭代步骤完成，涉及原始数据验证、原始数据记录、代表性、完整性、与 ISO 14040 和 14044 有关的建模的一致性。

## Data sources
- Xu, L., Zhang, S., Yang, M., Li, W. & Xu, J. Environmental effects of China’s solar photovoltaic industry during 2011–2016: A life cycle assessment approach. Journal of Cleaner Production 170, 310–329 (2018).
