# sequencing batch reactor (SBR)+AO/BFB | Wastewater | wastewater treatment

Dataset: ILCD process, Unit process, single operation
Geography: JS-CN
Classification: Materials production / Other mineralic materials
Generated by: YU Chenyang, yuchenyang0506@foxmail.com
Review: Dependent internal review by Tiangong LCI Data Working Group
Amounts: no units in this file; such an amount is in the reference unit of its flow, which a separate flow dataset defines

## Reference product
- Wastewater: 1; input; measured
  参考定量

## Inputs
- Electricity: 20.016; measured

## Review details
Inventory: The internal review was done by several iteration steps concerning raw data validation, raw data documentation, representativity, completeness and consistency of modelling with regard to ISO 14040 and 14044.; Documentation: The review of the documentation was performed by Ecobilan and is in compliance with ISO 14040 and 14044. The data set documentation is correct in view of the appropriateness of the information provided. It includes all relevant information in view of data quality and scope of application of the respective LCI result.

## Data sources
- Life cycle assessment of water reuse systems in an industrial park
