# 沉箱式导水门;直径2.4m沉箱;1.2m零价铁柱;原位地下水修复;PRB;漏斗-导水门式PRB

Dataset: ILCD process, Unit process, single operation
Geography: UM
Reference year: 2009
Classification: Unit processes / Other Services / Repair and maintenance
Generated by: 杨欣桐, yangxt@caep.org.cn
Owner: 天工LCI数据工作小组
Review: Dependent internal review by 天工LCI数据工作小组
Amounts: no units in this file; such an amount is in the reference unit of its flow, which a separate flow dataset defines
copyright: false
licenseType: Free of charge for all users and uses

## General comment
PRB安装在原位，允许地下水在自然梯度下流过反应池，反应介质在反应池中降解或捕获污染物。

## Geography
该案例研究使用了巴特尔为位于美国多佛空军基地

## Technology and included processes
闸门的建造方法是在直径2.4 m的钢沉箱内进行开挖，安装1.2 m乘1.2 m的零价铁柱，并用沙子回填外部预处理区和出口区。

## Technical purpose
该工艺过程涉及使用沉箱式导水门构筑的渗透性反应屏障（PRB）系统。该系统包含一个直径2.4米的沉箱和一个1.2米乘1.2米的零价铁柱，专门设计用于原位地下水修复。PRB的漏斗-导水门配置允许地下水通过自然梯度流过反应单元，从而促进污染物的降解或捕获。这项技术用于像多佛空军基地这样的地点，那里需要包容和处理受污染的地下水。

## Reference product
- Caisson-based gate: 1; measured
  ZVI construction energy

## Inputs
All rows: measured
- Steel: 9300
- sand: 37900
- soil: 21400
- Energy, unspecified: 140000
  gate construction energy
- Cast Iron: 24500
- Energy, unspecified: 42700

## Use advice
使用此数据集的用户应注意，基于沉箱式PRB系统的建设和实施的具体细节基于多佛空军基地的设计文档，并且可能不具有普遍适用性。在将此数据用于其他地点时，确保当地条件与之相当，或对设计进行调整以适应不同的水文地质情况。还必须注意，一些单元过程、输入或排放可能基于现有文献估计或省略，并根据基础原理计算；因此，当在新的背景下应用数据时，建议进行进一步验证。

## Review details
清单： 内部审查通过几个迭代步骤完成，涉及原始数据验证、原始数据记录、代表性、完整性、与 ISO 14040 和 14044 有关的建模的一致性。

## Data sources
- Life-Cycle Case Study Comparison of Permeable Reactive Barrier versus Pump-and-Treat Remediation
