# 土壤修复;原位修复;植物提取修复;工程实施;沥青填埋

Dataset: ILCD process, Unit process, single operation
Geography: IT
Classification: Other Services / Repair and maintenance
Generated by: 肖萌, xiaomeng@mail
Owner: 天工LCI数据工作小组
Review: Dependent internal review by 天工LCI数据工作小组
Amounts: no units in this file; such an amount is in the reference unit of its flow, which a separate flow dataset defines
licenseType: Free of charge for all users and uses

## General comment
所描述的工业过程专门用于通过原位植物提取和随后用沥青掩埋污染物进行土壤修复。它适用于需要清理不同程度金属污染的区域，特别是那些涉及重金属如铅（Pb）、砷（As）和铊（Tl）的情况。

## Geography
The site taken as a reference for the remediation is an area of 712 m2 located in a disused industrial district of Tuscany (Italy), in the past subjected to various productive activities that led to contamination with various metals, some of which potentially toxic such as lead (Pb), arsenic (As) and thallium (Tl). As it is a “site of national interest”, its exact location is considered confidential and cannot be disclosed.

## Reference product
- Treated asphalt: 142.4; measured
  填埋处理完成的沥青

## Inputs
- Transported asphalt: 142.4; measured
  运输到处理场地的沥青
- Diesel: 19.366; measured
- Water: 213.6; measured

## Use advice
在使用这个土壤修复过程的数据集时，用户应确保其适用性与污染情况类似的场地。应该考虑到地理和环境背景，因为参考了托斯卡纳的一个特定位置。此外，必须尊重该场所作为国家利益地点的确切位置的保密性。在建模过程中，必须考虑到当地法规、修复的规模以及沥青填埋可能对环境产生的影响等因素。

## Review details
清单： 内部审查通过几个迭代步骤完成，涉及原始数据验证、原始数据记录、代表性、完整性、与 ISO 14040 和 14044 有关的建模的一致性。

## Data sources
- Vocciante, M., De Folly D’Auris, A., Franchi, E., Petruzzelli, G. & Ferro, S. CO2 footprint analysis of consolidated and innovative technologies in remediation activities. J Clean Prod 297, 126723 (2021).
