# copper production|cathode copper| primary production by bath smelting approach|sulfide ore

Dataset: ILCD process, Unit process, single operation
Geography: CN
Reference year: 2014
Classification: Materials production / Other mineralic materials
Functional unit: functional unit was defined as the production of 1 t of refined copper (i.e., cathode copper).
LCI method principle: Attributional
LCI method approaches: Allocation - market value
Generated by: Peng Wang, 2867919560@qq.com
Review: Dependent internal review by Tiangong LCI Data Working Group
Amounts: no units in this file; such an amount is in the reference unit of its flow, which a separate flow dataset defines
copyright: false

## Geography
production data from a copper plant in western China

## Technology and included processes
Pyrometallurgical processes consist of mining, beneficiation, smelting, converting, fire refining (including anode casting) and electrolytic refining, of which smelting is the key phase. There are two main types of smelters in China, namely flash and bath smelters

## Reference product
- copper ore/(0.81%): 0; input; measured
  copper ore/(0.81%)需要补充

## Inputs
- copper ore/(1.02%): 106064; measured
  copper ore/(1.02%)需要补充
- waste wire: 0; software or database
  waste wire需要补充
- Limestone: 109.44; software or database
  imestone
- quartz sand: 1092.09; software or database
- oxygen: 1469.39; software or database
- Sulfuric acid(98%): 6.8; software or database
  sulfuric acid需要补充resourse
- AC electricity: 18398.3; software or database
  AC electricity需要补充
- DC electricity: 932.4; software or database
  DC electricity需要补充
- hard coal: 10454.9; software or database
  coal
- coke: 0; software or database
  coke需要补充
- diesel oil: 9657; software or database
  diesel oil需要补充
- Heavy fuel oil (1.0 wt.% S): 1869.1; software or database
  heavy fuel oil

## Outputs
All rows: software or database
- carbon dioxide: 2203.63
  CO2
- sulfur oxides: 63.84
  SO2
- chemical oxygen demand: 52.59
  COD需要补充
- particles (PM2.5 - PM10): 27.5
  dust需要补充
- Slag: 2998
  slag

## Deviations from the LCI method approaches
The Eco-Indicator 99 (EI99), a damage-oriented method widely used as an impact assessment method in LCA [22], was applied for the life cycle impact assessment. The impact assessment was performed with the EI99 methodology (hierarchist perspective).

## Data selection and combination
Inventory data of copper production originated mainly from two plants that adopted different equipment and processes, supplemented by other published literature.Inventory data of some auxiliary materials were obtained from the PE-GaBi database.

## Data treatment and extrapolations
GaBi 4 software was used to model the copper production processes and determine the environmental burdens in this study.

## Review details
Inventory: The internal review was done by several iteration steps concerning raw data validation, raw data documentation, representativity, completeness and consistency of modelling with regard to ISO 14040 and 14044.; Documentation: The review of the documentation was performed by Ecobilan and is in compliance with ISO 14040 and 14044. The data set documentation is correct in view of the appropriateness of the information provided. It includes all relevant information in view of data quality and scope of application of the respective LCI result.

## Data sources
- Song, X., Yang, J., Lu, B., Li, B. & Zeng, G. Identification and assessment of environmental burdens of Chinese copper production from a life cycle perspective. Front. Environ. Sci. Eng. 8, 580–588 (2014).
