# Finishing|Printedanddyedknittedfabrics|Knittedfabric|Chemicalfinishing-setting|All sizes / 整理|印染针织物|针织物|化学整理-定型|所有规模

Dataset: ILCD process, Partly terminated system
Geography: CN
Reference year: 2019
Classification: Materials production / Other mineralic materials
Generated by: The data was created by the Office of the Second National Pollution Source Census of the Ministry of Ecology and Environment, and the data was organized by the TianGong Plan team for ILCD format / 生态环境部第二次全国污染源普查工作办公室创建数据，天工计划团队常慧敏整理数据为ILCD格式
Amounts: no units in this file; such an amount is in the reference unit of its flow, which a separate flow dataset defines
copyright: false

## Technology and included processes
the treatment technology for the pollution of Printing and dyeing knitted fabricdidn't offered，The formula for calculating the actual operation rate (k-value) of the end-of-pipe treatment facility is k = normal operating hours of treatment facilities (hours/year) / normal operating hours of enterprises (hours/year)
污染物指标工业废气量的末端治理技术未说明

## Reference product
- Printing and dyeing knitted fabric: 1000; calculated
  原文件中描述污染物类别为Product，污染物指标为印染针织物，此处对其进行了匹配工作，将其匹配到LCAflow库里面相最符合的流

## Outputs
- Exhaust gas: 41821; calculated
  原文件中描述污染物类别为废气，污染物指标为工业废气量，此处对其进行了匹配工作，将其匹配到LCAflow库里面相最符合的流
- particles (PM2.5 - PM10): 0.0462172; calculated
  原文件中描述污染物类别为废气，污染物指标为颗粒物，此处对其进行了匹配工作，将其匹配到LCAflow库里面相最符合的流

## Data sources
- 第二次全国污染源普查产排污核算系数手册（试用版）,二级代码17,三级代码176.0,四级代码1762文件，在完整版文件中第304页
