# Sievingandcrushingplant|WashedBlendedcoal|Bituminouscoalandanthracitecoal|Lump coal is washed, and fine coal is not washed|greater than or equal to10 million t/a / 筛分破碎车间|洗混煤|烟煤和无烟煤|块煤入洗、末煤不入洗|大于等于1000万吨/年

Dataset: ILCD process, Unit process, single operation
Geography: CN
Reference year: 2019
Classification: Energy carriers and technologies / Hard coal based fuels
Generated by: The data was created by the Office of the Second National Pollution Source Census of the Ministry of Ecology and Environment, and the data was organized by the TianGong Plan team for ILCD format / 生态环境部第二次全国污染源普查工作办公室创建数据，天工计划团队常慧敏整理数据为ILCD格式
Owner: Tiangong LCI Data Working Group / 天工LCI数据工作小组
Amounts: no units in this file; such an amount is in the reference unit of its flow, which a separate flow dataset defines
copyright: false
licenseType: Free of charge for all users and uses

## Technology and included processes
the Technical of end-of-pipe management technology for pollution particles (PM2.5 - PM10)isDirect discharge，The formula for calculating the actual operation rate (k-value) of the end-of-pipe treatment facility is k = annual operating time of wastewater treatment facilities (hours/year) / normal production time (hours/year)

## Reference product
- Standard coal: 1000; input; calculated
  源文件中描述为为烟煤和无烟煤，此处对其进行了匹配工作，将其匹配到LCAflow库里面相最符合的流

## Outputs
All rows: calculated
- particles (PM2.5 - PM10): 0.085
  污染物指标颗粒物的末端治理技术是袋式除尘，其效率为90，末端治理设施实际运行率（k值）计算公式为k=除尘设备耗电量（千瓦·时/年）/（除尘设备额定功率（千瓦）＊企业正常运转天数（小时/年））。原文件中描述污染物类别为废气，污染物指标为颗粒物，此处对其进行了匹配工作，将其匹配到LCAflow库里面相最符合的流
- particles (PM2.5 - PM10): 0.0935
  污染物指标颗粒物的末端治理技术是旋风除尘，其效率为89，末端治理设施实际运行率（k值）计算公式为k=除尘设备耗电量（千瓦·时/年）/（除尘设备额定功率（千瓦）＊企业正常运转天数（小时/年））。原文件中描述污染物类别为废气，污染物指标为颗粒物，此处对其进行了匹配工作，将其匹配到LCAflow库里面相最符合的流
- particles (PM2.5 - PM10): 0.0425
  污染物指标颗粒物的末端治理技术是组合式除尘，其效率为95，末端治理设施实际运行率（k值）计算公式为k=除尘设备耗电量（千瓦·时/年）/（除尘设备额定功率（千瓦）＊企业正常运转天数（小时/年））。原文件中描述污染物类别为废气，污染物指标为颗粒物，此处对其进行了匹配工作，将其匹配到LCAflow库里面相最符合的流
- particles (PM2.5 - PM10): 0.1275
  污染物指标颗粒物的末端治理技术是喷淋，其效率为85，末端治理设施实际运行率（k值）计算公式为k=除尘设备耗电量（千瓦·时/年）/（除尘设备额定功率（千瓦）＊企业正常运转天数（小时/年））。原文件中描述污染物类别为废气，污染物指标为颗粒物，此处对其进行了匹配工作，将其匹配到LCAflow库里面相最符合的流
- particles (PM2.5 - PM10): 0.85
  污染物指标颗粒物的末端治理技术是直排，末端治理设施实际运行率（k值）计算公式为k=除尘设备耗电量（千瓦·时/年）/（除尘设备额定功率（千瓦）＊企业正常运转天数（小时/年））。原文件中描述污染物类别为废气，污染物指标为颗粒物，此处对其进行了匹配工作，将其匹配到LCAflow库里面相最符合的流

## Data sources
- 第二次全国污染源普查产排污核算系数手册（试用版）,二级代码06,三级代码61.0,四级代码610文件，在完整版文件中第21页
