# 铝电解碳阳极生产 ; 碳阳极 ; 预焙 ; 石油焦

Dataset: ILCD process, Unit process, single operation
Geography: JNA-SD-CN
Reference year: 2018
Classification: Unit processes / Materials production / Inorganic chemicals
Generated by: 谢金良, jinliang.research@gmail.com
Owner: 天工LCI数据工作小组
Review: Dependent internal review by 天工LCI数据工作小组
Amounts: no units in this file; such an amount is in the reference unit of its flow, which a separate flow dataset defines
copyright: false
licenseType: Free of charge for all users and uses

## General comment
The anode production system consists of coarse crushing workshop, calcining workshop, molding workshop, baking workshop and auxiliary workshop. The “cradle to gate” system boundary included raw material transportation, coarse crushing process, calcination process, calcining pollutant treatment process, vibration transport process, sieving and grinding process, mixing molding process, roasting process, roasting pollutant treatment process, defective products broken process.

## Time period
文献发表于2018年9月20日

## Technical purpose
通过这一工业过程生产的商用预焙碳阳极主要用于铝冶炼行业。预焙阳极是电解铝生产过程中的关键部件，作为电解槽中促进将氧化铝还原为纯铝必要化学反应的关键组成部分。

## Reference product
- anode, prebake, for aluminium electrolysis: 1000; measured

## Inputs
- electricity, high voltage, aluminium industry: 574.452; measured
- Petroleum Coke: 20; measured
  Metallurgical coke
- ammonia, anhydrous, liquid: 76.67; measured
- Coal Pitch: 235.3; measured
  Coal pitch
- sodium hydroxide, without water, in 50% solution state: 0.44; measured
- lime: 2.22; measured
- Water, unspecified natural origin: 0.3; measured
  water input in calcination process
- natural gas, high pressure: 60; measured
  natural gas input in roasting process
- Petroleum Coke: 1330; measured
- Diesel oil: 0.00478; missing unimportant

## Outputs
All rows: measured
- anhydrite: 5.4
  Calcium sulphate (by-product in Roasting pollutant treatment process)
- ammonium sulfate: 22.22
  by-product
- Nitrogen oxides: 0.0001311
- particles, unspecified: 2.915e-5
  Particulate matter
- sulfur dioxide: 0.00011648

## Data selection and combination
石油焦和煤沥青的背景数据是 Ecoinvent 3 数据库中的 LCI 数据。石油焦和煤沥青由多家供应商提供，预焙阳极公司无法提供生产数据。因此，本研究采用了数据库中的石油焦和煤沥青数据，而不是具体的生产数据。同时，氨水、自来水和石灰的背景数据来自 Ecoinvent 3 数据库。烧碱的数据来自文献，石油焦的数据和电力的 LCI 数据来自文献。在预焙阳极生产过程中，焙烧环节的天然气供应来自济南当地的天然气管道。在 Ecoinvent 3 数据库中，本研究选取了普通天然气的 LCI 数据。根据实地调查，本研究使用的石油焦、沥青和冶金焦的运输距离分别为 150 公里、120 公里和 200 公里。本研究假设每辆运输车的载重量为 20 吨，平均功率为 220 千瓦时，运输阶段的主要能耗为燃油消耗，单位公路运输能耗为 1836 KJ/（吨/公里）。本研究以单位油耗的平均排放系数作为原材料运输车辆尾气排放的标准。

## Sampling procedure
A company in Jinan was selected as the research subject in this study. Currently, half of the world's prebaked anode products are produced in China. The production of the commercial prebaked anode in Shandong Province was 5.21 million tons in 2016, which accounts for 59% of the total production in China. As one of the large company in Shandong Province, the company chosen for case study can produce 400 thousand tons of prebaked anode annually. The production process is also typical for prebaked anode production in China.

## Use advice
使用这个数据集时，需要注意它仅包括预焙阳极生产的‘摇篮到大门’阶段，包括原材料运输、不同的处理阶段和污染物处理，没有考虑下游使用或生命周期末期阶段。Ecoinvent 3的生命周期库存数据作为背景数据，关键材料的运输距离是特定于案例研究的。对于更广泛的生命周期评估研究，用户应根据他们的地理环境调整运输距离。基础设施和设施建设的环境影响对于评估每吨预焙阳极生产的影响是可以忽略的，因此没有包括在数据集中。由于运输距离短及环境影响小，在这个特定的案例研究中，用户不应考虑水、天然气、氨、氢氧化钠和石灰的运输。

## Review details
清单： 内部审查通过几个迭代步骤完成，涉及原始数据验证、原始数据记录、代表性、完整性、与 ISO 14040 和 14044 有关的建模的一致性。

## Data sources
- Tang, Y. et al. Environmental and economic impacts assessment of prebaked anode production process: A case study in Shandong Province, China. Journal of Cleaner Production 196, 1657–1668 (2018).
