# Fullaccountinglink(forwastewater)|Printedproducts(substrateisplastic)|Plastic|Gravureprinting|All sizes / 全部核算环节（废水用）|印刷品（承印物为塑料）|塑料|凹版印刷|所有规模

Dataset: ILCD process, Unit process, single operation
Geography: CN
Reference year: 2019
Classification: Materials production / Plastics
Generated by: The data was created by the Office of the Second National Pollution Source Census of the Ministry of Ecology and Environment, and the data was organized by the TianGong Plan team for ILCD format / 生态环境部第二次全国污染源普查工作办公室创建数据，天工计划团队常慧敏整理数据为ILCD格式
Owner: Tiangong LCI Data Working Group / 天工LCI数据工作小组
Amounts: no units in this file; such an amount is in the reference unit of its flow, which a separate flow dataset defines
copyright: false
licenseType: Free of charge for all users and uses

## Technology and included processes
the Technical of end-of-pipe management technology for pollution chemical oxygen demandisDirect discharge，The formula for calculating the actual operation rate (k-value) of the end-of-pipe treatment facility is k = power consumption of wastewater treatment facilities (kWh/year) / operating time of wastewater treatment facilities (hours/year) / total power of wastewater treatment facilities (kW)

## Reference product
- Printed Matter: 1000; calculated
  源文件中描述为为印刷品（承印物为塑料），此处对其进行了匹配工作，将其匹配到LCAflow库里面相最符合的流

## Outputs
- used oil: 2.51e-6; calculated
  污染物指标动植物油的末端治理技术是直排。原文件中描述污染物类别为废水，污染物指标为动植物油，此处对其进行了匹配工作，将其匹配到LCAflow库里面相最符合的流
- Waste water: 3370; calculated
  污染物指标工业废水量的末端治理技术未说明。原文件中描述污染物类别为废水，污染物指标为工业废水量，此处对其进行了匹配工作，将其匹配到LCAflow库里面相最符合的流
- Ammonia Nitrogen: 0.0552; calculated
  污染物指标氨氮的末端治理技术是直排。原文件中描述污染物类别为废水，污染物指标为氨氮，此处对其进行了匹配工作，将其匹配到LCAflow库里面相最符合的流
- chemical oxygen demand: 0.398; calculated
  污染物指标化学需氧量的末端治理技术是直排。原文件中描述污染物类别为废水，污染物指标为化学需氧量，此处对其进行了匹配工作，将其匹配到LCAflow库里面相最符合的流

## Data sources
- 第二次全国污染源普查产排污核算系数手册（试用版）,二级代码23,三级代码231.0文件，在完整版文件中第522页
