# 安装 ; 总长67.2km的海底电缆的安装

Dataset: ILCD process, Unit process, single operation
Geography: SH-CN
Reference year: 2009
Classification: Unit processes / Other Services / Engineering and consulting
Functional unit: The functional unit is 1 kWh on-grid electricity provision.
LCI method principle: Consequential
LCI method approaches: Allocation
Generated by: 赵云志, ll10088@163.com
Owner: 天工LCI数据工作小组
Review: Dependent internal review by 天工LCI数据工作小组
Amounts: no units in this file; such an amount is in the reference unit of its flow, which a separate flow dataset defines
copyright: false
licenseType: Free of charge for all users and uses

## General comment
所述工业过程描述了海上风电场的海底电缆安装。此过程是海上风能发电更广泛框架的一部分，具体涉及东海大桥海上风电场（DBOWF）。数据适用于评估安装海底电缆的环境影响和能源需求，这对于将风力发电的电力传输到陆地电网至关重要。信息可能适用于能源部门利益相关者、海上工程公司和环境分析师，他们希望了解或优化海上风电场基础设施的生命周期影响。

## Geography
所研究的风电场- -东海大桥海上风电场( DBOWF )是中国在上海管辖范围内的第一个海上风电场，也是欧洲以外的第一个海上风电场。工程分两期施工，分别位于东海大桥两侧(图1 )。

## Reference product
- Steel Wire,Cable: 67200; measured

## Inputs
- Diesel: 216000; calculated
- Energy, geothermal, converted: 1.44e7; calculated

## Outputs
- carbon dioxide: 974100; calculated
- particles (PM2.5): 1000; calculated
- sulfur dioxide: 1500; calculated
- nitrous oxide: 10800; calculated

## Deviations from the LCI method approaches
本研究采用PLCA建模方法计算了中国某典型海上风电场的能源和环境排放。从摇篮到坟墓的过程包括材料和设备制造、运输和安装、操作和维护、拆解和回收4个阶段(图2 )。

## Data selection and combination
风机、基础和电缆的技术参数从DBOWF的设计文件中获得(表2)。能源和排放因子(即单位材料和构件生产的能源消耗和环境排放)来源于Ecoinvent 2.2数据集(生态发明中心, 2009)，优先参考中国实践的系数。对于关键材料和设备，其海上运输能量由运输负荷和海运能量强度计算得到。根据施工方案，对设施安装能耗和排放进行了估算。风电场的运行和维护数据，如维护的频率和工作时间，是通过与工程技术人员的现场调查获得的。与模型参数和输入数据相关的不确定性在本文的敏感性分析部分进行了说明。

## Use advice
使用此生命周期评估(LCA)数据集时，用户应遵循PLCA建模方法提供的方法论指导。特别是对于海底电缆安装阶段的能源消耗和环境排放，应关注包括和排除标准。用户应优先参考中国实践的系数，并对敏感性分析部分提到的敏感性给予适当考虑。这些数据应集成到包括风电场基础设施的制造、运输、安装、运行、维护、拆卸和回收的全面从摇篮到坟墓的评估中。

## Review details
清单： 内部审查通过几个迭代步骤完成，涉及原始数据验证、原始数据记录、代表性、完整性、与 ISO 14040 和 14044 有关的建模的一致性。

## Data sources
- Yang, J. et al. The life-cycle energy and environmental emissions of a typical offshore wind farm in China. Journal of Cleaner Production 180, 316–324 (2018).
