# 聚丙烯（PP）生产;煤制聚丙烯;HDDMTO

Dataset: ILCD process, Unit process, black box
Geography: CN
Reference year: 2005
Classification: Unit processes / Materials production / Plastics
Functional unit: １t 煤制聚丙烯产品
Generated by: 郭慧娟, GHJ@email.ncu.edu.cn
Owner: 天工LCI数据工作小组
Review: Dependent internal review by 天工LCI数据工作小组
Amounts: no units in this file; such an amount is in the reference unit of its flow, which a separate flow dataset defines
copyright: false
licenseType: Free of charge for all users and uses

## General comment
煤制聚丙烯的技术组合较多：根据进料方式可分为湿法进料气化和干法进料气化两大类，湿法进料气化典型代表有GE和多喷嘴水煤浆气化工艺，干法进料气化典型代表有She11、GSP、HT-L（航天粉煤 加压气化 ）工艺等 ；甲醇合成工艺按照合成压力的不同可分为高压法 、中压法和低压法；甲醇制聚丙烯过 程依据主产物的不同可分为MTO工艺与MTP工艺。不同的工艺组合会带来不同的环境影响。HDDMTO工艺主要生产聚乙烯和聚丙烯，副产C4+和甲基叔丁基醚（MTBE）等.

## Geography
根据中国煤制烯烃产业现 状

## Time period
煤电化循环经济产业园煤制180万t/a甲醇及转化烯烃项目：可行性研究报告[R]．2005

## Technical purpose
通过HDDMTO过程从煤炭生产的聚丙烯通常用于生产各种塑料产品，因为它的多功能性、耐用性和可回收性。它可以用于汽车零部件、包装材料、家用商品、纺织品和医疗设备。

## Reference product
- polypropylene granulate (PP): 1000; missing unimportant

## Inputs
All rows: missing unimportant
- hard coal; 26.3 MJ/kg: 7040
  Raw coal（0.66kgce/kg）
- sodium hydroxide: 4.76
  Caustic soda
- Limestone: 131
- Water: 19300
- hard coal: 1840
  Thermal coal(0.52kgce/kg)
- Electricity: 11052
  Purchased electricity
- Catalyst: 3.25

## Outputs
All rows: missing unimportant
- polyethylene low linear density granulate (PE-LLD): 626
- sulfur: 41.3
- tert-butyl methyl ether: 11
  甲基叔丁基醚（MTBE）
- butene: 40.4
- carbon dioxide (fossil): 15207.4
  原文未区分bio和fossil，根据专家判断此处为fossil
- methane (fossil): 0.13322
  原文未区分bio和fossil，根据专家判断此处为fossil
- nitrous oxide: 0.1128
- sulfur dioxide: 16.2412
- Nitrogen oxides: 11.6433
- ammonia: 0.0972
- particles (PM2.5): 2.69833
- Volatile Organic Compounds (VOCs): 2.434
  VOC
- C4,C4: 34.2
  C4+
- C5: 202
- C6: 22
  C6+

## Data selection and combination
聚丙烯产品生命周期清单数据包括前景数据与背景数据。产品生产活动水平数据即为前景数据，通过查阅煤制烯烃企业生产数据。背景数 据为输入原料、材料或 能源的消耗以及污染物 排放数据 。本研究中的煤炭开采阶段生命周 期清单数据从北京工业大学数据库中提取，洗选 质量损失以全国平均值计算，质量损失为15%，原料煤需要经过洗选过程，燃料煤不需要经过洗选过程。

## Data treatment and extrapolations
本研究分配方式采用碳分 配，产品含碳量越高，分 配系数越大。

## Use advice
在使用这份煤制聚丙烯生产的生命周期评估(LCA)数据集时，必须考虑与不同技术组合（湿法进料气化、干法进料气化、甲醇合成压力和聚丙烯路径）相关的不同环境影响。前景数据应直接从煤烯企业的生产数据中获得，背景数据包括原料、材料或能源的消耗以及污染物排放。煤炭开采和洗选的损失应按平均15%的损失率计算，根据产品中的碳含量应用碳分配方法。本研究定义的功能单元是1吨煤基聚丙烯产品，LCA范围应涵盖从‘摇篮到大门’的九个阶段，不包括产品的建设、包装、运输、使用和处置。

## Review details
清单： 内部审查通过几个迭代步骤完成，涉及原始数据验证、原始数据记录、代表性、完整性、与 ISO 14040 和 14044 有关的建模的一致性。

## Data sources
- 李泉鑫, 李俊杰, 龚先政 & 田亚峻. 两条不同技术路线的煤制聚丙烯生命周期评价. 煤炭转化 1–9 (2022) doi:
