# 电力生产 ; 混合电力 ; 山东

Dataset: ILCD process, Unit process, single operation
Geography: SD-CN
Reference year: 2019
Classification: Unit processes / Energy carriers and technologies / Electricity
Generated by: 熊若熙, xiongrx0126@163.com
Owner: 天工LCI数据工作小组
Review: Dependent internal review by 天工LCI数据工作小组
Amounts: no units in this file; such an amount is in the reference unit of its flow, which a separate flow dataset defines
copyright: false
licenseType: Free of charge for all users and uses

## General comment
混合电力产生形式包括火力发电、水力发电、风力发电、核能发电和太阳能发电

## Technical purpose
本数据集描述的山东电力生产适用于混合型电力应用。这包括火力发电（可能是煤炭、天然气或石油发电厂）、水力发电、风力发电、核能发电和太阳能发电。这种多样化的能源组合适合一般消费，并可用于为山东地区的住宅、商业和工业设施供电。

## Reference product
- Electricity: 3.6; missing unimportant
  [{'text': '3.6', 'type': 'text'}]

## Inputs
All rows: missing unimportant
- electricity for thermal power: 3.23126
  [{'text': '3.6', 'type': 'text'}]
- electricity from hydroelectric power plant: 0.0030528
  [{'text': '3.6', 'type': 'text'}]
- electricity for nuclear power: 0.126371
  [{'text': '3.6', 'type': 'text'}]
- electricity from wind power: 0.137362
  [{'text': '3.6', 'type': 'text'}]
- electricity for solar power: 0.101952
  [{'text': '3.6', 'type': 'text'}]

## Use advice
在使用此数据集进行生命周期评估时，根据您的具体应用需求正确分配电力组合是非常重要的。在模拟电力消费的环境影响时，考虑混合物中每种发电类型的比例。注意区域差异和特定技术效率。例如，太阳能和风能的包含可能需要考虑季节性和与天气相关的变化。另外，在考虑未来情景时，由于技术或政策变化导致能源组合的演变也应考虑在内。

## Review details
清单： 内部审查通过几个迭代步骤完成，涉及原始数据验证、原始数据记录、代表性、完整性、与 ISO 14040 和 14044 有关的建模的一致性。

## Data sources
- 能源统计年鉴2020
