# Clean site ; Soil transport to landfill ; Soil ex-situ remediation ; Excavation and landfill

Dataset: ILCD process, Unit process, single operation
Geography: IT
Reference year: 2021
Classification: Unit processes / Other Services / Repair and maintenance
Generated by: Xiao Meng, xiaomeng@mail
Owner: Tiangong LCI Data Working Group
Review: Dependent internal review by Tiangong LCI Data Working Group
Amounts: no units in this file; such an amount is in the reference unit of its flow, which a separate flow dataset defines
copyright: false
licenseType: Free of charge for all users and uses

## General comment
The contaminated soil is collected, transported, and disposed of in a landfill. This process transport the excavated contaminated soil to the landfill site

## Geography
The site taken as a reference for the remediation is an area of 712 m2 located in a disused industrial district of Tuscany (Italy), in the past subjected to various productive activities that led to contamination with various metals, some of which potentially toxic such as lead (Pb), arsenic (As) and thallium (Tl). As it is a “site of national interest”, its exact location is considered confidential and cannot be disclosed.

## Technical purpose
The process described is intended for the remediation of contaminated soil from industrial sites. It involves the excavation of soil that has been polluted due to industrial activity and its subsequent transportation and disposal in a landfill. This service is often used in areas that have been classified as sites of national interest due to their historical contamination from potentially toxic metals such as lead (Pb), arsenic (As), and thallium (Tl).

## Reference product
- Remedied site: 712; measured

## Inputs
- Excavated soil,Excavated soil: 1281.6; measured
- transport in t*km: 192240; measured

## Use advice
When using this data, users must ensure that they consider the specific nature of the site and contamination, as remediation requirements can vary significantly depending on the pollutants and local regulations. The geographical specifics and restrictions, such as it being a site of national interest and the non-disclosure of the exact location, must be taken into account. This data is suitable for LCA studies focused on soil remediation processes and should not be generalized to all waste management or land treatment applications.

## Review details
Inventory: The internal review was done by several iteration steps concerning raw data validation, raw data documentation, representativity, completeness and consistency of modelling with regard to ISO 14040 and 14044.

## Data sources
- Vocciante, M., De Folly D’Auris, A., Franchi, E., Petruzzelli, G. & Ferro, S. CO2 footprint analysis of consolidated and innovative technologies in remediation activities. J Clean Prod 297, 126723 (2021).
