# Mining of REEs|REE|bastnaesite route|REE containing ore

Dataset: ILCD process, Unit process, single operation
Geography: NMG-CN
Reference year: 2014
Classification: Materials production / Other mineralic materials
Functional unit: The functional unit of this study is the production of 1 kg of the basket REO from each corresponding mineralogical and processing route.
LCI method principle: Attributional
LCI method approaches: Allocation - market value
Generated by: Tao Wang, twang@iue.ac.cn
Review: Dependent internal review by Tiangong LCI Data Working Group
Amounts: no units in this file; such an amount is in the reference unit of its flow, which a separate flow dataset defines
copyright: false

## Technology and included processes
In this study, the REE production system was analyzed from mining up to and including solvent extraction which contains product finishing processes such as precipitation and calcination

## Reference product
- Raw ore: 1; article inperiodical

## Inputs
All rows: article inperiodical
- Diesel: 1.25
- Land Transformation: 2.13e-6
- water: 0.0034
- mineral extraction site: 0.00012
- Land Transformation: 2.13e-6
  To mineral extraction site
- Iron ore: 0.3
- cerium: 0.0164
- lanthanum: 0.00984
- neodymium: 0.00541
- praseodymium: 0.00172
- europium: 8.14e-5
- samarium: 0.00041
- gadolinium: 0.000206

## Outputs
All rows: article inperiodical
- waste heat: 0.00513
- particles (PM2.5): 0.000144
- particles (PM10): 0.00144
- particles (PM2.5 - PM10): 0.0013
- uranium-238: 0.000134
- radium-226: 0.01
- thorium-232: 0.0506

## Deviations from the LCI method approaches
In this study, the REE production system was analyzed from mining up to and including solvent extraction which contains product finishing processes such as precipitation and calcination (Fig. 1). The other categories assessed in the literature review were mineral type, radioactivity, waste treatment, and co-mining. For mineral type, it was noted that the mineralogy accounted for in each study was different, which makes comparison difficult. For radioactivity, we marked with an X those studies which exemplified radioactivity flows in the LCI (if provided). For waste, we distinguished those LCIs which quantified waste treatment flows. For co-mining, since all REE are co-products of each other, this column is meant to highlight the co-products in addition to REE.

## Review details
Inventory: The internal review was done by several iteration steps concerning raw data validation, raw data documentation, representativity, completeness and consistency of modelling with regard to ISO 14040 and 14044.; Documentation: The review of the documentation was performed by Ecobilan and is in compliance with ISO 14040 and 14044. The data set documentation is correct in view of the appropriateness of the information provided. It includes all relevant information in view of data quality and scope of application of the respective LCI result.

## Data sources
- Bailey, G. et al. Review and new life cycle assessment for rare earth production from bastnäsite, ion adsorption clays and lateritic monazite. Resources, Conservation and Recycling 155, 104675 (2020).
