# 市政污水处理;污水;氧化沟（OD）

Dataset: ILCD process, Unit process, single operation
Geography: CN
Classification: Unit processes / End-of-life treatment / Waste water treatment
Generated by: 于晨阳, yuchenyang0506@foxmail.com
Owner: 天工LCI数据工作小组
Review: Dependent internal review by 天工LCI数据工作小组
Amounts: no units in this file; such an amount is in the reference unit of its flow, which a separate flow dataset defines
copyright: ['opt4ROkqig']
licenseType: Free of charge for all users and uses

## General comment
氧化沟（OD）是一种常见的生物处理系统，用于处理废水中的有机物质和氮。氧化沟通常是一个长而窄的渠道，其中充满了氧气，并且底部覆盖着底泥。废水被注入氧化沟，微生物在氧气的存在下分解有机物质。氧化沟中还存在着氮的硝化和脱氮过程，有助于去除废水中的氮。氧化沟通常用于处理中小型污水处理厂的废水，是一种有效的低成本的废水处理方法。

## Geography
17 WWTPs in China

## Technology and included processes
氧化沟（OD）过程中，废水在长而窄的渠道中流动，与氧气充分接触，促进有机物的降解和氧化。微生物在氧化沟中分解有机物，产生二氧化碳和水。氧化沟中还进行氮的硝化和脱氮过程，最终使废水中的有机物和氮得到有效去除，实现废水的净化处理。

## Technical purpose
该数据集代表了使用氧化沟（OD）系统进行城市污水处理的过程。此过程适用于城市环境中的废水处理。它在中国的17个不同污水处理厂（WWTPs）中使用，表明了它在处理废水以及有助于市政卫生和环境保护工作中的规模和应用范围。

## Reference product
- Wastewater: 1; input; measured

## Inputs
- Electricity: 1.116; measured
- acetic acid: 0.0751; measured
- Polyacrylamide: 0.00032; measured
- Polyferric chloride: 0.0294; measured

## Outputs
All rows: measured
- chemical oxygen demand: 0.03126
- biological oxygen demand: 0.00267
- ammonia: 0.00202
- nitrogen, total (excluding N2): 0.00803
- phosphorus, total: 0.00027
- Suspended solids, unspecified,Suspended solids, unspecified,Suspended solids, unspecified: 0.00796
- methane (biogenic),methane (biogenic): 0.00205
  原文未区分biogenic和fossil，根据专家判断此处为biogenic。
- nitrous oxide: 0.00013

## Use advice
在使用此数据集进行生命周期评估时，请考虑数据的技术特异性和地区适用性。考虑对中国17家污水处理厂的运行具有特定性的本地操作条件、法规和效率参数。排除任何不属于氧化沟处理过程的上游或下游过程，例如可能需要完成生命周期评估的废水收集和分配或污泥处理。如果在中国以外的地区使用，应根据本地环境调整数据，并且用户应确保与特定应用兴趣相关的输入和输出的准确匹配。注意时间同步，确保数据与评估预期进行的时期一致。

## Review details
清单： 内部审查通过几个迭代步骤完成，涉及原始数据验证、原始数据记录、代表性、完整性、与 ISO 14040 和 14044 有关的建模的一致性。

## Data sources
- Chen, W., Zhang, Q., Hu, L., Geng, Y. & Liu, C. Understanding the greenhouse gas emissions from China’s wastewater treatment plants: Based on life cycle assessment coupled with statistical data. Ecotoxicology and environmental safety 259, 115007 (2023).
