# Farmland remediation ; In-situ remediation ; Solidification/stabilization ; End-of disposal ; Soil sample transportation

Dataset: ILCD process, Unit process, single operation
Geography: NJ-YN-CN
Classification: Other Services / Repair and maintenance
Generated by: Xiao Meng, xiaomeng@mail
Owner: Tiangong LCI Data Working Group
Review: Dependent internal review by Tiangong LCI Data Working Group
Amounts: no units in this file; such an amount is in the reference unit of its flow, which a separate flow dataset defines
licenseType: Free of charge for all users and uses

## General comment
The described process is specific to the domain of environmental management and soil remediation, intended for use in stabilizing heavy metal-contaminated farmland. The application involves the agricultural soil remediation of land spanning 16 hectares in Nujiang, Yunnan Province, which has been polluted by lead-zinc mining activities. The stabilization technique implemented ensures that crops meet 100% of the safety standards for Cd and Pb concentrations, and effectively reduces the bioavailable concentrations of Cd and Pb in the soil by over 70%.

## Geography
云南省怒江州受铅锌矿污染某耕地土壤 污染修复工程

## Reference product
- Soil Sample: 1000; measured
  运输到检测场地的样土

## Inputs
- transport in t*km: 12975; measured

## Use advice
When utilizing this data set for environmental impact assessments or other LCA activities, users should ensure that the scope of their study aligns with the specific context of heavy metal-contaminated farmland in Yunnan Province. Adjustments may be necessary for different geographic locations or pollutant types. Attention should be paid to the consistency of the measured parameters, such as the concentrations of bioavailable Cd and Pb, and the particular agricultural practices in place. Furthermore, the end-of-life phase described – the transportation of 1000kg of remediated soil from Lanping, Yunnan to Nanjing, Jiangsu for testing – should be incorporated into the life cycle inventory, including considerations of transportation emissions and energy use.

## Review details
Inventory: The internal review was done by several iteration steps concerning raw data validation, raw data documentation, representativity, completeness and consistency of modelling with regard to ISO 14040 and 14044.

## Data sources
- 肖萌 et al. 农田污染钝化修复环境影响定量评估方法与案例分析. 中国环境科学 43, 3571–3581 (2023).
