# 修复后土壤;土壤异位修复;焦油、PAH和氰化物复合污染土壤;挖掘+化学氧化+热处理+基坑降水处置+外来清洁土回填

Dataset: ILCD process, Unit process, black box
Geography: BE
Reference year: 2017
Classification: Unit processes / Other Services / Repair and maintenance
Functional unit: The functional unit in this case study is the remediation of a site contaminated with tar, PAHs and cyanide, with a total pollution load of 2555 m3.
Generated by: 杨欣桐, yangxt@caep.org.cn
Owner: 天工LCI数据工作小组
Review: Dependent internal review by 天工LCI数据工作小组
Amounts: no units in this file; such an amount is in the reference unit of its flow, which a separate flow dataset defines
copyright: false
licenseType: Free of charge for all users and uses

## General comment
本修复方案包括污染土壤开挖和场外处置。污染地下水以基坑降水的形式处置。受污染土壤修复技术包括热处理、化学处理。

## Geography
本文评估的案例研究是位于佛兰德斯（比利时）的一个前煤气厂场地的修复。

## Technology and included processes
本案例研究选择的修复技术是对受污染土壤进行挖掘和场外清理。通过挖掘纯焦油和焦油污染的土壤并将地下水位降低到地表以下5.5m之后，将用外部供应的干净土壤回填现场的开挖部分。通过挖掘和清除前70厘米的土壤，消除了多环芳烃和氰化物污染的来源，稳定了地下水污染羽。70 cm至2.5 m的挖掘土壤按批次进行污染物浓度测试。只有被污染的土壤批次才会从现场移除，并被带到场外土壤处理设施。被焦油污染的土壤批次进行物理化学清洁，而被氰化物污染的批次则在场外热清洁设施中进行处理。未受污染的土壤将临时储存在现场，并用于回填部分开挖场地。外来清洁土壤用来完全填充场地。在土壤开挖过程中，地下水将降至地表以下3米的深度。挖掘工程中提取的所有地下水将使用活性炭过滤器、阳离子树脂离子交换器和油水分离器进行净化，然后排入当地河流。之后，将在五年内对地下水质量进行监测，以验证残余污染是否保持不变。

## Technical purpose
该数据集描述了位于比利时弗兰德斯的一个前煤气厂场地的土壤环境修复过程，该场地受到焦油、多环芳烃（PAH）和氰化物的严重污染。其预期用途是对存在对生态系统和人类健康构成风险的土壤和地下水污染的场地进行环境修复。修复过程包括挖掘受污染的土壤、化学和热处理，以及通过基坑降水来管理污染的地下水。

## Reference product
- Remediated soil: 3155; measured

## Inputs
All rows: measured
- Digger: 100
  Breaking up underground massifs
- Digger: 3155
  Excavation
- Electricity: 205.2
  Excavation
- Diesel,Diesel: 1.2672e6
  Excavation
- Electricity: 75.6
  Groundwater puriﬁcation—Electricity for activated carbon production
- Activated Carbon: 2000
  Groundwater puriﬁcation
- Hydrochloric Acid,Hydrochloric Acid: 40
  Groundwater puriﬁcation
- steam: 3000
  Groundwater puriﬁcation
- natural gas,natural gas: 196000
  Groundwater puriﬁcation—Combustion of natural gas for heat
- Electricity: 12312
  Groundwater puriﬁcation—Electricity oil skimmer
- Electricity: 16416
  Groundwater puriﬁcation—Electricity ion exchanger
- Cation Exchange Resin: 1000
  Groundwater puriﬁcation
- Electricity: 328320
  Groundwater puriﬁcation—Electricity air stripper
- Electricity: 410.4
  Groundwater puriﬁcation—Electricity activated carbon ﬁlter
- transport in t*km: 146231, 107537 (2 entries)
  Transport of contaminated soil; Transport with freight lorry EURO 5
- Light fuel oil: 55331
  Cleaning of contaminated soil
- Electricity: 221220
  Cleaning of contaminated soil
- transport in t*km: 160961
  Transport of soil for reﬁlling; Transport with freight lorry EURO 5
- Digger: 3155
  Reﬁlling with new soil
- Road Transport,Road Transport: 1.584e6
  Transport (by car) of safety coordinator
- Road Transport,Road Transport: 9.2e6
  Transport (by car) of supervisor
- Road Transport,Road Transport: 1.4e6
  Transport (by car) of management
- Road Transport,Road Transport: 6.5e6
  Transport (by car) of environmental supervisor
- Road Transport,Road Transport: 1.4e6
  Transport (by bus) of service engineer
- Road Transport,Road Transport: 500000
  Transport (by bus) of ﬁeldemployee for aftercare
- contaminated soil: 3155

## Use advice
本数据集的用户应确保将数据应用于与弗兰德斯（比利时）案例研究条件类似的场景。环境影响数据必须根据当地条件进行调整，用户应考虑修复活动的生命周期影响，如与挖掘机械相关的排放、受污染材料的运输，以及地下水处理系统的运营，包括使用活性炭和用于水泵送的电力的环境负担。应在主动治理阶段之后的一个重要时期内继续监测残留污染对当地生态系统的影响。

## Review details
清单： 内部审查通过几个迭代步骤完成，涉及原始数据验证、原始数据记录、代表性、完整性、与 ISO 14040 和 14044 有关的建模的一致性。

## Data sources
- Huysegoms L ,Rousseau S ,Cappuyns V . Friends or foes? Monetized Life Cycle Assessment and Cost-Benefit Analysis of the site remediation of a former gas plant [J]. Science of the Total Environment, 2018, 619-620 258-271.
