# 华东水稻; 上海水稻生产;除草

Dataset: ILCD process, Unit process, single operation
Geography: SH-CN
Reference year: 2012
Valid until: 2014
Classification: Unit processes / Materials production / Food and renewable raw materials
Functional unit: 1 t
LCI method principle: Attributional
LCI method approaches: Consequential
Generated by: Haoran Zhang, hrzhang@whu.edu.cn
Owner: 天工LCI数据工作小组
Review: Dependent internal review by 天工LCI数据工作小组
Amounts: no units in this file; such an amount is in the reference unit of its flow, which a separate flow dataset defines
copyright: false
licenseType: Free of charge for all users and uses

## General comment
参照PAS2050规范并结合生命周期评价方法对上海市水稻生产进行了碳足迹评估

## Geography
崇明

## Technology and included processes
主要参照 PAS2050 规范并结合 LCA 方 法进行水稻生产的碳足迹计算。PAS2050 全称“公 众可获 取 的 规 范”( Publicly Available Specification， PAS) ，由英国标准协会( British Standard Institution， BSI) 编制，旨在对产品和服务生命周期内温室气体 排放的评价要求做出明确的规定［19］。

## Technical purpose
该数据集具体针对上海地区水稻生产的碳足迹分析。它用于对农业操作的环境影响评估，特别是与水稻种植相关的温室气体排放。考虑到的主要活动是与水稻田间作业、加工、存储、深加工、包装相关的，以及为上海崇明区内的田间基础温室气体排放评估。该数据集可供农业生产者、可持续性顾问、政策制定者和研究上海以及华东地区水稻生产实践的碳足迹、资源使用和环境影响的环境研究者使用。

## Reference product
- rice: 1000; measured

## Inputs
- Bactericide: 1.06361; calculated

## Outputs
- carbon dioxide (fossil),carbon dioxide (fossil): 0.005; calculated

## Deviations from the LCI method approaches
主要参照PAS2050 规范并结合LCA方法进行水稻生产的碳足迹计算。PAS2050 全称“公众可获取的规范” ( Publicly Available Specification, PAS)

## Data selection and combination
水稻碳足迹的初级活动水平数据包括田间各项作业活动, 加工存储各项作业活动、深加工与产品包装以及田间温室气体散逸等活动水平数据。

## Data treatment and extrapolations
包括田间作业、稻谷加工、温室气体排放检测

## Use advice
使用该生命周期评价(LCA)数据集的用户应当在应用数据进行碳足迹计算时遵守PAS2050规范。系统边界定义从化肥和电力生产到作物种植过程中农产品和污染物的输出。数据集包括对农业生产系统和作物生产系统的考虑，其中包括种子、化学肥料等主要原材料和农药，以及种植过程中的温室气体排放、农业机械使用和稻米加工储存。请注意，数据集不包括商品销售、最终消费者使用、处置或回收阶段。用户在将数据集与其他生命周期阶段或外部数据集集成时必须考虑到这一点。

## Review details
清单： 内部审查通过几个迭代步骤完成，涉及原始数据验证、原始数据记录、代表性、完整性、与 ISO 14040 和 14044 有关的建模的一致性。

## Data sources
- 曹黎明,李茂柏,王新其,赵志鹏,潘晓华.基于生命周期评价的上海市水稻生产的碳足迹[J].生态学报,2014,34(02):491-499.
