# 铝电解 ; 液态原铝 ; 预焙 ; 冶金用氧化铝 ; 2016年

Dataset: ILCD process, Unit process, single operation
Geography: CN
Reference year: 2021
Classification: Unit processes / Materials production / Metals and semimetals
Generated by: 蔡梓萌, caizm6178@163.com
Owner: 天工LCI数据工作小组
Review: Dependent internal review by 天工LCI数据工作小组
Amounts: no units in this file; such an amount is in the reference unit of its flow, which a separate flow dataset defines
copyright: false
licenseType: Free of charge for all users and uses

## General comment
所述工业过程涉及使用冶金用氧化铝通过预焙电解方法生产液态原铝。这种高纯度液态铝主要用于生产不同行业的各种铝制品和部件，包括建筑、交通、包装和电气行业，主要用于那些需要具有优异强度重量比和耐腐蚀性的材料。数据关联到2016年的操作。

## Time period
文献发表日期

## Reference product
- aluminium, primary, liquid: 1000; software or database

## Inputs
All rows: software or database
- Integrated AC power consumption: 47761.5
- aluminium oxide, metallurgical: 1912.82
- fluoride salt: 17.73
- anode, prebake, for aluminium electrolysis: 404.86
- Water, unspecified natural origin: 1.28

## Data selection and combination
本研究的数据参考了PA、SA、电力等背景数据的LCA数据。PA数据来自统计数据源，SA数据主要来自文献。背景数据主要来自中国科学院生态环境研究中心CASRCEES 2018建立的中国本地化LCA数据库，涵盖能源、材料、交通、废物管理等LCA数据。

## Use advice
提供的LCA数据应考虑与铝生产相关的特定方法论复杂性。用户在使用这些数据进行建模和分析时，应考虑铝回收的纳入或排除。如果将数据应用于2016年以后的时期，则应更新数据集以反映技术和效率的提高。还应在了解其范围和局限性的前提下使用来自中国本土化LCA数据库的背景数据，以确保准确和具有上下文相关性的评估。

## Review details
清单： 内部审查通过几个迭代步骤完成，涉及原始数据验证、原始数据记录、代表性、完整性、与 ISO 14040 和 14044 有关的建模的一致性。

## Data sources
- Ding, N., Liu, N., Lu, B. & Yang, J. Life cycle greenhouse gas emissions of aluminum based on regional industrial transfer in China. J. Ind. Ecol. 25, 1657–1672 (2021).
