# clinker production|clinker|new dry process, 5000 t/d|leather waste

Dataset: ILCD process, Unit process, black box
Geography: GD-CN
Reference year: 2009
Classification: Materials production / Other mineralic materials
Generated by: Siqi Yang
Amounts: no units in this file; such an amount is in the reference unit of its flow, which a separate flow dataset defines
copyright: false

## General comment
The trial firing test uses leather waste as a replacement fuel.
Its calorific value is about 3768.12kJ/kg, choose a new dry cement production line with about 5000t/d cement of the Guangzhou Zhujiang Cement for trial firing. The leather waste is first crushed after entering Guangzhou, packed into bags (200kg bags) and transported to the end of kiln in Guangzhou, and then put into the decomposing furnace from the connection of the three air ducts and the decomposing furnace through the strand feeder. About 5t of leather waste is put in every hour for 6 hours. Record the cement output, raw material consumption and energy consumption during the trial firing. And measure the pollutant composition and concentration of exhaust gas.

## Geography
Guangzhou Zhujiang Cement Plant

## Model description
Production of 1 ton of clinker is defined as 1 functional unit. The starting point of the lifecycle is set as the entry of raw materials into the plant, and the endpoint is set as the clinker burning stage.

## Reference product
- clinker: 1000
  Clinker

## Inputs
All rows: measured
- limestone, crushed, for mill: 1300
  Limestone
- clay: 100
  Clay
- gypsum (desulphurized): 70
  Gupsum
- iron ore: 21
  Iron ore
- Leather waste: 30
  Waste leather
- hard coal, run-of-mine: 95
  Coal
- electricity, medium voltage: 360
  Electricity

## Outputs
- carbon dioxide (fossil): 239; calculated
  CO2 (fossil fuel burning)
- carbon dioxide: 647; calculated
  CO2 (limestone decomposition)
- sulfur dioxide: 0.44; measured
  SO2
- Nitrogen oxides: 1.54; measured
  NOx
- particles (> PM10): 0.021; measured
  Dust, with an unspecified particle size, is treated as PM > 10 micrometers in diameter.

## Data sources
- 周奇, 黄启飞, 王琪, & 李丽. (2009). 废皮革水泥窑共处置生命周期评价. 环境科学研究, 22(4), 506–510.
