# 运输｜秸秆｜卡车（无运载数据）

Dataset: ILCD process, Unit process, single operation
Geography: CN
Reference year: 2020
Classification: Unit processes / Transport services / Road
Functional unit: Taking the production of 10,000KWh of electric energy as the functional unit (consumption of straw is 1.4kg/kwh)
LCI method principle: Consequential
Generated by: 刘超硕, liucs22@mails.jlu.edu.cn
Owner: 天工LCI数据工作小组
Review: Dependent internal review by 天工LCI数据工作小组
Amounts: no units in this file; such an amount is in the reference unit of its flow, which a separate flow dataset defines
copyright: false
licenseType: Free of charge for all users and uses

## General comment
该工业过程使用卡车运输秸秆，作为发电的生物燃料。秸秆在发电厂被消耗，用于生产电能，具体消耗率为每生产一千瓦时电能消耗1.4千克秸秆。该过程通常用于生物能源设施，其中秸秆是可再生能源生产的首选原料。

## Reference product
- Crop straw: 14000; measured

## Outputs
All rows: measured
- carbon dioxide (fossil): 193.759
  原文未区分排放源为生物源或化石源，根据专家判断此处为化石源。
- carbon monoxide,carbon monoxide (fossil): 1.24017
  原文未区分排放源为生物源或化石源，根据专家判断此处为化石源。
- nitrous oxide: 3.22877, 0.00538 (2 entries)
- hydrocarbons (unspecified): 0.32288
- sulfur dioxide: 0.04189
- particles (> PM10),particles (> PM10): 0.10806
- methane (fossil): 0.01098
  原文未区分排放源为生物源或化石源，根据专家判断此处为化石源。

## Use advice
在使用此数据集进行生命周期评估（LCA）时，用户应考虑不含有效载荷数据的秸秆运输阶段，可能需要基于类似的运输过程或外部数据来源进行估算。由于功能单位是生产10,000千瓦时的电能，同时消耗秸秆，因此应相应地应用数据以确保LCA的准确性。用户必须考量秸秆产量和特性的区域差异，这些差异会影响从秸秆到电能转换过程的效率。此外，与秸秆运输相关的任何排放或能源使用都应包括在LCA中。

## Review details
清单： 内部审查通过几个迭代步骤完成，涉及原始数据验证、原始数据记录、代表性、完整性、与 ISO 14040 和 14044 有关的建模的一致性。

## Data sources
- Wang, Z. et al. Sustainability assessment of straw direct combustion power generation in China: From the environmental and economic perspectives of straw substitute to coal. Journal of Cleaner Production 273, 122890 (2020).
