# Grain|Biomassfuel|Drying|All sizes / 粮食|生物质燃料|烘干|所有规模

Dataset: ILCD process, Unit process, single operation
Geography: CN
Reference year: 2019
Classification: Energy carriers and technologies / Renewable fuels
Generated by: The data was created by the Office of the Second National Pollution Source Census of the Ministry of Ecology and Environment, and the data was organized by the TianGong Plan team for ILCD format / 生态环境部第二次全国污染源普查工作办公室创建数据，天工计划团队常慧敏整理数据为ILCD格式
Owner: Tiangong LCI Data Working Group / 天工LCI数据工作小组
Amounts: no units in this file; such an amount is in the reference unit of its flow, which a separate flow dataset defines
copyright: false
licenseType: Free of charge for all users and uses

## Technology and included processes
the Technical of end-of-pipe management technology for pollution Nitrogen oxidesis/，Its Technical efficiency of end-of-pipe management0

## Reference product
- Biofuel: 1000; input; calculated
  源文件中描述为为生物质燃料，此处对其进行了匹配工作，将其匹配到LCAflow库里面相最符合的流，污染物指标备注为工业废气量

## Outputs
All rows: calculated
- Exhaust gas: 6240
  污染物指标工业废气量的末端治理技术是/，其效率为0。原文件中描述污染物类别为废气，污染物指标为工业废气量，此处对其进行了匹配工作，将其匹配到LCAflow库里面相最符合的流，污染物指标备注为工业废气量
- Flue dust: 0.5
  污染物指标烟尘的末端治理技术是/，其效率为0。原文件中描述污染物类别为废气，污染物指标为烟尘，此处对其进行了匹配工作，将其匹配到LCAflow库里面相最符合的流，污染物指标备注为烟尘
- Flue dust: 0.15
  污染物指标烟尘的末端治理技术是单筒（多筒并联）旋风，其效率为70，末端治理设施实际运行率（k值）计算公式为k=除尘设施年运行小时数/热风炉年运行小时数。原文件中描述污染物类别为废气，污染物指标为烟尘，此处对其进行了匹配工作，将其匹配到LCAflow库里面相最符合的流，污染物指标备注为烟尘
- Flue dust: 0.15
  污染物指标烟尘的末端治理技术是多管旋风，其效率为70，末端治理设施实际运行率（k值）计算公式为k=除尘设施年运行小时数/热风炉年运行小时数。原文件中描述污染物类别为废气，污染物指标为烟尘，此处对其进行了匹配工作，将其匹配到LCAflow库里面相最符合的流，污染物指标备注为烟尘
- Flue dust: 0.065
  污染物指标烟尘的末端治理技术是文丘里，其效率为87，末端治理设施实际运行率（k值）计算公式为k=除尘设施年运行小时数/热风炉年运行小时数。原文件中描述污染物类别为废气，污染物指标为烟尘，此处对其进行了匹配工作，将其匹配到LCAflow库里面相最符合的流，污染物指标备注为烟尘
- Flue dust: 0.015
  污染物指标烟尘的末端治理技术是静电除尘，其效率为97，末端治理设施实际运行率（k值）计算公式为k=除尘设施年运行小时数/热风炉年运行小时数。原文件中描述污染物类别为废气，污染物指标为烟尘，此处对其进行了匹配工作，将其匹配到LCAflow库里面相最符合的流，污染物指标备注为烟尘
- Flue dust: 0.065
  污染物指标烟尘的末端治理技术是离心水膜，其效率为87，末端治理设施实际运行率（k值）计算公式为k=除尘设施年运行小时数/热风炉年运行小时数。原文件中描述污染物类别为废气，污染物指标为烟尘，此处对其进行了匹配工作，将其匹配到LCAflow库里面相最符合的流，污染物指标备注为烟尘
- Flue dust: 0.065
  污染物指标烟尘的末端治理技术是喷淋塔/冲击水浴，其效率为87，末端治理设施实际运行率（k值）计算公式为k=除尘设施年运行小时数/热风炉年运行小时数。原文件中描述污染物类别为废气，污染物指标为烟尘，此处对其进行了匹配工作，将其匹配到LCAflow库里面相最符合的流，污染物指标备注为烟尘
- Flue dust: 0.001
  污染物指标烟尘的末端治理技术是电袋组合，其效率为99.8，末端治理设施实际运行率（k值）计算公式为k=除尘设施年运行小时数/热风炉年运行小时数。原文件中描述污染物类别为废气，污染物指标为烟尘，此处对其进行了匹配工作，将其匹配到LCAflow库里面相最符合的流，污染物指标备注为烟尘
- Flue dust: 0.002
  污染物指标烟尘的末端治理技术是袋式除尘，其效率为99.6，末端治理设施实际运行率（k值）计算公式为k=除尘设施年运行小时数/热风炉年运行小时数。原文件中描述污染物类别为废气，污染物指标为烟尘，此处对其进行了匹配工作，将其匹配到LCAflow库里面相最符合的流，污染物指标备注为烟尘
- Flue dust: 0.065
  污染物指标烟尘的末端治理技术是湿式喷雾，其效率为87，末端治理设施实际运行率（k值）计算公式为k=除尘设施年运行小时数/热风炉年运行小时数。原文件中描述污染物类别为废气，污染物指标为烟尘，此处对其进行了匹配工作，将其匹配到LCAflow库里面相最符合的流，污染物指标备注为烟尘
- sulfur dioxide: nan
  污染物指标二氧化硫的末端治理技术是/，其效率为0。原文件中描述污染物类别为废气，污染物指标为二氧化硫，此处对其进行了匹配工作，将其匹配到LCAflow库里面相最符合的流，污染物指标备注为二氧化硫
- Nitrogen oxides: 1.02
  污染物指标氮氧化物的末端治理技术是/，其效率为0。原文件中描述污染物类别为废气，污染物指标为氮氧化物，此处对其进行了匹配工作，将其匹配到LCAflow库里面相最符合的流，污染物指标备注为氮氧化物

## Data sources
- 第二次全国污染源普查产排污核算系数手册（试用版）,二级代码05,四级代码0514文件，在完整版文件中第3413页
