# 农田镉污染土壤;植物修复;伴矿景天;植物收获和安全处置;固体废弃物

Dataset: ILCD process, Unit process, black box
Geography: CN
Reference year: 2021
Classification: Unit processes / Other Services / Repair and maintenance
Generated by: 桑春晖, sangch@mail.bnu.edu.cn
Owner: 天工LCI数据工作小组
Review: Dependent internal review by 天工LCI数据工作小组
Amounts: no units in this file; such an amount is in the reference unit of its flow, which a separate flow dataset defines
copyright: false
licenseType: Free of charge for all users and uses

## General comment
收获后景田植株作为危险废物，被运输至填埋场填埋

## Geography
文献中仅明确指出，污染农田位于中国南方，没有具体给出省市

## Time period
文献中没有明确数据收集的开始时间，以文献发表时间为有效期的开始时间

## Technology and included processes
景天干物质使用1吨重的车辆进行运输，往返约60公里。焚烧后，大约5%的飞灰和底灰需要填埋，填埋运输距离30 km。

## Technical purpose
该工业过程旨在利用伴矿景天的植物修复能力，修复镉污染的农田土壤。收获后，因含有镉，植株被视为危险废物进行处理和处置。该过程目的是现场减少土壤污染，使土地适宜重新进行农业生产或用于其他目的，无需进行土壤挖掘或运输。

## Reference product
- Hazardous Solid Waste: 1687.5; measured

## Inputs
- Road Transport,Road Transport: 13500, 117.19 (2 entries); measured
- Coal,Coal,Coal: 71.87; measured
- Electricity: 4945.32; measured
- Fly ash,Fly ash: 3.45; measured

## Data selection and combination
初级数据清单是根据ISO 14040关于LCA.35的规定获得的。基本数据来自特定场地的盆栽实验、中试和供应商处获取，这些数据代表了中国南方的情况。二级数据来自Ecoinvent数据库v2.3，从中选择了地理来源和技术因素最相似的过程。

## Use advice
使用此数据集的用户需要考虑主要数据的区域特异性，这些数据代表了中国南方的情况。若要将结果推广到其他地区，可能需要作出相应调整。由于生物量的危险属性，在建模使用阶段行为时应特别小心。另外，数据相关性的时间框架与文献发布日期相绑定，这意味着超出此日期的实践或法规更改可能需要更新的数据或建模方法。用户还应整合来自地理和技术背景相似的次级数据，以进行更全面的评估。

## Review details
清单： 内部审查通过几个迭代步骤完成，涉及原始数据验证、原始数据记录、代表性、完整性、与 ISO 14040 和 14044 有关的建模的一致性。

## Data sources
- Jin, Y. et al. Integrated Life Cycle Assessment for Sustainable Remediation of Contaminated Agricultural Soil in China. Environ. Sci. Technol. 55, 12032–12042 (2021).
