# 氧化铝生产 ; 冶金用氧化铝 ; 铝土矿

Dataset: ILCD process, Unit process, single operation
Geography: CN
Reference year: 2015
Classification: Unit processes / Materials production / Non-energetic raw materials
Generated by: 常慧敏, huiminchang@tsinghua.edu.cn
Owner: 天工LCI数据工作小组
Review: Dependent internal review by 天工LCI数据工作小组
Amounts: no units in this file; such an amount is in the reference unit of its flow, which a separate flow dataset defines
copyright: false
licenseType: Free of charge for all users and uses

## General comment
本工业流程生产的氧化铝用于冶金应用，特别是原铝的生产。这种高纯度氧化铝来源于铝土矿，是铝工业的重要原料。其使用包括作为电解铝提炼过程中熔炉的前体物料。

## Time period
IAI 2015 (Gabi dataset）

## Reference product
- aluminium oxide, metallurgical: 1000; software or database
  Alumina [kg]

## Inputs
All rows: software or database
- electricity, high voltage, aluminium industry: 1173.6
  Electricity [kWh]
- bauxite: 2846.95
  Bauxite [kg] ; CN: 2/3 Chinese bauxite, 1/3 Guinean bauxite (see Chapter 3.1.2.2)
- Sodium hydroxide: 72.9652
  Caustic soda [kg]
- lime: 31.5461
  Calcined lime [kg]
- heavy fuel oil: 547.075
  Heavy oil [MJ]
- Diesel oil: 1.93245
  Diesel oil [MJ]
- heat, district or industrial, natural gas: 24.2325
  Natural gas [MJ]
- hard coal: 10939
  hard coal [MJ]
- steam, in chemical industry: 125
  Process steam from natural gas 85% [MJ]
- freshwater: 2.03306
  Fresh water [m3]

## Outputs
All rows: software or database
- Dust: 0.4718
  Dust (PM10) [kg] emission to air
- mercury: 0.00012
  Mercury (to air) [kg]
- water vapour: 636.34
  Water vapour [kg] emission to air
- sulfur dioxide: 1.13828
  Sulfur dioxide [kg] emission to air
- Nitrogen oxides: 0.61248
  Nitrous oxide [kg] (laughing gas) [Inorganic emissions to air]
- Suspended solids, unspecified: 0.04132
  Suspended solids [kg] to fresh water
- Oils, unspecified: 1.68476
  Oil [kg] (unspecified) [Hydrocarbons to fresh water]
- mercury: 4.67e-7
  Mercury (to fresh water) [kg]
- Process Water: 1872.59
  Processed water to river [kg]

## Data selection and combination
为了获得可靠的研究结果，我们考虑了最新的和有代表性的数据。如果 GaBi©"专业和推广 "数据库（SP 39）或文献中提供了特定地区或国家的数据，则使用这些数据。如果找不到特定地区的数据，则使用该国的可比数据或全球数据。为保持一致性，如果有相同来源和年份的数据，则使用相同来源和年份的数据。由于数据的可获得性，如果某些输入和背景过程对总输入质量的贡献小于 1%，则本研究不考虑这些输入和背景过程。对于原铝生产，本研究使用了国际铝业协会（IAI）提供的 2015 年最新 LCI 数据（国际铝业协会，2017b）。之所以使用 IAI 的数据，是因为 IAI 是一个考虑全球原铝生产的成熟机构，其数据已在铝业协会和欧洲铝业协会等研究中使用（铝业协会，2013 年；欧洲铝业协会，2018 年）。就标准化原铝生产的生命周期评估数据而言，不确定因素很少。一般来说，这些数据的组成可以完全解释和重建。

## Use advice
使用此LCA数据的用户应注意，该数据集代表了2015年国际铝业协会（IAI）冶金用原铝生产的氧化铝。它涵盖了单元过程（单一操作），并计算了至少对总输入质量有1%贡献的输入和背景过程。应用此数据时，需认识到由于贡献微小而可能被排除的一些输入和过程。使用数据时务必确保在其预定上下文中，特别是在模拟原铝生产的环境影响时。若有更新数据可用，建议进行对账，以便考虑技术和方法论的进步。

## Review details
清单： 内部审查通过几个迭代步骤完成，涉及原始数据验证、原始数据记录、代表性、完整性、与 ISO 14040 和 14044 有关的建模的一致性。

## Data sources
- Luthin, A., Backes, J. G. & Traverso, M. A framework to identify environmental-economic trade-offs by combining life cycle assessment and life cycle costing – A case study of aluminium production. Journal of Cleaner Production 321, 128902 (2021).
