# 铝土矿开采 ; 铝土矿 ; 摇篮 ; 2015年

Dataset: ILCD process, Unit process, single operation
Geography: CN
Reference year: 2021
Classification: Unit processes / Materials production / Non-energetic raw materials
Generated by: 蔡梓萌, caizm6178@163.com
Owner: 天工LCI数据工作小组
Review: Dependent internal review by 天工LCI数据工作小组
Amounts: no units in this file; such an amount is in the reference unit of its flow, which a separate flow dataset defines
copyright: false
licenseType: Free of charge for all users and uses

## General comment
氧化铝生产2017

## Time period
文献发表日期

## Technical purpose
本数据集中描述的铝土矿开采工艺用于提取铝土矿，即铝的主要原料，用于2015年氧化铝（氧化铝）的生产。随后，通过冶炼进一步加工氧化铝以生产铝。数据集应用于评估与工业实践范围内铝土矿开采和处理相关的环境影响。

## Reference product
- bauxite: 6.19577e10; software or database

## Inputs
All rows: software or database
- electricity, high voltage, aluminium industry: 2.70115e8
  electricity
- Coal, brown, in ground: 5.36138e8
  coal
- natural gas, high pressure: 1.0515e7
  coal
- Gasoline: 1.479e6
  gasoline
- Diesel oil: 1.8901e7
  diesel

## Data selection and combination
本研究的数据参考了PA、SA、电力等背景数据的LCA数据。PA数据来自统计数据源，SA数据主要来自文献。背景数据主要来自中国科学院生态环境研究中心CASRCEES 2018建立的中国本地化LCA数据库，涵盖能源、材料、交通、废物管理等LCA数据。

## Use advice
使用此数据集进行生命周期评估时，仔细考虑LCA研究的范围和背景。确保方法论假设（如系统边界和数据质量要求）与LCA的目标和范围相一致。特别注意所指定的年份（2015年对于铝土矿开采和2017年对于氧化铝生产），因为随着技术进步或能源来源的变化，环境影响可能会随时间而变化。将数据与CAS RCEES 2018 LCA数据库结合使用以进行本地化的中国评估，但要注意背景数据对其他地区或条件的相关性和代表性。

## Review details
清单： 内部审查通过几个迭代步骤完成，涉及原始数据验证、原始数据记录、代表性、完整性、与 ISO 14040 和 14044 有关的建模的一致性。

## Data sources
- Ding, N., Liu, N., Lu, B. & Yang, J. Life cycle greenhouse gas emissions of aluminum based on regional industrial transfer in China. J. Ind. Ecol. 25, 1657–1672 (2021).
