# 铝电解碳阳极生产 ; 碳阳极 ; 石油焦 ; 2011年

Dataset: ILCD process, Unit process, single operation
Geography: CN
Reference year: 2021
Classification: Unit processes / Materials production / Inorganic chemicals
Generated by: 蔡梓萌, caizm6178@163.com
Owner: 天工LCI数据工作小组
Review: Dependent internal review by 天工LCI数据工作小组
Amounts: no units in this file; such an amount is in the reference unit of its flow, which a separate flow dataset defines
copyright: false
licenseType: Free of charge for all users and uses

## General comment
所描述的碳阳极生产工艺专门用于铝电解行业。生产的碳阳极是电解槽内进行电解、将铝与氧化物在熔融盐中分离所必需的，用以传导电流。该过程使用石油焦作为原料。该数据集适用于铝行业的利益相关者以及铝制品的生命周期评估。

## Time period
文献发表日期

## Reference product
- anode, for metal electrolysis: 1000; software or database
  anode

## Inputs
All rows: software or database
- electricity, high voltage, aluminium industry: 759.6
  electricty
- heavy fuel oil: 69
  fuel oil
- coal tar: 220
  coal tar pitch
- Petroleum Coke: 1140
  petroleum coak
- coal gas: 1290

## Data selection and combination
本研究的数据参考了PA、SA、电力等背景数据的LCA数据。PA数据来自统计数据源，SA数据主要来自文献。背景数据主要来自中国科学院生态环境研究中心CASRCEES 2018建立的中国本地化LCA数据库，涵盖能源、材料、交通、废物管理等LCA数据。

## Use advice
使用此生命周期评估（LCA）数据的用户应在将数据整合到更广泛评估中时考虑到技术适用性、数据的确切年份（2011年）以及地区背景（中国）。使用PA和SA数据时必须符合它们来源的统计和文献资料。背景数据应与中国情况相匹配，因为它来源于2018年中科院生态环境研究中心（CAS RCEES）建立的数据库。当将数据应用到不同的时间或地理环境时应谨慎使用，并应在新数据可用时进行更新。

## Review details
清单： 内部审查通过几个迭代步骤完成，涉及原始数据验证、原始数据记录、代表性、完整性、与 ISO 14040 和 14044 有关的建模的一致性。

## Data sources
- Ding, N., Liu, N., Lu, B. & Yang, J. Life cycle greenhouse gas emissions of aluminum based on regional industrial transfer in China. J. Ind. Ecol. 25, 1657–1672 (2021).
