# 修复后土壤;土壤异位修复;土壤淋洗

Dataset: ILCD process, Unit process, black box
Geography: IT
Reference year: 2021
Classification: Unit processes / Other Services / Repair and maintenance
Generated by: 杨欣桐, yangxt@caep.org.cn
Owner: 天工LCI数据工作小组
Review: Dependent internal review by 天工LCI数据工作小组
Amounts: no units in this file; such an amount is in the reference unit of its flow, which a separate flow dataset defines
copyright: false
licenseType: Free of charge for all users and uses

## General comment
使用机械过程和淋洗溶液分离土壤的细部分，从而实现污染物的溶解和提取。

## Geography
The site taken as a reference for the remediation is an area of 712 m2 located in a disused industrial district of Tuscany (Italy), in the past subjected to various productive activities that led to contamination with various metals, some of which potentially toxic such as lead (Pb), arsenic (As) and thallium (Tl). As it is a “site of national interest”, its exact location is considered confidential and cannot be disclosed.

## Technical purpose
土壤异位修复通过土壤淋洗是一种用于清洁受污染土壤的技术过程。当土壤受到各种金属污染物污染时，就会实施这一过程，特别是在发现铅（Pb）、砷（As）和铊（Tl）等金属的工业区。该过程适用于大规模土壤去污染项目，尤其是在需要控制和降低污染物排放量至可接受水平的国家利益指定场地。

## Reference product
- Remediated soil: 1.92202e6; measured
  Soil density is 1500 kg m-3 with volume of 1281.6 m3. Total mass of contaminated soil is about 1922.4 t.is about 100 km.

## Inputs
- Excavated soil,Excavated soil: 1281.6; measured
- Hydrochloric Acid,Hydrochloric Acid: 1.335; measured
- freshwater: 14642; measured
- Electricity: 30300; measured

## Outputs
- waste water - untreated: 14592; measured

## Use advice
当使用土壤修复评估数据集时，用户应仔细考虑土壤污染的具体情况和当地法规。参考地点的机密状态要求遵守数据保护协议。将该数据集视为异位土壤淋洗修复项目的案例研究，并在将发现应用于具有不同污染特征或地理位置的土壤时谨慎推断。在评估中包括所有过程输入和输出至关重要，以确保全面评价环境影响。

## Review details
清单： 内部审查通过几个迭代步骤完成，涉及原始数据验证、原始数据记录、代表性、完整性、与 ISO 14040 和 14044 有关的建模的一致性。

## Data sources
- Vocciante, M., De Folly D’Auris, A., Franchi, E., Petruzzelli, G. & Ferro, S. CO2 footprint analysis of consolidated and innovative technologies in remediation activities. J Clean Prod 297, 126723 (2021).
