# NCA材料生产 ; 镍钴铝锂氧化物 (NCA) ; 镍钴铝锂氧化物 (NCA) 前驱体

Dataset: ILCD process, Unit process, single operation
Geography: HUN-CN
Reference year: 2019
Classification: Unit processes / Materials production / Non-energetic raw materials
Generated by: 谢金良, jinliang.research@gmail.com
Owner: 天工LCI数据工作小组
Review: Dependent internal review by 天工LCI数据工作小组
Amounts: no units in this file; such an amount is in the reference unit of its flow, which a separate flow dataset defines
copyright: false
licenseType: Free of charge for all users and uses

## General comment
通过该工艺生产的镍钴铝锂氧化物（NCA）前驱体材料在电池制造行业中得到应用。具体而言，它是锂离子电池正极材料生产中不可或缺的组成部分，这些电池被广泛应用于各种电子设备、电动车辆和能量储存系统中。

## Time period
论文发表年

## Reference product
- Lithium Nickel Cobalt Aluminum Oxide (NCA): 1; measured
  Lithium nickel cobalt aluminum oxide (NCA)

## Inputs
- transport, freight, lorry 16-32 metric ton, unregulated: 0.004; measured
  Lorry, 30t
- NCA precursor: 0.955; measured
  NCA precursor 原文没写单位，我猜是kg
- lithium carbonate: 0.378; measured
  也没写单位

## Use advice
在使用该数据集进行生命周期评估（LCA）时，请确保您的研究范围正确包含了NCA生产过程的特定阶段。应考虑前体合成中原材料提取和消耗品的上游影响。此外，系统边界必须根据您的LCA目标和范围定义，适当反映是否考虑了终生回收过程或是否将其排除在外。同时，考虑自发表年份以来技术进步可能对环境影响产生的影响。

## Review details
清单： 内部审查通过几个迭代步骤完成，涉及原始数据验证、原始数据记录、代表性、完整性、与 ISO 14040 和 14044 有关的建模的一致性。

## Data sources
- Yin, R., Hu, S. & Yang, Y. Life cycle inventories of the commonly used materials for lithium-ion batteries in China. J. Clean. Prod. 227, 960–971 (2019).
