# 市政污泥处理与处置;湿污泥 含水率70%-75%;填埋

Dataset: ILCD process, Unit process, single operation
Geography: CN
Classification: Unit processes / End-of-life treatment / Waste water treatment
Functional unit: The life cycle study boundary starts from the wet sludge (moisture content is about 70% ~ 75%) after mechanical compression and dewatering in the sewage treatment plant to the final disposal functional unit adopts 1t wet sludge after mechanical compression.
Generated by: 金思甜, 2331276@tongji.edu.cn
Owner: 天工LCI数据工作小组
Review: Dependent internal review by 天工LCI数据工作小组
Amounts: no units in this file; such an amount is in the reference unit of its flow, which a separate flow dataset defines
copyright: ['opt4ROkqig']
licenseType: Free of charge for all users and uses

## General comment
由于难以获得单纯污泥填埋的数据，本文基于固体废弃物填埋数据进行计算。

## Technology and included processes
干污泥有机物组分达到 22.6％。

## Technical purpose
市政污泥处理与处置过程适用于含水率为70%-75%的湿污泥。经过处理的污泥主要用于填埋。该工艺包含了污泥的压缩脱水处理，使其适宜于填埋场作业。主要应用于准备湿污泥最终处置的废物管理设施。

## Reference product
- Sludge: 1000; input; estimated
  1t湿污泥（水分含 量在 70％ ～75％左右 ）

## Inputs
- hard coal; 26.3 MJ/kg: 1.31; calculated
  标准煤

## Outputs
All rows: calculated
- carbon dioxide (biogenic): 33.05
  原文未区分biogenic和fossil，根据专家判断此处为biogenic。
- methane (biogenic),methane (biogenic): 13.4
  原文未区分biogenic和fossil，根据专家判断此处为biogenic。
- Nitrogen oxides: 0.0894
- sulfur oxides: 0.0281
- hydrogen sulfide: 0.00682
- ammonia: 0.00656
- chemical oxygen demand: 2.5

## Use advice
使用此数据集的用户应将数据集仅适用于70%-75%的特定含水率范围。数据应用范围限定在填埋前的机械压缩和脱水阶段。用户不得将本数据替换为含水率不同的污泥或不涉及机械烘干的处理。应用前应特别注意地区填埋场法规与所描述工艺的兼容性。

## Review details
清单： 内部审查通过几个迭代步骤完成，涉及原始数据验证、原始数据记录、代表性、完整性、与 ISO 14040 和 14044 有关的建模的一致性。

## Data sources
- 廖艳芬,漆雅庆,马晓茜.城市污水污泥焚烧处理环境影响分析[J].环境科学学报,2009,29(11):2359-2365.DOI:10.13671/j.hjkxxb.2009.11.015.
