# 铝电解 ; 液态原铝 ; 预焙 ; 冶金用氧化铝 ; 2008年

Dataset: ILCD process, Unit process, single operation
Geography: CN
Reference year: 2021
Classification: Unit processes / Materials production / Metals and semimetals
Generated by: 蔡梓萌, caizm6178@163.com
Owner: 天工LCI数据工作小组
Review: Dependent internal review by 天工LCI数据工作小组
Amounts: no units in this file; such an amount is in the reference unit of its flow, which a separate flow dataset defines
copyright: false
licenseType: Free of charge for all users and uses

## General comment
所描述的工业过程是使用冶金用氧化铝通过预焙电解方法生产液态原铝。这种原铝常用于汽车、建筑、电子和包装等多种行业，因其轻质、导电和耐蚀性能。该数据集的特定参考年份是2008年，表明当时的技术实践和效率。

## Time period
文献发表日期

## Reference product
- aluminium, primary, liquid: 1000; software or database

## Inputs
All rows: software or database
- Integrated AC power consumption: 49845.8
- aluminium oxide, metallurgical: 1922.76
- fluoride salt: 23.22
- anode, prebake, for aluminium electrolysis: 426.32
- Water, unspecified natural origin: 4.38
  water consumption

## Data selection and combination
本研究的数据参考了PA、SA、电力等背景数据的LCA数据。PA数据来自统计数据源，SA数据主要来自文献。背景数据主要来自中国科学院生态环境研究中心CASRCEES 2018建立的中国本地化LCA数据库，涵盖能源、材料、交通、废物管理等LCA数据。

## Use advice
使用此LCA数据集时，重要的是相应地划定系统边界，并始终如一地使用它所代表的技术时代的数据。应特别注意数据是否适用于所评估过程的地理和技术范围。用户还应注意自2008年以来由于技术进步和区域实践差异，LCA结果可能会有所不同。应从CAS RCEES 2018数据库或其他相关数据库中适当地获取背景数据，以保持准确性。

## Review details
清单： 内部审查通过几个迭代步骤完成，涉及原始数据验证、原始数据记录、代表性、完整性、与 ISO 14040 和 14044 有关的建模的一致性。

## Data sources
- Ding, N., Liu, N., Lu, B. & Yang, J. Life cycle greenhouse gas emissions of aluminum based on regional industrial transfer in China. J. Ind. Ecol. 25, 1657–1672 (2021).
