# Coking|Coke|Coking

Dataset: ILCD process, Unit process, single operation
Geography: LN-CN
Classification: Materials production / Other mineralic materials
Generated by: Fuxiang, 1162850692@qq.com
Review: Dependent internal review by Tiangong LCI Data Working Group
Amounts: no units in this file; such an amount is in the reference unit of its flow, which a separate flow dataset defines
copyright: false

## Geography
To analyze life cycle water use and discharge, an iron and steel enterprise located in Liaoning Province, China, was selected as the case study.

## Reference product
- Coke: 1000; measured

## Inputs
All rows: measured
- Water (fresh water): 397
- Softened Water: 380.41
  Softened water
- Cleaned coal: 1343.49
  Cleand coal
- Coke oven gas: 33.13
- Blast furnace gas: 935.35
- Linz-Donawitz gas: 3.02
- Electricity: 114.732
- process steam: 37.61
- used air: 5.54
- nitrogen: 15.72

## Outputs
- process steam from waste incineration: 385.13; measured
  Waste heat steam
- waste heat: 122.28; measured
  Waste heat water
- Coke oven gas: 457.21; measured
- waste water - untreated: 79.51; measured

## Review details
Inventory: The internal review was done by several iteration steps concerning raw data validation, raw data documentation, representativity, completeness and consistency of modelling with regard to ISO 14040 and 14044.; Documentation: The review of the documentation was performed by Ecobilan and is in compliance with ISO 14040 and 14044. The data set documentation is correct in view of the appropriateness of the information provided. It includes all relevant information in view of data quality and scope of application of the respective LCI result.

## Data sources
- Life cycle water use and wastewater discharge of steel production based on material-energy-water flows: A case study in China
