# 直接还原铁生产;直接还原铁;基于天然气直接还原（ENE）

Dataset: ILCD process, Unit process, single operation
Geography: CN
Classification: Energy carriers and technologies / Natural gas based fuels
Generated by: 付翔, 1162850692@qq.com
Owner: 天工LCI数据工作小组
Review: Dependent internal review by 天工LCI数据工作小组
Amounts: no units in this file; such an amount is in the reference unit of its flow, which a separate flow dataset defines
copyright: false
licenseType: Free of charge for all users and uses

## General comment
基于天然气的直接还原铁（DRI）生产，特指能效型（ENE）工艺，用于作为传统高炉方法的替代，在钢铁制造中使用。该过程用于生产通常后续转化为钢铁的铁，可用于建筑、汽车和家电制造等各种产业。

## Geography
The average operating data of Coal-DR, NG-DR (MID), and NG-DR (ENE) demonstration projects in China are used as the benchmark for the LCI of DR routes.

## Reference product
- Direct Reduced Iron: 1000; calculated
  DRI

## Inputs
All rows: calculated
- Pellet: 1357.3
  Pellets
- Water (fresh water): 200
  The average operating data of Coal-DR, NG-DR (MID), and NG-DR (ENE) demonstration projects in China are used as the benchmark for the LCI of DR routes. LCI of COG-DR and H-DR routes, which is not scaled-up in China are estimated based on Coal-DR routes combined with literature data from simulations, laboratory tests, and process modeling in
- process steam: 359.2
  (same comment as for Water (fresh water))
- oxygen: 100
  (same comment as for Water (fresh water))
- Natural gas, at consumer EU-27: 235.3
  (same comment as for Water (fresh water))
- Electricity: 524.16
  (same comment as for Water (fresh water))

## Outputs
- Dust (unspecified, from stack): 0.1; calculated
  (same comment as for Water (fresh water))
- carbon dioxide: 241; calculated
  (same comment as for Water (fresh water))

## Data treatment and extrapolations
LCI of COG-DR and H-DR routes, which is not scaled-up in China are estimated based on Coal-DR routes combined with literature data from simulations, laboratory tests, and process modeling in Table 9 [49,50]. The LCI of Coal-DR is obtai

## Use advice
在使用直接还原铁生产过程的生命周期清单（LCI）数据时，包括基于煤的DR（Coal-DR）、具有中等效率的天然气基DR（NG-DR）（MID）以及高效能（ENE）变体，用户应参考中国示范项目的运营数据作为基准。对于在中国尚未大规模铺开的路线，如COG-DR和H-DR，LCI应结合仿真、实验室测试和流程建模文献使用Coal-DR数据推算。注意，需要考虑方法论考虑，如系统边界、数据质量和技术适用性。

## Review details
清单： 内部审查通过几个迭代步骤完成，涉及原始数据验证、原始数据记录、代表性、完整性、与 ISO 14040 和 14044 有关的建模的一致性。

## Data sources
- The carbon reduction potential of hydrogen in the low carbon transition of the iron and steel industry: The case of China
