# Non-ionicsurfactants|Ethyleneoxide,fattyalcohol,nonylphenol,causticsoda,etc.①|Chemicalsynthesis(ethoxylation)|All sizes / /|非离子表面活性剂|环氧乙烷、脂肪醇、壬基酚、烧碱等①|化学合成（乙氧基化）|所有规模

Dataset: ILCD process, Partly terminated system
Geography: CN
Reference year: 2019
Classification: Materials production / Other mineralic materials
Generated by: The data was created by the Office of the Second National Pollution Source Census of the Ministry of Ecology and Environment, and the data was organized by the TianGong Plan team for ILCD format / 生态环境部第二次全国污染源普查工作办公室创建数据，天工计划团队常慧敏整理数据为ILCD格式
Amounts: no units in this file; such an amount is in the reference unit of its flow, which a separate flow dataset defines
copyright: false

## Technology and included processes
the Technical of end-of-pipe management technology for pollution Nonionic Surfactantis/
污染物指标工业废水量的末端治理技术是/，末端治理设施实际运行率（k值）计算公式为/，①由于表面活性剂生产中使用的原料品种较多，系数表单中列举了几种常用原料，实际生产时并不局限于此。

## Reference product
- Nonionic Surfactant: 1000; calculated
  原文件中描述污染物类别为Product，污染物指标为非离子表面活性剂，此处对其进行了匹配工作，将其匹配到LCAflow库里面相最符合的流，污染物指标备注为工业废水量

## Outputs
All rows: calculated
- Waste water: 2000
  原文件中描述污染物类别为废水，污染物指标为工业废水量，此处对其进行了匹配工作，将其匹配到LCAflow库里面相最符合的流，污染物指标备注为工业废水量
- chemical oxygen demand: 0.20804, 0.16346 (2 entries)
  原文件中描述污染物类别为废水，污染物指标为化学需氧量，此处对其进行了匹配工作，将其匹配到LCAflow库里面相最符合的流，污染物指标备注为化学需氧量
- Ammonia Nitrogen: 0.000104, 9.6e-5 (2 entries)
  原文件中描述污染物类别为废水，污染物指标为氨氮，此处对其进行了匹配工作，将其匹配到LCAflow库里面相最符合的流，污染物指标备注为氨氮
- Petroleum-related waste: 0.019, 0.0095 (2 entries)
  原文件中描述污染物类别为废水，污染物指标为石油类，此处对其进行了匹配工作，将其匹配到LCAflow库里面相最符合的流，污染物指标备注为石油类
- Nitrogen, organic bound: 0.00043, 0.000387 (2 entries)
  原文件中描述污染物类别为废水，污染物指标为总氮，此处对其进行了匹配工作，将其匹配到LCAflow库里面相最符合的流，污染物指标备注为总氮
- phosphorus, total: 0.000242, 0.000242 (2 entries)
  原文件中描述污染物类别为废水，污染物指标为总磷，此处对其进行了匹配工作，将其匹配到LCAflow库里面相最符合的流，污染物指标备注为总磷
- volatile organic compound: 0.0192, 0.0144 (2 entries)
  原文件中描述污染物类别为废气，污染物指标为挥发性有机物，此处对其进行了匹配工作，将其匹配到LCAflow库里面相最符合的流，污染物指标备注为挥发性有机物

## Data sources
- 第二次全国污染源普查产排污核算系数手册（试用版）,二级代码26,四级代码2681文件，在完整版文件中第3009页
