# 焦化;焦炭;焦化（D01）

Dataset: ILCD process, Unit process, single operation
Geography: CN
Reference year: 1998
Classification: Energy carriers and technologies / Energetic raw materials
Generated by: 付翔, 1162850692@qq.com
Owner: 天工LCI数据工作小组
Review: Dependent internal review by 天工LCI数据工作小组
Amounts: no units in this file; such an amount is in the reference unit of its flow, which a separate flow dataset defines
copyright: false
licenseType: Free of charge for all users and uses

## General comment
来自表 4-17 D01 钢厂生产吨材环境负荷编目表

## Time period
论文提到钢铁企业环境总体数据为1998年的吨钢环境基础数据。

## Technical purpose
所述工艺用于生产焦炭，这是一种由煤炭衍生的富碳材料，专门用于钢铁制造操作。该过程涉及在无氧环境中加热煤炭以生产焦炭，焦炭是钢铁生产过程中高炉所必需的原材料。

## Reference product
- coke,Coke: 489; measured
  焦炭

## Inputs
- Energy, geothermal, converted: 2438.3; measured
- water: 13737; measured

## Outputs
All rows: measured
- Dust (unspecified, from stack): 2.425
  烟尘
- Dust (unspecified, from stack): 2.202
- sulfur dioxide: 1.878
- cyanide: 0.000121
- phenol: 5.6e-5
  挥发酚
- Hydrocarbons, aliphatic, alkanes, unspecified: 0.007804
  石油类
- Suspended solids, unspecified: 0.09819
- chemical oxygen demand: 0.698947
- Dust (unspecified, from stack): 22.022
  集尘
- Spoil (deposited, hibernating in ground, non elementary flow): 24.428

## Use advice
数据集用户应将表 4-17, D01 钢铁厂生产的环境负荷数据视为 1998 年钢铁工业技术状况的代表。应用此数据时，重要的是要注意这一特定时间的参考，并确保调整计算或模型以反映自 1998 年以来行业的任何技术进步或变化。此外，用户应注意诸如是否包括下游回收过程的这种方法论边界。

## Review details
清单： 内部审查通过几个迭代步骤完成，涉及原始数据验证、原始数据记录、代表性、完整性、与 ISO 14040 和 14044 有关的建模的一致性。

## Data sources
- 周和敏. 钢铁材料生产过程环境协调性评价研究. (北京工业大学, 2001).
