# LFP湿法回收

Dataset: ILCD process, Unit process, single operation
Geography: JX-CN
Reference year: 2021
Classification: End-of-life treatment / Material recycling
Functional unit: Based on market data, the prismatic LFP and NMC are used as a reference, with energy densities of 120 Wh/kg and 150 Wh/kg, respectively. Values are scaled into 1 kg of battery cell.
Generated by: 马清源, m1120498928@163.com
Owner: 天工LCI数据工作小组
Review: Dependent internal review by 天工LCI数据工作小组
Amounts: no units in this file; such an amount is in the reference unit of its flow, which a separate flow dataset defines
copyright: false
licenseType: Free of charge for all users and uses

## General comment
在湿法冶金回收的早期阶段，NCM的处理过程与LFP的处理过程相似。首先，对电池组进行放电和拆卸，并在球磨机中对电池进行粉碎。然后，将粉末加热至400–600的温度◦C.铜、铝和电极材料通过物理方法分离，如浮选和磁选，然后对电极材料进行研磨和酸浸。对于LFP，电极材料与H2O2和H2SO4反应，以FePO4的形式去除铁和磷。然后加入Ca（OH）2以除去Fe（OH）3形式的铁离子。将Na2CO3添加到剩余的提取液中以获得Li2CO3晶体。

## Technical purpose
LFP湿法回收技术（HRT）旨在从废弃的锂离子电池中回收有价值的材料。该过程适用于回收行业，特别是用于处理能量密度为120 Wh/kg和150 Wh/kg的棱柱形LFP和镍锰钴（NMC）电池。该技术通过促进锂、铁、磷和其他金属元素的提取和重复使用，有助于可持续材料管理。

## Reference product
- EoL LFP battery: 1; input

## Inputs
All rows: normal; measured
- sodium chloride: 0.00769
- Sulfuric acid(98%): 0.225
- Sodium carbonate（95%）: 0.171
- Sodium chlorate（96%）: 0.00443
- sodium hydroxide: 0.00703
- hydrated lime dry slaked: 0.00472
- Hydrogen peroxide（25%）: 0.0492
- electricity mix: 0.774, 1.3356 (2 entries)
- natural gas: 0.822, 0.0231 (2 entries)
- water,water: 2.09
- Infrastructure: 4.6e-10, 4.6e-10 (2 entries)
- Freight rail: 1.3
- Freight Truck: 0.13

## Outputs
All rows: normal; measured
- Lithium carbonate: 0.126
- Copper Scrap: 0.0987
- Aluminum scrap: 0.0881
- sodium sulfate: 0.222
- Dust (unspecified, from stack),Dust (unspecified, from stack): 0.000769, 0.000125 (2 entries)
- sulphuric acid: 1.91e-5, 0.000191 (2 entries)
- non-methane volatile organic compounds: 7.69e-5
- Water (river water from technosphere, waste water): 0.0648
- chemical oxygen demand: 1.3e-5
- Suspended solids, unspecified: 2.89e-6
- ammonia: 1.31e-6
- Residue to landfill: 0.0308, 0.797 (2 entries)

## Data selection and combination
使用自上而下的方法，在公司层面从四家公司收集一年期的材料、能源、废物和排放通量，然后通过除以吞吐量将其划分为功能单元。

## Data treatment and extrapolations
收集的蒸汽和天然气以重量和体积为单位，将其换算为MJ，换算系数为2.8 MJ/kg和35.6 MJ/kg，以匹配Ecoinvent数据库中的单位。LCI中没有列出天然气的GHG排放，因为它们是使用Ecoinvent中的燃烧过程建模的。

## Sampling procedure
被调查的公司没有监测进入废水的硫酸和盐酸的量，这些废水在处理后会排放到水体中。在这里，我们对它们进行了积极的估计，是排放到大气中的相应数量的10倍。

## Use advice
使用此LCA数据集时，用户应注意技术适用范围仅指定用于LFP和NMC电池回收。数据应根据1 kg电池电芯的功能单元进行缩放。蒸汽和天然气转换为MJ的计算应与Ecoinvent数据库单位一致，使用给定的转换因子。至关重要的是，要考虑硫酸和盐酸排入水体的激进估计，这些排放量是排入大气中相应数量的十倍。天然气的温室气体排放应根据Ecoinvent数据库中概述的燃烧过程进行建模。用户应核实LCA方法论和数据质量是否与其研究的目标和范围相一致。

## Review details
清单： 内部审查通过几个迭代步骤完成，涉及原始数据验证、原始数据记录、代表性、完整性、与 ISO 14040 和 14044 有关的建模的一致性。

## Data sources
- Jiang, S. et al. Environmental impacts of hydrometallurgical recycling and reusing for manufacturing of lithium-ion traction batteries in China. Science of The Total Environment 811, 152224 (2022).
