# 退役三元锂电池火法回收

Dataset: ILCD process, Unit process, single operation
Geography: CN
Reference year: 2022
Classification: Unit processes / End-of-life treatment / Material recycling
Functional unit: retired NCM battery of 48V,12Ah
Generated by: 陈利鹏, lpchen07@163.com
Owner: 天工LCI数据工作小组
Review: Dependent internal review by 天工LCI数据工作小组
Amounts: no units in this file; such an amount is in the reference unit of its flow, which a separate flow dataset defines
copyright: false
licenseType: Free of charge for all users and uses

## General comment
废旧的锂镍钴锰氧化物（NCM）电池通过火法冶金工艺来回收前驱材料。

## Technical purpose
这种火法回收工艺旨在从退役的三元锂电池中回收前体材料。通常，这适用于电动车辆、便携式电子产品和能源存储系统中使用的电池。

## Reference product
- EoL NCM battery: 1; input; measured
  退役三元锂电池（4×12V, 12Ah）

## Inputs
All rows: measured
- Sulfuric acid(98%): 3.882
- Sodium Hydroxide solution（1mol/L）: 0.3798
- sodium carbonate: 0.0882
- water,water: 0.0384
- Lithium carbonate: 0.5076
- silicon: 0.0126
- Sodium chlorate（96%）: 0.003
- magnesium chloride: 0.0054
- potassium chloride: 0.0024
- carbon: 0.0012
- hard coal: 4.122
- Electricity: 39.528
- Natural gas, at consumer EU-27: 0.5874
- Light gas oil: 0.0078
- Heavy oil: 0.00972

## Outputs
All rows: measured
- aluminium: 0.21
- copper: 0.1944
- Graphite: 0.726
- polypropylene granulate (PP): 0.1188
- carbon dioxide (fossil): 0.5718
  原文未区分bio和fossil，根据专家判断此处为fossil
- Total particulate matter: 1.32e-5
- sulfur dioxide: 1.2
- nitrous oxide: 9e-6
- nickel: 4.2e-5
- Hazardous waste (unspec.): 0.03138
- Cathode Material: 0.3624
  镍钴锰锂

## Use advice
与此工业过程相关联的数据集应在考虑特定回收效率和回收材料纯度的前提下使用。用户应确保回收数据与火法冶金设施的技术能力相符。诸如NCM电池的使用年限、放电状态和预处理过程等因素可能会影响回收材料的质量和数量。建议用户将此数据与自己的库存结合，以准确反映实际情况。

## Review details
清单： 内部审查通过几个迭代步骤完成，涉及原始数据验证、原始数据记录、代表性、完整性、与 ISO 14040 和 14044 有关的建模的一致性。

## Data sources
- Liu, M. et al. Life cycle environmental and economic assessment of electric bicycles with different batteries in China. Journal of Cleaner Production 385, 135715 (2023).
