# 硫酸铝粉末生产 ; 硫酸铝粉末 ; 氢氧化铝

Dataset: ILCD process, Unit process, single operation
Geography: CN
Reference year: 2019
Classification: Unit processes / Materials production / Inorganic chemicals
Generated by: 谢金良, jinliang.research@gmail.com
Owner: 天工LCI数据工作小组
Review: Dependent internal review by 天工LCI数据工作小组
Amounts: no units in this file; such an amount is in the reference unit of its flow, which a separate flow dataset defines
copyright: false
licenseType: Free of charge for all users and uses

## General comment
该工艺生产的硫酸铝粉末常用于水处理净化，在造纸工业中用于施胶以及作为染色和印花织物的媒染剂。也可以在园艺中用来调整土壤酸碱度。

## Time period
论文发表年

## Reference product
- aluminium sulfate, powder: 1; missing unimportant

## Inputs
- transport, freight, lorry 16-32 metric ton, unregulated: 0.0846; missing unimportant
- aluminium hydroxide: 0.46; missing unimportant
- sulfuric acid: 0.06; missing unimportant

## Use advice
使用该数据集的用户应考虑硫酸铝粉末的具体等级和纯度，并应用于预定用途。应当注意水处理和纺织加工中有关化学品使用的法规变动。数据集用户应确保根据数据发布年份提及的技术适用性，准确地对使用阶段行为进行建模，包括适当的废物管理和处理系统。

## Review details
清单： 内部审查通过几个迭代步骤完成，涉及原始数据验证、原始数据记录、代表性、完整性、与 ISO 14040 和 14044 有关的建模的一致性。

## Data sources
- Yin, R., Hu, S. & Yang, Y. Life cycle inventories of the commonly used materials for lithium-ion batteries in China. J. Clean. Prod. 227, 960–971 (2019).
