# 湿蒸法棉布染整加工|印染棉布|翻缝

Dataset: ILCD process, Unit process, single operation
Geography: SZ-JS-CN
Reference year: 2012
Classification: Materials production / Other mineralic materials
Generated by: Yingfan Duan, 1300925579@qq.com
Review: Dependent internal review by Tiangong LCI Data Working Group
Amounts: no units in this file; such an amount is in the reference unit of its flow, which a separate flow dataset defines
copyright: false

## Geography
本研究选取江苏省某印染企业为重点调研对象，该企业位于长三角经济圈中的常熟。

## Inputs
- Cotton: 167; measured
- Cotton: 0.118; measured
  棉线

## Outputs
- carbon dioxide: 11.4; calculated
- carbon monoxide: 0.0263
- sulfur dioxide: 0.000358; estimated
- methane: 0.000232; calculated
- Nitrogen oxides: 0.116
- nitrous oxide: 0.000217; calculated
- Dust (unspecified, from stack): 0.00483; estimated
- ammonia: 8.35e-5
- non-methane volatile organic compounds: 0.00942

## Review details
Inventory: The internal review was done by several iteration steps concerning raw data validation, raw data documentation, representativity, completeness and consistency of modelling with regard to ISO 14040 and 14044.; Documentation: The review of the documentation was performed by Ecobilan and is in compliance with ISO 14040 and 14044. The data set documentation is correct in view of the appropriateness of the information provided. It includes all relevant information in view of data quality and scope of application of the respective LCI result.

## Data sources
- 朱亚楠. 棉布连续轧染工艺生命周期环境影响评价. (南京大学, 2012).
