# 水泥生产|水泥, 替代成分 6-20%, 32.5MPa|新型悬浮预热器|混合固废

Dataset: ILCD process, LCI结果
Geography: CN
Classification: Materials production / Other mineralic materials
Generated by: 杨思琪
Amounts: no units in this file; such an amount is in the reference unit of its flow, which a separate flow dataset defines
copyright: false

## General comment
普通水泥的第三天抗压强度大于10 MPa，第28天抗压强度为32.5 MPa。使用含有二氧化硅和烟气脱硫石膏的工业固体废物代替黏土和石膏进行水泥生产。
新型悬浮预热器（New suspension preheater，NSP）是中国水泥工业中主要的水泥生产工艺。该工艺包括三个主要的生产过程：煤粉和生料制备过程，包括原材料的输送、研磨、均化和存储以及煤的研磨和存储；在燃烧过程中，混合磨碎的生料被输入到预热器中，然后经过煅烧器分解，60％的煤在950℃下燃烧。在煅烧器中，石灰石分解率约为95％，在窑中分解率为5％。分解后的物料落入窑中，在超过1400℃的温度下与40％的煤燃烧成熟料。在成品处理过程中，当熟料、矿物添加剂和石膏在磨煤机中细细粉碎时，水泥就被生产出来了。生料在预热器中通过再生的热空气悬浮并加热。

## Geography
中国联合水泥公司

## Model description
使用32.5 MPa强度等级的1吨水泥作为功能单位（FU）。
系统边界涉及原材料和能源生产、道路运输、原材料破碎、熟料生产、水泥磨和包装、废热能回收、直接排放、现场烟气处理和水泥厂中固体废物再利用。

## Reference product
- cement, alternative constituents 6-20%, 32.5MPa: 1000
  32.5MPa水泥

## Inputs
- limestone, crushed, for mill: 811.32; measured
  石灰石
- ash: 272.51; measured
  粉煤灰
- gypsum (desulphurized): 44.35; measured
  石膏
- Iron tailings: 36.06; measured
  铁粉矿泥
- clay: 26.63; measured
  石英砂矿物泥
- blast furnace slag: 58.01; measured
  矿渣
- shale: 7.78; measured
  页岩
- Construction waste: 3.26; measured
  建筑垃圾
- Mineral waste: 2.7; measured
  煤矸石
- Carbide slag: 4.24; measured
  乙炔渣
- ammonia, anhydrous, liquid: 0.57; measured
  氨
- water: 290; measured
  水
- electricity, medium voltage: 200.916; article inperiodical
  电。从文献中收集了电力和煤的LCI数据。
- hard coal, run-of-mine: 72.74; article inperiodical
  煤炭。从文献中收集了电力和煤的LCI数据。
- transport, freight, lorry, unspecified: 268.03; measured
  公路运输。根据调查，原材料在水泥生产中的运输距离约为200公里。道路运输的环境影响取自文献。

## Outputs
All rows: measured
- carbon dioxide: 440.61
  二氧化碳
- sulfur dioxide: 0.075
  SO2
- Nitrogen oxides: 0.15
  NOX
- particles (> PM10): 0.094
  颗粒，未标明粒径，按PM>10处理。
- fluoride: 0.00186
  氟化物
- ammonia: 0.00586
  氨
- mercury: 7.801e-5
  Hg
- wastewater, unpolluted: 0.023
  废水

## Cut-off and completeness
除了石灰石外，原材料的制造被忽略，因为几乎所有这些材料都是工业固体废物。

## Data selection and combination
水泥生产的操作过程（如原材料和能源消耗、运输距离、能量回收、直接排放、废弃物处理、资本成本）的年度平均数据是从中国联合水泥公司的调查中获得的。

## Sampling procedure
中国联合水泥有限公司，占中国水泥市场的9.45%。
根据《2014年中国水泥年鉴》的数据，采用新型悬浮预热器技术的5000t/d和2500t/d水泥生产线数量分别占中国所有水泥生产线的56.1%和28.3%。规模为5000t/d和2500t/d的生产线可能具有相对准确性，反映了中国水泥生产的主要特点。
参数：数值；
水泥生产线规模：5000t/d×1，2500t/d×2；
水泥生产技术：新型悬浮预热器；
发电回收效率：30%；
除尘技术：干法袋式除尘；
除尘效率：99.95%；
脱硝技术：选择性非催化还原法；
脱硝效率：50.00%。

## Data sources
- Dong Yang, Lin Fan, Feng Shi, Qian Liu, & Yajing Wang. (2017). Comparative study of cement manufacturing with different strength grades using the coupled LCA and partial LCC methods-A case study in China. RESOURCES CONSERVATION AND RECYCLING, 119, 60–68.
