# 安装 ; 风轮机的基础 (风轮机的类别：27×3.6MW+1×5MW)

Dataset: ILCD process, Unit process, single operation
Geography: SH-CN
Reference year: 2009
Classification: Unit processes / Systems / Construction
Functional unit: The functional unit is 1 kWh on-grid electricity provision.
LCI method principle: Consequential
LCI method approaches: Allocation
Generated by: 赵云志, ll10088@163.com
Owner: 天工LCI数据工作小组
Review: Dependent internal review by 天工LCI数据工作小组
Amounts: no units in this file; such an amount is in the reference unit of its flow, which a separate flow dataset defines
copyright: false
licenseType: Free of charge for all users and uses

## General comment
该数据集详细说明了东海大桥海上风电场的建设和运营 - 一个风力涡轮机的分类为27×3.6MW和1×5MW的风电项目。这个海上风电场作为中国乃至欧洲之外的第一个此类项目，使用这些涡轮机来产生上网电力。该数据集旨在评估与海上风电场生命周期相关的环境影响，包括材料和设备制造、运输和安装、运行和维护、拆解和回收等阶段。

## Geography
所研究的风电场- -东海大桥海上风电场( DBOWF )是中国在上海管辖范围内的第一个海上风电场，也是欧洲以外的第一个海上风电场。工程分两期施工，分别位于东海大桥两侧(图1 )。

## Reference product
- Wind tower foundation: 28; measured
  27 3.6-MW wind turbines and one 5-MW prototype wind turbine.

## Inputs
- Diesel: 911000; calculated
- Energy, geothermal, converted: 6.08e7; calculated

## Outputs
- carbon dioxide: 4.1082e6; calculated
- particles (PM2.5): 4400; calculated
- sulfur dioxide: 6300; calculated
- nitrous oxide: 45700; calculated

## Deviations from the LCI method approaches
本研究采用PLCA建模方法计算了中国某典型海上风电场的能源和环境排放。从摇篮到坟墓的过程包括材料和设备制造、运输和安装、操作和维护、拆解和回收4个阶段(图2 )。

## Data selection and combination
风机、基础和电缆的技术参数从DBOWF的设计文件中获得(表2)。能源和排放因子(即单位材料和构件生产的能源消耗和环境排放)来源于Ecoinvent 2.2数据集(生态发明中心, 2009)，优先参考中国实践的系数。对于关键材料和设备，其海上运输能量由运输负荷和海运能量强度计算得到。根据施工方案，对设施安装能耗和排放进行了估算。风电场的运行和维护数据，如维护的频率和工作时间，是通过与工程技术人员的现场调查获得的。与模型参数和输入数据相关的不确定性在本文的敏感性分析部分进行了说明。

## Use advice
使用这个LCA数据集时，根据Ecoinvent 2.2数据集，必须考虑到中国实践中关于能源和排放因子的具体条件。用户应该根据运输负载和航运能源强度准确计算物料和设备的海上运输能耗。使用提供的施工方案估算安装能耗和排放，这对环境评估很重要。在数据的适用性上，应该考虑气候条件、当地基础设施、维护实践和生命周期终端处理。应该进行敏感性分析，以评估模型参数和输入数据的内在不确定性的影响。

## Review details
清单： 内部审查通过几个迭代步骤完成，涉及原始数据验证、原始数据记录、代表性、完整性、与 ISO 14040 和 14044 有关的建模的一致性。

## Data sources
- Yang, J. et al. The life-cycle energy and environmental emissions of a typical offshore wind farm in China. Journal of Cleaner Production 180, 316–324 (2018).
