# 靛蓝原料羟基乙腈的生产

Dataset: ILCD process, Unit process, black box
Geography: CQ-CN
Reference year: 2015
Classification: Unit processes / Materials production / Organic chemicals
Functional unit: the production of 1 ton glycolonitrile
Generated by: 玲俐, calinly@163.com
Owner: 天工LCI数据工作小组
Review: Dependent internal review by 天工LCI数据工作小组
Amounts: no units in this file; such an amount is in the reference unit of its flow, which a separate flow dataset defines
copyright: false
licenseType: Free of charge for all users and uses

## General comment
羟基乙腈是合成靛蓝染料的前体，在纺织行业中至关重要。泰丰泰兴化工公司开发的这种化学品的生产是清洁制造过程中的一个重要步骤。该公司优化了生产羟基乙腈的技术，这是靛蓝年产能6000吨的一部分。该化合物通过甲醛和粗氢氰酸的反应生成，随后通过进一步的化学合成步骤为靛蓝的清洁生产途径做出贡献。

## Geography
本课题研究依托重庆市化工行业龙头企业—泰丰泰兴化工公司现有的 6000 吨/年的靛蓝生产能力，对项目清洁生产工艺进行了技术革新和流程优化，达到 实现重要原料羟基乙腈的自行生产

## Time period
文献发表日期

## Technology and included processes
本文依托重庆泰丰泰兴化工公司现 有的 6000 吨/年的靛蓝生产装置，对靛蓝原料羟基乙腈的清洁生产工艺技术进行 了深入研究，通过原材料粗氢氰酸气体加上甲醛生成羟基乙腈，之后将羟基乙腈 与苯胺合成苯胺基乙腈，进一步与碱反应制备苯胺基乙酸钾，再合成靛蓝产品的 清洁生产工艺路线

## Model description
装置操作时间每年按 300 天（即 7200 小时）计

## Reference product
- Glycolonitrile: 1000; measured
  羟基乙腈

## Inputs
All rows: measured
- Aqueous ammonia: 418
  液氨，浓度≥99%
- natural gas: 628.5
  天然气，CH4≥97%
- Sulfuric acid(98%): 314.4
  硫酸，浓度98%
- methanal: 1436
  甲醛，浓度≥37%
- platinum: 0.0001
  铂网
- activated carbon: 0.71
  活性炭
- Water for industrial use: 25000
  水
- Process water: 98000
  循环水
- Electricity: 2253.6
  电，380/220V
- heat: 42630
  冷量，5℃

## Outputs
- process steam: -2550; measured
  蒸汽，0.4MPa

## Sampling procedure
本文从重庆市化工行业龙头企业—泰丰泰兴化工公司 6000 吨/年的靛蓝生产项目现有产品配套升级入手，根据羟基乙腈项目的资源条件、技术方案、 物料平衡、工艺优化、节能环保等方面，确定靛蓝生产原料羟基乙腈工艺，进而 实现对靛蓝生产工艺的改造

## Use advice
在使用此数据集进行生命周期评估（LCA）时，需考虑羟基乙腈在靛蓝染料生产中的具体应用环境。考量工艺运行时间（每年7200小时），清洁生产技术的进步以及与回收和环境影响缓解相关的材料平衡。用户应在商业靛蓝合成中对使用阶段进行建模，并根据技术升级和优化评估能源消耗和排放。未考虑本研究边界的局限性，数据不应用于LCA。注意，部分生产数据可供提取和使用。

## Review details
清单： 内部审查通过几个迭代步骤完成，涉及原始数据验证、原始数据记录、代表性、完整性、与 ISO 14040 和 14044 有关的建模的一致性。

## Data sources
- 李征奇. 靛蓝原料羟基乙腈的清洁生产工艺实践应用与研究. (吉林大学, 2015).
