# 定向循环工艺回收废旧动力电池生产镍钴锰酸锂

Dataset: ILCD process, Unit process, single operation
Geography: GD-CN
Reference year: 2015
Classification: Unit processes / End-of-life treatment / Material recycling
Functional unit: 1 000 kg of lithium nickel cobalt manganese oxide (ternary material) as a functional unit.
Generated by: 胡志康, hzk2503593129@163.com
Owner: 天工LCI数据工作小组
Review: Dependent internal review by 天工LCI数据工作小组
Amounts: no units in this file; such an amount is in the reference unit of its flow, which a separate flow dataset defines
copyright: false
licenseType: Free of charge for all users and uses

## General comment
该方法包括预处理、浸出、除杂、沉淀、烧结工序，其中在预 处理工序废旧锂电池经破碎机破碎， 然后送入热解 炉进行热解，将少量有机电解液和粘结剂消除，使正 负极材料与集流体分离， 再通过振荡筛分、 风 选 、 磁 选等物理分选手段， 分 离 得 到 正 极 粉 、 石 墨 、 铝 、 铜 、 钢铁等材料。 铝、铜、钢铁等直接以金属的形式进行 回收。

## Technical purpose
定向循环工艺回收废旧动力电池生产镍钴锰酸锂用于从废弃电池电芯中回收有价值的金属。所产生的镍钴锰酸锂通常用作制造新锂离子电池的阴极材料，适用于电动汽车、便携式电子产品和能源储存系统等各种应用。

## Reference product
- Ternary cathode material: 1000; measured
  镍钴锰酸锂（三元材料）

## Inputs
All rows: measured
- Battery: 3330
  废旧动力电池
- Sulfuric acid(98%): 3660
  H2SO4（98%）
- Hydrochloric acid (30%): 133.08
  HCl（30%）
- sodium hydroxide: 6230
  NaOH（30%）
- Sodium carbonate: 69.86
  Na2CO3
- Ammonia (28%): 373.35
  氨水（28%）
- P204（95%）P507（95%）: 6.66
  P507 萃取剂
- Kerosene: 16.27
  煤油
- Hydrogen peroxide: 1220
  H2O2
- water,water: 46580
  工业用水
- Lithium carbonate: 402.51
  碳酸锂
- Electricity: 27924
  电能
- natural gas,natural gas: 931.57
  天然气

## Outputs
All rows: measured
- Water,Water: 33270
  废水
- Ammonia Nitrogen: 0.19962
  氨氮
- nickel: 0.013308
  镍
- carbon dioxide (fossil): 224
  二氧化碳（原文未区分bio和fossil，根据专家判断此处为fossil）
- Other Solid Waste: 1.17
  残渣和灰烬
- Plastic (unspecified),Plastic (unspecified): 133.08
  塑料 PP
- copper: 332.7
  铜
- iron: 598.86
  钢铁
- Secondary Aluminum: 199.62
  铝

## Data selection and combination
数据来源于实地调研和作者计算。

## Use advice
使用此数据集时，需要确保工艺流程与该方法大致相同。

## Review details
清单： 内部审查通过几个迭代步骤完成，涉及原始数据验证、原始数据记录、代表性、完整性、与 ISO 14040 和 14044 有关的建模的一致性。

## Data sources
- 谢英豪, 余海军, 欧彦楠, & 李长东. 废旧动力电池回收的环境影响评价研究. 无机盐工业 47, 43-46+61 (2015).
