# 直接燃烧发电｜电力｜生物质锅炉（30MW）

Dataset: ILCD process, Unit process, single operation
Geography: CN
Reference year: 2020
Classification: Unit processes / Energy carriers and technologies / Heat and steam
Functional unit: taking 1 ton of wheat straw as the functional unit
LCI method principle: Consequential
Generated by: 刘超硕, liucs22@mails.jlu.edu.cn
Owner: 天工LCI数据工作小组
Review: Dependent internal review by 天工LCI数据工作小组
Amounts: no units in this file; such an amount is in the reference unit of its flow, which a separate flow dataset defines
copyright: false
licenseType: Free of charge for all users and uses

## General comment
30MW 生物质锅炉代表一个通过直接燃烧产生电力的单元过程。它旨在将生物质，转换为热能，进而用于发电。该过程可以集成到可再生能源系统中，并支持具有可用生物质资源的地区的电力供应。

## Reference product
- electricity from waste incineration: 3564; measured

## Inputs
- Electricity: 285.12; measured
- process water: 3.96; measured
- Wheat straw: 1000; measured

## Outputs
All rows: measured
- nitrogen dioxide: 1.467
- carbon dioxide (biogenic),carbon dioxide (biogenic): 878
  原文未区分排放源为生物源或化石源，根据专家判断此处为生物源。
- sulfur dioxide: 1.467
- Slags: 82.14
- waste water - untreated: 198

## Use advice
在使用该数据集进行生命周期评估时，用户应考虑数据的地理相关性，因为生物质的可用性可能因地区而异。生物质锅炉的指示容量（30MW）应理解为在最佳条件下的最大输出。如果将此数据集应用于不同规模或类型的生物质的情景，必须进行适当的调整。应特别注意在燃烧过程中排放和副产品的处理，以及环境影响在共产品之间的分配（如果有的话）。

## Review details
清单： 内部审查通过几个迭代步骤完成，涉及原始数据验证、原始数据记录、代表性、完整性、与 ISO 14040 和 14044 有关的建模的一致性。

## Data sources
- Cheng, G., Zhao, Y., Pan, S., Wang, X. & Dong, C. A comparative life cycle analysis of wheat straw utilization modes in China. Energy 194, 116914 (2020).
