# 磷酸铁锂电池正极材料生产;磷酸铁锂;高温固相法;碳酸锂、磷酸铁、葡萄糖（碳源）、水

Dataset: ILCD process, Unit process, single operation
Geography: SD-CN
Classification: Materials production / Inorganic chemicals
Functional unit: Produce 1kg of lithium iron phosphate
LCI method principle: Attributional
Generated by: 陈鑫, xinchen@mail.nankai.edu.cn
Owner: 天工LCI数据工作小组
Review: Dependent internal review by 天工LCI数据工作小组
Amounts: no units in this file; such an amount is in the reference unit of its flow, which a separate flow dataset defines
copyright: false
licenseType: Free of charge for all users and uses

## General comment
碳酸锂（锂源） ）、将磷酸铁、葡萄糖（碳源）和水按照特定比例放入混合罐中，搅拌分散，经过湿磨、喷雾干燥、预粉碎、氮气滚筒烧结，制成磷酸铁锂正极材料

## Geography
山东丰源锂能科技有限公司

## Technical purpose
通过高温固相法生产的磷酸铁锂作为锂离子电池的正极材料使用。这些电池主要用于能源存储系统和电动车辆，因为它们具有长的循环寿命、安全性和热稳定性。

## Reference product
- Lithium Iron Phosphate: 1
  数据参考山东丰源锂能科技有限公司的工艺（年产量1万吨）

## Inputs
- Iron phosphate: 0.97
  数据参考山东丰源锂能科技有限公司的工艺（年产量1万吨）
- Lithium carbonate: 0.238
  数据参考山东丰源锂能科技有限公司的工艺（年产量1万吨）
- Glucose: 0.0968
  数据参考山东丰源锂能科技有限公司的工艺（年产量1万吨）
- Deionized Water: 0.00305
  数据参考山东丰源锂能科技有限公司的工艺（年产量1万吨）
- Electricity: 1.7856
  数据参考山东丰源锂能科技有限公司的工艺（年产量1万吨）
- Natural gas, at consumer EU-27: 0.52
  数据参考山东丰源锂能科技有限公司的工艺（年产量1万吨）
- nitrogen: 0.217
  数据参考山东丰源锂能科技有限公司的工艺（年产量1万吨）

## Outputs
- Dust: 0.000292
  数据参考山东丰源锂能科技有限公司的工艺（年产量1万吨）
- water vapour: 3.18
  数据参考山东丰源锂能科技有限公司的工艺（年产量1万吨）
- nitrogen: 0.217
  数据参考山东丰源锂能科技有限公司的工艺（年产量1万吨）
- carbon dioxide: 0.17
  数据参考山东丰源锂能科技有限公司的工艺（年产量1万吨）

## Data selection and combination
来源于山东丰源锂能科技有限公司2018年生产数据

## Use advice
此生命周期评估数据应用于理解和评估使用高温固相法生产磷酸铁锂的环境影响。用户须知，电池的回收过程未包含在此数据集中。在模拟使用阶段时，应考虑电池的具体应用和预期使用寿命。用户必须牢记，数据来源于山东丰源锂能科技有限公司2018年的生产参数，并可能不反映当前或未来的生产进步。

## Review details
清单： 内部审查通过几个迭代步骤完成，涉及原始数据验证、原始数据记录、代表性、完整性、与 ISO 14040 和 14044 有关的建模的一致性。

## Data sources
- Feng, T., Guo, W., Li, Q., Meng, Z. & Liang, W. Life cycle assessment of lithium nickel cobalt manganese oxide batteries and lithium iron phosphate batteries for electric vehicles in China. Journal of Energy Storage52, 104767 (2022).
