# Firecrackers|Potassiumperchlorate,sulfur,aluminumpowder(orpotassiumnitrate,sulfur,charcoalpowder)|Charge (mechanical mixed charge and seal)|All sizes / 爆竹|高氯酸钾、硫磺、铝粉（或硝酸钾、硫磺、炭粉）|装药（机械混药装药封口）|所有规模

Dataset: ILCD process, Unit process, single operation
Geography: CN
Reference year: 2019
Classification: Materials production / Inorganic chemicals
Generated by: The data was created by the Office of the Second National Pollution Source Census of the Ministry of Ecology and Environment, and the data was organized by the TianGong Plan team for ILCD format / 生态环境部第二次全国污染源普查工作办公室创建数据，天工计划团队常慧敏整理数据为ILCD格式
Owner: Tiangong LCI Data Working Group / 天工LCI数据工作小组
Amounts: no units in this file; such an amount is in the reference unit of its flow, which a separate flow dataset defines
copyright: false
licenseType: Free of charge for all users and uses

## Technology and included processes
the Technical of end-of-pipe management technology for pollution sulfur dioxideis/，Its Technical efficiency of end-of-pipe management0

## Reference product
- Firecracker: 1e8; calculated
  源文件中描述为为爆竹，此处对其进行了匹配工作，将其匹配到LCAflow库里面相最符合的流，污染物指标备注为工业废水量

## Outputs
- Waste water: 11100; calculated
  污染物指标工业废水量的末端治理技术是/，其效率为0。原文件中描述污染物类别为废水，污染物指标为工业废水量，此处对其进行了匹配工作，将其匹配到LCAflow库里面相最符合的流，污染物指标备注为工业废水量
- chemical oxygen demand: 0.1092; calculated
  污染物指标化学需氧量的末端治理技术是物理法，其效率为60，末端治理设施实际运行率（k值）计算公式为k=环保设施实际处理时间（小时）/环保设施应该处理时间（小时）。原文件中描述污染物类别为废水，污染物指标为化学需氧量，此处对其进行了匹配工作，将其匹配到LCAflow库里面相最符合的流，污染物指标备注为化学需氧量
- sulfide: 0.00056; calculated
  污染物指标硫化物的末端治理技术是物理法，其效率为60，末端治理设施实际运行率（k值）计算公式为k=环保设施实际处理时间（小时）/环保设施应该处理时间（小时）。原文件中描述污染物类别为废水，污染物指标为硫化物，此处对其进行了匹配工作，将其匹配到LCAflow库里面相最符合的流，污染物指标备注为硫化物
- sulfur dioxide: 16.7; calculated
  污染物指标二氧化硫的末端治理技术是/，其效率为0。原文件中描述污染物类别为废气，污染物指标为二氧化硫，此处对其进行了匹配工作，将其匹配到LCAflow库里面相最符合的流，污染物指标备注为二氧化硫

## Data sources
- 第二次全国污染源普查产排污核算系数手册（试用版）,四级代码2672文件，在完整版文件中第4111页
