# Bioethanol ; Alkline

Dataset: ILCD process
Classification: Energy carriers and technologies / Renewable fuels
Generated by: Jiayi Yuan, jiayi_y@mail.bnu.edu.cn
Owner: Tiangong LCI Data Working Group
Review: Dependent internal review by Tiangong LCI Data Working Group
Amounts: no units in this file; such an amount is in the reference unit of its flow, which a separate flow dataset defines
licenseType: Free of charge for all users and uses

## Inputs
All rows: uniform; article inperiodical
- sodium hydroxide: 132; min 46; max 400
- Electricity: 0.12132; max 2.2428
- heat: 3510; max 6100
- Electricity: 163.08; min 41.04; max 691.2
- heat: 2950; min 591; max 5220
- Electricity: 590.4; min 43.56; max 1965.6

## Outputs
- heat: 1620; max 3000; uniform; article inperiodical

## Review details
Inventory: The internal review was done by several iteration steps concerning raw data validation, raw data documentation, representativity, completeness and consistency of modelling with regard to ISO 14040 and 14044.
