# Bread|Wheatflour|Powder blending + dough making + fermentation + forming + baking|greater than or equal to3000 t/a / 面包|小麦粉|配粉+和面+发酵+成型+烘焙|大于等于0.3万吨/年

Dataset: ILCD process, Unit process, single operation
Geography: CN
Reference year: 2019
Classification: Materials production / Food and renewable raw materials
Generated by: The data was created by the Office of the Second National Pollution Source Census of the Ministry of Ecology and Environment, and the data was organized by the TianGong Plan team for ILCD format / 生态环境部第二次全国污染源普查工作办公室创建数据，天工计划团队常慧敏整理数据为ILCD格式
Owner: Tiangong LCI Data Working Group / 天工LCI数据工作小组
Amounts: no units in this file; such an amount is in the reference unit of its flow, which a separate flow dataset defines
copyright: false
licenseType: Free of charge for all users and uses

## Technology and included processes
the Technical of end-of-pipe management technology for pollution Waste wateris/，Its Technical efficiency of end-of-pipe management0

## Reference product
- Bread: 1000; calculated
  源文件中描述为为面包，此处对其进行了匹配工作，将其匹配到LCAflow库里面相最符合的流，污染物指标备注为化学需氧量

## Outputs
All rows: calculated
- chemical oxygen demand: 0.0367151
  污染物指标化学需氧量的末端治理技术是物理处理法+厌氧生物处理法+好氧生物处理法，其效率为97.86，末端治理设施实际运行率（k值）计算公式为k=污水处理设施年耗电量（千瓦时）/(总额定功率(千瓦)×年运行时间(小时)。原文件中描述污染物类别为废水，污染物指标为化学需氧量，此处对其进行了匹配工作，将其匹配到LCAflow库里面相最符合的流，污染物指标备注为化学需氧量
- chemical oxygen demand: 0.0190438
  污染物指标化学需氧量的末端治理技术是物理处理法+膜分离，其效率为98.89，末端治理设施实际运行率（k值）计算公式为k=污水处理设施年耗电量（千瓦时）(总额定功率(千瓦)×年运行时间(小时)。原文件中描述污染物类别为废水，污染物指标为化学需氧量，此处对其进行了匹配工作，将其匹配到LCAflow库里面相最符合的流，污染物指标备注为化学需氧量
- chemical oxygen demand: 0.0128674
  污染物指标化学需氧量的末端治理技术是好氧生物处理法，其效率为99.25，末端治理设施实际运行率（k值）计算公式为k=污水处理设施年耗电量（千瓦时）(总额定功率(千瓦)×年运行时间(小时)。原文件中描述污染物类别为废水，污染物指标为化学需氧量，此处对其进行了匹配工作，将其匹配到LCAflow库里面相最符合的流，污染物指标备注为化学需氧量
- Ammonia Nitrogen: 0.000763059
  污染物指标氨氮的末端治理技术是物理处理法+厌氧生物处理法+好氧生物处理法，其效率为94.04，末端治理设施实际运行率（k值）计算公式为k=污水处理设施年耗电量（千瓦时）(总额定功率(千瓦)×年运行时间(小时)。原文件中描述污染物类别为废水，污染物指标为氨氮，此处对其进行了匹配工作，将其匹配到LCAflow库里面相最符合的流，污染物指标备注为氨氮
- Ammonia Nitrogen: 5.24923e-5
  污染物指标氨氮的末端治理技术是物理处理法+膜分离，其效率为99.59，末端治理设施实际运行率（k值）计算公式为k=污水处理设施年耗电量（千瓦时）(总额定功率(千瓦)×年运行时间(小时)。原文件中描述污染物类别为废水，污染物指标为氨氮，此处对其进行了匹配工作，将其匹配到LCAflow库里面相最符合的流，污染物指标备注为氨氮
- Ammonia Nitrogen: 0.00160038
  污染物指标氨氮的末端治理技术是好氧生物处理法，其效率为87.5，末端治理设施实际运行率（k值）计算公式为k=污水处理设施年耗电量（千瓦时）(总额定功率(千瓦)×年运行时间(小时)。原文件中描述污染物类别为废水，污染物指标为氨氮，此处对其进行了匹配工作，将其匹配到LCAflow库里面相最符合的流，污染物指标备注为氨氮
- Nitrogen, organic bound: 0.00192368
  污染物指标总氮的末端治理技术是物理处理法+厌氧生物处理法+好氧生物处理法，其效率为90.49，末端治理设施实际运行率（k值）计算公式为k=污水处理设施年耗电量（千瓦时）(总额定功率(千瓦)×年运行时间(小时)。原文件中描述污染物类别为废水，污染物指标为总氮，此处对其进行了匹配工作，将其匹配到LCAflow库里面相最符合的流，污染物指标备注为总氮
- Nitrogen, organic bound: 0.00025285
  污染物指标总氮的末端治理技术是物理处理法+膜分离，其效率为98.75，末端治理设施实际运行率（k值）计算公式为k=污水处理设施年耗电量（千瓦时）(总额定功率(千瓦)×年运行时间(小时)。原文件中描述污染物类别为废水，污染物指标为总氮，此处对其进行了匹配工作，将其匹配到LCAflow库里面相最符合的流，污染物指标备注为总氮
- Nitrogen, organic bound: 0.00118738
  污染物指标总氮的末端治理技术是好氧生物处理法，其效率为94.13，末端治理设施实际运行率（k值）计算公式为k=污水处理设施年耗电量（千瓦时）(总额定功率(千瓦)×年运行时间(小时)。原文件中描述污染物类别为废水，污染物指标为总氮，此处对其进行了匹配工作，将其匹配到LCAflow库里面相最符合的流，污染物指标备注为总氮
- phosphorus, total: 0.00381239
  污染物指标总磷的末端治理技术是物理处理法+厌氧生物处理法+好氧生物处理法，其效率为87.54，末端治理设施实际运行率（k值）计算公式为k=污水处理设施年耗电量（千瓦时）(总额定功率(千瓦)×年运行时间(小时)。原文件中描述污染物类别为废水，污染物指标为总磷，此处对其进行了匹配工作，将其匹配到LCAflow库里面相最符合的流，污染物指标备注为总磷
- phosphorus, total: 0.00249366
  污染物指标总磷的末端治理技术是物理处理法+膜分离，其效率为91.85，末端治理设施实际运行率（k值）计算公式为k=污水处理设施年耗电量（千瓦时）(总额定功率(千瓦)×年运行时间(小时)。原文件中描述污染物类别为废水，污染物指标为总磷，此处对其进行了匹配工作，将其匹配到LCAflow库里面相最符合的流，污染物指标备注为总磷
- phosphorus, total: 0.00337485
  污染物指标总磷的末端治理技术是好氧生物处理法，其效率为88.97，末端治理设施实际运行率（k值）计算公式为k=污水处理设施年耗电量（千瓦时）(总额定功率(千瓦)×年运行时间(小时)。原文件中描述污染物类别为废水，污染物指标为总磷，此处对其进行了匹配工作，将其匹配到LCAflow库里面相最符合的流，污染物指标备注为总磷
- Petroleum-related waste: 0.000974902
  污染物指标石油类的末端治理技术是物理处理法+厌氧生物处理法+好氧生物处理法，其效率为96.38，末端治理设施实际运行率（k值）计算公式为k=污水处理设施年耗电量（千瓦时）(总额定功率(千瓦)×年运行时间(小时)。原文件中描述污染物类别为废水，污染物指标为石油类，此处对其进行了匹配工作，将其匹配到LCAflow库里面相最符合的流，污染物指标备注为石油类
- Petroleum-related waste: 0.000875258
  污染物指标石油类的末端治理技术是物理处理法+膜分离，其效率为96.75，末端治理设施实际运行率（k值）计算公式为k=污水处理设施年耗电量（千瓦时）(总额定功率(千瓦)×年运行时间(小时)。原文件中描述污染物类别为废水，污染物指标为石油类，此处对其进行了匹配工作，将其匹配到LCAflow库里面相最符合的流，污染物指标备注为石油类
- Petroleum-related waste: 0.00050361
  污染物指标石油类的末端治理技术是好氧生物处理法，其效率为98.13，末端治理设施实际运行率（k值）计算公式为k=污水处理设施年耗电量（千瓦时）(总额定功率(千瓦)×年运行时间(小时)。原文件中描述污染物类别为废水，污染物指标为石油类，此处对其进行了匹配工作，将其匹配到LCAflow库里面相最符合的流，污染物指标备注为石油类
- Waste water: 682
  污染物指标工业废水量的末端治理技术是/，其效率为0。原文件中描述污染物类别为废水，污染物指标为工业废水量，此处对其进行了匹配工作，将其匹配到LCAflow库里面相最符合的流，污染物指标备注为工业废水量

## Data sources
- 第二次全国污染源普查产排污核算系数手册（试用版）,二级代码14,四级代码1411文件，在完整版文件中第3413页
