# Steam/hotwater/other|Biomassfuel|Layer-firedfurnace-biomassscattering|All sizes / 蒸汽/热水/其它|生物质燃料|层燃炉-生物质散烧|所有规模

Dataset: ILCD process, Partly terminated system
Geography: CN
Reference year: 2019
Classification: Materials production / Other mineralic materials
Generated by: The data was created by the Office of the Second National Pollution Source Census of the Ministry of Ecology and Environment, and the data was organized by the TianGong Plan team for ILCD format / 生态环境部第二次全国污染源普查工作办公室创建数据，天工计划团队常慧敏整理数据为ILCD格式
Amounts: no units in this file; such an amount is in the reference unit of its flow, which a separate flow dataset defines
copyright: false

## Technology and included processes
the Technical of end-of-pipe management technology for pollution Biofuelis/，Its Technical efficiency of end-of-pipe management0
污染物指标工业废气量的末端治理技术是/，其效率为0

## Reference product
- Biofuel: 1000; input; calculated
  原文件中描述污染物类别为Product，污染物指标为生物质燃料，此处对其进行了匹配工作，将其匹配到LCAflow库里面相最符合的流，污染物指标备注为工业废气量

## Outputs
- Exhaust gas: 6240, 6240 (2 entries); calculated
  原文件中描述污染物类别为废气，污染物指标为工业废气量，此处对其进行了匹配工作，将其匹配到LCAflow库里面相最符合的流，污染物指标备注为工业废气量
- sulfur dioxide: nan; calculated
  原文件中描述污染物类别为废气，污染物指标为二氧化硫，此处对其进行了匹配工作，将其匹配到LCAflow库里面相最符合的流，污染物指标备注为二氧化硫，产污系数备注为产污系数表中二氧化硫的产污系数是以含硫量（S％）的形式表示的，其中含硫量（S％）是指燃油收到基硫分含量，以质量百分数的形式表示。例如燃料中含硫量（S％）为0.1％，则S=0.1。
- particles (PM2.5 - PM10): 37.6, 24.064, 18.048, 7.52, 7.52, 7.52, 6.392, 0.6016, 0.1128, 7.52 (10 entries); calculated
  原文件中描述污染物类别为废气，污染物指标为颗粒物，此处对其进行了匹配工作，将其匹配到LCAflow库里面相最符合的流，污染物指标备注为颗粒物
- Nitrogen oxides: 1.02, 0.714, 0.55692, 0.2142, 0.7956, 0.306 (6 entries); calculated
  原文件中描述污染物类别为废气，污染物指标为氮氧化物，此处对其进行了匹配工作，将其匹配到LCAflow库里面相最符合的流，污染物指标备注为氮氧化物

## Data sources
- 第二次全国污染源普查产排污核算系数手册（试用版）,四级代码4430文件，在完整版文件中第5449页
