# 电力生产 ; 混合电力 ; 安徽

Dataset: ILCD process, Unit process, single operation
Geography: AH-CN
Reference year: 2019
Classification: Unit processes / Energy carriers and technologies / Electricity
Generated by: 熊若熙, xiongrx0126@163.com
Owner: 天工LCI数据工作小组
Review: Dependent internal review by 天工LCI数据工作小组
Amounts: no units in this file; such an amount is in the reference unit of its flow, which a separate flow dataset defines
copyright: false
licenseType: Free of charge for all users and uses

## General comment
混合电力产生形式包括火力发电、水力发电、风力发电、核能发电和太阳能发电

## Technical purpose
安徽混合电力的生产旨在供应安徽地区的综合消费。它被用来为家庭、办公室、工业设施和公共服务供电。这种能源混合包括火力、水力、风能、核能和太阳能发电，提供了多样化的电力供应，可以在需要电力的各种应用中使用。

## Reference product
- Electricity: 3.6; missing unimportant
  [{'text': '3.6', 'type': 'text'}]

## Inputs
All rows: missing unimportant
- electricity for thermal power: 3.32192
  [{'text': '3.6', 'type': 'text'}]
- electricity from hydroelectric power plant: 0.0635976
  [{'text': '3.6', 'type': 'text'}]
- electricity for nuclear power: 0
  [{'text': '3.6', 'type': 'text'}]
- electricity from wind power: 0.058608
  [{'text': '3.6', 'type': 'text'}]
- electricity for solar power: 0.155873
  [{'text': '3.6', 'type': 'text'}]

## Use advice
使用安徽电力混合LCA数据集时，请确保您评估的范围与包含的能源相匹配，即火力、水力、风能、核能和太阳能发电。排除任何不代表安徽混合电力的电力使用（如地热或生物质能源，除非明确包含在此混合中）。模拟使用阶段行为时，考虑混合输出的季节性和日变化。随着时间的推移，混合中每种能源比例的任何更新都要纳入考虑。

## Review details
清单： 内部审查通过几个迭代步骤完成，涉及原始数据验证、原始数据记录、代表性、完整性、与 ISO 14040 和 14044 有关的建模的一致性。

## Data sources
- 能源统计年鉴2020
