# 农药制造 ; 甘氨酸法-亚磷酸二甲酯合成+ 草甘膦合成

Dataset: ILCD process, Unit process, black box
Geography: CN
Reference year: 2021
Classification: Materials production / Organic chemicals
Functional unit: producing 1 ton glyphosate
Generated by: 玲俐, calinly@163.com
Owner: 天工LCI数据工作小组
Review: Dependent internal review by 天工LCI数据工作小组
Amounts: no units in this file; such an amount is in the reference unit of its flow, which a separate flow dataset defines
copyright: false
licenseType: Free of charge for all users and uses

## General comment
无流程图

## Technical purpose
该数据集涉及使用甘氨酸法生产1吨草甘膦，该方法包括二甲基磷酸酯合成与草甘膦合成过程。该数据集适用于分析农药制造过程（特别是草甘膦生产）环境影响的专业人士。草甘膦是农业中常用于杂草控制的除草剂。

## Reference product
- glyphosate: 1000; software or database
  草甘膦

## Outputs
All rows: software or database
- Exhaust gas: 207
  废气
- waste water - untreated: 15000
  工业废水量
- chemical oxygen demand: 18.4
  化学需氧量
- Ammonia Nitrogen: 0.69
  氨氮
- hazardous waste (unspecified): 23
  危险废物
- phosphorus, total: 5.77
  总磷
- volatile organic compound: 125
  挥发性有机物

## Use advice
使用此数据集时，用户应注意它仅包含生产1吨草甘膦的污染物排放信息。缺少有关原材料投入、能源消耗、用水和运输的数据，这些是完成生命周期评估的重要元素。用户需要从其他来源补充这些数据，以进行全面的环境影响分析。在得出有关草甘膦生产过程整体可持续性的结论时，应谨慎使用此数据集。

## Review details
清单： 内部审查通过几个迭代步骤完成，涉及原始数据验证、原始数据记录、代表性、完整性、与 ISO 14040 和 14044 有关的建模的一致性。

## Data sources
- 生态环境部. 263农药制造行业系数手册.pdf. (2021).
