# 玻璃纤维生产 ; 整个风电场

Dataset: ILCD process, Unit process, single operation
Geography: NMG-CN
Reference year: 2017
Classification: Materials production / Glass and ceramics
Functional unit: The functional unit is 1.5 MW wind turbine
LCI method principle: Attributional
LCI method approaches: Allocation
Generated by: 赵云志, ll10088@163.com
Owner: 天工LCI数据工作小组
Review: Dependent internal review by 天工LCI数据工作小组
Amounts: no units in this file; such an amount is in the reference unit of its flow, which a separate flow dataset defines
copyright: false
licenseType: Free of charge for all users and uses

## General comment
该数据集代表了用于建造风力涡轮机的玻璃纤维生产。具体而言，它适用于装有33台国产1.5兆瓦（MW）风力涡轮机的风电场的组件生产。此过程是风力发电设施供应链中不可或缺的一部分，特别是对于像内蒙古东北部这样拥有高风力发电能力的地区。

## Geography
风电功率参数的数据来自Wang ( 2012 )。以装有33台国产1.5兆瓦( MW )风电机组的风电场为案例，分析其环境影响及其替代效应。该风电场位于我国风电装机最多的省份- -内蒙古东北部。

## Reference product
- Fiber glass: 1; article inperiodical

## Inputs
- Energy, geothermal, converted: 169.873; article inperiodical

## Outputs
- carbon dioxide: 1128.9; article inperiodical
- sulfur dioxide: 3.5; article inperiodical
- nitrous oxide: 4.25; article inperiodical

## Deviations from the LCI method approaches
风电的生命周期清单如下所示。生产制造阶段包括风电机组、变电站、电缆的生产，这些设备消耗大量能源，排放污染物( Xue et al . , 2015)。

## Use advice
在使用此数据集进行生命周期评估（LCA）时，用户应关注内蒙古风电领域的具体情境。应将环境影响与风力涡轮机、变电站和电缆的生产制造阶段联系起来。特别应关注这些阶段的能源消耗和污染物排放，以及它们与其他能源来源的比较。应将此数据与1.5兆瓦风力涡轮机的功能单元结合起来，以进行准确的LCA建模。

## Review details
清单： 内部审查通过几个迭代步骤完成，涉及原始数据验证、原始数据记录、代表性、完整性、与 ISO 14040 和 14044 有关的建模的一致性。

## Data sources
- Li, H., Jiang, H.-D., Dong, K.-Y., Wei, Y.-M. & Liao, H. A comparative analysis of the life cycle environmental emissions from wind and coal power: Evidence from China. Journal of Cleaner Production 248, 119192 (2020).
