# Battery hydrometallurgy technology of Grimme Co.

Dataset: ILCD process, Unit process, single operation
Geography: CN
Reference year: 2022
Classification: Materials production / Other mineralic materials
Generated by: Pengfei, 13576888220@163.com
Review: Dependent internal review by Tiangong LCI Data Working Group
Amounts: no units in this file; such an amount is in the reference unit of its flow, which a separate flow dataset defines
copyright: false

## General comment
The waste battery undergoes pretreatment, acid leaching, extraction, purification, precursor synthesis, battery material synthesis, and other processes to obtain battery cathode materials. This method can effectively recover lithium.

## Inputs
All rows: measured
- spent LIBs: 0.012717
  Spent LIBs
- sodium chloride: 0.000675
- process water: 83.1
- Sulfuric acid(98%): 1.27
  Sulfuric acid//input（已录）
- Disooctyl Phosphate (P204): 0.00394
  P2O4
- P204（95%）P507（95%）: 0.00145
  P5O7(已录）
- Sulfonated kerosene: 0.0137
- Sodium sulfide: 0.0133
- Alkali: 0.884
  Liquid alkali
- Ammonia (25%): 0.0417
  Ammonia (25%)//input product flow
- process steam: 12
- Electricity: 0.06696

## Outputs
All rows: measured
- Dust (unspecified, from stack),Dust (unspecified, from stack): 0.000238
- hydrogen fluoride: 4.38e-5
- sulphuric acid: 3.75e-5
- hydrogen sulfide: 2.29e-5
- ammonia: 8.59e-5
- chemical oxygen demand: 0.0103
- Suspended solids, unspecified: 0.124
- biological oxygen demand: 0.00364
- nickel: 4.75e-5
- cobalt: 4.38e-5
- lithium: 0.00398
- manganese: 4.75e-5
- Ammonia Nitrogen: 0.000596
  Ammonia nitrogen
- Ternary cathode material: 1.25

## Review details
Inventory: The internal review was done by several iteration steps concerning raw data validation, raw data documentation, representativity, completeness and consistency of modelling with regard to ISO 14040 and 14044.; Documentation: The review of the documentation was performed by Ecobilan and is in compliance with ISO 14040 and 14044. The data set documentation is correct in view of the appropriateness of the information provided. It includes all relevant information in view of data quality and scope of application of the respective LCI result.

## Data sources
- Lai, X. et al. Critical review of life cycle assessment of lithium-ion batteries for electric vehicles: A lifespan perspective. eTransportation 12, 100169 (2022).
