# 水泥生产;水泥, 复合硅酸盐水泥, 32.5RMPa;现代干法, 五级窑外分解技术, 4000 t/d

Dataset: ILCD process, Unit process, black box
Geography: DL-LN-CN
Classification: Materials production / Other mineralic materials
Generated by: 杨思琪, ysqsophia@gmail.com
Owner: 天工LCI数据工作小组
Review: Dependent internal review by 天工LCI数据工作小组
Amounts: no units in this file; such an amount is in the reference unit of its flow, which a separate flow dataset defines
copyright: false
licenseType: Free of charge for all users and uses

## General comment
该公司的生产工艺采用五级窑外分解技术，主要采用德国、法国、日本及部分国内先进的生产设备。水泥生产线有立式原料磨、5级窑外预分解塔、回转窑和配有辊压机的大型球磨机等主要设备组成，同时设有石膏破碎、石灰石粉碎及输送添加设备。

## Geography
大连水泥公司

## Technology and included processes
公司现拥有一条4000t/d 规模的现代干法生产线(RSP窑外分解设备)如图 6.2所示，自己独立开采的露天石灰石矿山(年生产石灰石能力为 200 万吨)和厂内铁路专用线及散装水泥专用线输出码头，年生产水泥 190 万吨。该公司的生产工艺采用 RSP 五级窑外分解技术，主要采用德国、法国、日本及部分国内先进的生产设备。水泥生产线有立式原料磨(如图 6.1 所示)、5级 RSP(窑外预分解塔)、回转窑和配有辊压机的大型球磨机等主要设备组成，同时设有石膏破碎、石灰石粉碎及输送添加设备。

## Technical purpose
所描述的工艺用于生产32.5R MPa级别的复合硅酸盐水泥。这种水泥通常用于一般建筑目的，例如制造预制混凝土构件、住宅建筑、人行道和其他需要适度强度的基础设施。该工艺采用现代干法生产和RSP技术来提高效率，并以每天4000吨的大规模生产水泥。

## Model description
未采用LCA方法建模。

## Reference product
- cement, portland-composite cement, 32.5RMPa: 1000
  水泥，PC32.5R

## Inputs
- limestone, crushed, for mill: 985.3
  石灰石
- clay: 184.1
  粘土
- iron, powder: 38.4
  铁粉
- gypsum stone (CaSO4-dihydrate): 30
  石膏
- electricity, medium voltage: 230.173
  电
- hard coal: 95.6324
  原煤

## Outputs
- sulfur dioxide: 0.41
  SO2。建材制品生产过程中排放的SO2主要来源于燃料和原料中所含的硫化物。
- Nitrogen oxides: 0.6815
  NOx。建材制品生产过程中排放的NOx来源主要两种途径。第一种，在高温状态下，空气中的N与O2化合而成，与温度高低有着直接关系。第二种，燃料中的N与O2低温化合而成，与O2的浓度有关系。
- carbon dioxide: 586.399
  CO2。建材工业CO2的产生途径主要来源于燃料燃烧和原材料分解。
- particles (> PM10): 0.3002
  粉尘。建材制品生产过程中粉尘的产生与原材料中粉状物含量有关。未标明粒径，按PM>10处理。
- chemical oxygen demand: 3.9838e-5
  化学需氧量（mg/l）。化学需氧量（COD）是指采用强氧化剂处理废水时，所消耗的氧化剂的量。用它来衡量废水受有机物污染的指标，化学需氧量越大说明废水污染越严重。
- Suspended solids, unspecified: 4.5116e-5
  悬浮物（SS）（mg/l）。建材工业废水排放中的悬浮物主要是指不溶于水的无机物、有机物、泥沙、粘土、微生物等。
- Oils, unspecified: 1.702e-7
  石油类（mg/l）。废水中的油类污染物主要米源于钢铁、焦化、石油化工等生产企业。根据油滴粒径的出大到小，油类物质在废水中有三种存在形式：上浮油、分散油、乳化油，其从废水中的分离难度也依次递增。
- particles (> PM10): 41.8922
  固废，文中指生产过程中产生的扬尘等固体废弃物。未标明粒径，按PM>10处理

## Data selection and combination
水泥产品评价指标数据通过到水泥生产企业实地调研获得，指标数据来自于企业生产工艺数据。由于缺乏具体的工业污染物排放统计数据，数据收集过程十分困难，部分数据无法直接获取，因此采用相关能源与原材料折算的方式获取。

## Sampling procedure
DOCC是由太平洋水泥株式会和中国华能综合产业公司两方合资建设并经营的一座大型水泥生产企业。公司成立于1989年，占地面积50万平方米总投资1.88亿美元，公司现有从业人员376人。公司现拥有一条4000t/d规模的现代干法生产线（加强悬浮预热器 （Reinforced Suspension Preheater ，RSP）窑外分解设备），自己独立开采的露天石灰石矿山（年生产石灰石能力为200万吨）和厂内铁路专用线及散装水泥专用线输出码头，年生产水泥190万吨。公司现已通过ISO14001：2004环境管理体系认证证书。

## Use advice
使用该LCA数据集时，用户应考虑RSP五级窑外分解技术的技术适用性及中国大连生产的具体情况。由于数据收集存在困难，用户在使用排放因子时应谨慎，并可能需要根据当地特定的环保法规和排放数据进行调整。用户还应考虑数据可能需要转换以反映能源和原材料关系，并且该数据集中未采用LCA方法进行建模。

## Review details
清单： 内部审查通过几个迭代步骤完成，涉及原始数据验证、原始数据记录、代表性、完整性、与 ISO 14040 和 14044 有关的建模的一致性。

## Data sources
- 李礼. (2012). 建筑材料绿色性的6E综合评价体系研究 [博士, 大连理工大学].
