# 漏斗-沉箱式导水门;原位地下水修复;漏斗-导水门式PRB

Dataset: ILCD process, Unit process, single operation
Geography: UM
Reference year: 2009
Classification: Unit processes / Other Services / Repair and maintenance
Generated by: 杨欣桐, yangxt@caep.org.cn
Owner: 天工LCI数据工作小组
Review: Dependent internal review by 天工LCI数据工作小组
Amounts: no units in this file; such an amount is in the reference unit of its flow, which a separate flow dataset defines
copyright: false
licenseType: Free of charge for all users and uses

## General comment
PRB安装在原位，允许地下水在自然梯度下流过反应池，反应介质在反应池中降解或捕获污染物。

## Geography
该案例研究使用了巴特尔为位于美国多佛空军基地

## Technology and included processes
渗透性反应墙采用漏斗和闸门配置，具有36.6米长的漏斗和四个直径2.4米的圆柱形闸门.

## Technical purpose
原位渗透性反应墙（PRB）采用漏斗和闸门的配置，用于地下水修复。该系统旨在通过让污染的地下水自然流过设在闸门中的反应池从而治疗地下水，其中反应介质降解或捕获污染物。这项技术适用于需要管理污染而无需进行广泛挖掘或地面干预的场所，如多佛空军基地。

## Reference product
- Funnel and caisson-based gate: 1; measured
  渗透性反应墙采用漏斗和闸门配置，具有36.6米长的漏斗和四个直径2.4米的圆柱形闸门.

## Inputs
- Caisson-based gate: 4; measured
- Impermeable funnel: 36.6; measured

## Use advice
使用此数据集的用户应考虑数据集在输入和排放方面的完整性。有些单元过程可能有来自文献的估算数据，或在经验数据不可用时使用基本原则计算的数据。应当注意数据遗漏，并在将数据应用于其他背景或放大过程时予以考虑。必须确保与生命周期评估的其他部分保持方法上的一致性，并且如果遗漏的过程的潜在环境影响显著，则需要单独考虑。

## Review details
清单： 内部审查通过几个迭代步骤完成，涉及原始数据验证、原始数据记录、代表性、完整性、与 ISO 14040 和 14044 有关的建模的一致性。

## Data sources
- Life-Cycle Case Study Comparison of Permeable Reactive Barrier versus Pump-and-Treat Remediation
