# 焦炭生产;焦炭;焦化;炼焦煤

Dataset: ILCD process, Unit process, single operation
Geography: CN
Reference year: 2006
Classification: Unit processes / Energy carriers and technologies / Hard coal based fuels
Generated by: 王环宇, wanghuanyu00@126.com
Owner: 天工LCI数据工作小组
Review: Dependent internal review by 天工LCI数据工作小组
Amounts: no units in this file; such an amount is in the reference unit of its flow, which a separate flow dataset defines
copyright: false
licenseType: Free of charge for all users and uses

## General comment
此数据集描述的是钢铁制造业中的一个基本步骤——焦炭生产过程。焦炭是通过焦化过程从炼焦煤中得来的，主要用作高炉中的燃料和还原剂。它用于生产铁，然后转化为钢材。这个特定的数据集是指在Z15工厂的操作，该工厂对工艺过程的命名是标准化的。

## Geography
Z15工厂同一名称的工艺过程

## Reference product
- coke,Coke: 0.1842; measured
  焦炭z15

## Inputs
- hard coal,hard coal: 1406; measured
  洗精煤z15
- Cleaned coal: 4952.98; measured
  z15

## Outputs
- Flue dust: 2.01; measured
  z15
- phenol,Sulphur oxides (as SO2): 5.098, 0.000337 (2 entries); measured
  z15
- cyanide: 0.000174; measured
  z15

## Use advice
使用此数据集的用户应确保Z15工厂的焦炭生产背景与他们LCA范围的相关性。在将此数据与其他焦炭生产过程比较时，应注意技术差异可能导致不同的环境影响。建议考虑地理位置、使用的技术年龄以及对设施所做的任何升级，这可能会影响排放和能效。进一步的考虑应该包括是否考虑次要过程例如能量回收和下游效应如运输。

## Review details
清单： 内部审查通过几个迭代步骤完成，涉及原始数据验证、原始数据记录、代表性、完整性、与 ISO 14040 和 14044 有关的建模的一致性。

## Data sources
- 刘微. LCI数据质量体系中的分析方法研究. (北京工业大学, 2006).
