# Farmland remediation ; In-situ remediation ; Solidification/stabilization ; Construction preparation ; Chemical transportation

Dataset: ILCD process, Unit process, single operation
Geography: NJ-YN-CN
Classification: Other Services / Repair and maintenance
Generated by: Xiao Meng, xiaomeng@mail
Owner: Tiangong LCI Data Working Group
Review: Dependent internal review by Tiangong LCI Data Working Group
Amounts: no units in this file; such an amount is in the reference unit of its flow, which a separate flow dataset defines
licenseType: Free of charge for all users and uses

## General comment
This dataset represents the stabilization and solidification preparation phase for the remediation of heavy metal contaminated farmland soil in Nujiang, Yunnan Province, China. The process includes the transportation of chemicals for treating a 16-hectare farmland contaminated by lead and zinc mining to reduce the bioavailable concentrations of cadmium (Cd) and lead (Pb) in crops by 100% and decrease the effective state concentration of Cd and Pb in the soil by more than 70%. This data set is appropriate for scenarios where heavy metal-contaminated agricultural lands require remediation to meet safety standards for crop production.

## Geography
云南省怒江州受铅锌矿污染某耕地土壤 污染修复工程

## Reference product
- Equipment and Materials Arriving on Site: 240000; measured
  运输到场的药剂

## Inputs
- transport in t*km: 875458; measured

## Use advice
When applying this data set for Life Cycle Assessment (LCA), attention should be paid to the geographical specificity and the scale of the process. This data set reflects a localized situation and should be used when assessing similar contexts regarding soil contamination and treatment efficacy in a comparable geographical area. Users should carefully consider the boundary conditions of the dataset such as the type of contaminated land, the extent of contamination, and the specific treatment methods employed. The functional unit is the remediation of 16 hectares of land; data extrapolation to larger areas should be done with caution and consideration of scale effects. Ensure that any extrapolation aligns with the LCA's goal and scope and that results are interpreted accordingly.

## Review details
Inventory: The internal review was done by several iteration steps concerning raw data validation, raw data documentation, representativity, completeness and consistency of modelling with regard to ISO 14040 and 14044.

## Data sources
- 肖萌 et al. 农田污染钝化修复环境影响定量评估方法与案例分析. 中国环境科学 43, 3571–3581 (2023).
