# Rotors production of wind turbines

Dataset: ILCD process, Unit process, single operation
Geography: YL-GX-CN
Reference year: 2012
Classification: Materials production / Other mineralic materials
Functional unit: For example, the generation of 1 kW h (kW h) of electricity is adapted as the functional unit in this study, and the corresponding amounts of CO2 emissions and air pollutants (SO2,NOX and PM10)perkWh of electricity are chosen as the indicators for environmental performances, and the monetary value (US$) of per kW h of electricity is chosen as the indicator for cost-effectiveness evaluation.
LCI method principle: Attributional
LCI method approaches: Allocation
Generated by: Yunzhi Zhao, ll10088@163.com
Review: Dependent internal review by Tiangong LCI Data Working Group
Amounts: no units in this file; such an amount is in the reference unit of its flow, which a separate flow dataset defines
copyright: false

## Geography
In this study, the typical wind farm system in Yulin City of Guangxi of Zhuang Autonomous Region China was selected as a case study site.

## Reference product
- Rotor: 24; article inperiodical

## Inputs
- iron: 190000; article inperiodical
  Cast iron
- Fiber glass: 106000; article inperiodical
- Resin: 154000; article inperiodical

## Deviations from the LCI method approaches
According to Introduced by the life cycle assessment approach [34,35], firstly the system boundaries boundary of wind energy as well as and thermal power are first identified. Then, methodology on evaluating both environmental and economic benefits is presented so that co-benefits can be quantified followed by the introduction of the methodologies on environmental as well as economic impacts evaluation from the co-benefits perspective.

## Data selection and combination
Considering the data reliability and availability, the cost data of this wind farm was mainly extracted from a feasibility report of one wind farm (with a designed capacity of the 49.5 MW) in Kangping County of Liaoning province [39].

## Review details
Inventory: The internal review was done by several iteration steps concerning raw data validation, raw data documentation, representativity, completeness and consistency of modelling with regard to ISO 14040 and 14044.; Documentation: The review of the documentation was performed by Ecobilan and is in compliance with ISO 14040 and 14044. The data set documentation is correct in view of the appropriateness of the information provided. It includes all relevant information in view of data quality and scope of application of the respective LCI result.
