# monitored natural attenuation;In-situ repair Charred soil

Dataset: ILCD process, Unit process, single operation
Geography: JS-CN
Classification: Other Services / Repair and maintenance
Generated by: Jia Yingluo, 202321051222@mail.bnu.edu.cn
Owner: Tiangong LCI Data Working Group
Review: Dependent internal review by Tiangong LCI Data Working Group
Amounts: no units in this file; such an amount is in the reference unit of its flow, which a separate flow dataset defines
licenseType: Free of charge for all users and uses

## General comment
Monitored natural attenuation (MNA) is a passive remedial option thatrelies on the natural processes, such as biodegradation, dispersion, and di-lution, to reduce the concentration of the contaminant in the soil andgroundwater

## Technical purpose
Monitored natural attenuation (MNA) is a passive remedial approach predominantly applied to contaminated soil and groundwater. Suitable for environments where natural processes, including biodegradation, dispersion, and dilution, are capable of effectively reducing pollutant concentrations over time without active human intervention.

## Reference product
- carbon dioxide (biogenic): 273.03; article inperiodical

## Inputs
- Electricity: 202.176
- Water Cooling fresh: 978540
- Steel sections: 795
- High Density Polyethylene: 611.27
- Very fine milled silica sand d50 = 20 micrometer: 52640
- bentonite: 10530
- Polyvinyl chloride: 934.2

## Use advice
When incorporating Monitored Natural Attenuation (MNA) process data into a Life Cycle Assessment (LCA), ensure careful consideration of the site-specific conditions such as contaminant types, concentrations, and rates of natural attenuation processes. Adequate monitoring data should be available to justify the use of MNA as a remedial strategy. Any estimations or projections used within the LCA to predict the effectiveness of MNA should be transparently documented and carefully evaluated for their accuracy.

## Review details
Inventory: The internal review was done by several iteration steps concerning raw data validation, raw data documentation, representativity, completeness and consistency of modelling with regard to ISO 14040 and 14044.

## Data sources
- Assessing the environmental impacts and costs of biochar and monitored
