# 修复后土壤;土壤原位修复;10~16 m;化学氧化;氰化物

Dataset: ILCD process, Unit process, black box
Geography: ZB-SD-CN
Reference year: 2024
Classification: Unit processes / Other Services / Repair and maintenance
Functional unit: 15026m3 polluted soil (10-16m), with an average cyanide content of 8.88 mg/kg
Generated by: 杨欣桐, yangxt@caep.org.cn
Owner: 天工LCI数据工作小组
Review: Dependent internal review by 天工LCI数据工作小组
Amounts: no units in this file; such an amount is in the reference unit of its flow, which a separate flow dataset defines
copyright: false
licenseType: Free of charge for all users and uses

## General comment
场地内10~16 m深度范围内污染土壤采用原位化学氧化技术，采用4‰的过硫酸钠通过高压旋喷搅拌工艺进行修复。

## Geography
污染场地位于山东省淄博市，占地总面积约8.78万 m2。

## Technology and included processes
经原位化学氧化修复后，10~16 m污染土壤氰化物平均含量由8.88 mg/kg降至0.02 mg/kg，污染物去除率为99.77%

## Technical purpose
此修复后土壤的数据代表了对10~16米深度范围内的污染土壤进行的原位化学氧化修复过程，特别解决氰化物污染问题。该数据适用于具有类似污染水平和土壤修复需求的地区的环境影响评估和污染管理。它强调了在工业或城市场地中，使用4‰过硫酸钠进行高压旋喷搅拌过程进行土壤处理以对抗氰化物污染的有效性。

## Reference product
- Remediated soil: 15026; measured

## Inputs
All rows: measured
- Electricity: 4212
- Diesel,Diesel: 5.54901
  修复设备运行柴油消耗量
- Diesel,Diesel: 0.80775
  修复药剂及设备场外运输柴油消耗量
- Tap Water: 200
- Sodium persulfate: 30000
- Soil Sample: 12
  修复后土壤样品取样自检
- contaminated soil: 15026

## Use advice
在使用此数据集时，必须考虑修复场地地理位置的背景以及所涉及的具体污染物。数据集适用于高压旋喷搅拌修复技术，并应在此方法适用的情况下使用。必须考虑氧化剂的生产和运输以及现场机械能耗（以柴油使用形式），并在方法学上注意确保数据集中报告的氰化物水平（从8.88 mg/kg降至0.02 mg/kg）应与应用场地的污染水平相符，以进行准确的影响评估。

## Review details
清单： 内部审查通过几个迭代步骤完成，涉及原始数据验证、原始数据记录、代表性、完整性、与 ISO 14040 和 14044 有关的建模的一致性。

## Data sources
- 桑春晖,杨欣桐,张红振等. 氰化物污染土壤修复工程环境足迹评估方法和案例研究 [J/OL]. 中国环境科学, 1-11[2024-02-11].
