# clinker production;clinker, portland cement clinker;new dry process, >4000 t/d

Dataset: ILCD process, Unit process, single operation
Geography: CN
Reference year: 2020
Classification: Materials production / Inorganic chemicals
Generated by: Siqi Yang, ysqsophia@gmail.com
Owner: Tiangong LCI Data Working Group
Review: Dependent internal review by Tiangong LCI Data Working Group
Amounts: no units in this file; such an amount is in the reference unit of its flow, which a separate flow dataset defines
copyright: false
licenseType: Free of charge for all users and uses

## General comment
The new dry process has a relatively large market share in the cement industry process. During the clinker calcination process, wastewater, particulate matter, CO2, SO2, NOx, mercury (Hg), fluorine (F), and ammonia (NH3), etc. are emitted.

## Technical purpose
The data set represents the environmental aspects of the production process of Portland cement clinker using the new dry process technology with a capacity greater than 4000 tons per day (t/d). The cement clinker produced via this process is intended for use in the construction industry for creating various grades of Portland cement.

## Model description
Taking P·O 42.5 type cement clinker as the research object, the functional unit and base flow are the production of 1.00 tons of cement clinker, the system boundary is the unit process of clinker calcination (including pulverized coal preparation), and the base year is 2020.

## Reference product
- clinker, portland cement clinker: 1000
  clinker, PO42.5

## Inputs
- raw meal: 1445.3
  Raw materials
- electricity, medium voltage: 125.28
  Electricity. Electricity is supplied from power plants.
- tap water: 400
  Tap water
- coal, powder: 139.25
  Coal powder

## Outputs
- Water (groundwater from technosphere, waste water): 11.36
  Wastewater. Wastewater is the discharge of recycled cooling water, which is basically free of pollutants other than an increase in water temperature and turbidity.
- particles (> PM10): 0.08159
  Particulate matter, with an unspecified particle size, is treated as PM > 10 micrometers in diameter. The particulate matter collected by the bag filter is returned to the raw material homogenization stage through the recycling system, and the solid waste generated during the process can be effectively recycled and reused.
- sulfur dioxide: 0.07354
  Sulfur dioxide
- Nitrogen oxides: 0.85
- mercury: 2.071e-5
  Mercury
- fluorene: 0.00636
  Fluorine
- ammonia: 0.00944
  Ammonia
- carbon dioxide: 798.65
  carbon dioxide. CO2 emissions are usually not monitored. CO2 is mainly derived from the two processes of lime decomposition and coal combustion. It is calculated according to the formula of the chemical balance.

## Data selection and combination
In addition to CO2, other data come from corporate reports such as Gaoan Red Lion and Jiangxi De'an Evergreen, the cement industry's cleaner production evaluation index system, and cement clinker research papers.

## Use advice
Use this data set within the context of Life Cycle Assessment for estimating the environmental impacts of Portland cement clinker production using the new dry process. The data should be applied with the consideration of system boundaries specific to clinker calcination, including the preparation of pulverized coal. The upstream production data of raw materials with small quantities should be omitted accordingly, as outlined by the CLCD trade-off principle. Take into account background database uncertainties and cumulative uncertainty effects when interpreting results to ensure a comprehensive assessment.

## Review details
Inventory: The internal review was done by several iteration steps concerning raw data validation, raw data documentation, representativity, completeness and consistency of modelling with regard to ISO 14040 and 14044.

## Data sources
- 陆柳鲜. (2022). 江西省多源有色冶炼固废资源化过程生命周期评价研究 [硕士, 江西理工大学].
