# Soil and groundwater remediation;Ex-situ;groundwater pump and treat;construction;Construction of Air stripping unit

Dataset: ILCD process, Unit process, single operation
Geography: JS-CN
Reference year: 2022
Classification: Other Services / Repair and maintenance
Generated by: Wang Ning, wang_ning@caep.org.cn
Owner: Tiangong LCI Data Working Group
Review: Dependent internal review by Tiangong LCI Data Working Group
Amounts: no units in this file; such an amount is in the reference unit of its flow, which a separate flow dataset defines
licenseType: Free of charge for all users and uses

## General comment
Use of aluminium、HDPE and steel for Air stripping unit

## Geography
a closed pesticide manufacturing plant located in Jiangsu Province, China.

## Technical purpose
The technical usage of the Air stripping unit constructed as part of this industrial process is for soil and groundwater remediation, specifically for the ex-situ treatment of groundwater contaminants at a closed pesticide manufacturing plant. This involves the pump and treat method wherein contaminated groundwater is pumped to the surface and treated using the Air stripping unit to remove volatile substances.

## Reference product
- Air stripping unit: 1; input; article inperiodical

## Inputs
- Steel sections: 250; article inperiodical
- aluminium: 550; article inperiodical
- High Density Polyethylene: 1650; article inperiodical

## Use advice
When using this data set for Life Cycle Assessment, ensure that the scope of remediation accounts for the specific contaminants addressed by the Air stripping unit. Consider the manufacturing materials of the unit (aluminium, HDPE, and steel) in the assessment of environmental impacts. Since the data reflects a single-unit process from a specific location (Jiangsu Province, China), caution should be used when generalizing results to other contexts or locations. Additionally, attention should be paid to the end-of-life phase of the unit's materials, and the inclusion or exclusion of recycling should be carefully considered in the LCA model.

## Review details
Inventory: The internal review was done by several iteration steps concerning raw data validation, raw data documentation, representativity, completeness and consistency of modelling with regard to ISO 14040 and 14044.

## Data sources
- Ding, D. et al. Assessing the environmental impacts and costs of biochar and monitored natural attenuation for groundwater heavily contaminated with volatile organic compounds. Science of The Total Environment 846, 157316 (2022).
