# 磷酸铁锂电池全组分“物理法”回收

Dataset: ILCD process, Unit process, single operation
Geography: CN
Reference year: 2018
Classification: Unit processes / End-of-life treatment / Material recycling
Functional unit: Functional unit is recycling 1 kwh LFP battery
Generated by: 胡志康, hzk2503593129@163.com
Owner: 天工LCI数据工作小组
Review: Dependent internal review by 天工LCI数据工作小组
Amounts: no units in this file; such an amount is in the reference unit of its flow, which a separate flow dataset defines
copyright: false
licenseType: Free of charge for all users and uses

## General comment
废磷酸铁锂电池经过放电后进行精细化地自动拆解，分别回收其中的金属元件、塑料件等；将电芯的正负极分离、粉碎和分选得到铜粉、铝粉和正负极材料粉；再通过材料修复的方法对正极粉末进行成分调整，高温合成为新的正极材料；负极粉末也修复为新的负极材料，并回收再利用隔膜和电解液，从而实现了废磷酸铁锂电池全组分的回收利用。

## Technical purpose
所述回收过程旨在用于从废弃磷酸铁锂（LFP）电池中回收和再利用组件。具体包括金属部件、塑料和电极材料的回收，包括电极材料的分离、粉碎和分选，接着是材料修复和高温合成新电极材料的工序。此过程确保了几乎所有磷酸铁锂电池组件的循环再利用，从而支持可持续电池制造并有助于循环经济。

## Reference product
- EoL LFP battery: 3.6; input; missing unimportant
  废磷酸铁锂电池

## Inputs
All rows: missing unimportant
- Electricity: 131.4
  电能
- Liquid Nitrogen: 38
  液氮
- Dimethyl Carbonate,Dimethyl Carbonate: 1.93
  DMC 溶剂（碳酸二甲酯）
- Lithium carbonate: 0.153
  碳酸锂
- nitrogen: 1.09
  氮气
- Glucose: 0.492
  葡萄糖

## Outputs
All rows: missing unimportant
- hydrogen fluoride: 0.00021
  氟化氢
- particles (> PM10): 0.00651
  粉尘
- non-methane volatile organic compounds: 0.00244
  挥发性有机物
- Graphite: 1.05
  石墨
- aluminium sheet: 0.526
  铝箔
- Copper sheet: 0.842
  铜箔
- Battery Separator: 0.452
  隔膜
- Plastic (unspecified),Plastic (unspecified): 0.111
  塑料件
- Aluminum Shell: 0.0175
  铝壳（单位：个）
- Electrolyte: 1.04
  电解液
- Cathode Material: 2.32
  正极材料

## Data selection and combination
数据来源于多种文献，没有明确。

## Use advice
此数据集的用户应在评估磷酸铁锂电池回收的环境影响时应用它。确保用于生命周期评估（LCA）的方法学准确反映直接物理回收过程至关重要，包括物质回收和后续使用影响的适当分配。用户必须考虑到与回收过程相关的能源开销和排放问题，并考量功能单元相当于回收1 kWh的磷酸铁锂电池，重量为0.81公斤，相当于回收0.0157个废三元锂电池。

## Review details
清单： 内部审查通过几个迭代步骤完成，涉及原始数据验证、原始数据记录、代表性、完整性、与 ISO 14040 和 14044 有关的建模的一致性。

## Data sources
- 王琢璞. 新能源汽车动力电池回收利用潜力及生命周期评价. (清华大学, 2018)
