# 稀土氧化物提取;稀土氧化物;离子吸附工艺;离子吸附粘土

Dataset: ILCD process, Unit process, single operation
Geography: CN
Reference year: 2014
Valid until: 2016
Classification: Unit processes / Materials production / Non-energetic raw materials
Functional unit: The functional unit is defined as the production of 1 kg of 90–92% purity mixed REOs by the in-situ leaching method from ion-adsorption clays in southern China.
LCI method principle: Attributional
LCI method approaches: Allocation - market value
Generated by: 汪涛, twang@iue.ac.cn
Owner: 天工LCI数据工作小组
Review: Dependent internal review by 天工LCI数据工作小组
Amounts: no units in this file; such an amount is in the reference unit of its flow, which a separate flow dataset defines
copyright: false
licenseType: Free of charge for all users and uses

## General comment
采用离子吸附工艺从中国南方的离子吸附粘土中提取的稀土氧化物(REO)通常用于制造高性能磁铁、催化剂、合金、玻璃和电子产品。因其独特的磁性、化学和发光特性，这些应用在可再生能源技术、航空航天、电子和汽车领域等多种高技术产业中至关重要。

## Geography
华南地区

## Technology and included processes
该过程以混合稀土氧化物结束，下游过程（例如溶剂萃取和金属生产）不包括在系统边界内。在某些地点可能会进行进一步处理（例如，将稀土元素分为轻质和组）。

## Reference product
- Water: 1; input; software or database

## Inputs
All rows: uniform; software or database
- Ammonium sulfate: 8.25; min 6.1; max 10.4
- Ammonium bicarbonate: 3.35; min 2.2; max 4.5
- sulphuric acid: 0.525; min 0.3; max 0.75
- oxalic acid: 1.35; min 1.2; max 1.5
- Electricity: 10.494; min 1.908; max 19.08
- heat: 0.8424; min 0.624; max 0.78
  Calcination. Heat, district or industrial, other than natural gas {

## Deviations from the LCI method approaches
In this study, the material and energy flow data is gathered from Chinese literature and verified through personal communications with Chinese experts working in this industry. These datasets are derived based on attributional modeling (instead of consequential) and for most multi-products processes economic allocation is used. Since the data was collected from different sources

## Use advice
使用此数据集的用户应注意，系统边界限于生产90-92%纯度的混合稀土氧化物，不包括溶剂萃取和金属生产等下游过程。多产品系统中的影响分配基于经济因素。为了获得准确的生命周期评估(LCA)结果，确保分析的边界与预期应用的边界相匹配。如果LCA研究需要进一步划分稀土元素，可能需要修改此数据集或用额外数据补充。由于不同地点的具体实践差异，所代表的数据在用于具体场景时应谨慎使用，并可能需要针对区域和技术差异进行调整。

## Review details
清单： 内部审查通过几个迭代步骤完成，涉及原始数据验证、原始数据记录、代表性、完整性、与 ISO 14040 和 14044 有关的建模的一致性。

## Data sources
- Vahidi, E., Navarro, J. & Zhao, F. An initial life cycle assessment of rare earth oxides production from ion-adsorption clays. Resources, Conservation and Recycling 113, 1–11 (2016).
