# Electricity production ; Electricity ; Thermal power (92.3%) + hydropower (1.8%) + wind power (1.6%) + solar power (4.3%)

Dataset: ILCD process, Partly terminated system
Geography: AH-CN
Reference year: 2019
Classification: Energy carriers and technologies / Electricity
LCI method principle: Other
Generated by: Ruoxi Xiong, xiongrx0126@163.com
Owner: Tiangong LCI Data Working Group
Review: Dependent internal review by Tiangong LCI Data Working Group
Amounts: no units in this file; such an amount is in the reference unit of its flow, which a separate flow dataset defines
copyright: false
licenseType: Free of charge for all users and uses

## General comment
Forms of electricity generation include thermal power, hydropower, wind power and solar power

## Time period
Calculated based on data from the 2019 Energy Statistics Yearbook

## Technical purpose
This dataset represents the application of electricity production through various generation methods including thermal power, hydropower, wind power, and solar power. The mix of these generation methods reflects the proportions used in the reference year and is indicative of a power grid that relies predominantly on thermal power generation. The information is relevant for modeling energy systems and assessing the environmental impact of electricity consumption within regions that share a similar energy production profile.

## Reference product
- Electricity: 3.6; calculated

## Outputs
- carbon dioxide: 0.706; calculated
- sulfur dioxide: 0.000121; calculated
- Nitrogen oxides: 0.000193071; calculated
- Dust (unspecified, from stack): 2.3962e-5; calculated

## Data treatment and extrapolations
For the accounting method, please refer to the "Enterprise Greenhouse Gas Emissions Accounting Methods and Reporting Guidelines for Power Generation Facilities". Different forms of power generation and fuel consumption come from Chapter 3 (Energy Production) and Chapter 6 (Regional Energy Balance Sheet) in the "China Energy Statistical Yearbook 2020". The fuel parameters such as low calorific value and carbon content per unit calorific value used to calculate the carbon dioxide emission factor come from the "2019 China Regional Power Grid Carbon Dioxide Baseline Emission Factor Calculation Instructions OM" and the "Enterprise Greenhouse Gas Emission Accounting Method and Reporting Guide for Power Generation Facilities" 》

## Use advice
When using this data set for Life Cycle Assessment (LCA) or other environmental impact modeling, ensure to account for the specific energy mix provided, as it significantly affects the results due to varying emission factors among different generation technologies. This data set is calculated based on the 2019 Energy Statistics Yearbook, and for the accounting method, it refers to greenhouse gas reporting guidelines specific to power generation facilities. Make sure to update the data to reflect changes in the energy mix over time or to match the energy profile of the specific region of interest. Caution should be taken to use the correct emission factors for thermal, hydro, wind, and solar power that are consistent with the methodological guidance provided.

## Review details
Inventory: The internal review was done by several iteration steps concerning raw data validation, raw data documentation, representativity, completeness and consistency of modelling with regard to ISO 14040 and 14044.

## Data sources
- 熊若熙. 中国电力生产和消费二氧化碳与污染物排放因子核算. (清华大学, 2023).
