# Hot rolled steel production|Hot rolled steel|Hot rolling(BF-BOF)

Dataset: ILCD process, Unit process, single operation
Geography: CN
Classification: Materials production / Other mineralic materials
Generated by: Fuxiang, 1162850692@qq.com
Review: Dependent internal review by Tiangong LCI Data Working Group
Amounts: no units in this file; such an amount is in the reference unit of its flow, which a separate flow dataset defines
copyright: false

## Geography
The data of the BF-BOF pathway were obtained from the large-scale integrated steel plants in China with an attached coking plant and EAF plant.

## Reference product
- Hot rolled steel: 986.5; measured

## Inputs
All rows: measured
- Crude Steel: 1000
  Crude steel
- Water (fresh water): 600
- Circulating water: 1000
- Baling wire: 2.1
- Coke oven gas: 42.4
  COG
- Blast furnace gas: 72.8
  BFG
- Linz-Donawitz gas: 25.8
  LDG
- Electricity: 316.8

## Review details
Inventory: The internal review was done by several iteration steps concerning raw data validation, raw data documentation, representativity, completeness and consistency of modelling with regard to ISO 14040 and 14044.; Documentation: The review of the documentation was performed by Ecobilan and is in compliance with ISO 14040 and 14044. The data set documentation is correct in view of the appropriateness of the information provided. It includes all relevant information in view of data quality and scope of application of the respective LCI result.

## Data sources
- The carbon reduction potential of hydrogen in the low carbon transition of the iron and steel industry: The case of China
