# 香蕉生产

Dataset: ILCD process, Unit process, single operation
Geography: TR
Reference year: 2020
Valid until: 2021
Classification: Unit processes / Materials production / Agricultural production means
Functional unit: 2 t banana
Generated by: 朱娴, zzhu0918@163.com
Owner: 天工LCI数据工作小组
Review: Dependent internal review by 天工LCI数据工作小组
Amounts: no units in this file; such an amount is in the reference unit of its flow, which a separate flow dataset defines
copyright: false
licenseType: Free of charge for all users and uses

## General comment
准备香蕉生产所需的种子、肥料、农药、水等物质，并通过人工或机械完成播种、灌溉、施肥和果实收获。

## Geography
地中海沿岸地区，北部地区受到高海拔金牛座山脉的保护，安塔利亚省的阿拉尼亚和加齐帕沙区，以及梅尔辛省的阿纳穆尔和博兹亚兹区，是土耳其最重要的香蕉种植地点。

## Technical purpose
所描述的香蕉生产过程适用于以商业作物种植香蕉为重点的农业操作。它用于生产通常直接销售消费或用于食品加工的香蕉，如在生产甜点、烘焙食品和饮料中使用。这一农业过程尤其适用于土耳其类似地中海沿岸地区适合香蕉栽培的气候条件的农场。

## Reference product
- Banana: 2000; measured

## Inputs
All rows: measured
- water: 30.048
- Lubricant oil: 2.73
- gypsum: 31.78
- Limestone: 68.54
- Electricity: 7.066e6
- Pesticide: 0.9428
- Nitrogenous fertilizer: 11.14
- phosphorus: 5.76
- potassium chloride: 24.98

## Outputs
All rows: software or database
- cadmium: 0.00011
- arsenic: 4.1e-5
- lead: 7.6e-5
- ammonia: 0.163
- nitrate: 1
- nitrous oxide: 0.052

## Use advice
在使用这份香蕉生产的LCA数据集时，用户应确保根据土耳其地中海沿岸地区描述的特定栽培方法、投入和地理条件对过程进行建模。考虑当地气候、土壤类型、水资源可用性以及采用人工或机械农业实践等因素至关重要。此外，如果生产地点与最终消费地点不同，用户应考虑运输的影响。应关注任何关于使用的肥料和农药类型、以及水资源获取和灌溉过程中的使用方式的方法论假设。

## Review details
清单： 内部审查通过几个迭代步骤完成，涉及原始数据验证、原始数据记录、代表性、完整性、与 ISO 14040 和 14044 有关的建模的一致性。

## Data sources
- Adsal, K.A., Üçtuğ, F.G., Arikan, O.A., 2020. Environmental life cycle assessment of utilizing stem waste for banana production in greenhouses in Turkey. Sustain. Prod. Consum. 22, 110–125.
