# 场地准备阶段--井垫建设

Dataset: ILCD process, Unit process, black box
Geography: SC-CN
Reference year: 2014
Valid until: 2016
Classification: Materials production / Other mineralic materials
Generated by: 洪溥, 15695258655@163.com
Review: Dependent internal review by 天工LCI数据工作小组
Amounts: no units in this file; such an amount is in the reference unit of its flow, which a separate flow dataset defines

## Geography
我国页岩气开采工作目前集中在四川及重庆地区，选取四川及重庆的数据进行LCA计算。

## Time period
原始数据时间介于2014-2016之间

## Inputs
- gravel: 1.005e6; min 1.191e6; max 912000; uniform; article inperiodical
  井场建设所用碎石
- Diesel: 4122; min 4886; max 3741; uniform; article inperiodical
  设备及碎石等运输

## Review details
清单： 内部审查通过几个迭代步骤完成，涉及原始数据验证、原始数据记录、代表性、完整性、与 ISO 14040 和 14044 有关的建模的一致性。

## Data sources
- Wang, J., Liu, M., McLellan, B. C., Tang, X. & Feng, L. Environmental impacts of shale gas development in China: A hybrid life cycle analysis. Resources, Conservation and Recycling 120, 38–45 (2017).
