# Molten iron production|Molten iron|BF

Dataset: ILCD process, Unit process, single operation
Geography: CN
Classification: Materials production / Other mineralic materials
Generated by: Fuxiang, 1162850692@qq.com
Review: Dependent internal review by Tiangong LCI Data Working Group
Amounts: no units in this file; such an amount is in the reference unit of its flow, which a separate flow dataset defines
copyright: false

## Geography
The data of the BF-BOF pathway were obtained from the large-scale integrated steel plants in China with an attached coking plant and EAF plant.

## Reference product
- Molten Iron: 924; measured
  Molten iron

## Inputs
All rows: measured
- Coke: 342.6
- Iron ore: 147
  Iron ore (Import)
- Sinter: 1164.4
- Pellet: 165.8
- dolomite: 14.7
- quicklime: 18
  Quicklime
- fluorspar: 1.2
- Water (fresh water): 300
- Circulating water: 15300
- compressed air: 55
- oxygen: 31.9
- Blast furnace gas: 646.6
  BFG
- anthracite: 67.9
  Anthracite
- hard coal: 63.7
  Bituminous coal
- Electricity: 508.68

## Outputs
- Blast furnace gas: 1154; measured
  BFG
- Electricity: 125.28; measured
- BF Slag: 286.4; measured
- BF Shop Dust: 31; measured
  Dust and mud

## Review details
Inventory: The internal review was done by several iteration steps concerning raw data validation, raw data documentation, representativity, completeness and consistency of modelling with regard to ISO 14040 and 14044.; Documentation: The review of the documentation was performed by Ecobilan and is in compliance with ISO 14040 and 14044. The data set documentation is correct in view of the appropriateness of the information provided. It includes all relevant information in view of data quality and scope of application of the respective LCI result.

## Data sources
- The carbon reduction potential of hydrogen in the low carbon transition of the iron and steel industry: The case of China
