# 湿蒸法棉布染整加工;印染棉布;培烘

Dataset: ILCD process, Unit process, single operation
Geography: SZ-JS-CN
Reference year: 2012
Classification: Unit processes / Materials production / Organic chemicals
Generated by: 段颖凡, 1300925579@qq.com
Owner: 天工LCI数据工作小组
Review: Dependent internal review by 天工LCI数据工作小组
Amounts: no units in this file; such an amount is in the reference unit of its flow, which a separate flow dataset defines
copyright: false
licenseType: Free of charge for all users and uses

## General comment
培烘是一种在印染加工中常见的后处理步骤，其目的是通过在布料上施加热力，通常通过烘干或其他加热方式，使印染剂或染料更牢固地结合在纤维上，提高颜色的持久性。这个过程还有助于改善织物的手感和外观，并确保印染效果的稳定性。

## Geography
本研究选取江苏省某印染企业为重点调研对象，该企业位于长三角经济圈中的常熟。

## Technical purpose
本工业过程描述的是湿蒸法棉布染整加工。它在纺织工业中用于棉织物的加工，经历不同阶段，例如煮练氧漂、丝光、磨毛、平幅水洗、培烘和轧染。过程中使用煤在蒸汽锅炉和导热油锅炉中产生蒸汽，并保持所需的高运行温度。

## Reference product
- Cotton Fabric: 167; measured

## Inputs
- Electricity: 99.4; measured
- Standard coal: 981; measured
- Crude coal: 72.2; calculated
- Cleaned coal: 179; calculated
- Fuel Oil: 1.54; calculated
- heavy fuel oil: 0.464; calculated
- Diesel oil: 2.12; calculated
- Coke Oven Gas: 2.83; calculated
- natural gas: 0.0361; calculated
- process steam: 3.15e7; measured
- freshwater: 2300; measured

## Outputs
- carbon dioxide (fossil): 2790; calculated
- carbon monoxide (fossil): 0.214; calculated
- sulfur dioxide: 2.1; calculated
- methane (fossil): 13.6; calculated
- Nitrogen oxides: 0.434; calculated
- nitrous oxide: 0.0431; measured
- particles (> PM10): 0.689; calculated
- ammonia: 8.6e-6; measured
- non-methane volatile organic compounds: 0.00423; measured
- chemical oxygen demand: 0.0172; calculated
- Suspended solids, unspecified,Suspended solids, unspecified: 0.034; calculated
- lead: 5.67e-6; calculated
- mercury: 1.19e-7; calculated
- fluorine: 1.07e-6; calculated
- cadmium: 2.1e-7; calculated
- arsenic: 4.86e-6; calculated

## Use advice
在使用湿蒸法棉布染整加工数据集进行生命周期评估时，应注意到两种类型锅炉之间的煤炭消耗分配，依照调研企业清洁生产报告中指定的17:1使用比例。蒸汽在工序步骤中使用的比例遵循2:1:1:1:1:2的比例。在模拟每个独立过程中每个烘缸的能耗时必须考虑到这个比例。方法论还应该体现每一步使用的烘缸数量——煮练和氧漂各有两个，而其它过程通常为一个。在轧染过程中需要正确计算两步烘干。

## Review details
清单： 内部审查通过几个迭代步骤完成，涉及原始数据验证、原始数据记录、代表性、完整性、与 ISO 14040 和 14044 有关的建模的一致性。

## Data sources
- 朱亚楠. 棉布连续轧染工艺生命周期环境影响评价. (南京大学, 2012).
