# 热处理+复杂的化学处理;废旧光伏组件;组件分离

Dataset: ILCD process, Unit process, black box
Geography: CN
Classification: Unit processes / End-of-life treatment / Other end-of-life services
Generated by: 王楠, 1209824595@qq.com
Owner: 天工LCI数据工作小组
Review: Dependent internal review by 天工LCI数据工作小组
Amounts: no units in this file; such an amount is in the reference unit of its flow, which a separate flow dataset defines
copyright: false
licenseType: Free of charge for all users and uses

## General comment
热处理旨在完全回收包括高纯度硅晶在内的组件。还涉及额外的热和化学过程，称为“热回收”。 热分离通过热分解玻璃和太阳能电池之间的封装层来分离组件。聚合物包封层主要为EVA，在惰性气体环境(T1)下可以热解成乙酸、丙烷、丙烯、乙烷、甲烷等可燃性油类和气体，也可以在氧气环境(T2)下燃烧掉。在方法T1中，Solar Cells Inc.首次提出通过在约500°C的管式炉惰性气氛中热解分解EVA，从旧组件中回收硅晶片和功能太阳能电池。在EVA汽化之前，背板被手动剥离。用流化床反应器和马弗炉对可燃气体进行热或电回收也证明了这种热解脱层。峰值温度为450-600℃，保温时间为30分钟至1小时，足以完全分解。Deutsche Solar和Solarworld在德国和比利时的一个300 kW光伏电站中演示了退役组件的热分层回收过程。分层太阳能电池被重新制造成新的模块，并使用了第二次寿命。自2005年以来，硅太阳能电池的厚度已经减少到200µm以下，这使得晶圆在热过程中更容易破裂或开裂。开裂是由于玻璃后面分解气体引起的机械应力和后部EVA的热变形。破损问题可以通过修改工具(例如额外的固定夹具与凹槽分开)或简单的预处理(例如前玻璃开裂和后EVA图案)来克服，以快速释放分解气体产生的应力。优化后的工艺可以回收近100%的钢化玻璃和高纯度太阳级Si。在方法T2中，EVA在氧气环境中燃烧，而不是热解，为加热炉提供能量。

## Technology and included processes
化学分离。粘合剂封装层也可以溶解在无机(C1)或有机(C2)溶剂中，以使模块分层。在方法C1中，首先通过将组件浸入硝酸(HNO3) 24小时将太阳能玻璃从太阳能电池中分离出来。在方法C2中，Doi等人报道了EVA在80℃条件下在三氯乙烯中成功溶解10天。超声波辐射可以加速化学过程。例如，Kim和Lee报道了EVA在邻二氯苯中30分钟内最有效的有机溶解，以恢复无损伤的太阳能电池。Azeumo等人报道在超声波辐射下，EVA在甲苯中不到60分钟就完全溶解。在某些情况下，有机溶剂无法去除残留在表面的膨胀EVA，因此需要进行热解等二次处理。这不可避免地增加了复杂性。除前玻璃外，由于含氟后板具有毒性，在回收太阳能电池之前还必须移除后板，如图2中的星号(a)-(c)所示。背板可以在高温下从模块上剥离，在报废、研磨或碾磨操作中机械移除，或在许可的焚化炉中热燃烧。对于玻璃-玻璃组件和无氟背板的组件，无需此步骤

## Technical purpose
描述的工业过程关系到从退役光伏（PV）组件中回收有价值材料。通过包括热处理和化学分层治疗在内的多步骤方法回收高纯度硅晶片和其它组件。这些回收的材料，尤其是硅晶片和玻璃，有可能重新回收制成新的太阳能模块，为第二生命周期使用，为太阳能行业的可持续资源使用做出贡献。

## Reference product
- PV Module Waste: 1000; input; min 1000; max 1000; uniform; estimated

## Inputs
- Landfill liquid: 612; min 2448; max 306; uniform
  填埋液

## Outputs
All rows: uniform
- Hazardous Plastic: 15; min 15; max 15
  危险塑料
- mineral waste (ash): 4.3; min 8.6; max 1.4
- Sludge: 50; min 200; max 15
- aluminium: 180; min 180; max 180
- Glass for recovery (shards): 665; min 686; max 560; software or database
- copper wire: 2.97; min 3.3; max 2.8; software or database
  铜缆
- copper wire: 0.9; min 1.14; max 0.342; software or database
  铜带
- Junction Box: 50; min 50; max 50
- silver: 0.49; min 0.5; max 0.27; software or database
- Solar grade multi-Si: 31; min 33; max 23; software or database
  太阳能级硅和完整晶片
- Energy, gross calorific value, in biomass, primary forest: 1220; min 1400; max 698

## Use advice
在使用提供的该工业过程LCA数据时，用户应考虑由于模块设计和材料组成随时间变化而引起的效率和产量可能存在差异。应特别注意分离过程，确保所有有毒材料如含氟背板根据环保法规适当管理。在基于溶剂的方法无法除去残留EVA时，可能需要使用二次过程如热解。最后，识别处理过程中新型更薄Si晶片的脆弱性至关重要，因为破损可能显著影响回收率。

## Review details
清单： 内部审查通过几个迭代步骤完成，涉及原始数据验证、原始数据记录、代表性、完整性、与 ISO 14040 和 14044 有关的建模的一致性。

## Data sources
- Deng, R., Chang, N. L., Ouyang, Z. & Chong, C. M. A techno-economic review of silicon photovoltaic module recycling. Renewable and Sustainable Energy Reviews 109, 532–550 (2019).
