# 市政污泥处理与处置;干污泥;单一焚烧

Dataset: ILCD process, Unit process, single operation
Geography: CN
Classification: Unit processes / End-of-life treatment / Waste water treatment
Functional unit: The functional unit used for GHGs in this LCA is one dry ton (DT) of sludge.
Generated by: 金思甜, 2331276@tongji.edu.cn
Owner: 天工LCI数据工作小组
Review: Dependent internal review by 天工LCI数据工作小组
Amounts: no units in this file; such an amount is in the reference unit of its flow, which a separate flow dataset defines
copyright: ['opt4ROkqig']
licenseType: Free of charge for all users and uses

## General comment
本文研究的主要数据来源如下:1)能源消耗和物质投入来源于对太湖流域的调查;2)能源利用排放因子来源于我们自己的计算、IPCC和文献。3)填埋过程中的CH4排放由文献获得，填埋、焚烧和堆肥过程中的无组织排放主要由文献研究中给出的模型和IPCC因子(2006)决定。4)理论计算数据(焚烧部分)。

## Geography
太湖流域

## Technology and included processes
假定S2、S3和S4燃烧时的窑温为1000°C, S5燃烧时的窑温为1400°C。窑炉效率假定为75%。

## Technical purpose
本市政污泥处理与处置数据集适用于太湖流域内干污泥的单一焚烧过程。它旨在用于评估污泥处理过程中的环境影响，尤其是温室气体排放。这些数据对于基础设施规划、废物管理政策制定以及废物处理设施的碳足迹评估尤为相关。

## Reference product
- Sludge: 1000; input; estimated
  一干吨 （DT） 污泥

## Inputs
- Electricity: 720; measured

## Use advice
在使用本数据集进行生命周期评估时，需要仔细考虑您评估的范围和地理相关性。在评估太湖流域污泥处理过程的环境影响时，将此数据作为清单分析阶段的一部分。确保研究的功能单位与数据集一致——一干吨污泥。如果废物特性或监管条件与太湖地区不同，则可能需要进行调整。

## Review details
清单： 内部审查通过几个迭代步骤完成，涉及原始数据验证、原始数据记录、代表性、完整性、与 ISO 14040 和 14044 有关的建模的一致性。

## Data sources
- Liu, B., Wei, Q., Zhang, B. & Bi, J. Life cycle GHG emissions of sewage sludge treatment and disposal options in Tai Lake Watershed, China. Science of The Total Environment 447, 361–369 (2013).
