# copper-based mixed waste recycling|Zinc|zinc recovery process|high-zinc ash

Dataset: ILCD process, Unit process, single operation
Geography: JX-CN
Reference year: 2020
Classification: Materials production / Other mineralic materials
Functional unit: We consider the functional unit of the recycling of copper-based mixed waste to be 1000 kg electrolytic copper.
LCI method principle: Attributional
LCI method approaches: Allocation - market value
Generated by: Peng Wang, 2867919560@qq.com
Review: Dependent internal review by Tiangong LCI Data Working Group
Amounts: no units in this file; such an amount is in the reference unit of its flow, which a separate flow dataset defines
copyright: false

## Geography
The typical case is a metal recycling enterprise located in Jiangxi Province, China,

## Technology and included processes
The zinc recovery process generates electrolytic zinc from the high-zinc ash produced by smelting and refining as the raw material; electricity is used as the main energy source, and potassium permanganate, sodium carbonate, sodium hydroxide, and concentrated sulfuric acid are used as auxiliary materials

## Reference product
- zinc: 48; measured
  Zinc

## Inputs
All rows: measured
- mineral waste (ash): 31.9
  From refining|Ash
- mineral waste (ash): 94.1
  From smelting|Ash
- Electricity: 475.2
- Potassium permanganate: 0.7
  Potassium permanganate需要补充
- Sodium carbonate: 5.9
  Sodium carbonate需要补充
- sodium hydroxide: 59
  Sodium hydroxide
- Sulfuric acid(98%): 82.6
  Sulfuric acid(98%)需要补充resourse
- transport in t*km,transport in t*km: 3.7199
  Transport
- water: 230.2
  Water
- zinc oxide: 0.1
  Zinc chloride
- Zinc dust: 0.4

## Outputs
All rows: measured
- Leaching residue: 101.9
- sulphuric acid: 0.1
  Sulfuric acid
- Water (evapotranspiration): 201.4
- Copper (+II): 13.2
  Copper sulfate
- oxygen: 11.8
  Oxygen gaseous
- sodium sulfate: 122.4
  Sodium sulfate

## Deviations from the LCI method approaches
Using the LCA-ReCiPe 2016 (Heijungs et al., 2017) characterization and normalization method (the midpoint and endpoint method), the life cycle inventory is converted into impact scores in multiple fields.

## Data selection and combination
foreground data and background data.

## Data treatment and extrapolations
GaBi 9.0 software is adopted to calculate the inventory, resource consumption, and waste emissions of the various copper-based mixed-waste recovery processes per unit mass.

## Review details
Inventory: The internal review was done by several iteration steps concerning raw data validation, raw data documentation, representativity, completeness and consistency of modelling with regard to ISO 14040 and 14044.; Documentation: The review of the documentation was performed by Ecobilan and is in compliance with ISO 14040 and 14044. The data set documentation is correct in view of the appropriateness of the information provided. It includes all relevant information in view of data quality and scope of application of the respective LCI result.

## Data sources
- Zhang, W. et al. Analyzing the environmental impact of copper-based mixed waste recycling-a LCA case study in China. Journal of Cleaner Production 284, 125256 (2021).
