# Preparationandfiring|Sanitaryceramics|Porcelainstone,feldspar,quartz,etc.|Tunnel kiln (natural gas)|All sizes / 制备烧成|卫生陶瓷|瓷石、长石、石英等|隧道窑（天然气）|所有规模

Dataset: ILCD process, Unit process, single operation
Geography: CN
Reference year: 2019
Classification: Energy carriers and technologies / Natural gas based fuels
Generated by: The data was created by the Office of the Second National Pollution Source Census of the Ministry of Ecology and Environment, and the data was organized by the TianGong Plan team for ILCD format / 生态环境部第二次全国污染源普查工作办公室创建数据，天工计划团队常慧敏整理数据为ILCD格式
Owner: Tiangong LCI Data Working Group / 天工LCI数据工作小组
Amounts: no units in this file; such an amount is in the reference unit of its flow, which a separate flow dataset defines
copyright: false
licenseType: Free of charge for all users and uses

## Technology and included processes
the treatment technology for the pollution of Waste waterdidn't offered，The formula for calculating the actual operation rate (k-value) of the end-of-pipe treatment facility is /

## Reference product
- Sanitary Ceramics: 10000; calculated
  源文件中描述为为卫生陶瓷，此处对其进行了匹配工作，将其匹配到LCAflow库里面相最符合的流

## Outputs
All rows: calculated
- particles (PM2.5 - PM10): 6.52
  污染物指标颗粒物的末端治理技术是其他（湿式电除尘），其效率为90，末端治理设施实际运行率（k值）计算公式为k=治理设施正常运行小时数(小时/年)、企业正常运转小时数（小时/年）。原文件中描述污染物类别为废气，污染物指标为颗粒物，此处对其进行了匹配工作，将其匹配到LCAflow库里面相最符合的流
- sulfur dioxide: 24.63
  污染物指标二氧化硫的末端治理技术是其他（钠碱法），其效率为70，末端治理设施实际运行率（k值）计算公式为k=治理设施正常运行小时数(小时/年)、企业正常运转小时数（小时/年）。原文件中描述污染物类别为废气，污染物指标为二氧化硫，此处对其进行了匹配工作，将其匹配到LCAflow库里面相最符合的流
- particles (PM2.5 - PM10): 65.2
  污染物指标颗粒物的末端治理技术是直排。原文件中描述污染物类别为废气，污染物指标为颗粒物，此处对其进行了匹配工作，将其匹配到LCAflow库里面相最符合的流
- sulfur dioxide: 82.1
  污染物指标二氧化硫的末端治理技术是直排。原文件中描述污染物类别为废气，污染物指标为二氧化硫，此处对其进行了匹配工作，将其匹配到LCAflow库里面相最符合的流
- Nitrogen oxides: 89
  污染物指标氮氧化物的末端治理技术是选择性非催化还原法（SNCR），其效率为50，末端治理设施实际运行率（k值）计算公式为k=治理设施正常运行小时数(小时/年)、企业正。原文件中描述污染物类别为废气，污染物指标为氮氧化物，此处对其进行了匹配工作，将其匹配到LCAflow库里面相最符合的流
- Nitrogen oxides: 178
  污染物指标氮氧化物的末端治理技术是直排。原文件中描述污染物类别为废气，污染物指标为氮氧化物，此处对其进行了匹配工作，将其匹配到LCAflow库里面相最符合的流
- Exhaust gas: 2.82e6
  污染物指标废气量的末端治理技术未说明。原文件中描述污染物类别为废气，污染物指标为废气量，此处对其进行了匹配工作，将其匹配到LCAflow库里面相最符合的流
- Waste water: 1.228e6
  污染物指标废水量的末端治理技术未说明。原文件中描述污染物类别为废水，污染物指标为废水量，此处对其进行了匹配工作，将其匹配到LCAflow库里面相最符合的流

## Data sources
- 第二次全国污染源普查产排污核算系数手册（试用版）,二级代码30,三级代码307.0,四级代码3072文件，在完整版文件中第829页
