# Soil and Groundwater Remediation;In Situ;Soil Bioventilation;Equipment and Materials Arriving on Site

Dataset: ILCD process, Unit process, single operation
Geography: CN
Reference year: 2022
Classification: Other Services / Engineering and consulting
Generated by: Wang Ning, wang_ning@caep.org.cn
Owner: Tiangong LCI Data Working Group
Review: Dependent internal review by Tiangong LCI Data Working Group
Amounts: no units in this file; such an amount is in the reference unit of its flow, which a separate flow dataset defines
copyright: false
licenseType: Free of charge for all users and uses

## General comment
Transportation of equipment and materials to the site

## Geography
案例焦化厂位于我国北方中纬度地带

## Technology and included processes
Transportation of equipment and materials to site using gasoline

## Technical purpose
This dataset describes the process of in situ soil bioventilation for soil and groundwater remediation, focusing on the transportation of equipment and materials to the remediation site using gasoline. It is applicable to cases where a coking plant is located in the mid-latitude region of Northern China.

## Reference product
- Equipment and Materials Arriving on Site: 1; measured

## Inputs
- Gasoline (regular): 1.547; measured

## Use advice
Users of this dataset should consider the accurate representation of transportation distances and the specific type of gasoline used for shipping to reflect true energy consumption and emissions. Relevant factors such as local fuel quality and efficiency of transport vehicles should be taken into account. It is also essential to note whether this transportation process stage is part of a larger life cycle study and to contextualize it within the overall system boundaries.

## Review details
Inventory: The internal review was done by several iteration steps concerning raw data validation, raw data documentation, representativity, completeness and consistency of modelling with regard to ISO 14040 and 14044.

## Data sources
- 刘文晓,夏天翔,张丽娜等.基于修复效果的污染土壤修复工程环境足迹分析[J].环境科学研究,2022,35(10):2367-2377.DOI:10.13198/j.issn.1001-6929.2022.07.05.
