# 土壤和地下水修复;异地;土壤淋洗;物理分离;预处理后的土壤

Dataset: ILCD process, Unit process, single operation
Geography: KR
Reference year: 2023
Classification: Unit processes / Other Services / Repair and maintenance
Generated by: 黄悦, huangyue@caep.org.cn
Owner: 天工LCI数据工作小组
Review: Dependent internal review by 天工LCI数据工作小组
Amounts: no units in this file; such an amount is in the reference unit of its flow, which a separate flow dataset defines
copyright: false
licenseType: Free of charge for all users and uses

## General comment
包括料斗/输送机、湿式振动分离/输送机、水力旋流器、脱水设备/泵、重力分离/泵、脱水设备

## Geography
Incheon City, approximately 50 km east of Seoul, South Korea

## Technical purpose
所描述的土壤和地下水修复工艺主要用于异地土壤洗涤应用。它特别用于环境工程项目中受污染土壤的物理分离和预处理，对恢复受污染场地至安全状态至关重要，可用于建筑、农业或其他环境敏感应用。

## Reference product
- Pre-treatment Soil: 1; measured

## Inputs
All rows: measured
- Electricity: 15390
- Tap Water: 8550
- contaminated soil: 1
- Steel: 2
- Rubber: 4275

## Outputs
- carbon dioxide (fossil): 25200; measured
- particles (PM10): 0.614; measured
- sulfur oxides: 91.5; measured
- nitrous oxide: 71.3; measured

## Data treatment and extrapolations
通过使用SiteWiseTM第2版分别计算每个阶段的环境足迹来分析总环境足迹

## Use advice
在使用该数据集进行生命周期评估时，必须确保环境足迹分析中已包括土壤和地下水修复过程的所有阶段，包括运输、处理和处置。用户应使用提供的SiteWiseTM第2版工具分别计算每个阶段的足迹，考虑所有主要原材料和必要的能源消耗，以获得全面的结果。方法选择，包括系统边界和处理效率的假设，应明确定义并与生命周期评估标准一致。

## Review details
清单： 内部审查通过几个迭代步骤完成，涉及原始数据验证、原始数据记录、代表性、完整性、与 ISO 14040 和 14044 有关的建模的一致性。

## Data sources
- Kim, D.-H., Hwang, B.-R., Moon, D.-H., Kim, Y.-S. & Baek, K. Environmental assessment on a soil washing process of a Pb-contaminated shooting range site: a case study. Environ Sci Pollut Res 20, 8417–8424 (2013).
