# 污泥处理与处置|干化焚烧

Dataset: ILCD process, Unit process, single operation
Geography: GZ-GD-CN
Classification: Materials production / Other mineralic materials
Generated by: Jin Sitian, 2331276@tongji.edu.cn
Review: Dependent internal review by Tiangong LCI Data Working Group
Amounts: no units in this file; such an amount is in the reference unit of its flow, which a separate flow dataset defines

## General comment
厂内运输+干化焚烧

## Reference product
- Sludge: 1000; input; estimated
  1t湿污泥（水分含 量在 70％ ～75％左右 ）

## Inputs
- hard coal; 26.3 MJ/kg: 85; calculated
- Electricity: 398.304; calculated

## Outputs
All rows: calculated
- carbon monoxide: 0.38
- carbon dioxide: 506.18
- Nitrogen oxides: 1.29699
- sulfur oxides: 0.99222
- hydrogen chloride: 0.00018
- Flue dust: 0.28
  烟尘

## Review details
Inventory: The internal review was done by several iteration steps concerning raw data validation, raw data documentation, representativity, completeness and consistency of modelling with regard to ISO 14040 and 14044.

## Data sources
- 城市污水污泥焚烧处理环境影响分析
