# 农田镉污染土壤;植物修复;伴矿景天;修复后监测;土壤样品

Dataset: ILCD process, Unit process, black box
Geography: CN
Reference year: 2021
Classification: Other Services / Repair and maintenance
Generated by: 桑春晖, sangch@mail.bnu.edu.cn
Owner: 天工LCI数据工作小组
Review: Dependent internal review by 天工LCI数据工作小组
Amounts: no units in this file; such an amount is in the reference unit of its flow, which a separate flow dataset defines
copyright: false
licenseType: Free of charge for all users and uses

## General comment
采集土壤样品进行检测，以验证修复效果。

## Geography
文献中仅明确指出，污染农田位于中国南方，没有具体给出省市

## Time period
文献中没有明确数据收集的开始时间，以文献发表时间为有效期的开始时间

## Technology and included processes
根据HJ/T 166和GB 15618，每公顷7个样品。共监测7次，其中修复期间监测5次，修复后监测2次，共采集土壤样品49个进行分析检测。

## Technical purpose
该工业过程旨在应用伴矿景天(Sedum plumbizincicola)的植物修复能力，对镉(Cd)污染的农业土壤进行修复。此生物修复技术用于降低土壤中Cd的浓度，从而使土壤再次适合农业使用，并保护环境。过程包括修复期间和修复后的监测，以确保治疗效果。它特别适用于中国南方的受污染站点，那里的特定条件使伴矿景天成为吸收和积累Cd的适当选择。

## Reference product
- Soil Sample: 49; measured
  这里是采集的土壤样品数量，一共采集土壤样品49个，用于实验室检测

## Inputs
All rows: measured
- Road Transport: 41.16
- Nitric acid: 1.04784
- Hydrochloric Acid: 0.00314352
- Tap Water: 13.273
- Electricity: 162.396
- argon: 41.44

## Data selection and combination
初级数据清单是根据ISO 14040关于LCA.35的规定获得的。基本数据来自特定场地的盆栽实验、中试和供应商处获取，这些数据代表了中国南方的情况。二级数据来自Ecoinvent数据库v2.3，从中选择了地理来源和技术因素最相似的过程。

## Use advice
在使用该数据集进行生命周期评估(LCA)时，确保遵循ISO 14040中规定的特定方法论框架。鉴于数据获取并没有一个准确的起点，使用来源文献的发布日期作为数据的时间边界参考。特别注意数据的地理特定性，因为初级数据代表了中国南方的情况。与其他修复过程比较时，考虑技术适应性，确保考虑了类似的地理和技术因素。仅当可以从Ecoinvent等数据库中确保匹配具有相似地理起源和技术因素的过程时，才使用二级数据。始终根据LCA研究的上下文，特别是按照HJ/T 166和GB 15618指示的监测频率和采样策略，考虑包括或排除某些阶段的方法论建议。

## Review details
清单： 内部审查通过几个迭代步骤完成，涉及原始数据验证、原始数据记录、代表性、完整性、与 ISO 14040 和 14044 有关的建模的一致性。

## Data sources
- Jin et al. Integrated Life Cycle Assessment for Sustainable Remediation of Contaminated Agricultural Soil in China. Environ. Sci. Technol. 2021, 55, 17, 12032–12042.
