# cement production|cement, ordinary portland cement, 42.5MPa|new five-stage suspension preheater dry process, 1800 t-cl/d|mixed solid wastes

Dataset: ILCD process, Unit process, black box
Geography: SC-CN
Reference year: 2007
Classification: Materials production / Other mineralic materials
Generated by: Siqi Yang
Amounts: no units in this file; such an amount is in the reference unit of its flow, which a separate flow dataset defines
copyright: false

## General comment
Use the existing land, some equipment, technology, management and other resources to make technological transformation, and adopt advanced new five-stage suspension preheater dry process to newly build a F3.3x50 m, with limestone and electric slag as the main raw materials, the daily output of 1,800 tons of cement clinker of the new dry process rotary kiln cement production line. It can use 123,426 tons of industrial waste slag annually, of which 8222 tons of calcium carbide slag and 4,1204 tons of ferroalloy slag, which turns waste into treasure, reduced environmental pollution. Environmental load (pollutant emissions) data includes more specific data of the unit process, which is not recorded. Only the cement production unit process is considered.
Calcium carbide slag cement is the use of calcium carbide slag and limestone, silica raw materials, iron raw materials into the vertical mill after the ingredients into the raw material powder, and then the use of more stable operation of the new five-stage suspension preheater dry process to produce cement.

## Geography
A cement manufacturer in Sichuan Province

## Model description
One functional unit is equivalent to 42.5 kilograms of ordinary portland cement, that is, 1 Fu = 1 kg of P·O42.5 ordinary portland cement. The research scope includes cement raw material extraction, energy production, raw meal preparation, clinker calcination and grinding, and cement storage. The main focus is on the cement production process and the environmental impact related to the extraction and transportation of raw materials, electricity and coal production, and cement production process.

## Reference product
- cement, ordinary portland cement, 42.5MPa: 1000
  Carbide slag cement. P.042.5 Ordinary silicate cement.

## Inputs
All rows: measured
- limestone, crushed, for mill: 741.7
  Limestone. Transported by truck, 15km.
- shale: 70.4
  Shale. Transported by truck, 15km.
- sandstone: 78.56
  Sandstone. Transported by truck, 15km.
- Carbide slag: 137.04
  Calcium carbide slag. Transported by truck, 40km.
- iron, powder: 18.96
  Iron powder. Transported by truck, 190km.
- gypsum (desulphurized): 24.07
  Gypsum. Transported by truck, 45km.
- Ferroalloy slag: 68.67
  Ferroalloy slag. Transported by truck, 20km.
- hard coal, run-of-mine: 99.58
  Coal. Transported by truck, 34km.
- electricity, medium voltage: 360
  Electricity.

## Outputs
- carbon dioxide: 645.3; calculated
  CO2. It only involves the production stage (calculation).
- sulfur dioxide: 0.049; measured
  SO2. It only involves the production stage (measured).
- Nitrogen oxides: 1.95; measured
  NOx. It only involves the production stage (measured).
- particles (> PM10): 2.585; measured
  Dust, with an unspecified particle size, is treated as PM > 10 micrometers in diameter. It only involves the production phase (calculation: the data after dust removal treatment divided by the dust removal efficiency).

## Sampling procedure
An advanced new five-stage suspension preheater dry process technology is used in a new dry rotary kiln cement production line with a daily output of 1800 tons of cement clinker, using a single F3.3x50m, with limestone and electric furnace slag as the main raw materials. The production line can utilize 123,426 tons of industrial waste annually, including 8,222 tons of electric furnace slag and 41,204 tons of ferroalloy furnace slag.

## Data sources
- 王超. (2007). 电石渣水泥和石灰石水泥生命周期评价的比较研究 [硕士, 西南交通大学].
