# 土壤修复;异位修复;化学氧化;工程实施;土壤调理;修复土壤

Dataset: ILCD process, Unit process, single operation
Geography: AH-CN
Reference year: 2023
Classification: Unit processes / Other Services / Repair and maintenance
Generated by: 桑春晖, sangch@mail.bnu.edu.cn
Owner: 天工LCI数据工作小组
Review: Dependent internal review by 天工LCI数据工作小组
Amounts: no units in this file; such an amount is in the reference unit of its flow, which a separate flow dataset defines
copyright: false
licenseType: Free of charge for all users and uses

## General comment
向污染土壤中添加适量水分、氧化剂等，进行氧化

## Geography
安徽省合肥市受重金属和有机物复合污染的钢铁厂地块

## Technology and included processes
采用化学氧化技术，进行氧化修复

## Technical purpose
该数据集详述了一种针对重金属和有机物复合污染钢铁工厂用地的土壤异位修复过程。此化学氧化过程适用于旨在将受到重金属和有机污染场地恢复至安全和可用状态的环境工程项目。

## Reference product
- Remediated soil: 29437.9; estimated
  处理后土壤

## Inputs
- Tap Water: 1.2582e7; estimated
- hydrogen peroxide: 1.179e6; estimated
- Diesel: 4.569; estimated
- Excavated soil,Excavated soil: 29437.9; estimated

## Use advice
在生命週期評估中正確使用這份數據集時，用户必须考虑它代表了中国安徽省合肥市的一个具体土壤修复项目案例。应用此数据时，使用者应调整材料的使用量，以反映其项目地点特定的污染水平和土壤特性。方法论重点应放在土壤调理阶段全部投入（水、氧化剂和任何其他化学品）的完整包含和修复后土壤产出的准确量化上。必须验证技术适用性和环境条件的假设与合肥现场类似，以确保数据相关性。

## Review details
清单： 内部审查通过几个迭代步骤完成，涉及原始数据验证、原始数据记录、代表性、完整性、与 ISO 14040 和 14044 有关的建模的一致性。

## Data sources
- 桑春晖,杨欣桐,李香兰等.基于SEFA方法的异位土壤修复环境足迹分析——以某钢铁厂为例[J].中国环境科学,2023,43(10):
