# 清洁场地;土壤原位修复;电动修复

Dataset: ILCD process, Unit process, black box
Geography: IT
Reference year: 2021
Classification: Unit processes / Other Services / Repair and maintenance
Generated by: 杨欣桐, yangxt@caep.org.cn
Owner: 天工LCI数据工作小组
Review: Dependent internal review by 天工LCI数据工作小组
Amounts: no units in this file; such an amount is in the reference unit of its flow, which a separate flow dataset defines
copyright: false
licenseType: Free of charge for all users and uses

## General comment
这种原位干预旨在通过物种向提取井的电动迁移，从受污染的土壤中提取物种。更详细地说，通过施加足够强度的电场来提供能量，以将离子和带电粒子推向相反极性的电极，电极插入土壤中并封装在特殊的提取井中，从而能够去除工艺水。将合适的电解液倒入土壤中，以通过络合现象帮助污染物质的迁移。

## Geography
The site taken as a reference for the remediation is an area of 712 m2 located in a disused industrial district of Tuscany (Italy), in the past subjected to various productive activities that led to contamination with various metals, some of which potentially toxic such as lead (Pb), arsenic (As) and thallium (Tl). As it is a “site of national interest”, its exact location is considered confidential and cannot be disclosed.

## Technical purpose
该土壤原位修复工艺采用电动方法，专门用于从工业区污染土壤中提取重金属等污染物，特别适用于被归类为具有国家利益重要性的地点，且要求保密的场所。适合于有工业活动历史的场地，在这些场地土壤被铅（Pb）、砷（As）和铊（Tl）等金属污染。

## Reference product
- Remedied site: 712

## Inputs
- Electrode,Electrodes: 101.8
- Polyvinyl chloride: 4009.7
- polypropylene fibres (PP): 131.3
- Potassium iodide: 1872
- Nitric acid,Nitric acid: 31.6
- Tap Water: 586
- Electricity: 2.13551e6

## Outputs
- waste water - untreated: 575.4

## Use advice
在使用该数据集进行生命周期评估（LCA）时，请确保它适用于修复地点的土壤类型、污染物特征和规模（参考区域为712平方米）的环境。如果您的场地条件与此有显著不同，请谨慎应用数据。该数据集未考虑修复后土地的后续使用，因此用户应在LCA中单独核算此类用途。此外，它没有涵盖超出电动修复范围的材料回收或能源使用。在报告和传播结果时应尊重地点信息的保密性。

## Review details
清单： 内部审查通过几个迭代步骤完成，涉及原始数据验证、原始数据记录、代表性、完整性、与 ISO 14040 和 14044 有关的建模的一致性。

## Data sources
- Vocciante, M., De Folly D’Auris, A., Franchi, E., Petruzzelli, G. & Ferro, S. CO2 footprint analysis of consolidated and innovative technologies in remediation activities. J Clean Prod 297, 126723 (2021).
