# 污泥处理与处置|水泥窑协同处置

Dataset: ILCD process, Unit process, single operation
Geography: CN
Classification: Materials production / Other mineralic materials
Generated by: Jin Sitian, 2331276@tongji.edu.cn
Review: Dependent internal review by Tiangong LCI Data Working Group
Amounts: no units in this file; such an amount is in the reference unit of its flow, which a separate flow dataset defines

## Geography
京津冀地区

## Reference product
- Sludge: 1000; input; estimated

## Inputs
- Energy, gross calorific value, in biomass, primary forest: 334; measured
- Land Occupation: 0.544; measured

## Outputs
- carbon dioxide: 45.6; software or database
- Nitrogen oxides: -9.36; software or database

## Review details
Inventory: The internal review was done by several iteration steps concerning raw data validation, raw data documentation, representativity, completeness and consistency of modelling with regard to ISO 14040 and 14044.

## Data sources
- 水泥窑协同处置污泥的环境负荷分析
