# 苯生产 ; 苯 ; 石脑油路线 ; 石脑油

Dataset: ILCD process, Unit process, black box
Geography: CN
Reference year: 2006
Classification: Unit processes / Materials production / Organic chemicals
Functional unit: A functional unit is defined as 1 ton of benzene product
LCI method principle: Attributional
LCI method approaches: Allocation - mass
Generated by: 任亚楠, renyn15@tsinghua.org.cn
Owner: 天工LCI数据工作小组
Review: Dependent internal review by 天工LCI数据工作小组
Amounts: no units in this file; such an amount is in the reference unit of its flow, which a separate flow dataset defines
copyright: false
licenseType: Free of charge for all users and uses

## General comment
芳烃联合装置，阿罗沙文法工艺

## Geography
对二甲苯生产工艺的运行状况和环境负荷等进行了实地调研和数据采集

## Time period
未提及，以文献发表时间代替

## Technical purpose
通过石脑油路线在芳烃联合装置中，利用阿罗沙文法工艺生产的苯主要用于合成不同化学品的应用，包括生产对二甲苯，对二甲苯是大规模工业生产聚对苯二甲酸乙二醇酯（PET）及其他聚合物的前体。它也可能用于生产多种类型的树脂、尼龙、橡胶、润滑剂、染料、洗涤剂、药物和杀虫剂。这个特定的数据集指的是用于此类化学合成应用的苯。

## Reference product
- benzene: 1; measured
  苯

## Inputs
- naphtha: 0.68; measured
  石脑油
- light fuel oil: 0.27; measured
  燃料油
- Electricity: 0.072; measured
  电力

## Outputs
All rows: measured
- waste water - untreated: 0.11
  废水总量
- Oils, unspecified: 1e-5
  石油类
- chemical oxygen demand: 0.00124
  COD
- sulfur dioxide: 0.0018
  SO2
- nitrous oxide: 0.00413
  NOx
- carbon monoxide (fossil): 0.00363
  CO
- carbon dioxide (fossil): 0.74
  CO2
- particles (> PM10): 0.00189
  烟尘

## Deviations from the LCI method approaches
研究采用产品质量作为清单数据的分配原则

## Data treatment and extrapolations
采用质量分配法量化产品和副产品之间的环境负荷

## Use advice
当使用这个数据集进行生命周期评价（LCA）时，用户应根据苯和其副产品之间的环境负担相应地采用质量分配法。需注意，定义为这个数据的功能单元是1吨苯产品。因此，获取的所有结果都应基于此功能单元来解读。运营状态和环境负荷是基于现场研究和数据收集的，如果没有明确提及，数据的参考时间是支持文档的发布时间。用户在适用时应确保他们的研究考虑产品质量作为清单数据分配原则。

## Review details
清单： 内部审查通过几个迭代步骤完成，涉及原始数据验证、原始数据记录、代表性、完整性、与 ISO 14040 和 14044 有关的建模的一致性。

## Data sources
- 马骕. 涤纶纺织品的生命周期评价. (东华大学, 2007).
