# Soil and groundwater remediation;Ex-situ;groundwater pump and treat;construction;Extraction well

Dataset: ILCD process, Unit process, single operation
Geography: DK
Reference year: 2021
Classification: Other Services / Engineering and consulting
Generated by: Wang Ning, wang_ning@caep.org.cn
Owner: Tiangong LCI Data Working Group
Review: Dependent internal review by Tiangong LCI Data Working Group
Amounts: no units in this file; such an amount is in the reference unit of its flow, which a separate flow dataset defines
copyright: false
licenseType: Free of charge for all users and uses

## General comment
Construction of pumping wells using HDPE, concrete, gravel, pumps, etc.

## Technology and included processes
Construction of extraction wells using electricity, concrete, gravel, HDPE

## Technical purpose
The data set describes the construction of extraction wells, which are used for soil and groundwater remediation. These wells facilitate the ex-situ pump and treat process by extracting contaminated groundwater for treatment, aiding in environmental management and pollution control.

## Reference product
- Extraction wel: 1; input; estimated

## Inputs
- polyethylene high density granulate (PE-HD): 40; estimated
- Electricity: 2300; estimated
- cement: 200; estimated
- gravel: 330; estimated

## Use advice
When using this data set, consider the specific regional context and contaminants present in the groundwater. Factors such as well depth, local soil composition, and groundwater flow rates might affect the construction materials and methods that need to be modeled. Pay attention to the inclusion of all indirect environmental impacts of construction, like the production and transportation of materials (HDPE, concrete, gravel) and consumed electricity.

## Review details
Inventory: The internal review was done by several iteration steps concerning raw data validation, raw data documentation, representativity, completeness and consistency of modelling with regard to ISO 14040 and 14044.

## Data sources
- Sustainable remediation assessment of a chlorinated ethene plume: method evelopment, application, and assessment
