# 秸秆浆、木浆纸生产;本色文化纸

Dataset: ILCD process, Unit process, black box
Geography: SD-CN
Classification: Materials production / Other materials
LCI method principle: Attributional
Generated by: Yixiang Gao, 22210740040@m.fudan.edu.cn
Owner: Tiangong LCI Data Working Group
Review: Dependent internal review by Tiangong LCI Data Working Group
Amounts: no units in this file; such an amount is in the reference unit of its flow, which a separate flow dataset defines
copyright: false
licenseType: Free of charge for all users and uses

## General comment
The described industrial process refers to the production of unbleached cultural paper predominantly used for stationery, books, and office paper. The raw material composition for this cultural paper from Quanlin Paper Industry comprises 80% straw pulp and 20% imported wood pulp. The production process primarily involves papermaking steps such as pulping, impurity removal, refining, beating, preparing various additives, mixing of paper stock, conveyance of pulpy material, pressing, drying, surface sizing, additional drying, calendaring, and reeling into paper rolls.

## Geography
基于生命周期评价的泉林纸业环境影响评价实例

## Technology and included processes
本色文化纸生命周期评价的系统边界应包括从原料的收集 、备料一直到销售渠道整个过程， 其中包括稻秆收集运输、进口木装运输、制浆过程、本色文化纸生产、 运输和销售过程以及废水和黑液的处理等。

## Reference product
- Natural Cultural Paper Products: 1000; measured
  Natural cultural paper products

## Inputs
- Straw: 1600; measured
  straw
- Wood Pulp: 160; measured
  Imported wood pulp
- water: 24000; measured
- Electricity: 1440; measured
  electricity

## Outputs
All rows: measured
- carbon dioxide: 1756.18
  CO2
- Nitrogen oxides: 3.01
  NOx
- sulfur dioxide: 3.61
  SO2
- methane: 0.28
  CH4
- carbon monoxide: 1.53
  CO
- chemical oxygen demand: 0.512
  COD
- biological oxygen demand: 0.1224
  BOD5
- nitrogen, total (excluding N2): 0.04
  TN
- Ammonia Nitrogen: 0.022
  NH3-N
- phosphorus, total: 0.0012
  City
- Suspended solids, unspecified: 0.308
  SS
- Waste solid: 214.4
  solid waste

## Data selection and combination
本文的数据来源主要是深入到泉林纸业实地调研、泉林纸业企业报表、 山东省聊城市统计局统计资料、 聊城市环保局环评材料等。

## Use advice
When using this life cycle assessment (LCA) data for Quanlin Paper Industry's unbleached cultural paper, ensure that the system boundary encompasses the entire process from raw material collection, preparation, to the distribution channels. This includes straw collection and transport, import wood transportation, pulping process, production of unbleached cultural paper, transportation, and sales, as well as the treatment of wastewater and black liquor. Data is sourced from on-site research at Quanlin Paper Industry, corporate reports, statistics from the Liaocheng City Statistics Bureau, and environmental assessment materials from Liaocheng City Environmental Protection Bureau. The functional unit is 1 tonne of the unbleached cultural paper product. According to the research, chemicals added during the paper production process at Quanlin Paper Industry make up a minimal proportion of the raw materials and do not include bleaching agents; thus, their use and environmental pollution are significantly less, hence the chemical inputs in this aspect are not included in the LCA.

## Review details
Inventory: The internal review was done by several iteration steps concerning raw data validation, raw data documentation, representativity, completeness and consistency of modelling with regard to ISO 14040 and 14044.

## Data sources
- 周婷. 基于生命周期评价的秸秆造纸环境影响研究. (南京农业大学, 2013).
