# 碳阳极制造-铝电解碳阳极生产 ; 碳阳极 ; 绿色压制焦

Dataset: ILCD process, Unit process, single operation
Geography: CN
Reference year: 2019
Classification: Unit processes / Materials production / Non-energetic raw materials
Generated by: 傅晨玲, fu-chenling@tsinghua.edu.cn
Owner: 天工LCI数据工作小组
Review: Dependent internal review by 天工LCI数据工作小组
Amounts: no units in this file; such an amount is in the reference unit of its flow, which a separate flow dataset defines
copyright: false
licenseType: Free of charge for all users and uses

## General comment
通过此过程制造的碳阳极专门设计用于铝电解。它们使用绿色压制焦生产，这表明它们是为铝冶炼行业而设计的，在该行业中，它们作为从氧化铝矿石中提取铝金属的电解还原过程中的关键组件。

## Time period
文献发表日期

## Reference product
- anode, for metal electrolysis: 1000; software or database
  anode

## Inputs
All rows: software or database
- electricity, high voltage, aluminium industry: 378
- Metallurgical Coke: 70
  metallurgical coke
- Natural Gas: 79.3
  natural gas
- Water, unspecified natural origin: 5150
- green-pressing: 1140

## Outputs
All rows: software or database
- carbon dioxide (fossil),carbon dioxide (fossil): 130
- municipal solid waste: 70
- particles, unspecified: 4.83
- chemical oxygen demand: 1.9
- sulfur dioxide: 0.00073
- carbon monoxide (fossil),carbon monoxide (fossil): 0.00238
- Nitrogen oxides: 0.00055
- methane (fossil): 0.0047

## Use advice
在使用此数据集进行生命周期评估（LCA）时，确保铝电解过程的特定操作条件与所描述的碳阳极的属性兼容至关重要。用户应考虑阳极生产的环境影响，包括潜在排放和资源消耗。特别应注意碳阳极的生命周期末期阶段，其中循环利用过程的包含或排除可以显著影响LCA的结果。此外，数据应在技术进步和发布日期的背景下使用，以确保相关性。

## Review details
清单： 内部审查通过几个迭代步骤完成，涉及原始数据验证、原始数据记录、代表性、完整性、与 ISO 14040 和 14044 有关的建模的一致性。

## Data sources
- YANG, Y., GUO, Y.-Q., ZHU, W.-S. & HUANG, J.-B. Environmental impact assessment of China’s primary aluminum based on life cycle assessment. Trans Nonferrous Met Soc China 29, 1784–1792 (2019).
