# 铝电解碳阳极生产 ; 碳阳极 ; 石油焦 ; 2008年

Dataset: ILCD process, Unit process, single operation
Geography: CN
Reference year: 2021
Classification: Unit processes / Materials production / Inorganic chemicals
Generated by: 蔡梓萌, caizm6178@163.com
Owner: 天工LCI数据工作小组
Review: Dependent internal review by 天工LCI数据工作小组
Amounts: no units in this file; such an amount is in the reference unit of its flow, which a separate flow dataset defines
copyright: false
licenseType: Free of charge for all users and uses

## General comment
该数据集描述的采用石油焦进行铝电解生产的碳阳极的技术用途，主要用于电解铝生产。在霍尔-埃鲁法生产铝的过程中，碳阳极会被消耗，该方法是从氧化铝生产铝的工业标准方法。这些碳阳极被设计为能够在高温下工作，并且是铝冶炼操作中不可或缺的部分。

## Time period
文献发表日期

## Reference product
- anode, for metal electrolysis: 1000; software or database
  anode

## Inputs
All rows: software or database
- electricity, high voltage, aluminium industry: 759.6
  electricty
- heavy fuel oil: 69
  fuel oil
- coal tar: 220
  coal tar pitch
- Petroleum Coke: 1140
  petroleum coak
- coal gas: 1290

## Data selection and combination
本研究的数据参考了PA、SA、电力等背景数据的LCA数据。PA数据来自统计数据源，SA数据主要来自文献。背景数据主要来自中国科学院生态环境研究中心CASRCEES 2018建立的中国本地化LCA数据库，涵盖能源、材料、交通、废物管理等LCA数据。

## Use advice
使用生命周期评价（LCA）数据的用户需要考虑自2008年以来碳阳极生产过程中的技术变更。数据应当用于铝生产的特定应用，未经恰当验证，不得将其概化到其他过程。此外，用户应考虑区域背景，因为背景数据是针对中国市场的本土化数据。如果适用，在将数据外推到其他地区或更新的时间框架时，应调整技术和生产实践上的差异。

## Review details
清单： 内部审查通过几个迭代步骤完成，涉及原始数据验证、原始数据记录、代表性、完整性、与 ISO 14040 和 14044 有关的建模的一致性。

## Data sources
- Ding, N., Liu, N., Lu, B. & Yang, J. Life cycle greenhouse gas emissions of aluminum based on regional industrial transfer in China. J. Ind. Ecol. 25, 1657–1672 (2021).
