# Crude steel production| steel | Steel production

Dataset: ILCD process, Unit process, single operation
Geography: SD-CN
Reference year: 2018
Classification: Materials production / Other mineralic materials
Generated by: Wanghuanyu, wanghuanyu00@126.com
Review: Dependent internal review by Tiangong LCI Data Working Group
Amounts: no units in this file; such an amount is in the reference unit of its flow, which a separate flow dataset defines

## Reference product
- iron: 1000; article inperiodical

## Inputs
All rows: article inperiodical
- mineral extraction site: 20
- dolomite: 170
- Limestone: 270
- Refined lime: 4.05
  精石灰Refined lime
- pebble: 4.05
  鹅卵石Cobble
- Ferrosilicon: 0.7
- Ferromanganese: 2.82
- manganese: 6.9
  Silicomanganese
- Silicomanganese: 0.02
  Aluminum wire
- magnesium: 4.1
  Light burning magnesium bal
- electrode: 0.23
  Electrode
- Deoxidizer: 0.54
- Iron powder: 360
- Rich ore powde: 1320
  Rich ore powder
- Hard coal, at consumer EU-27: 990
- freshwater: 3580
- Electricity: 1115.6
- iron: 360
  Other ferrous materials

## Outputs
All rows: article inperiodical
- phenol,Sulphur oxides (as SO2): 0.93
- particles (PM10): 0.15
- nitrous oxide: 0.65
- 2,3,7,8-tetrachlorodibenzo-p-dioxin: 91.32
  Dioxins
- fluoride: 2890
- benzo[a]pyrene: 3.18
- sulfide: 0.02
- cyanide: 0.01
- Suspended solids, unspecified: 15.83
- LPG - liquefied petroleum gas: 1.33
- volatile organic compound: 0.03
  Volatile phenol
- Ammonia nitrogen: 1.12
- chemical oxygen demand: 0.0191
- Chemicals (unspecified): 0.09
  IHW
- waste incineration of municipal solid waste (MSW): 0.83

## Review details
Inventory: The internal review was done by several iteration steps concerning raw data validation, raw data documentation, representativity, completeness and consistency of modelling with regard to ISO 14040 and 14044.; Documentation: The review of the documentation was performed by Ecobilan and is in compliance with ISO 14040 and 14044. The data set documentation is correct in view of the appropriateness of the information provided. It includes all relevant information in view of data quality and scope of application of the respective LCI result.

## Data sources
- 1.
