# 石油焦生产 ; 石油焦 ; 摇篮

Dataset: ILCD process, Unit process, single operation
Geography: CN
Reference year: 2019
Classification: Unit processes / Energy carriers and technologies / Crude oil based fuels
Generated by: 蔡梓萌, caizm6178@163.com
Owner: 天工LCI数据工作小组
Review: Dependent internal review by 天工LCI数据工作小组
Amounts: no units in this file; such an amount is in the reference unit of its flow, which a separate flow dataset defines
copyright: false
licenseType: Free of charge for all users and uses

## General comment
石油焦生产主要用作铝和钢生产的燃料，以及用于制作石墨、阳极和其他工业产品的原材料。

## Time period
文献发表日期

## Reference product
- Petroleum Coke: 1000; software or database
  petrol coke

## Inputs
All rows: software or database
- crude oil; 42.3 MJ/kg: 2291
  Fuel mix: crude oil (79%), raw coal (6%), electricity (6%), refined NG (4%), clean coal (3%), residual oil (2%)
- hard coal; 26.3 MJ/kg: 174.06
  (same comment as for crude oil; 42.3 MJ/kg)
- electricity, high voltage, aluminium industry: 174.12
  (same comment as for crude oil; 42.3 MJ/kg)
- natural gas, high pressure: 116.12
  (same comment as for crude oil; 42.3 MJ/kg)
- hard coal: 87.12
  (same comment as for crude oil; 42.3 MJ/kg)
- residual oil: 58.1
  (same comment as for crude oil; 42.3 MJ/kg)

## Data selection and combination
能源输入和物流的清单来自更新的年鉴、发表的论文、官方报告和数据库。清单的详细信息如表1所示。需要注意的是，材料运输假设的数据基于相关研究，可能与实际情况略有不同。每种最终使用能源类型的生命周期强度基于我们之前研究的结果。

## Use advice
用户应考虑与材料运输相关的系统边界等方法论方面，并根据地区运输实际显著不同进行调整。根据研究的地理背景和时间框架，更新最终用途能源的生命周期强度数据。清单中引用的表格1的值和假设应根据项目特定需求进行验证。

## Review details
清单： 内部审查通过几个迭代步骤完成，涉及原始数据验证、原始数据记录、代表性、完整性、与 ISO 14040 和 14044 有关的建模的一致性。

## Data sources
- Peng, T., Ou, X., Yan, X. & Wang, G. Life-cycle analysis of energy consumption and GHG emissions of aluminium production in China. in Energy Procedia vol. 158 3937–3943 (2019).
