# 煅烧焦焙烧-铝电解碳阳极生产 ; 绿色压制焦 ; 煅烧焦

Dataset: ILCD process, Unit process, single operation
Geography: CN
Reference year: 2019
Classification: Unit processes / Materials production / Inorganic chemicals
Generated by: 傅晨玲, fu-chenling@tsinghua.edu.cn
Owner: 天工LCI数据工作小组
Review: Dependent internal review by 天工LCI数据工作小组
Amounts: no units in this file; such an amount is in the reference unit of its flow, which a separate flow dataset defines
copyright: false
licenseType: Free of charge for all users and uses

## General comment
此工业过程涉及铝电解过程中使用的碳阳极的生产。具体包括对煅烧焦的焙烧作业，从而得到称为绿色压制焦的碳块，在经过进一步热处理变为“煅烧焦”之前。这些碳阳极对于通过霍尔-埃鲁法生产原铝至关重要，它们用于传导电流并促进氧化铝化学还原成金属铝。

## Time period
文献发表日期

## Reference product
- green-pressing: 1000; software or database

## Inputs
All rows: software or database
- electricity, high voltage, aluminium industry: 264.96
- Asphalt: 150
  asphalt
- Water, unspecified natural origin: 5080
- dust collector, electrostatic precipitator, for industrial use: 230
- calcined coke: 750

## Outputs
All rows: software or database
- carbon dioxide (fossil),carbon dioxide (fossil): 91.2
- municipal solid waste: 16.7
- chemical oxygen demand: 0.27
- particles, unspecified: 1.98
- sulfur dioxide: 0.00052
- carbon monoxide (fossil),carbon monoxide (fossil): 0.00166
- Nitrogen oxides: 0.00028
- methane (fossil): 0.0005

## Use advice
在使用此数据集进行生命周期评估时，用户应确保他们计算了与生产绿色压制焦及其后续煅烧过程相关的任何排放和能源消耗。考虑与煅烧焦纯度相关的特定技术适用性至关重要，因为杂质可能会显著影响铝生产过程的效率和环境影响。此外，还应评估数据的地理相关性和时间框架，以确保建模的准确性。在进行比较研究时，用户必须在所采用的系统边界和分配方法上保持一致。

## Review details
清单： 内部审查通过几个迭代步骤完成，涉及原始数据验证、原始数据记录、代表性、完整性、与 ISO 14040 和 14044 有关的建模的一致性。

## Data sources
- YANG, Y., GUO, Y.-Q., ZHU, W.-S. & HUANG, J.-B. Environmental impact assessment of China’s primary aluminum based on life cycle assessment. Trans Nonferrous Met Soc China 29, 1784–1792 (2019).
