# MSG|Corn(orotherrawmaterials)|Fermentationmethod|greater than or equal to0.1 million t/a / 味精|玉米（或其它原料）|发酵法|大于等于10万吨/年

Dataset: ILCD process, Unit process, single operation
Geography: CN
Reference year: 2019
Classification: Materials production / Food and renewable raw materials
Generated by: The data was created by the Office of the Second National Pollution Source Census of the Ministry of Ecology and Environment, and the data was organized by the TianGong Plan team for ILCD format / 生态环境部第二次全国污染源普查工作办公室创建数据，天工计划团队常慧敏整理数据为ILCD格式
Owner: Tiangong LCI Data Working Group / 天工LCI数据工作小组
Amounts: no units in this file; such an amount is in the reference unit of its flow, which a separate flow dataset defines
copyright: false
licenseType: Free of charge for all users and uses

## Technology and included processes
the Technical of end-of-pipe management technology for pollution phosphorus, totalisPhysicochemical method + anaerobic/aerobic combined method + chemical method，Its Technical efficiency of end-of-pipe management78

## Reference product
- Monosodium glutamate: 1000; calculated
  源文件中描述为为味精，此处对其进行了匹配工作，将其匹配到LCAflow库里面相最符合的流，污染物指标备注为工业废水量

## Outputs
All rows: calculated
- Waste water: 50000
  污染物指标工业废水量的末端治理技术是/，其效率为0。原文件中描述污染物类别为废水，污染物指标为工业废水量，此处对其进行了匹配工作，将其匹配到LCAflow库里面相最符合的流，污染物指标备注为工业废水量
- chemical oxygen demand: 9
  污染物指标化学需氧量的末端治理技术是物化法+厌氧/好氧组合法+化学法，其效率为97，末端治理设施实际运行率（k值）计算公式为k=污水末端治理设施运行时间（小时）/正常生产时间（小时）。原文件中描述污染物类别为废水，污染物指标为化学需氧量，此处对其进行了匹配工作，将其匹配到LCAflow库里面相最符合的流，污染物指标备注为化学需氧量
- Ammonia Nitrogen: 2.16
  污染物指标氨氮的末端治理技术是物化法+厌氧/好氧组合法+化学法，其效率为88，末端治理设施实际运行率（k值）计算公式为k=污水末端治理设施运行时间（小时）/正常生产时间（小时）。原文件中描述污染物类别为废水，污染物指标为氨氮，此处对其进行了匹配工作，将其匹配到LCAflow库里面相最符合的流，污染物指标备注为氨氮
- Nitrogen, organic bound: 3.6
  污染物指标总氮的末端治理技术是物化法+厌氧/好氧组合法+化学法，其效率为91，末端治理设施实际运行率（k值）计算公式为k=污水末端治理设施运行时间（小时）/正常生产时间（小时）。原文件中描述污染物类别为废水，污染物指标为总氮，此处对其进行了匹配工作，将其匹配到LCAflow库里面相最符合的流，污染物指标备注为总氮
- phosphorus, total: 0.396
  污染物指标总磷的末端治理技术是物化法+厌氧/好氧组合法+化学法，其效率为78，末端治理设施实际运行率（k值）计算公式为k=污水末端治理设施运行时间（小时）/正常生产时间（小时）。原文件中描述污染物类别为废水，污染物指标为总磷，此处对其进行了匹配工作，将其匹配到LCAflow库里面相最符合的流，污染物指标备注为总磷

## Data sources
- 第二次全国污染源普查产排污核算系数手册（试用版）,二级代码14,四级代码1461文件，在完整版文件中第3413页
