# Electricity production ; Electricity ; Thermal power (85.9%) + hydropower (6.0%) + wind power (3.8%) + solar power (4.3%)

Dataset: ILCD process, Partly terminated system
Geography: SAX-CN
Reference year: 2019
Classification: Energy carriers and technologies / Electricity
LCI method principle: Other
Generated by: Ruoxi Xiong, xiongrx0126@163.com
Owner: Tiangong LCI Data Working Group
Review: Dependent internal review by Tiangong LCI Data Working Group
Amounts: no units in this file; such an amount is in the reference unit of its flow, which a separate flow dataset defines
copyright: false
licenseType: Free of charge for all users and uses

## General comment
Forms of electricity generation include thermal power, hydropower, wind power and solar power

## Time period
Calculated based on data from the 2019 Energy Statistics Yearbook

## Technical purpose
This electricity production data set details a mix of energy sources that include thermal power, hydropower, wind power, and solar power, with a dominance of thermal power generation. It is intended for use in assessing the environmental impact of power generation, specifically in the context of life cycle assessments. The data are relevant for industrial, commercial, and residential applications where electricity sourced from a mix of traditional and renewable energy sources is used.

## Reference product
- Electricity: 3.6; calculated

## Outputs
- carbon dioxide: 0.603; calculated
- sulfur dioxide: 0.000116; calculated
- Nitrogen oxides: 0.000184919; calculated
- Dust (unspecified, from stack): 2.2902e-5; calculated

## Data treatment and extrapolations
For the accounting method, please refer to the "Enterprise Greenhouse Gas Emissions Accounting Methods and Reporting Guidelines for Power Generation Facilities". Different forms of power generation and fuel consumption come from Chapter 3 (Energy Production) and Chapter 6 (Regional Energy Balance Sheet) in the "China Energy Statistical Yearbook 2020". The fuel parameters such as low calorific value and carbon content per unit calorific value used to calculate the carbon dioxide emission factor come from the "2019 China Regional Power Grid Carbon Dioxide Baseline Emission Factor Calculation Instructions OM" and the "Enterprise Greenhouse Gas Emission Accounting Method and Reporting Guide for Power Generation Facilities" 》

## Use advice
When utilizing this data set for life cycle assessment of electricity generation, consider the specific mix of electricity sources provided, including their respective share: thermal power (85.9%), hydropower (6.0%), wind power (3.8%), and solar power (4.3%). The carbon emission factors should be applied accordingly to reflect the environmental impact attributable to each energy source. Note that the emission factors are derived using the specified methodologies and reference points from the 2019 Energy Statistics Yearbook and relevant enterprise greenhouse gas emissions accounting guidelines for power facilities. Methodological consistency with these sources is advised for accurate representation in assessments.

## Review details
Inventory: The internal review was done by several iteration steps concerning raw data validation, raw data documentation, representativity, completeness and consistency of modelling with regard to ISO 14040 and 14044.

## Data sources
- 熊若熙. 中国电力生产和消费二氧化碳与污染物排放因子核算. (清华大学, 2023).
