# cement production|cement, portland-composite cement|new dry process rotary kiln, 4000t/d|mixed solid wastes

Dataset: ILCD process, Unit process, black box
Geography: DL-LN-CN
Reference year: 2009
Classification: Materials production / Other mineralic materials
Generated by: Siqi Yang
Amounts: no units in this file; such an amount is in the reference unit of its flow, which a separate flow dataset defines
copyright: false

## General comment
The new dry rotary kiln produces cement by mixing solid waste materials referred to as fly ash and blast furnace slag.

## Geography
Dalian Jingang Tianma Cement Plant

## Time period
The data were collected in 2009 and 2010.

## Model description
The functional unit for the life cycle assessment of cement is 1 ton of cement product.
The entire cement life cycle is divided into raw material preparation units, coal powder preparation units, clinker calcination units, and cement grinding units. The raw material preparation stage (raw material preparation) includes the crushing, grinding, drying, and pre-homogenization processes of raw materials. The coal powder preparation stage includes the transportation, storage, and grinding of raw coal. The clinker calcination stage is a heating process in which coal powder and raw materials are added in the preheating and decomposition and rotary kiln stages, and CO2, SO2, NOx, and other exhaust gases are emitted during this process. The cement grinding stage includes the crushing of gypsum and limestone and the grinding of cement.

## Reference product
- cement, portland-composite cement: 1000
  Cement products

## Inputs
All rows: measured
- calcium carbonate: 841.4
  Limestone
- shale: 54
  Shale
- sandstone: 27.66
  Sandstone
- iron, powder: 16.95
  Iron powder
- gypsum (desulphurized): 51.5
  Gupsum
- ash: 154.3
  Fly ash
- blast furnace slag: 257
  Blast furnace slag
- hard coal, run-of-mine: 92
  Coal
- electricity, medium voltage: 318.06
  Electricity. Energy consumption in cement production is mainly from coal and electricity, and the electricity production and coal production in the public system are obtained from the domestically developed CLCD database.

## Outputs
- carbon dioxide: 632.65; measured
  CO2. CO2 emissions come from two parts: coal combustion in clinker production and limestone calcination. Since CO2 emissions are generally not measured, the emissions are calculated based on the CO2 emission formula.
- sulfur dioxide: 0.207; measured
  SO2. The emission of SO2 in the exhaust gas is provided by the companies.
- Nitrogen oxides: 0.66; measured
  NOx. The emission of NOx in the exhaust gas is provided by the companies.
- carbon monoxide: 0.0222; measured
  CO
- particles (> PM10): 0.466; measured
  Dust (emission): exhaust gas, with an unspecified particle size, is treated as PM > 10 micrometers in diameter.
- Chlorides, unspecified: 2.38; software or database
  Chloride: wastewater. In addition, the data on pollutant and wastewater emissions during transportation comes from the lifecycle assessment software GaBi 4.0.
- sulfate: 0.31; software or database
  Sulfates: wastewater. In addition, the data on pollutant and wastewater emissions during transportation comes from the lifecycle assessment software GaBi 4.0.
- blast furnace dust, for recovery: 596.6; measured
  Dust (recovered): solid waste. Solid waste includes dust collected by dust collectors and household garbage. The collected dust is returned to the process, and all household garbage is incinerated in the rotary kiln. In this study, only dust from solid waste is considered, and its data is provided by the company.

## Data selection and combination
Each unit mainly inputs data on raw materials and energy based on the actual production process of the enterprise and the full-year production data from 2009-2010, and calculates the raw materials and energy required to produce 1 ton of cement based on the cement production volume. The data related to cement production is obtained through on-site investigation and calculation.

## Sampling procedure
A cement enterprise in Dalian has a new dry kiln cement clinker production line with a daily output of 4000t and an independently operated open-pit limestone mine. And there are limestone, shale and other mineral resources distributed around the plant. There are one cement mill with a diameter of 3.8m and a length of 13m, and two slag mills with a diameter of 3.2m and a length of 13m. The cement production process is mainly divided into four stages: raw meal preparation stage, clinker preparation stage, coal powder preparation stage, cement grinding stage, etc. The main raw materials in the raw meal stage are limestone, shale, silica stone, iron powder; The main fuel in the clinker stage is coal; The main raw materials in the cement grinding stage are gypsum, limestone, fly ash, slag; The main energy sources come from coal and electricity. The enterprise has an annual output of 1.35 million tons of clinker and an annual production of 700,000 tons of composite Portland cement; The rotary kiln produces 330d per year, and the cement mill produces 270d per year. The products are ordinary Portland cement 42.4 grade and composite Portland cement 32.5 grade.

## Data sources
- 朴文华, 陈郁, 张树深, & 徐小宁. (2012). 基于LCA方法的水泥企业清洁生产审核. 环境科学学报, 32, 1785–1792.
