# 土壤修复;异位修复;水泥窑协同处置;准备阶段;煤粉制备

Dataset: ILCD process, Unit process, single operation
Geography: CN
Classification: Other Services / Repair and maintenance
Generated by: Cao Jiameng, 2979480760@qq.com
Owner: Tiangong LCI Data Working Group
Review: Dependent internal review by Tiangong LCI Data Working Group
Amounts: no units in this file; such an amount is in the reference unit of its flow, which a separate flow dataset defines
licenseType: Free of charge for all users and uses

## General comment
Soil remediation via ex situ treatment with cement kiln co-processing involves preparation stages at a cement plant with a modern 4000t/d dry process production line capable of producing 1.9 million tonnes of cement and 1.5 million tonnes of clinker annually. The company's proprietary mining area of 0.448 km² has an annual limestone production capacity of 2 million tonnes. The advanced RSP pre-decomposition technology is employed in production. Hazardous waste is transported using specialized vehicles designated for dangerous goods, following a truck-specific route. The transport distance from the mine to the plant is approximately 1.5 km, while waste transportation distance is about 50 km. The conventional cement production process includes stages such as raw material extraction and transport, raw meal preparation, coal powder preparation, clinker calcination, and cement grinding. With the addition of waste disposal, polluted soil, digested sewage sludge, and waste oil sludge can be utilized as alternative raw materials and fuels, conserving limestone and coal resources. In the co-processing at cement kilns, the preparation stage, including coal powder preparation, covers the storage and grinding of coal and industrial waste (waste kaolin, paint slag, and waste oil sludge). This process represents a unit operation within a larger industrial sequence.

## Reference product
- carbon dioxide: 13.26

## Inputs
All rows: article inperiodical
- waste clay: 1.05
- Coating residue: 0.16
- oil sludge: 5.26
- Hard coal, at consumer EU-27: 98.28
- Electricity: 19.8

## Outputs
- Hard coal, at consumer EU-27: 98.8

## Use advice
Users of this LCA data should ensure that they account for all relevant operational inputs and outputs, including the use of hazardous waste as an alternative raw material and fuel during the soil remediation and co-processing stage in a cement kiln. The distances for transport of limestone from the mine to the plant and the transport of waste should be included in the transport-related emissions calculations. It's essential to consider the specific technology employed (RSP pre-decomposition) when comparing this process with other cement production processes. The use of this dataset for environmental impact assessment should reflect the technological applicability of the advanced process and the methodological implications of substituting conventional raw materials and fuels with waste products.

## Review details
Inventory: The internal review was done by several iteration steps concerning raw data validation, raw data documentation, representativity, completeness and consistency of modelling with regard to ISO 14040 and 14044.
