# 土壤修复;原位修复;生物通风;废气得到处理

Dataset: ILCD process, Unit process, single operation
Geography: CN
Reference year: 2022
Classification: Other Services / Repair and maintenance
Generated by: 王宁, wang_ning@caep.org.cn
Owner: 天工LCI数据工作小组
Review: Dependent internal review by 天工LCI数据工作小组
Amounts: no units in this file; such an amount is in the reference unit of its flow, which a separate flow dataset defines
copyright: false
licenseType: Free of charge for all users and uses

## General comment
对抽提上来的废气进行处理

## Geography
案例焦化厂位于我国北方中纬度地带

## Technology and included processes
使用电力、柴油、天然气等使抽提上来的土壤气得到处理

## Technical purpose
此过程用于土壤修复，通过原位治疗涉及生物通风技术。它特别关系到一个单一操作的废气处理单元过程案例，通常用于位于中国北方中纬度地区的焦化厂。

## Reference product
- Exhaust gases treated: 1; measured
  得到处理的废气

## Inputs
All rows: measured
- Electricity: 240000
  消耗电力处理抽提上来的土壤气
- Gasoline (regular): 15600
  消耗天然气处理抽提上来的土壤气
- Diesel: 708
  消柴油处理抽提上来的土壤气
- Water: 414
  消耗水处理抽提上来的土壤气
- Light fuel oil: 698
  消耗汽油处理抽提上来的土壤气
- Exhaust gas: 1
  抽出的土壤气废气

## Use advice
使用此数据集时，请确保考虑到土壤修复和废气处理的区域特定环境标准和法规。方法论假设需要反映在中国北方中纬度地区部署的生物通风系统的技术细节。此外，如果将此过程整合到更广泛的生命周期评估中，请确保考虑相关的上游和下游流程，如通风系统的能源输入和残留物的最终处置。

## Review details
清单： 内部审查通过几个迭代步骤完成，涉及原始数据验证、原始数据记录、代表性、完整性、与 ISO 14040 和 14044 有关的建模的一致性。

## Data sources
- 刘文晓,夏天翔,张丽娜等.基于修复效果的污染土壤修复工程环境足迹分析[J].环境科学研究,2022,35(10):2367-2377.DOI:10.13198/j.issn.1001-6929.2022.07.05.
