# 铝土矿开采 ; 铝土矿 ; 摇篮 ; 2012年

Dataset: ILCD process, Unit process, single operation
Geography: CN
Reference year: 2021
Classification: Unit processes / Materials production / Non-energetic raw materials
Generated by: 蔡梓萌, caizm6178@163.com
Owner: 天工LCI数据工作小组
Review: Dependent internal review by 天工LCI数据工作小组
Amounts: no units in this file; such an amount is in the reference unit of its flow, which a separate flow dataset defines
copyright: false
licenseType: Free of charge for all users and uses

## General comment
氧化铝生产2017

## Time period
文献发表日期

## Technical purpose
该数据集代表2017年铝土矿采矿和氧化铝生产的生命周期评估。适用于从事铝土矿提取和加工成氧化铝的企业，氧化铝主要用作通过电解还原过程生产铝金属的原料。

## Reference product
- bauxite: 4.36688e10; software or database

## Inputs
All rows: software or database
- electricity, high voltage, aluminium industry: 7.62768e7
  electricity
- other fuels: 2.37887e9
  electricity
- Coal, brown, in ground: 3.1901e7
  coal
- Gasoline: 1.572e6
  gasoline
- Diesel oil: 1.1694e7
  diesel

## Data selection and combination
本研究的数据参考了PA、SA、电力等背景数据的LCA数据。PA数据来自统计数据源，SA数据主要来自文献。背景数据主要来自中国科学院生态环境研究中心CASRCEES 2018建立的中国本地化LCA数据库，涵盖能源、材料、交通、废物管理等LCA数据。

## Use advice
用户应注意，这些铝土矿开采和氧化铝生产的数据基于2012年的统计和文献资料，以及最新的来自2018年CAS RCEES LCA数据库的背景数据。在应用这些数据时，用户应确保其与他们的区域和时间背景相兼容。用户还应考虑自2012年以来技术、实践和环境法规的任何更新或变化，这些都可能影响LCA结果。

## Review details
清单： 内部审查通过几个迭代步骤完成，涉及原始数据验证、原始数据记录、代表性、完整性、与 ISO 14040 和 14044 有关的建模的一致性。

## Data sources
- Ding, N., Liu, N., Lu, B. & Yang, J. Life cycle greenhouse gas emissions of aluminum based on regional industrial transfer in China. J. Ind. Ecol. 25, 1657–1672 (2021).
