# 修复后地下水;MNA系统;地下水风险管控;运行5年

Dataset: ILCD process, Unit process, single operation
Geography: JS-CN
Reference year: 2024
Classification: Unit processes / Other Services / Repair and maintenance
Generated by: 杨欣桐, yangxt@caep.org.cn
Owner: 天工LCI数据工作小组
Review: Dependent internal review by 天工LCI数据工作小组
Amounts: no units in this file; such an amount is in the reference unit of its flow, which a separate flow dataset defines
copyright: false
licenseType: Free of charge for all users and uses

## General comment
经过5年的监测自然衰减，针对污染源区面积225 m2，水中VOCs浓度从 236.89 mg/L to 76.2 mg/L

## Time period
文献发表时间

## Technical purpose
所描述的MNA（监测自然衰减）系统旨在修复被污染的地下水，具体是管理覆盖225平方米区域内挥发性有机物（VOCs）相关的地下水风险。该过程符合长期地下水质量维护工作，例如在5年的运行期内自然减少污染物浓度。

## Reference product
- Remediated groundwater: 1184.85; measured

## Inputs
- Monitoring well: 49; measured
- contaminated groundwater: 1184.85; measured
- Groundwater sample and TVOC analysis: 20; measured

## Use advice
使用该LCA数据的用户应注意，信息反映了一个特定污染源区域在5年内自然衰减过程的监测。为确保准确应用, 在将这些数据适用于不同的背景或时间框架时需小心调整。注意要保持与监测期间所做假设的一致性，包括初始和最终的VOC浓度。避免在没有适当背景的情况下直接与其他修复技术进行比较。

## Review details
清单： 内部审查通过几个迭代步骤完成，涉及原始数据验证、原始数据记录、代表性、完整性、与 ISO 14040 和 14044 有关的建模的一致性。

## Data sources
- Ding, D. et al. Assessing the environmental impacts and costs of biochar and monitored natural attenuation for groundwater heavily contaminated with volatile organic compounds. Science of The Total Environment 846, 157316 (2022).
