# 铝土矿开采 ; 铝土矿 ; 摇篮 ; 2017年

Dataset: ILCD process, Unit process, single operation
Geography: CN
Reference year: 2021
Classification: Unit processes / Materials production / Non-energetic raw materials
Generated by: 蔡梓萌, caizm6178@163.com
Owner: 天工LCI数据工作小组
Review: Dependent internal review by 天工LCI数据工作小组
Amounts: no units in this file; such an amount is in the reference unit of its flow, which a separate flow dataset defines
copyright: false
licenseType: Free of charge for all users and uses

## General comment
氧化铝生产2017

## Time period
文献发表日期

## Technical purpose
该数据集涉及铝土矿开采，铝土矿是生产氧化铝（Al2O3）的主要原料，随后通过电解制造铝。通过这一工业过程提取的铝土矿可用于包括但不限于铝生产行业、耐火材料和磨料在内的多个行业。数据集代表了在生命周期评估术语中通常称为“摇篮”阶段的提取铝土矿的相关信息。

## Reference product
- bauxite: 7.59288e10; software or database

## Inputs
- electricity, high voltage, aluminium industry: 1.3451e8; software or database
  electricity
- Coal, brown, in ground: 2.564e7; software or database
  coal
- Diesel oil: 2.4379e7; software or database
  diesel
- petrol, unleaded, burned in machinery: 1.409e6; software or database
  gasoline

## Data selection and combination
本研究的数据参考了PA、SA、电力等背景数据的LCA数据。PA数据来自统计数据源，SA数据主要来自文献。背景数据主要来自中国科学院生态环境研究中心CASRCEES 2018建立的中国本地化LCA数据库，涵盖能源、材料、交通、废物管理等LCA数据。

## Use advice
使用此数据集的用户应注意应用范围，该范围仅限于2017年以前的铝土矿的开采和加工阶段（“摇篮”）。使用此数据时，请考虑该方法论包括PA和SA（过程分析和敏感性分析）的统计数据，以及针对中国条件本地化的广泛背景生命周期评估数据库CAS RCEES 2018。对于将此数据集用于确保技术和环境影响的上下文保持适用和有效的预期LCA范围的用户来说，这些信息至关重要。用户还应注意出版日期和数据来源，以评估数据集是否需要更新或是否应寻求更多最新数据。此外，该过程仅有能源数据，仅作为能源消耗的参考数据，如需使用请根据实际情况补全其它信息。

## Review details
清单： 内部审查通过几个迭代步骤完成，涉及原始数据验证、原始数据记录、代表性、完整性、与 ISO 14040 和 14044 有关的建模的一致性。

## Data sources
- Ding, N., Liu, N., Lu, B. & Yang, J. Life cycle greenhouse gas emissions of aluminum based on regional industrial transfer in China. J. Ind. Ecol. 25, 1657–1672 (2021).
