# Glass production ; PMMA production ; rough monomer tank

Dataset: ILCD process, Unit process, single operation
Geography: JX-CN
Classification: Materials production / Plastics
Generated by: He xiaxia, 18616148319@163.com
Owner: Tiangong LCI Data Working Group
Review: Dependent internal review by Tiangong LCI Data Working Group
Amounts: no units in this file; such an amount is in the reference unit of its flow, which a separate flow dataset defines
copyright: false
licenseType: Free of charge for all users and uses

## Reference product
- methyl methacrylate: 997.998; measured
  MMA rough finished product

## Inputs
All rows: measured
- electricity mix: 138.24
- methyl methacrylate: 896.478
- polymethyl methacrylate (PMMA) beads: 26.062
- Water (fresh water): 15.081
- organic waste (unspecified): 27.4685
- methanol: 8.88
- methacrylic acid: 11.9325
- methacrylate: 11.9325

## Outputs
- Waste (solid): 3.12; measured

## Review details
Inventory: The internal review was done by several iteration steps concerning raw data validation, raw data documentation, representativity, completeness and consistency of modelling with regard to ISO 14040 and 14044.

## Data sources
- 江西旺达新材料有限公司年产20000吨有机玻璃原料生产项目
