# Intermediate culture of abalone | Large larva of abalone | Cage culture

Dataset: ILCD process, Unit process, black box
Geography: ND-FJ-CN
Classification: Materials production / Other mineralic materials
Functional unit: 1 live-weight ton of abalone
Generated by: Kangni Wu, wukangni@xmu.stu.edu.cn
Review: Dependent internal review by Tiangong LCI Data Working Group
Amounts: no units in this file; such an amount is in the reference unit of its flow, which a separate flow dataset defines

## General comment
The system includes energy production (red), feed production (green), the main chain of aquaculture production (blue), and the production of other inputs (purple).

## Geography
The prefecture-level city of Ningde comprises a group of districts and counties, of which Fuding city (A), Xiapu County (B), Fu’an city (C), and Jiaocheng district (D) are next to the sea and were included in our assessment. A total of 321 households were randomly sampled in the area in August 2017 and January 2018, and we analyzed the data from 292 households that had mariculture production during 2016.

## Reference product
- Big juveniles of Large Yellow Croake: 1273.7; article inperiodical

## Inputs
All rows: article inperiodical
- small juveniles of Large Yellow Croake: 48.4
- Fuel: 70.8
- laminaria: 1847, 10842.9 (2 entries)
- transport in t*km: 633.3
  Juvenile transport between farms (intermediate)
- transport in t*km: 378.7
  Juvenile transport to Fujian province
- transport in t*km: 249.1
  Juvenile transport to local farm

## Review details
Inventory: The internal review was done by several iteration steps concerning raw data validation, raw data documentation, representativity, completeness and consistency of modelling with regard to ISO 14040 and 14044.; Documentation: The review of the documentation was performed by Ecobilan and is in compliance with ISO 14040 and 14044. The data set documentation is correct in view of the appropriateness of the information provided. It includes all relevant information in view of data quality and scope of application of the respective LCI result.

## Data sources
- Marín, T. et al. Resource Use in Mariculture: A Case Study in Southeastern China. Sustainability 11, (2019).
