# 金属提纯;金属混合物;化学蚀刻

Dataset: ILCD process, Unit process, single operation
Geography: CN
Classification: Unit processes / Materials production / Metals and semimetals
Generated by: 王楠, 1209824595@qq.com
Owner: 天工LCI数据工作小组
Review: Dependent internal review by 天工LCI数据工作小组
Amounts: no units in this file; such an amount is in the reference unit of its flow, which a separate flow dataset defines
copyright: false
licenseType: Free of charge for all users and uses

## General comment
采用强溶剂和污染物排放的湿法冶金回收方法进行金属萃取。

## Technical purpose
这种金属提纯过程通常用于通过湿法冶金回收从复杂金属混合物中提取金属。该过程涉及使用强溶剂并导致污染物排放。它适用于，但不限于，金属精加工行业中的湿法蚀刻技术，这些技术需要精确的金属成分。

## Reference product
- Multi-Si solar cell,Multi-Si solar cell,Multi-Si solar cell: 38.91; input; software or database

## Inputs
- water: 309.7; software or database
- Electricity: 204.48; software or database
- Nitric acid: 7.08; software or database

## Outputs
All rows: software or database
- aluminium: 2.6
- Silicon: 34.7
- silver: 0.53
- copper: 1.08
- Sludge: 50.2
- Medium and low radioactive liquid waste: 306.1
- nitrogen dioxide: 30.23
- sulfur dioxide: 24.04
- carbon dioxide: 30.82
- Nitric oxide: 0.14
  一氧化氮
- ammonium: 11.5476

## Use advice
使用此数据集的用户应考虑金属提取过程中与排放污染物相关的环境影响。在将这些数据纳入生命周期评估研究时，应关注与使用强溶剂相关的潜在排放和废物管理实践。此外，用户应评估该过程对待处理金属混合物类型的技术适用性，并评估该回收方法在金属最终用途背景下的效率。

## Review details
清单： 内部审查通过几个迭代步骤完成，涉及原始数据验证、原始数据记录、代表性、完整性、与 ISO 14040 和 14044 有关的建模的一致性。

## Data sources
- Li, J. et al. Life cycle analysis of the economic costs and environmental benefits of photovoltaic module waste recycling in China. (2023).
