# Naturalgas|Self spraying|All sizes / 天然气|超低含硫天然气（含岩气）|自喷|所有规模

Dataset: ILCD process, Partly terminated system
Geography: CN
Reference year: 2019
Classification: Materials production / Other mineralic materials
Generated by: The data was created by the Office of the Second National Pollution Source Census of the Ministry of Ecology and Environment, and the data was organized by the TianGong Plan team for ILCD format / 生态环境部第二次全国污染源普查工作办公室创建数据，天工计划团队常慧敏整理数据为ILCD格式
Amounts: no units in this file; such an amount is in the reference unit of its flow, which a separate flow dataset defines
copyright: false

## Technology and included processes
the Technical of end-of-pipe management technology for pollution Natural gasisPhysical + chemical + reinjection，Its Technical efficiency of end-of-pipe management100
污染物指标化学需氧量的末端治理技术是物理+化学+回注，其效率为100，末端治理设施实际运行率（k值）计算公式为k=污水治理设施年运行时间（小时/年）/正常生产时间（小时/年）

## Reference product
- Natural gas: 10000; calculated
  原文件中描述污染物类别为Product，污染物指标为天然气，此处对其进行了匹配工作，将其匹配到LCAflow库里面相最符合的流

## Outputs
- chemical oxygen demand: 0, 0, 0.1116, 0.93, 0.93 (5 entries); calculated
  原文件中描述污染物类别为废水，污染物指标为化学需氧量，此处对其进行了匹配工作，将其匹配到LCAflow库里面相最符合的流
- Petroleum-related waste: 0, 0, 0.00952, 0.01785, 0.01547 (5 entries); calculated
  原文件中描述污染物类别为废水，污染物指标为石油类，此处对其进行了匹配工作，将其匹配到LCAflow库里面相最符合的流
- Waste water: 500; calculated
  原文件中描述污染物类别为废水，污染物指标为工业废水量，此处对其进行了匹配工作，将其匹配到LCAflow库里面相最符合的流

## Data sources
- 第二次全国污染源普查产排污核算系数手册（试用版）,二级代码07文件，在完整版文件中第79页
