# 铝电解与铸锭 ; 原生铝锭 ; 电解 160kA自焙槽工艺 ; 冶金用氧化铝

Dataset: ILCD process, Unit process, black box
Geography: CN
Reference year: 2005
Classification: Unit processes / Materials production / Metals and semimetals
Generated by: 蔡梓萌, caizm6178@163.com
Owner: 天工LCI数据工作小组
Review: Dependent internal review by 天工LCI数据工作小组
Amounts: no units in this file; such an amount is in the reference unit of its flow, which a separate flow dataset defines
copyright: false
licenseType: Free of charge for all users and uses

## General comment
无流程图

## Time period
文献发表日期

## Technical purpose
此数据集代表使用160kA自焙槽电解工艺生产原生铝锭。这种高纯度铝主要用于航天、运输、建筑和电子等行业，适用于需要高强度重量比、导电性和耐蚀性的材料应用。

## Reference product
- aluminium, primary, ingot: 1000; missing unimportant

## Inputs
All rows: missing unimportant
- hard coal: 7961
  煤
- anode, for metal electrolysis: 475
  碳阳极
- aluminium oxide, metallurgical: 2000
  氧化铝
- Fluoride: 50
  氟化物
- Oils, unspecified: 720
  油

## Outputs
- Sulfur dioxide: 65.443; missing unimportant
  SO2
- Fluorine: 1; missing unimportant
  氟化物（以氟计）
- carbon dioxide (fossil),carbon dioxide (fossil): 17290; missing unimportant
  CO2

## Data selection and combination
数据主要来源于相关文献，也有一些数据得自 于铝行业的内部报告。数据斟酌、参考了大量的文献，因此比较接近实际，具有一定代表性。

## Use advice
使用数据应了解数据主要基于文献综述和铝行业一些内部报告，使其具有代表性且接近真实条件。方法上的考虑应包括确保为LCA研究正确定义系统边界，特别是关于铝生产相关的回收及任何上游和下游过程。

## Review details
清单： 内部审查通过几个迭代步骤完成，涉及原始数据验证、原始数据记录、代表性、完整性、与 ISO 14040 和 14044 有关的建模的一致性。

## Data sources
- 王小伍 & 华贲. 中国电解铝工业的多因素综合生命周期评价. 轻金属 3–6 (2005).
