# Minewatertreatmentplant|Bituminouscoalandanthracitecoal|Bituminouscoalandanthracitecoal|Underground synthetic mechanization mining|greater than or equal to10 million t/a|High rich water mining area / 矿井水处理站|烟煤和无烟煤|烟煤和无烟煤|井工综采|大于等于1000万吨/年|贫水地区

Dataset: ILCD process, Unit process, single operation
Geography: CN
Reference year: 2019
Classification: Energy carriers and technologies / Hard coal based fuels
Generated by: The data was created by the Office of the Second National Pollution Source Census of the Ministry of Ecology and Environment, and the data was organized by the TianGong Plan team for ILCD format / 生态环境部第二次全国污染源普查工作办公室创建数据，天工计划团队常慧敏整理数据为ILCD格式
Owner: Tiangong LCI Data Working Group / 天工LCI数据工作小组
Amounts: no units in this file; such an amount is in the reference unit of its flow, which a separate flow dataset defines
copyright: false
licenseType: Free of charge for all users and uses

## Technology and included processes
the Technical of end-of-pipe management technology for pollution arsenicisPhysicochemical treatment，Its Technical efficiency of end-of-pipe management85，The formula for calculating the actual operation rate (k-value) of the end-of-pipe treatment facility is k = normal operating time of treatment facilities (days/year) / normal production time of enterprises (days/year)

## Reference product
- Standard coal: 1000; input; calculated
  源文件中描述为为烟煤和无烟煤，此处对其进行了匹配工作，将其匹配到LCAflow库里面相最符合的流

## Outputs
All rows: calculated
- Waste water: 870
  污染物指标工业废水量的末端治理技术未说明，末端治理设施实际运行率（k值）计算公式为k=处理设施正常运行时间（天/年）/企业正常生产时间（天/年）。原文件中描述污染物类别为废水，污染物指标为工业废水量，此处对其进行了匹配工作，将其匹配到LCAflow库里面相最符合的流
- chemical oxygen demand: 0.003995
  污染物指标化学需氧量的末端治理技术是物理化学处理法，其效率为95，末端治理设施实际运行率（k值）计算公式为k=处理设施正常运行时间（天/年）/企业正常生产时间（天/年）。原文件中描述污染物类别为废水，污染物指标为化学需氧量，此处对其进行了匹配工作，将其匹配到LCAflow库里面相最符合的流
- Petroleum-related waste: 0.0001205
  污染物指标石油类的末端治理技术是物理化学处理法，其效率为95，末端治理设施实际运行率（k值）计算公式为k=处理设施正常运行时间（天/年）/企业正常生产时间（天/年）。原文件中描述污染物类别为废水，污染物指标为石油类，此处对其进行了匹配工作，将其匹配到LCAflow库里面相最符合的流
- Mercury: 2.25e-8
  污染物指标汞的末端治理技术是物理化学处理法，其效率为85，末端治理设施实际运行率（k值）计算公式为k=处理设施正常运行时间（天/年）/企业正常生产时间（天/年）。原文件中描述污染物类别为废水，污染物指标为汞，此处对其进行了匹配工作，将其匹配到LCAflow库里面相最符合的流
- arsenic: 6.525e-6
  污染物指标砷的末端治理技术是物理化学处理法，其效率为85，末端治理设施实际运行率（k值）计算公式为k=处理设施正常运行时间（天/年）/企业正常生产时间（天/年）。原文件中描述污染物类别为废水，污染物指标为砷，此处对其进行了匹配工作，将其匹配到LCAflow库里面相最符合的流

## Data sources
- 第二次全国污染源普查产排污核算系数手册（试用版）,二级代码06,三级代码61.0,四级代码610文件，在完整版文件中第13页
