# LFP正极生产;LFP正极;LFP正极浆料、铝箔

Dataset: ILCD process, Unit process, single operation
Classification: Materials production / Non-energetic raw materials
Functional unit: Production of 1kg lithium iron phosphate battery cathode
Generated by: 陈鑫, xinchen@mail.nankai.edu.cn
Owner: 天工LCI数据工作小组
Review: Dependent internal review by 天工LCI数据工作小组
Amounts: no units in this file; such an amount is in the reference unit of its flow, which a separate flow dataset defines
copyright: false
licenseType: Free of charge for all users and uses

## General comment
将正极浆料均匀涂抹在铝箔上制成正极片

## Inputs
- Aluminum foil: 0.072; article inperiodical
  数据参考Ellingsen, L. A.等人的研究Life Cycle Assessment of a Lithium-Ion Battery Vehicle Pack.

## Data selection and combination
数据部分来源于文献，部分来源于ecoinvent数据库

## Review details
清单： 内部审查通过几个迭代步骤完成，涉及原始数据验证、原始数据记录、代表性、完整性、与 ISO 14040 和 14044 有关的建模的一致性。

## Data sources
- Le Varlet, T., Schmidt, O., Gambhir, A., Few, S. & Staffell, I. Comparative life cycle assessment of lithium-ion battery chemistries for residential storage. J. Energy Storage 28, 101230 (2020).
