# Major engineering

Dataset: ILCD process, Unit process, black box
Geography: CN
Reference year: 2018
Classification: Materials production / Other mineralic materials
Functional unit: 2 MW wind turbine.
LCI method principle: Attributional
LCI method approaches: Allocation
Generated by: Yunzhi Zhao, ll10088@163.com
Review: Dependent internal review by Tiangong LCI Data Working Group
Amounts: no units in this file; such an amount is in the reference unit of its flow, which a separate flow dataset defines
copyright: false

## Geography
In this study, an onshore 40 MW wind farm with 20 2WM wind turbines in North China was selected as the researchobject

## Reference product
- Foundation: 20; measured
  Major engineering of wind farm.

## Inputs
All rows: measured
- Steel: 988200
  Ground surface and Underground
- Glass: 100
  Tempered glass
- polyvinylchloride resin (E-PVC): 3700
  Ground surface and Underground
- polyethylene high density granulate (PE-HD): 17100
- aluminium: 145900
- Resin: 6200
  Ground surface and Underground
- copper: 15000
- zinc: 100

## Deviations from the LCI method approaches
The life cycle assessment (LCA) approach is an effective way to quantify the environmental impacts of wind energy technology

## Data selection and combination
According to data released by the Global Wind Energy Council [5], as of the end of 2018, the cumulative installed capacity of global wind power amounted to 519 gigawatts (GW). In addition, wind power has become an important part of new power supplies in some countries.

## Review details
Inventory: The internal review was done by several iteration steps concerning raw data validation, raw data documentation, representativity, completeness and consistency of modelling with regard to ISO 14040 and 14044.; Documentation: The review of the documentation was performed by Ecobilan and is in compliance with ISO 14040 and 14044. The data set documentation is correct in view of the appropriateness of the information provided. It includes all relevant information in view of data quality and scope of application of the respective LCI result.

## Data sources
- Chen, J. et al. Green development strategy of offshore wind farm in China guided by life cycle assessment. Resources, Conservation and Recycling 188, 106652 (2023).
