# 炼钢;钢;高炉炼钢

Dataset: ILCD process, Unit process, single operation
Geography: CN
Classification: Unit processes / Materials production / Metals and semimetals
Generated by: 纪伟, 1299801467@qq.com
Owner: 天工LCI数据工作小组
Review: Dependent internal review by 天工LCI数据工作小组
Amounts: no units in this file; such an amount is in the reference unit of its flow, which a separate flow dataset defines
copyright: false
licenseType: Free of charge for all users and uses

## General comment
高炉炼钢BF铁制造单元过程特别用于钢铁制造工业。它涉及使用高炉将铁矿石转化为生铁，并且通常是综合钢厂的一部分，在那里生铁进一步加工成各种钢铁产品。

## Reference product
- iron: 1000; measured

## Inputs
All rows: measured
- Sinter ore: 1570.54
- freshwater,freshwater: 364.32
- Electricity: 323.748
- Coal gas: 55.29
- compressed air: 55.7
- anthracite: 114.06
- coke,Coke: 373.11
- oxygen: 113.66
- process steam: 69.58

## Outputs
All rows: measured
- BF Slag: 364.45
- BF Gas Sludge: 133.02
- particles (> PM10): 42.45
- carbon dioxide (fossil): 1214.26
  原文未区分bio和fossil，根据专家判断此处为carbon dioxide (fossil)
- sulfur dioxide: 0.948
- Nitrogen oxides: 0.18

## Use advice
在使用此数据集进行生命周期评估时，应考虑整个钢铁生产过程链，包括与高炉过程相关的输入和输出。用户应核算原材料和能源消耗以及在BF铁制造过程中产生的排放。应注意到工厂效率方面的技术适应性，在计算中还需考虑特定地区能源组合和原料来源的相关性。

## Review details
清单： 内部审查通过几个迭代步骤完成，涉及原始数据验证、原始数据记录、代表性、完整性、与 ISO 14040 和 14044 有关的建模的一致性。

## Data sources
- Yang, L. et al. Life cycle carbon footprint of electric arc furnace steelmaking processes under different smelting modes in China. Sustainable Materials and Technologies 35, e00564 (2023).
