# Crude steel production|Crude steel|Hot rolling

Dataset: ILCD process, Unit process, single operation
Geography: CN
Reference year: 2014
Classification: Materials production / Other mineralic materials
Generated by: Fuxiang, 1162850692@qq.com
Review: Dependent internal review by Tiangong LCI Data Working Group
Amounts: no units in this file; such an amount is in the reference unit of its flow, which a separate flow dataset defines
copyright: false

## Time period
基于 A 钢厂 2014 年的生产数据进行计算和分析对比。

## Reference product
- Crude Steel: 1000
  钢材

## Inputs
- Electricity: 417.6
  z10
- Crude Steel: 1041
  粗钢
- Linz-Donawitz gas: 20
  转炉煤气
- Blast furnace gas: 80
  高炉煤气
- Coke oven gas: 30
  焦炉煤气

## Outputs
- carbon dioxide: 243700; calculated
- methane: 40; calculated
- nitrous oxide: 0.017; calculated

## Review details
Inventory: The internal review was done by several iteration steps concerning raw data validation, raw data documentation, representativity, completeness and consistency of modelling with regard to ISO 14040 and 14044.; Documentation: The review of the documentation was performed by Ecobilan and is in compliance with ISO 14040 and 14044. The data set documentation is correct in view of the appropriateness of the information provided. It includes all relevant information in view of data quality and scope of application of the respective LCI result.

## Data sources
- 1. 刘宏强, 付建勋, 刘思雨, 谢欣悦, & 杨笑楹. 钢铁生产过程二氧化碳排放计算方法与实践. 钢铁 51, 74–82 (2016).
