# 硅土生产 ; 整个风电场

Dataset: ILCD process, Unit process, single operation
Geography: NMG-CN
Reference year: 2017
Classification: Materials production / Metals and semimetals
Functional unit: The functional unit is 1.5 MW wind turbine
LCI method principle: Attributional
LCI method approaches: Allocation
Generated by: 赵云志, ll10088@163.com
Owner: 天工LCI数据工作小组
Review: Dependent internal review by 天工LCI数据工作小组
Amounts: no units in this file; such an amount is in the reference unit of its flow, which a separate flow dataset defines
copyright: false
licenseType: Free of charge for all users and uses

## General comment
该数据集涉及专门用于风力发电行业的硅生产。所生产的硅被用于制造风力涡轮机。本案例研究中的典型风电站配备了33台国产1.5兆瓦（MW）风力涡轮机，作为评估风电发电在风电装机量大的地区（如内蒙古东北部）环境影响及替代效应的模型。

## Geography
风电功率参数的数据来自Wang ( 2012 )。以装有33台国产1.5兆瓦( MW )风电机组的风电场为案例，分析其环境影响及其替代效应。该风电场位于我国风电装机最多的省份- -内蒙古东北部。

## Reference product
- silicon,silicon: 1; article inperiodical

## Inputs
- Energy, gross calorific value, in biomass, primary forest: 1.4847; article inperiodical

## Outputs
All rows: article inperiodical
- carbon dioxide: 20510
- sulfur dioxide: 139
- nitrous oxide: 42
- carbon monoxide: 556
- particles (PM2.5 - PM10): 435

## Deviations from the LCI method approaches
风电的生命周期清单如下所示。生产制造阶段包括风电机组、变电站、电缆的生产，这些设备消耗大量能源，排放污染物( Xue et al . , 2015)。

## Use advice
在应用这个数据集的生命周期评估数据时，用户必须考虑到具有33台国产1.5 MW风力涡轮机的特定风电场配置。该数据具有案例特定性，应用于分析大规模风电装机背景下的环境影响和替代效应。用户应意识到，适用性可能限于与所述风电场具有相似特征的风力发电设施。根据Xue等人(2015年)的指示，应特别注意风力涡轮机（包括变电站和电缆）的生产和制造阶段，因为它们的能源消耗和排放量大。数据集的功能单元是1.5 MW风轮机。

## Review details
清单： 内部审查通过几个迭代步骤完成，涉及原始数据验证、原始数据记录、代表性、完整性、与 ISO 14040 和 14044 有关的建模的一致性。

## Data sources
- Li, H., Jiang, H.-D., Dong, K.-Y., Wei, Y.-M. & Liao, H. A comparative analysis of the life cycle environmental emissions from wind and coal power: Evidence from China. Journal of Cleaner Production 248, 119192 (2020).
