# 玻璃生产 ;有机玻璃单体MMA生产;裂解釜（电能加热过程）

Dataset: ILCD process, Unit process, single operation
Geography: JX-CN
Classification: Unit processes / Materials production / Glass and ceramics
Generated by: 和夏夏, 18616148319@163.com
Owner: 天工LCI数据工作小组
Review: Dependent internal review by 天工LCI数据工作小组
Amounts: no units in this file; such an amount is in the reference unit of its flow, which a separate flow dataset defines
copyright: false
licenseType: Free of charge for all users and uses

## General comment
该数据集代表了通过裂解釜中的电能加热过程生产聚甲基丙烯酸甲酯（PMMA）单体MMA的工艺。这种高纯度化学物质用于制造聚甲基丙烯酸甲酯（PMMA），通常称为有机玻璃。广泛应用于生产透明结构材料，如窗户、防护屏障和轻质镜片等。

## Reference product
- polymethyl methacrylate (PMMA) beads: 1091.94; measured

## Inputs
- Electricity: 624.6; measured
- polymethyl methacrylate (PMMA) beads: 1098.25; measured

## Outputs
- mineral waste (ash): 5.4915; measured
- organic waste (unspecified): 0.00255; measured

## Use advice
在使用此数据集进行PMMA产品的生命周期评估（LCA）时，应注意系统边界、分配及能源来源。确保正确计算了相关地理能源组合中的电力消耗。如果PMMA被回收利用，用户应根据产品的生命周期终点情景考虑回收过程，并可能需要使用回收率修正数据集。

## Review details
清单： 内部审查通过几个迭代步骤完成，涉及原始数据验证、原始数据记录、代表性、完整性、与 ISO 14040 和 14044 有关的建模的一致性。

## Data sources
- 江西旺达新材料有限公司年产20000吨有机玻璃原料生产项目
