# 磷酸铁锂电池火法回收

Dataset: ILCD process, Unit process, single operation
Geography: AH-CN
Reference year: 2022
Classification: End-of-life treatment / Material recycling
Functional unit: The functional unit (FU) was defined as the nominal capacity of a 1 kWh battery pack.
Generated by: 胡志康, hzk2503593129@163.com
Owner: 天工LCI数据工作小组
Review: Dependent internal review by 天工LCI数据工作小组
Amounts: no units in this file; such an amount is in the reference unit of its flow, which a separate flow dataset defines
copyright: false
licenseType: Free of charge for all users and uses

## General comment
将完全放电的EoL LFP电池拆解、粉碎、筛分，得到LFP电池粉末。然后，对粉末进行酸浸、除铁、转化去杂、盐酸蒸馏回收等处理，得到氯化锂纯化液。

## Technical purpose
此工业流程用于通过湿法冶金方法回收废弃磷酸铁锂电池(LFP)。回收得到的氯化锂净化液适用于新锂基电池的制造，特别是磷酸铁锂（LFP）电池，或可能用于其他需要高级锂化合物的行业。

## Reference product
- EoL LFP battery: 1; input; article inperiodical
  废旧磷酸铁锂电池

## Inputs
All rows: article inperiodical
- hydrogen chloride: 0.0343
  氯化氢
- hydrogen peroxide: 0.0954
  过氧化氢
- sodium hydroxide: 0.0873
  氢氧化钠
- calcium chloride: 0.357
  氯化钙
- Water (fresh water): 0.531
  淡水
- Electricity: 1.746
  电

## Outputs
All rows: article inperiodical
- Lithium chloride: 0.357
  氯化锂
- Dust (unspecified, from stack),Dust (unspecified, from stack): 0.000176
  灰尘
- hydrogen fluoride: 2.39e-6
  氟化氢
- non-methane volatile organic compounds: 0.000132
  挥发性有机化合物
- hydrogen chloride: 4.01e-6
  盐酸雾
- packaging waste (plastic): 0.2
  塑料外壳废料
- Separator scrap: 0.05
  分离器废料
- Waste BMS: 0.03
  废物管理系统
- Copper Scrap: 0.1
  废铜
- Aluminium Scrap: 0.06
  铝废料
- Waste Graphite: 0.15
  废石墨
- Other Solid Waste: 0.593
  其他固体废物

## Data selection and combination
数据来源于环评报告。

## Use advice
在使用此数据集进行生命周期评估时，确保计入拆解、粉碎、筛分、酸浸、除铁、转化净化和盐酸蒸馏回收等具体的湿法冶金过程。数据仅适用于已完全放电的LFP电池的回收。用于数据比较的功能单位（FU）是1 kWh电池组的标称容量。在将此过程整合到更广泛的LCA研究中时，应特别注意方法论的一致性，确保系统边界、分配规则和影响评估方法等方面的考虑与数据集保持一致。

## Review details
清单： 内部审查通过几个迭代步骤完成，涉及原始数据验证、原始数据记录、代表性、完整性、与 ISO 14040 和 14044 有关的建模的一致性。

## Data sources
- Quan, J. et al. Comparative life cycle assessment of LFP and NCM batteries including the secondary use and different recycling technologies. Science of The Total Environment 819, 153105 (2022).
