# 煅烧石灰生产 ; 生石灰-磨碎&散装 ; 摇篮

Dataset: ILCD process, Unit process, single operation
Geography: CN
Reference year: 2019
Classification: Unit processes / Materials production / Inorganic chemicals
Generated by: 蔡梓萌, caizm6178@163.com
Owner: 天工LCI数据工作小组
Review: Dependent internal review by 天工LCI数据工作小组
Amounts: no units in this file; such an amount is in the reference unit of its flow, which a separate flow dataset defines
copyright: false
licenseType: Free of charge for all users and uses

## General comment
煅烧石灰生产;原铝加工

## Time period
文献发表日期

## Technical purpose
通过煅烧工艺生产的生石灰是多个工业领域中的基础材料。它主要用于铝工业处理单元，在提取氧化铝的阶段处理铝土矿。此外，它在化学制造、水处理、制钢、建筑（作为建筑材料）以及烟气脱硫中也有重要应用。

## Reference product
- quicklime, milled, loose: 1000; software or database
  calcined lime

## Inputs
- Diesel oil: 13.1175; software or database
  Fuel mix: diesel (53%), electricity (47%)
- electricity, high voltage, aluminium industry: 12.1025; software or database
  Fuel mix: diesel (53%), electricity (47%)

## Data selection and combination
能源输入和物流的清单来自更新的年鉴、发表的论文、官方报告和数据库。清单的详细信息如表1所示。需要注意的是，材料运输假设的数据基于相关研究，可能与实际情况略有不同。每种最终使用能源类型的生命周期强度基于我们之前研究的结果。

## Use advice
使用此生命周期评估数据时，请确保基于相关研究的物料运输假设与您项目的具体地理和物流环境相符。任何与报告清单的偏差可能需要调整生命周期分析以反映实际条件。此外，考虑数据集对特定最终用途能源类型的技术适用性，并根据最新的相关研究和当地法规更新生命周期强度。最后，注意可能改变库存细节的年鉴、已发表的论文和官方报告的任何更新。此外，该过程仅有能源数据，仅作为能源消耗的参考数据，如需使用请根据实际情况补全其它信息。

## Review details
清单： 内部审查通过几个迭代步骤完成，涉及原始数据验证、原始数据记录、代表性、完整性、与 ISO 14040 和 14044 有关的建模的一致性。

## Data sources
- Peng, T., Ou, X., Yan, X. & Wang, G. Life-cycle analysis of energy consumption and GHG emissions of aluminium production in China. in Energy Procedia vol. 158 3937–3943 (2019).
