# 轧钢;粗钢;热轧（Z11）

Dataset: ILCD process, Unit process, single operation
Geography: CN
Reference year: 1998
Classification: Materials production / Metals and semimetals
Generated by: 付翔, 1162850692@qq.com
Owner: 天工LCI数据工作小组
Review: Dependent internal review by 天工LCI数据工作小组
Amounts: no units in this file; such an amount is in the reference unit of its flow, which a separate flow dataset defines
copyright: false
licenseType: Free of charge for all users and uses

## General comment
来自表 4-16 Z08 钢厂生产吨材环境负荷编目表

## Time period
论文提到钢铁企业环境总体数据为1998年的吨钢环境基础数据。

## Technical purpose
在所描述的工艺中生产的热轧钢通常用于建筑行业的结构部件、机械制造中的零件生产以及汽车行业的车架和车身制造。它还可用于制造管道、管材和其他各种工业应用的型材。

## Reference product
- Steel sections: 1050.6; measured

## Inputs
- Energy, geothermal, converted: 2669.92; measured
- water: 17530; measured
- Crude Steel: 1050.6; measured
  粗钢

## Outputs
All rows: measured
- Dust (unspecified, from stack): 1.27
  烟尘
- sulfur dioxide: 1.23
- Hydrocarbons, aliphatic, alkanes, unspecified: 0.10615
  石油类
- Suspended solids, unspecified: 0.26932
- chemical oxygen demand: 0.41586
- Spoil (deposited, hibernating in ground, non elementary flow): 33

## Use advice
在使用1998年热轧钢的生命周期评估数据集时，必须考虑自数据发布以来发生的技术进步。根据生命周期评估研究的上下文考虑是否包括后续的回收阶段。确保在生命周期评估模型中准确地表示热轧钢的使用阶段行为，考虑到这种材料类型的特定特征。

## Review details
清单： 内部审查通过几个迭代步骤完成，涉及原始数据验证、原始数据记录、代表性、完整性、与 ISO 14040 和 14044 有关的建模的一致性。

## Data sources
- 周和敏. 钢铁材料生产过程环境协调性评价研究. (北京工业大学, 2001).
