# 研磨筛分碎片混合物;碎片混合物;研磨筛分

Dataset: ILCD process, Unit process, single operation
Geography: CN
Classification: Unit processes / Materials production / Other mineralic materials
Generated by: 王楠, 1209824595@qq.com
Owner: 天工LCI数据工作小组
Review: Dependent internal review by 天工LCI数据工作小组
Amounts: no units in this file; such an amount is in the reference unit of its flow, which a separate flow dataset defines
copyright: false
licenseType: Free of charge for all users and uses

## General comment
该数据集描述了一个在工业环境中用于研磨和筛分碎片混合物的过程。这个单元过程涉及单一操作，可用于需要细小颗粒物质的各个领域，例如在建筑材料制造、药物生产或在冶金中准备原料。

## Reference product
- Mixture,Mixture: 641.63; input; software or database
  fragment mixture

## Inputs
- Electricity: 12.42; software or database

## Outputs
All rows: software or database
- Glass for recovery (shards): 505.4
  玻璃碎片
- Metal Fragment: 28.89
  金属碎片
- municipal solid waste deposition: 107.34
  solid waste
- Medium and low radioactive liquid waste: 10.11
- Ammonia Nitrogen: 0.00278
  Ammonia nitrogen
- nitrogen, total (excluding N2): 0.11372
- phosphorus, total: 0.00025

## Use advice
使用该数据集的用户需要注意研磨和筛分碎片混合物过程的特殊性。必须考虑过程产生的粒径分布、筛分过程中的潜在损失以及能源消耗。当这个单元过程被整合进一个更大的系统中时，确保适当分配环境影响。如果适用，应明确定义并在整个生命周期评估中考虑处理材料的再循环或再使用。

## Review details
清单： 内部审查通过几个迭代步骤完成，涉及原始数据验证、原始数据记录、代表性、完整性、与 ISO 14040 和 14044 有关的建模的一致性。

## Data sources
- Li, J. et al. Life cycle analysis of the economic costs and environmental benefits of photovoltaic module waste recycling in China. (2023).
