# 页岩气生产;场地准备阶段;固体废物池建设

Dataset: ILCD process, Unit process, black box
Geography: SC-CN
Reference year: 2014
Valid until: 2016
Classification: Unit processes / Energy carriers and technologies / Natural gas based fuels
Generated by: Pu Hong, 15695258655@163.com
Owner: 天工LCI数据工作小组
Review: Dependent internal review by 天工LCI数据工作小组
Amounts: no units in this file; such an amount is in the reference unit of its flow, which a separate flow dataset defines
copyright: false
licenseType: Free of charge for all users and uses

## General comment
该工艺的技术应用特定于页岩气生产的准备阶段。在此阶段，建立固体废物容纳系统（如垃圾填埋场建设），以管理从页岩气开采过程中产生的废物。该数据集表示与中国四川和重庆地区这些设施的建设相关的环境影响，这些地区是页岩气提取的主要中心。

## Geography
我国页岩气开采工作目前集中在四川及重庆地区，选取四川及重庆的数据进行LCA计算。

## Time period
原始数据时间介于2014-2016之间

## Reference product
- Retention pond: 3400; min 5000; max 2400; uniform; measured
  场地准备阶段--固体废物池体积

## Inputs
All rows: uniform; measured
- #325 cement: 199000; min 149000; max 282000
  场地准备阶段--固体废物池建设消耗的水泥
- sand: 341000; min 255000; max 482000
  场地准备阶段--固体废物池建设消耗的沙子
- gravel: 590000; min 441000; max 834000
  场地准备阶段--固体废物池建设消耗的碎石
- freshwater: 94000; min 70000; max 132000
  场地准备阶段--固体废物池建设消耗的清水
- Diesel: 5050; min 3689; max 7251
  场地准备阶段--固体废物池建设过程材料运输消耗的汽油
- Electricity: 1846.8; min 1382.4; max 2610
  场地准备阶段--固体废物池建设中混凝土搅拌消耗的电能

## Use advice
用户应注意，提供的LCA数据是基于2014年至2016年间收集的原始数据的，这些数据可能不反映当前的实践或技术进步。在使用数据进行LCA计算时，应进行更新或情境化以代表当前情况。此外，数据具有地域性，若用于其他地点，应谨慎应用。在将此数据整合到更广泛的生命周期评估中时，应特别注意方法论的一致性，特别是关于固废管理及其环境影响的处理。

## Review details
清单： 内部审查通过几个迭代步骤完成，涉及原始数据验证、原始数据记录、代表性、完整性、与 ISO 14040 和 14044 有关的建模的一致性。

## Data sources
- Wang, J., Liu, M., McLellan, B. C., Tang, X. & Feng, L. Environmental impacts of shale gas development in China: A hybrid life cycle analysis. Resources, Conservation and Recycling 120, 38–45 (2017).
