# 本地品牌纯牛奶生产 ; 产品运输

Dataset: ILCD process, Unit process, single operation
Geography: CD-SC-CN
Reference year: 2017
Classification: Unit processes / Transport services / Road
Functional unit: The Tetra Pak 1litre pure liquid milk is selected to assess its lifecycle based carbon footprint.
Generated by: 杨瑞, 1632707028@qq.com
Owner: 天工LCI数据工作小组
Review: Dependent internal review by 天工LCI数据工作小组
Amounts: no units in this file; such an amount is in the reference unit of its flow, which a separate flow dataset defines
copyright: false
licenseType: Free of charge for all users and uses

## General comment
根据实地调查，使用2吨载重量的轻型汽油卡车将原料奶从牧场运输到加工厂，然后再运输到配送中心，距离分别为175公里和40公里。使用载重量为10吨的重型柴油卡车将包装废物运送到距离30公里的市政垃圾填埋场

## Geography
奶源基地位于中国四川省西南部洪崖县，距离省会成都市约147公里。乳品加工厂位于成都郊区郫县，距离奶源基地约175公里。品牌牛奶主要分布在距离乳制品加工厂约40公里的成都市中心。牛奶包装废弃物被运送到距离市中心约30公里的市政垃圾填埋场进行最终处理。

## Technology and included processes
本研究仅关注对纯牛奶生产有直接贡献的过程，即仅关注能源和材料投入以及碳排放的影响，如图1所示。从而简化了牛奶生命周期的系统边界，将其划分为原料奶生产、乳制品加工、产品运输和包装废弃物处理四个阶段。

## Technical purpose
本地品牌纯牛奶经历生产和分销过程，为日常乳品消费提供必要的服务。轻型汽油卡车用于将原料奶从牧场运输到加工厂再到分销中心，满足新鲜乳品的配送需求。重型柴油卡车用于将包装废物运输到垃圾填埋场，表明了其在废物管理和回收物流中的应用。

## Reference product
- milk: 0.001; measured
  pure liquid milk

## Inputs
- transport in t*km: 0.175; measured
  Raw milk transportation
- transport in t*km: 0.04; measured
  Milk distribution
- transport in t*km: 0.03; measured
  Packaging waste Transportation

## Outputs
- carbon dioxide (fossil),carbon dioxide (fossil): 0.03779; measured

## Deviations from the LCI method approaches
与传统的LCA相比，本研究简化了生命周期影响评估的过程，主要使用不同类别的指标来阐述生命周期清单的结果(Nigri et al.， 2014)。

## Data selection and combination
产品运输的碳足迹由运输载荷(吨·公里)乘以碳排放系数计算(Cai et al.， 2012)。根据实地调查，使用2吨载重量的轻型汽油卡车将原料奶从牧场运输到加工厂，然后再运输到配送中心，距离分别为175公里和40公里。使用载重量为10吨的重型柴油卡车将包装废物运送到距离30公里的市政垃圾填埋场。汽油和柴油的碳排放系数由IPCC(2006)测量，2吨轻型汽油卡车每吨公里164克，10吨重型柴油卡车每吨公里84.8克，如表3所示。

## Use advice
使用者在利用此LCA数据时应仅考虑对纯牛奶生产的直接贡献，特别是在原料奶生产、乳品加工、产品运输和包装废弃物处理的生命周期阶段中关注能源和材料投入以及碳排放。碳足迹数据必须根据IPCC指导方针仔细计算运输负荷和排放系数，以确保影响评估的准确性。还建议在描述中详细的四川省区域地理参数内将排放数据具体化。

## Review details
清单： 内部审查通过几个迭代步骤完成，涉及原始数据验证、原始数据记录、代表性、完整性、与 ISO 14040 和 14044 有关的建模的一致性。

## Data sources
- Zhao, R., Xu, Y., Wen, X., Zhang, N. & Cai, J. Carbon footprint assessment for a local branded pure milk product: a lifecycle based approach. Food Sci. Technol 38, 98–105 (2017).
