# LFP直接回收（靶向愈合）

Dataset: ILCD process, Unit process, single operation
Geography: CN
Reference year: 2020
Classification: End-of-life treatment / Material recycling
Functional unit: In this paper, the functional unit is defined as the nominal capacity of 1 kWh LIBs, which converts all the data collected into functional units for the calculation to ensure the quantitative evaluation and cross comparability of energy consumption and environmental impact of different batteries in various stages.
Generated by: 马清源, m1120498928@163.com
Owner: 天工LCI数据工作小组
Review: Dependent internal review by 天工LCI数据工作小组
Amounts: no units in this file; such an amount is in the reference unit of its flow, which a separate flow dataset defines
copyright: false
licenseType: Free of charge for all users and uses

## General comment
电池在拆卸前放电，并对粉碎过程中挥发的电解质进行集中处理。然后，用DMC洗涤诸如电极片的小颗粒尺寸混合物以去除残留电解质。干燥后，通过在超声波辅助处理下浸入n-甲基-2-吡咯烷酮（NMP）中，将活性材料与集电体分离。将获得的混合悬浮液沉淀并在离心后干燥。根据颗粒大小的差异，将电极材料与集电器和隔膜分离。阴极和阳极材料通过泡沫浮选进一步划分。将过滤的阴极材料与LiOH溶液混合，并在低温和低压下进行再锂化。然后，将再锂化的正极材料粉末与过量的Li2CO3混合，并在氮气氛中热退火，以获得修复的电池级正极活性材料。

## Geography
实验室工艺

## Technical purpose
本工艺描述了使用靶向愈合方法直接回收磷酸铁锂(LFP)电池的过程。该程序明确适用于电池正极材料的再制造，以将其恢复到用于新锂离子电池(LIBs)生产的电池级质量。此技术适用于电池回收设施，有助于电池材料的循环经济。

## Model description
SimaPro是一个LCA工具，可以提供科学的评估方法和丰富的数据库。它可以进行完整的产品生命周期评价，并分析产品不同阶段的环境影响。在本研究中，SimaPro v9.0和Ecoinvent v3.5数据库用于电池材料回收和再制造的建模和环境指数计算。减少碳排放是当前人类社会面临的最关键的问题。碳足迹和CED是评估电池生命周期减缓气候变化潜力和能源性能的两个重要指标，在本研究中分别使用IPCC 2013 GWP 100a v1.03和CED v1.11对其进行了评估。

## Reference product
- EoL LFP battery: 8.33; input

## Inputs
- Lithium Hydroxide: 0.183
- Citric Acid: 0.0583
- Lithium carbonate: 0.025
- process steam: 5
- electricity mix: 8.856
- Mechanical treatment facility: 3.83e-9
- Chemical Industry: 3.83e-9
- Freight rail: 8.66
- sodium chloride: 0.0641
- Freight Truck: 0.866

## Outputs
- Dust (unspecified, from stack),Dust (unspecified, from stack): 0.00745
- non-methane volatile organic compounds: 0.000641
- Residue to landfill: 0.257
- Cathode Material: 2.53
- Copper Scrap: 0.822
- Aluminum scrap: 0.734

## Data selection and combination
部分数据来源于 Xu, P. et al. Efficient Direct Recycling of Lithium-Ion Battery Cathodes by Targeted Healing. Joule 4, 2609–2626 (2020).

## Use advice
在使用与本工业过程相关的LCA数据集时，用户应考虑研究中提到的实验室规模操作的边界条件，如Xu, P. et al.（2020）所述。这些数据基于小规模实验设置，可能并不完全代表商业规模的过程。在向较大系统外推时应谨慎。重要的是将数据与具体的回收和再制造情景相协调，并谨慎使用SimaPro v9.0等LCA工具以及Ecoinvent v3.5等数据库，同时记住环境指标是根据1 kWh LIBs名义容量的功能单元来计算的，以保持不同电池之间的一致性和可比性。

## Review details
清单： 内部审查通过几个迭代步骤完成，涉及原始数据验证、原始数据记录、代表性、完整性、与 ISO 14040 和 14044 有关的建模的一致性。

## Data sources
- Chen, Q. et al. Investigating the environmental impacts of different direct material recycling and battery remanufacturing technologies on two types of retired lithium-ion batteries from electric vehicles in China. Separation and Purification Technology 308, 122966 (2023).
