# 养猪生产 ; 集约化饲养

Dataset: ILCD process, Unit process, single operation
Geography: SC-CN
Reference year: 2006
Classification: Unit processes / Materials production / Agricultural production means
Functional unit: In this study, the functional unit (FU) was defined as "1kg pig carcass", which included skin, bone and fat. Foreign studies generally only considered lean meat, but in China's consumption mode, skin and viscera were also fully utilized as edible foods. The concept of carcass was adopted in this study. Although the bone included in this study is an inedible part, it can play a certain compensative role because it does not contain internal organs. In addition, the current data can be easily converted into carcass weight, so it is more in line with the actual situation.
Generated by: 杨瑞, 1632707028@qq.com
Owner: 天工LCI数据工作小组
Review: Dependent internal review by 天工LCI数据工作小组
Amounts: no units in this file; such an amount is in the reference unit of its flow, which a separate flow dataset defines
copyright: false
licenseType: Free of charge for all users and uses

## General comment
丘陵区和平原区规模化集约化饲养。提供了四川大约1.5%的商品猪， 在四川养猪业中起着主要的现代养猪示范作用。这种养猪情景的主要情景状态和设定参数为： ①能量饲料以玉米等谷物为主，全部饲料原料从系统外购买，饲养期170d左右，出栏平均为95kg；②出栏数量平均为每年5000头，品种多数为洋三元杂交猪（如DLY，少数为PIC商品猪），屠宰率76%，全程料肉比3.0：1；③饲养管理上比较先进，采用了大量现代养猪技术，一般自繁自养，采用限位栏和高床饲养。④粪便处理及利用：粪便和污水进行厌氧发酵处理。70%运出还田（目前未达到这一水平，假设未来5年内由于环保法规的严厉执行可实现这一目标）长期存贮量占45%，30%经厌氧发酵处理后排放到周边环境排出水COD为 200mg/L。

## Geography
粪水量数据来自对川东、川北和四川西南盆地周边区个典型性散养农户的调查

## Technology and included processes
包括原料生产、运输和养猪生产过程，但没有包括猪的屠宰、加工及包装、运输过程。没有包括养猪设备、机械和建筑方面，对小于总量5%或环境关联性小的材料进行了剔除。药品的生产、使用和污染排放没有考虑。鱼粉和氨基酸生产没考虑

## Technical purpose
该数据集描述了四川丘陵和平原区的集约化养猪生产过程，贡献了约四川省1.5%的商品猪供给。它在该地区充当现代养猪模型的角色。该过程包括使用以谷物为主的能源饲料的大规模饲养，注重采用先进的管理技术，如自繁自养、限位栏使用和高床饲养操作。该数据集适用于农业部门的参与者用于模拟现代、集约化畜牧业实践，以及政策制定者旨在理解和管理商业养猪生产的环境影响。

## Reference product
- pig: 1; measured
  猪肉

## Inputs
- Electricity: 0.698061; calculated
  情景C

## Outputs
- ammonia: 0.0107934; measured
  情景C
- nitrous oxide: 0.0002784
  情景C
- methane (biogenic): 0.030219; calculated
  情景C

## Deviations from the LCI method approaches
本研究采用LCA方法学和情景分析法相结合的方式对四川三种典型的养猪生产 情景进行系统的环境影响评估，探索这种分析方法应用于当前养猪生产环境影响评估 时的具体算法，并揭示各种养猪生产系统中的环境友好和不利方面以及其不可更新能 源利用效率。研究结果有助于对养猪业环境影响态势的认识，并为养猪可持续发展模 式的建立提供参考。

## Data selection and combination
各种情景下的养猪生产过程的污染排放清单中，主要分析粪便和尿液养分的产生量及主要的温室气体产生量，对恶臭气体、噪声和病原体的环境污染，因目前缺少其 对健康的影响潜势方面的量化数据，没有进行分析。动物生产过程的废物排放参考近年的研究文献，结合调查中收集的数据进行校正，以基本反映四川实际。其中，NH3的排放量估计是综合了多个文献的研究成果

## Data treatment and extrapolations
1）由于各地养猪模式十分复杂，无法在同类模式中取得完全一致的数据，因此根据相关文献、年鉴和设定情景间与环境污染有关的主要差异，在剔除可疑数据的基础上计算出同类情景中的平均数据。2）动物生产过程的废物排放数据来源有两类，一类是直接由调查和文献中得到，另一类是根据文献资料反推得到。为保证数据质量，对部分偏离均值较大的生产中实际产生量数据进行了试验验证和专家咨询，并通过多种途径的文献互相参照比较进行校正。

## Use advice
由于数据集反映了一个集约养猪生产情景，用户在将数据应用到其他地区时应注意区域背景的特定性。在使用这份LCA数据时，考虑当地差异如气候、饲料成分和技术适用性是重要的。此外，用户应意识到该数据集中未考虑诸如粪便处理、动物用药和产生副产品（如鱼粉和氨基酸）的某些要素。在使用数据进行环境影响评估时，建议与当地数据结合，以调整地区差异并捕捉实际环境足迹的全面图景。

## Review details
清单： 内部审查通过几个迭代步骤完成，涉及原始数据验证、原始数据记录、代表性、完整性、与 ISO 14040 和 14044 有关的建模的一致性。

## Data sources
- 白林. 四川养猪业清洁生产系统LCA及猪粪资源化利用关键技术研究. (四川农业大学, 2007).
