# Steam/hotwater/other|Bituminouscoal/anthracite/lignite/coaltype|Circulating fluidized bed furnace|All sizes / 蒸汽/热水/其他|烟煤/无烟煤/褐煤/型煤|循环流化床炉|所有规模

Dataset: ILCD process, Unit process, single operation
Geography: CN
Reference year: 2019
Classification: Energy carriers and technologies / Heat and steam
Generated by: The data was created by the Office of the Second National Pollution Source Census of the Ministry of Ecology and Environment, and the data was organized by the TianGong Plan team for ILCD format / 生态环境部第二次全国污染源普查工作办公室创建数据，天工计划团队常慧敏整理数据为ILCD格式
Owner: Tiangong LCI Data Working Group / 天工LCI数据工作小组
Review: Dependent internal review by Tiangong LCI Data Working Group / 天工LCI数据工作小组
Amounts: no units in this file; such an amount is in the reference unit of its flow, which a separate flow dataset defines
copyright: false
licenseType: Free of charge for all users and uses

## General comment
the Technical of end-of-pipe management technology for pollution leadisRotary spray drying method，Its Technical efficiency of end-of-pipe management78.4

## Reference product
- Bituminous coal: 1000; input; calculated
  源文件中描述为为烟煤/无烟煤/褐煤/型煤，此处对其进行了匹配工作，将其匹配到LCAflow库里面相最符合的流，污染物指标备注为汞及其化合物（Hg）

## Outputs
All rows: calculated
- mercury: nan
  污染物指标汞及其化合物（Hg）的末端治理技术是/，其效率为0。原文件中描述污染物类别为废气，污染物指标为汞及其化合物（Hg），此处对其进行了匹配工作，将其匹配到LCAflow库里面相最符合的流，污染物指标备注为汞及其化合物（Hg）
- mercury: nan
  污染物指标汞及其化合物（Hg）的末端治理技术是静电除尘，其效率为33.2，末端治理设施实际运行率（k值）计算公式为K=除尘设施年运行小时数/锅炉年运行小时数。原文件中描述污染物类别为废气，污染物指标为汞及其化合物（Hg），此处对其进行了匹配工作，将其匹配到LCAflow库里面相最符合的流，污染物指标备注为汞及其化合物（Hg）
- mercury: nan
  污染物指标汞及其化合物（Hg）的末端治理技术是袋式除尘，其效率为67.9，末端治理设施实际运行率（k值）计算公式为K=除尘设施年运行小时数/锅炉年运行小时数。原文件中描述污染物类别为废气，污染物指标为汞及其化合物（Hg），此处对其进行了匹配工作，将其匹配到LCAflow库里面相最符合的流，污染物指标备注为汞及其化合物（Hg）
- mercury: nan
  污染物指标汞及其化合物（Hg）的末端治理技术是电袋组合，其效率为67.9，末端治理设施实际运行率（k值）计算公式为K=除尘设施年运行小时数/锅炉年运行小时数。原文件中描述污染物类别为废气，污染物指标为汞及其化合物（Hg），此处对其进行了匹配工作，将其匹配到LCAflow库里面相最符合的流，污染物指标备注为汞及其化合物（Hg）
- mercury: nan
  污染物指标汞及其化合物（Hg）的末端治理技术是湿法除尘，其效率为15.2，末端治理设施实际运行率（k值）计算公式为K=除尘设施年运行小时数/锅炉年运行小时数。原文件中描述污染物类别为废气，污染物指标为汞及其化合物（Hg），此处对其进行了匹配工作，将其匹配到LCAflow库里面相最符合的流，污染物指标备注为汞及其化合物（Hg）
- mercury: nan
  污染物指标汞及其化合物（Hg）的末端治理技术是旋风除尘，其效率为6，末端治理设施实际运行率（k值）计算公式为K=除尘设施年运行小时数/锅炉年运行小时数。原文件中描述污染物类别为废气，污染物指标为汞及其化合物（Hg），此处对其进行了匹配工作，将其匹配到LCAflow库里面相最符合的流，污染物指标备注为汞及其化合物（Hg）
- mercury: nan
  污染物指标汞及其化合物（Hg）的末端治理技术是脱硝措施。原文件中描述污染物类别为废气，污染物指标为汞及其化合物（Hg），此处对其进行了匹配工作，将其匹配到LCAflow库里面相最符合的流，污染物指标备注为汞及其化合物（Hg）
- mercury: nan
  污染物指标汞及其化合物（Hg）的末端治理技术是石灰石-石膏湿法（石灰-石膏湿法），其效率为57.2，末端治理设施实际运行率（k值）计算公式为K=脱硫设施年运行小时数/锅炉年运行小时数。原文件中描述污染物类别为废气，污染物指标为汞及其化合物（Hg），此处对其进行了匹配工作，将其匹配到LCAflow库里面相最符合的流，污染物指标备注为汞及其化合物（Hg）
- mercury: nan
  污染物指标汞及其化合物（Hg）的末端治理技术是氧化镁法，其效率为57.2，末端治理设施实际运行率（k值）计算公式为K=脱硫设施年运行小时数/锅炉年运行小时数。原文件中描述污染物类别为废气，污染物指标为汞及其化合物（Hg），此处对其进行了匹配工作，将其匹配到LCAflow库里面相最符合的流，污染物指标备注为汞及其化合物（Hg）
- mercury: nan
  污染物指标汞及其化合物（Hg）的末端治理技术是双碱法，其效率为57.2，末端治理设施实际运行率（k值）计算公式为K=脱硫设施年运行小时数/锅炉年运行小时数。原文件中描述污染物类别为废气，污染物指标为汞及其化合物（Hg），此处对其进行了匹配工作，将其匹配到LCAflow库里面相最符合的流，污染物指标备注为汞及其化合物（Hg）
- mercury: nan
  污染物指标汞及其化合物（Hg）的末端治理技术是氨法，其效率为57.2，末端治理设施实际运行率（k值）计算公式为K=脱硫设施年运行小时数/锅炉年运行小时数。原文件中描述污染物类别为废气，污染物指标为汞及其化合物（Hg），此处对其进行了匹配工作，将其匹配到LCAflow库里面相最符合的流，污染物指标备注为汞及其化合物（Hg）
- mercury: nan
  污染物指标汞及其化合物（Hg）的末端治理技术是烟气循环流化床法，其效率为57.2，末端治理设施实际运行率（k值）计算公式为K=脱硫设施年运行小时数/锅炉年运行小时数。原文件中描述污染物类别为废气，污染物指标为汞及其化合物（Hg），此处对其进行了匹配工作，将其匹配到LCAflow库里面相最符合的流，污染物指标备注为汞及其化合物（Hg）
- mercury: nan
  污染物指标汞及其化合物（Hg）的末端治理技术是旋转喷雾干燥法，其效率为57.2，末端治理设施实际运行率（k值）计算公式为K=脱硫设施年运行小时数/锅炉年运行小时数。原文件中描述污染物类别为废气，污染物指标为汞及其化合物（Hg），此处对其进行了匹配工作，将其匹配到LCAflow库里面相最符合的流，污染物指标备注为汞及其化合物（Hg）
- arsenic: nan
  污染物指标砷（As）的末端治理技术是/，其效率为0。原文件中描述污染物类别为废气，污染物指标为砷（As），此处对其进行了匹配工作，将其匹配到LCAflow库里面相最符合的流，污染物指标备注为砷（As）
- arsenic: nan
  污染物指标砷（As）的末端治理技术是静电除尘，其效率为86.2，末端治理设施实际运行率（k值）计算公式为K=除尘设施年运行小时数/锅炉年运行小时数。原文件中描述污染物类别为废气，污染物指标为砷（As），此处对其进行了匹配工作，将其匹配到LCAflow库里面相最符合的流，污染物指标备注为砷（As）
- arsenic: nan
  污染物指标砷（As）的末端治理技术是袋式除尘，其效率为99，末端治理设施实际运行率（k值）计算公式为K=除尘设施年运行小时数/锅炉年运行小时数。原文件中描述污染物类别为废气，污染物指标为砷（As），此处对其进行了匹配工作，将其匹配到LCAflow库里面相最符合的流，污染物指标备注为砷（As）
- arsenic: nan
  污染物指标砷（As）的末端治理技术是电袋组合，其效率为99，末端治理设施实际运行率（k值）计算公式为K=除尘设施年运行小时数/锅炉年运行小时数。原文件中描述污染物类别为废气，污染物指标为砷（As），此处对其进行了匹配工作，将其匹配到LCAflow库里面相最符合的流，污染物指标备注为砷（As）
- arsenic: nan
  污染物指标砷（As）的末端治理技术是湿法除尘，其效率为96.3，末端治理设施实际运行率（k值）计算公式为K=除尘设施年运行小时数/锅炉年运行小时数。原文件中描述污染物类别为废气，污染物指标为砷（As），此处对其进行了匹配工作，将其匹配到LCAflow库里面相最符合的流，污染物指标备注为砷（As）
- arsenic: nan
  污染物指标砷（As）的末端治理技术是旋风除尘，其效率为43，末端治理设施实际运行率（k值）计算公式为K=除尘设施年运行小时数/锅炉年运行小时数。原文件中描述污染物类别为废气，污染物指标为砷（As），此处对其进行了匹配工作，将其匹配到LCAflow库里面相最符合的流，污染物指标备注为砷（As）
- arsenic: nan
  污染物指标砷（As）的末端治理技术是脱硝措施。原文件中描述污染物类别为废气，污染物指标为砷（As），此处对其进行了匹配工作，将其匹配到LCAflow库里面相最符合的流，污染物指标备注为砷（As）
- arsenic: nan
  污染物指标砷（As）的末端治理技术是石灰石-石膏湿法（石灰-石膏湿法），其效率为80.4，末端治理设施实际运行率（k值）计算公式为K=脱硫设施年运行小时数/锅炉年运行小时数。原文件中描述污染物类别为废气，污染物指标为砷（As），此处对其进行了匹配工作，将其匹配到LCAflow库里面相最符合的流，污染物指标备注为砷（As）
- arsenic: nan
  污染物指标砷（As）的末端治理技术是氧化镁法，其效率为80.4，末端治理设施实际运行率（k值）计算公式为K=脱硫设施年运行小时数/锅炉年运行小时数。原文件中描述污染物类别为废气，污染物指标为砷（As），此处对其进行了匹配工作，将其匹配到LCAflow库里面相最符合的流，污染物指标备注为砷（As）
- arsenic: nan
  污染物指标砷（As）的末端治理技术是双碱法，其效率为80.4，末端治理设施实际运行率（k值）计算公式为K=脱硫设施年运行小时数/锅炉年运行小时数。原文件中描述污染物类别为废气，污染物指标为砷（As），此处对其进行了匹配工作，将其匹配到LCAflow库里面相最符合的流，污染物指标备注为砷（As）
- arsenic: nan
  污染物指标砷（As）的末端治理技术是氨法，其效率为80.4，末端治理设施实际运行率（k值）计算公式为K=脱硫设施年运行小时数/锅炉年运行小时数。原文件中描述污染物类别为废气，污染物指标为砷（As），此处对其进行了匹配工作，将其匹配到LCAflow库里面相最符合的流，污染物指标备注为砷（As）
- arsenic: nan
  污染物指标砷（As）的末端治理技术是烟气循环流化床法，其效率为80.4，末端治理设施实际运行率（k值）计算公式为K=脱硫设施年运行小时数/锅炉年运行小时数。原文件中描述污染物类别为废气，污染物指标为砷（As），此处对其进行了匹配工作，将其匹配到LCAflow库里面相最符合的流，污染物指标备注为砷（As）
- arsenic: nan
  污染物指标砷（As）的末端治理技术是旋转喷雾干燥法，其效率为80.4，末端治理设施实际运行率（k值）计算公式为K=脱硫设施年运行小时数/锅炉年运行小时数。原文件中描述污染物类别为废气，污染物指标为砷（As），此处对其进行了匹配工作，将其匹配到LCAflow库里面相最符合的流，污染物指标备注为砷（As）
- cadmium: nan
  污染物指标镉（Cd）的末端治理技术是/，其效率为0。原文件中描述污染物类别为废气，污染物指标为镉（Cd），此处对其进行了匹配工作，将其匹配到LCAflow库里面相最符合的流，污染物指标备注为镉（Cd）
- cadmium: nan
  污染物指标镉（Cd）的末端治理技术是静电除尘，其效率为96.5，末端治理设施实际运行率（k值）计算公式为K=除尘设施年运行小时数/锅炉年运行小时数。原文件中描述污染物类别为废气，污染物指标为镉（Cd），此处对其进行了匹配工作，将其匹配到LCAflow库里面相最符合的流，污染物指标备注为镉（Cd）
- cadmium: nan
  污染物指标镉（Cd）的末端治理技术是袋式除尘，其效率为97.6，末端治理设施实际运行率（k值）计算公式为K=除尘设施年运行小时数/锅炉年运行小时数。原文件中描述污染物类别为废气，污染物指标为镉（Cd），此处对其进行了匹配工作，将其匹配到LCAflow库里面相最符合的流，污染物指标备注为镉（Cd）
- cadmium: nan
  污染物指标镉（Cd）的末端治理技术是电袋组合，其效率为97.6，末端治理设施实际运行率（k值）计算公式为K=除尘设施年运行小时数/锅炉年运行小时数。原文件中描述污染物类别为废气，污染物指标为镉（Cd），此处对其进行了匹配工作，将其匹配到LCAflow库里面相最符合的流，污染物指标备注为镉（Cd）
- cadmium: nan
  污染物指标镉（Cd）的末端治理技术是湿法除尘，其效率为75，末端治理设施实际运行率（k值）计算公式为K=除尘设施年运行小时数/锅炉年运行小时数。原文件中描述污染物类别为废气，污染物指标为镉（Cd），此处对其进行了匹配工作，将其匹配到LCAflow库里面相最符合的流，污染物指标备注为镉（Cd）
- cadmium: nan
  污染物指标镉（Cd）的末端治理技术是旋风除尘，其效率为22.9，末端治理设施实际运行率（k值）计算公式为K=除尘设施年运行小时数/锅炉年运行小时数。原文件中描述污染物类别为废气，污染物指标为镉（Cd），此处对其进行了匹配工作，将其匹配到LCAflow库里面相最符合的流，污染物指标备注为镉（Cd）
- cadmium: nan
  污染物指标镉（Cd）的末端治理技术是脱硝措施。原文件中描述污染物类别为废气，污染物指标为镉（Cd），此处对其进行了匹配工作，将其匹配到LCAflow库里面相最符合的流，污染物指标备注为镉（Cd）
- cadmium: nan
  污染物指标镉（Cd）的末端治理技术是石灰石-石膏湿法（石灰-石膏湿法），其效率为80.5，末端治理设施实际运行率（k值）计算公式为K=脱硫设施年运行小时数/锅炉年运行小时数。原文件中描述污染物类别为废气，污染物指标为镉（Cd），此处对其进行了匹配工作，将其匹配到LCAflow库里面相最符合的流，污染物指标备注为镉（Cd）
- cadmium: nan
  污染物指标镉（Cd）的末端治理技术是氧化镁法，其效率为80.5，末端治理设施实际运行率（k值）计算公式为K=脱硫设施年运行小时数/锅炉年运行小时数。原文件中描述污染物类别为废气，污染物指标为镉（Cd），此处对其进行了匹配工作，将其匹配到LCAflow库里面相最符合的流，污染物指标备注为镉（Cd）
- cadmium: nan
  污染物指标镉（Cd）的末端治理技术是双碱法，其效率为80.5，末端治理设施实际运行率（k值）计算公式为K=脱硫设施年运行小时数/锅炉年运行小时数。原文件中描述污染物类别为废气，污染物指标为镉（Cd），此处对其进行了匹配工作，将其匹配到LCAflow库里面相最符合的流，污染物指标备注为镉（Cd）
- cadmium: nan
  污染物指标镉（Cd）的末端治理技术是氨法，其效率为80.5，末端治理设施实际运行率（k值）计算公式为K=脱硫设施年运行小时数/锅炉年运行小时数。原文件中描述污染物类别为废气，污染物指标为镉（Cd），此处对其进行了匹配工作，将其匹配到LCAflow库里面相最符合的流，污染物指标备注为镉（Cd）
- cadmium: nan
  污染物指标镉（Cd）的末端治理技术是烟气循环流化床法，其效率为80.5，末端治理设施实际运行率（k值）计算公式为K=脱硫设施年运行小时数/锅炉年运行小时数。原文件中描述污染物类别为废气，污染物指标为镉（Cd），此处对其进行了匹配工作，将其匹配到LCAflow库里面相最符合的流，污染物指标备注为镉（Cd）
- cadmium: nan
  污染物指标镉（Cd）的末端治理技术是旋转喷雾干燥法，其效率为80.5，末端治理设施实际运行率（k值）计算公式为K=脱硫设施年运行小时数/锅炉年运行小时数。原文件中描述污染物类别为废气，污染物指标为镉（Cd），此处对其进行了匹配工作，将其匹配到LCAflow库里面相最符合的流，污染物指标备注为镉（Cd）
- Chromium: nan
  污染物指标铬（Cr）的末端治理技术是/，其效率为0。原文件中描述污染物类别为废气，污染物指标为铬（Cr），此处对其进行了匹配工作，将其匹配到LCAflow库里面相最符合的流，污染物指标备注为铬（Cr）
- Chromium: nan
  污染物指标铬（Cr）的末端治理技术是静电除尘，其效率为98.5，末端治理设施实际运行率（k值）计算公式为K=除尘设施年运行小时数/锅炉年运行小时数。原文件中描述污染物类别为废气，污染物指标为铬（Cr），此处对其进行了匹配工作，将其匹配到LCAflow库里面相最符合的流，污染物指标备注为铬（Cr）
- Chromium: nan
  污染物指标铬（Cr）的末端治理技术是袋式除尘，其效率为95.1，末端治理设施实际运行率（k值）计算公式为K=除尘设施年运行小时数/锅炉年运行小时数。原文件中描述污染物类别为废气，污染物指标为铬（Cr），此处对其进行了匹配工作，将其匹配到LCAflow库里面相最符合的流，污染物指标备注为铬（Cr）
- Chromium: nan
  污染物指标铬（Cr）的末端治理技术是电袋组合，其效率为95.1，末端治理设施实际运行率（k值）计算公式为K=除尘设施年运行小时数/锅炉年运行小时数。原文件中描述污染物类别为废气，污染物指标为铬（Cr），此处对其进行了匹配工作，将其匹配到LCAflow库里面相最符合的流，污染物指标备注为铬（Cr）
- Chromium: nan
  污染物指标铬（Cr）的末端治理技术是湿法除尘，其效率为48.1，末端治理设施实际运行率（k值）计算公式为K=除尘设施年运行小时数/锅炉年运行小时数。原文件中描述污染物类别为废气，污染物指标为铬（Cr），此处对其进行了匹配工作，将其匹配到LCAflow库里面相最符合的流，污染物指标备注为铬（Cr）
- Chromium: nan
  污染物指标铬（Cr）的末端治理技术是旋风除尘，其效率为30，末端治理设施实际运行率（k值）计算公式为K=除尘设施年运行小时数/锅炉年运行小时数。原文件中描述污染物类别为废气，污染物指标为铬（Cr），此处对其进行了匹配工作，将其匹配到LCAflow库里面相最符合的流，污染物指标备注为铬（Cr）
- Chromium: nan
  污染物指标铬（Cr）的末端治理技术是脱硝措施。原文件中描述污染物类别为废气，污染物指标为铬（Cr），此处对其进行了匹配工作，将其匹配到LCAflow库里面相最符合的流，污染物指标备注为铬（Cr）
- Chromium: nan
  污染物指标铬（Cr）的末端治理技术是石灰石-石膏湿法（石灰-石膏湿法），其效率为86，末端治理设施实际运行率（k值）计算公式为K=脱硫设施年运行小时数/锅炉年运行小时数。原文件中描述污染物类别为废气，污染物指标为铬（Cr），此处对其进行了匹配工作，将其匹配到LCAflow库里面相最符合的流，污染物指标备注为铬（Cr）
- Chromium: nan
  污染物指标铬（Cr）的末端治理技术是氧化镁法，其效率为86，末端治理设施实际运行率（k值）计算公式为K=脱硫设施年运行小时数/锅炉年运行小时数。原文件中描述污染物类别为废气，污染物指标为铬（Cr），此处对其进行了匹配工作，将其匹配到LCAflow库里面相最符合的流，污染物指标备注为铬（Cr）
- Chromium: nan
  污染物指标铬（Cr）的末端治理技术是双碱法，其效率为86，末端治理设施实际运行率（k值）计算公式为K=脱硫设施年运行小时数/锅炉年运行小时数。原文件中描述污染物类别为废气，污染物指标为铬（Cr），此处对其进行了匹配工作，将其匹配到LCAflow库里面相最符合的流，污染物指标备注为铬（Cr）
- Chromium: nan
  污染物指标铬（Cr）的末端治理技术是氨法，其效率为86，末端治理设施实际运行率（k值）计算公式为K=脱硫设施年运行小时数/锅炉年运行小时数。原文件中描述污染物类别为废气，污染物指标为铬（Cr），此处对其进行了匹配工作，将其匹配到LCAflow库里面相最符合的流，污染物指标备注为铬（Cr）
- Chromium: nan
  污染物指标铬（Cr）的末端治理技术是烟气循环流化床法，其效率为86，末端治理设施实际运行率（k值）计算公式为K=脱硫设施年运行小时数/锅炉年运行小时数。原文件中描述污染物类别为废气，污染物指标为铬（Cr），此处对其进行了匹配工作，将其匹配到LCAflow库里面相最符合的流，污染物指标备注为铬（Cr）
- Chromium: nan
  污染物指标铬（Cr）的末端治理技术是旋转喷雾干燥法，其效率为86，末端治理设施实际运行率（k值）计算公式为K=脱硫设施年运行小时数/锅炉年运行小时数。原文件中描述污染物类别为废气，污染物指标为铬（Cr），此处对其进行了匹配工作，将其匹配到LCAflow库里面相最符合的流，污染物指标备注为铬（Cr）
- lead: nan
  污染物指标铅（Pb）的末端治理技术是/，其效率为0。原文件中描述污染物类别为废气，污染物指标为铅（Pb），此处对其进行了匹配工作，将其匹配到LCAflow库里面相最符合的流，污染物指标备注为铅（Pb）
- lead: nan
  污染物指标铅（Pb）的末端治理技术是静电除尘，其效率为97.2，末端治理设施实际运行率（k值）计算公式为K=除尘设施年运行小时数/锅炉年运行小时数。原文件中描述污染物类别为废气，污染物指标为铅（Pb），此处对其进行了匹配工作，将其匹配到LCAflow库里面相最符合的流，污染物指标备注为铅（Pb）
- lead: nan
  污染物指标铅（Pb）的末端治理技术是袋式除尘，其效率为99，末端治理设施实际运行率（k值）计算公式为K=除尘设施年运行小时数/锅炉年运行小时数。原文件中描述污染物类别为废气，污染物指标为铅（Pb），此处对其进行了匹配工作，将其匹配到LCAflow库里面相最符合的流，污染物指标备注为铅（Pb）
- lead: nan
  污染物指标铅（Pb）的末端治理技术是电袋组合，其效率为99，末端治理设施实际运行率（k值）计算公式为K=除尘设施年运行小时数/锅炉年运行小时数。原文件中描述污染物类别为废气，污染物指标为铅（Pb），此处对其进行了匹配工作，将其匹配到LCAflow库里面相最符合的流，污染物指标备注为铅（Pb）
- lead: nan
  污染物指标铅（Pb）的末端治理技术是湿法除尘，其效率为70.1，末端治理设施实际运行率（k值）计算公式为K=除尘设施年运行小时数/锅炉年运行小时数。原文件中描述污染物类别为废气，污染物指标为铅（Pb），此处对其进行了匹配工作，将其匹配到LCAflow库里面相最符合的流，污染物指标备注为铅（Pb）
- lead: nan
  污染物指标铅（Pb）的末端治理技术是旋风除尘，其效率为12.1，末端治理设施实际运行率（k值）计算公式为K=除尘设施年运行小时数/锅炉年运行小时数。原文件中描述污染物类别为废气，污染物指标为铅（Pb），此处对其进行了匹配工作，将其匹配到LCAflow库里面相最符合的流，污染物指标备注为铅（Pb）
- lead: nan
  污染物指标铅（Pb）的末端治理技术是脱硝措施。原文件中描述污染物类别为废气，污染物指标为铅（Pb），此处对其进行了匹配工作，将其匹配到LCAflow库里面相最符合的流，污染物指标备注为铅（Pb）
- lead: nan
  污染物指标铅（Pb）的末端治理技术是石灰石-石膏湿法（石灰-石膏湿法），其效率为78.4，末端治理设施实际运行率（k值）计算公式为K=脱硫设施年运行小时数/锅炉年运行小时数。原文件中描述污染物类别为废气，污染物指标为铅（Pb），此处对其进行了匹配工作，将其匹配到LCAflow库里面相最符合的流，污染物指标备注为铅（Pb）
- lead: nan
  污染物指标铅（Pb）的末端治理技术是氧化镁法，其效率为78.4，末端治理设施实际运行率（k值）计算公式为K=脱硫设施年运行小时数/锅炉年运行小时数。原文件中描述污染物类别为废气，污染物指标为铅（Pb），此处对其进行了匹配工作，将其匹配到LCAflow库里面相最符合的流，污染物指标备注为铅（Pb）
- lead: nan
  污染物指标铅（Pb）的末端治理技术是双碱法，其效率为78.4，末端治理设施实际运行率（k值）计算公式为K=脱硫设施年运行小时数/锅炉年运行小时数。原文件中描述污染物类别为废气，污染物指标为铅（Pb），此处对其进行了匹配工作，将其匹配到LCAflow库里面相最符合的流，污染物指标备注为铅（Pb）
- lead: nan
  污染物指标铅（Pb）的末端治理技术是氨法，其效率为78.4，末端治理设施实际运行率（k值）计算公式为K=脱硫设施年运行小时数/锅炉年运行小时数。原文件中描述污染物类别为废气，污染物指标为铅（Pb），此处对其进行了匹配工作，将其匹配到LCAflow库里面相最符合的流，污染物指标备注为铅（Pb）
- lead: nan
  污染物指标铅（Pb）的末端治理技术是烟气循环流化床法，其效率为78.4，末端治理设施实际运行率（k值）计算公式为K=脱硫设施年运行小时数/锅炉年运行小时数。原文件中描述污染物类别为废气，污染物指标为铅（Pb），此处对其进行了匹配工作，将其匹配到LCAflow库里面相最符合的流，污染物指标备注为铅（Pb）
- lead: nan
  污染物指标铅（Pb）的末端治理技术是旋转喷雾干燥法，其效率为78.4，末端治理设施实际运行率（k值）计算公式为K=脱硫设施年运行小时数/锅炉年运行小时数。原文件中描述污染物类别为废气，污染物指标为铅（Pb），此处对其进行了匹配工作，将其匹配到LCAflow库里面相最符合的流，污染物指标备注为铅（Pb）

## Use advice
This dataset is derived from the Pollution Source Census Report and contains information on pollution emissions and related products. However, it does not include data on energy or chemical consumption, nor does it provide information on waste or co-product generation. When utilizing this dataset, please supplement the missing data based on actual conditions before use
该数据集来源于污染源普查报告，包含污染物排放及相关产品信息，但不包含能源或化学品消耗数据，也不提供废弃物或共生产物产生信息。在使用该数据集时，请根据实际情况补充缺失数据后再使用。

## Review details
Inventory: The internal review was done by several iteration steps concerning raw data validation, raw data documentation, representativity, completeness and consistency of modelling with regard to ISO 14040 and 14044.
清单： 内部审查通过几个迭代步骤完成，涉及原始数据验证、原始数据记录、代表性、完整性、与 ISO 14040 和 14044 有关的建模的一致性。

## Data sources
- 第二次全国污染源普查产排污核算系数手册（试用版）,四级代码4430文件，在完整版文件中第5449页
