# Electricity production ; Electricity ; Thermal power (9.1%) + hydropower (82.5%) + wind power (7.0%) + solar power (1.4%)

Dataset: ILCD process, Partly terminated system
Geography: YN-CN
Reference year: 2019
Classification: Energy carriers and technologies / Electricity
LCI method principle: Other
Generated by: Ruoxi Xiong, xiongrx0126@163.com
Owner: Tiangong LCI Data Working Group
Review: Dependent internal review by Tiangong LCI Data Working Group
Amounts: no units in this file; such an amount is in the reference unit of its flow, which a separate flow dataset defines
copyright: false
licenseType: Free of charge for all users and uses

## General comment
Forms of electricity generation include thermal power, hydropower, wind power and solar power

## Time period
Calculated based on data from the 2019 Energy Statistics Yearbook

## Technical purpose
This electricity production process comprises generating electricity through multiple sources: thermal power, hydropower, wind power, and solar power. The contribution of each is 9.1% for thermal, 82.5% for hydro, 7.0% for wind, and 1.4% for solar power respectively. It is used for supplying electricity to various sectors including residential, commercial, industrial, and for public services.

## Reference product
- Electricity: 3.6; calculated

## Outputs
- carbon dioxide: 0.106; calculated
- sulfur dioxide: 1.7e-5; calculated
- Nitrogen oxides: 2.8248e-5; calculated
- Dust (unspecified, from stack): 3.803e-6; calculated

## Data treatment and extrapolations
For the accounting method, please refer to the "Enterprise Greenhouse Gas Emissions Accounting Methods and Reporting Guidelines for Power Generation Facilities". Different forms of power generation and fuel consumption come from Chapter 3 (Energy Production) and Chapter 6 (Regional Energy Balance Sheet) in the "China Energy Statistical Yearbook 2020". The fuel parameters such as low calorific value and carbon content per unit calorific value used to calculate the carbon dioxide emission factor come from the "2019 China Regional Power Grid Carbon Dioxide Baseline Emission Factor Calculation Instructions OM" and the "Enterprise Greenhouse Gas Emission Accounting Method and Reporting Guide for Power Generation Facilities" 》

## Use advice
When utilizing this dataset for Life Cycle Assessment (LCA), users should adhere to the methodologies outlined in the 'Enterprise Greenhouse Gas Emissions Accounting Methods and Reporting Guidelines for Power Generation Facilities'. It is essential to consider the specific energy mix as outlined in the data, and any environmental impacts or carbon dioxide emission factors should be calculated using the parameters provided by the '2019 China Regional Power Grid Carbon Dioxide Baseline Emission Factor OM' and the reporting guidelines. For an accurate assessment, include variations in regional energy production and balance as reported in the relevant chapters of the 'China Energy Statistical Yearbook 2020'.

## Review details
Inventory: The internal review was done by several iteration steps concerning raw data validation, raw data documentation, representativity, completeness and consistency of modelling with regard to ISO 14040 and 14044.

## Data sources
- 熊若熙. 中国电力生产和消费二氧化碳与污染物排放因子核算. (清华大学, 2023).
