# 铝锭铸造 ; 原生铝锭 ; 华中电网 ; 液态原铝

Dataset: ILCD process, Partly terminated system
Geography: CN
Reference year: 2011
Classification: Unit processes / Materials production / Metals and semimetals
Generated by: 谢金良, jinliang.research@gmail.com
Owner: 天工LCI数据工作小组
Review: Dependent internal review by 天工LCI数据工作小组
Amounts: no units in this file; such an amount is in the reference unit of its flow, which a separate flow dataset defines
copyright: false
licenseType: Free of charge for all users and uses

## General comment
结合不同工艺的电解铝产量分布比例所计算出的国内电解铝生产过程CO2排放因子的加权平均值。从氧化铝到铝锭。

## Geography
南方电网

## Time period
论文发表年

## Technical purpose
通过铝锭铸造工艺生产的原生铝锭通常用于建筑、交通、包装和电气行业等多种应用中。这些锭的最终产品示例包括用于车辆的铝零件、建筑结构材料、罐头、箔材和电线。数据集特别适用于在中华电网地理上下文中使用氧化铝作为原料生产的原生铝，并反映了该地区制造过程中的CO2排放因子。

## Reference product
- aluminium, primary, ingot: 1000; measured

## Outputs
- carbon dioxide (fossil),carbon dioxide (fossil): 1038.1; measured

## Data selection and combination
在对全国 氧化铝、电解铝企业生产情况进行充分梳理的基础 上，按照覆盖所有代表性工艺、代表性产能原则，并充 分考虑产能分布、企业性质等因素，重点选择了河南、 山东、广西等典型地区的典型原铝冶炼企业，开展深入实地调研，并形成以 2011 年数据为主体的氧化铝、电解铝碳排放因子数据库。氧化铝生产数据库包括原 辅料消耗及废弃物产生、工艺技术与设备、工序物料 能源消耗、自备热电厂二次能源生产等 4 个子库。详见文献来源表1。

## Use advice
使用此数据集时，必须注意地理相关性到中华电网和氧化铝到铝锭的特定生产过程的方法学方面。CO2排放因子是基于不同铝土矿电解过程生产分布比例的加权平均值。数据来源于对全国氧化铝和电解铝生产的全面审查，重点关注河南、山东和广西等地区典型的原生铝冶炼企业的数据，应谨慎使用。电解铝生产过程核算范围包括碳阳极消耗、PFCs排放以及购买的电力生产过程。有关更多详细信息，请参阅来源表1，并在应用此数据时考虑技术实践的更新或地区变化。

## Review details
清单： 内部审查通过几个迭代步骤完成，涉及原始数据验证、原始数据记录、代表性、完整性、与 ISO 14040 和 14044 有关的建模的一致性。

## Data sources
- 张文娟，李会泉，陈波，李强，韩永鹏 & 孙振华. 我国原铝冶炼行业温室气体排放模型. 环境科学研究 vol. 26 1132–1138 (2013).
