# 工业废水处理;电渗析、螺旋缠绕

Dataset: ILCD process, Unit process, single operation
Geography: CN
Reference year: 2023
Classification: End-of-life treatment / Waste water treatment
Functional unit: 1 t sodium chloride
Generated by: 陆嘉麒, wilsherelu@foxmail.com
Owner: 天工LCI数据工作小组
Review: Dependent internal review by 天工LCI数据工作小组
Amounts: no units in this file; such an amount is in the reference unit of its flow, which a separate flow dataset defines
copyright: false
licenseType: Free of charge for all users and uses

## General comment
该数据集代表了中国常见的工业废水处理单元过程，通过螺旋缠绕电渗析模块从1吨工业废水中提取1吨氯化钠。提纯后的氯化钠可用于化工行业的多种应用，例如作为氯碱过程的原料、融雪剂、水处理剂、农业和食品加工等。

## Reference product
- sodium chloride: 1000; article inperiodical
  产品盐

## Inputs
- Electrodialysis Component: 0.0073; article inperiodical
  ED 组件
- electricity mix: 464.148; article inperiodical
  过程电耗
- Water (fresh water): 370370; article inperiodical
  原水

## Outputs
- High-concentration saline wastewater: 74074; article inperiodical
  浓水（高含盐废水）
- Deionized Water: 290296; article inperiodical
  淡水(去离子水)

## Use advice
在使用此数据集进行生命周期评估时，重要的是要考虑分析的范围和边界。确保该单元过程在中国的地理环境中适用。核算电渗析过程中的能源消耗和任何化学添加剂的使用。考虑此处理过程中产生的废物和副产品的环境影响。如果将数据推广到预期范围之外，可能需要进行调整，以充分反映本地条件。

## Review details
清单： 内部审查通过几个迭代步骤完成，涉及原始数据验证、原始数据记录、代表性、完整性、与 ISO 14040 和 14044 有关的建模的一致性。

## Data sources
- Xue, N. et al. Carbon footprint analysis and carbon neutrality potential of desalination by electrodialysis for different applications. Water Res. 232, 119716 (2023).
