# 工厂电力生产排放｜电力｜生物质锅炉（15MW）

Dataset: ILCD process, Unit process, single operation
Geography: CN
Reference year: 2020
Classification: Energy carriers and technologies / Heat and steam
Functional unit: Taking 1 ton of straw as the functional unit
LCI method principle: Consequential
Generated by: 刘超硕, liucs22@mails.jlu.edu.cn
Owner: 天工LCI数据工作小组
Review: Dependent internal review by 天工LCI数据工作小组
Amounts: no units in this file; such an amount is in the reference unit of its flow, which a separate flow dataset defines
copyright: false
licenseType: Free of charge for all users and uses

## General comment
现场排放是指工厂运行产生的排放。

## Technical purpose
利用稻草作为燃料的15MW生物质锅炉所发电的电力主要用于生产设备内的电力供应。它作为现场能源来源，可以满足依赖生物质作为可再生能源选项的行业中的各种操作需求。

## Reference product
- electricity from waste incineration: 435.276; article inperiodical

## Inputs
- Corn straw: 1000; article inperiodical
- Electricity: 10.26; article inperiodical
- Diesel: 4.43; article inperiodical
- process water: 1194; article inperiodical

## Outputs
- sulfur dioxide: 0.25115; article inperiodical
- nitrogen dioxide: 0.20847; article inperiodical

## Use advice
在使用此数据集进行生命周期评估时，确保系统边界包括这种现场发电及其相关排放。功能单位定义为燃烧1吨稻草产生的排放；因此，向其他数量的外推应谨慎进行。如果电力用于多个过程或产品，则必须相应地分配排放。建议参考当前的技术标准和法规，以保持数据随时间的相关性。

## Review details
清单： 内部审查通过几个迭代步骤完成，涉及原始数据验证、原始数据记录、代表性、完整性、与 ISO 14040 和 14044 有关的建模的一致性。

## Data sources
- Yang, Y., Ni, J.-Q., Zhou, S. & Xie, G. H. Comparison of energy performance and environmental impacts of three corn stover-based bioenergy pathways. Journal of Cleaner Production 272, 122631 (2020).
