# 修复后土壤;PCE污染土壤;强化生物降解

Dataset: ILCD process, Unit process, black box
Geography: BE
Reference year: 2019
Classification: Unit processes / Other Services / Repair and maintenance
Functional unit: The functional unit was defined for this study as all the relevant products and processes needed for the remediation of a site contaminated with volatile hydrocarbons with a pollution load of 3300 kg PCE, to eliminate the potential human risk.
Generated by: 杨欣桐, yangxt@caep.org.cn
Owner: 天工LCI数据工作小组
Review: Dependent internal review by 天工LCI数据工作小组
Amounts: no units in this file; such an amount is in the reference unit of its flow, which a separate flow dataset defines
copyright: false
licenseType: Free of charge for all users and uses

## General comment
使用较少的氧化剂和更多的乳酸作为有机碳源进行刺激的生物降解。更侧重于刺激污染物的生物降解，以减少污染负荷。

## Geography
该场地涉及对佛兰德斯人口密度较高的的市中心一个前干洗场所（面积505m2）的修复。

## Time period
文献发表时间

## Technical purpose
此修复后土壤数据集适用于受全氯乙烯（PCE）污染恢复性环境工程，PCE是一种挥发性碳氢化合物。该修复过程特别设计以激活生物降解，使用较少量的氧化剂和更多的乳酸作为有机碳源，以加速污染物分解，缓解污染。此过程特别适用于市区人口密集的前干洗店或其他PCE污染场所，偏好使用加强生物降解法，因其具有较低的环境影响和可持续性。

## Reference product
- Remedied site: 505; measured

## Inputs
All rows: measured
- Electricity: 2.90304e6
  Electricity use throughout project
- Tap Water: 9216
  Water use throughout project
- Hydrogen peroxide,Hydrogen peroxide: 616
  Hydrogen peroxide use
- Tap Water: 1144
  throughout project
- Digger: 1533
  Excavation
- transport in t*km: 119300
  Transport excavated soil
- Diesel,Diesel: 105
  Cleaning excavated soil
- Electricity: 41040
  Cleaning excavated soil
- Polyethylene,Polyethylene: 663
  Foil to cover after excavation
- Plastic Film: 663
  Foil to cover after excavation
- Digger: 2765
  Pipe work
- Activated Carbon: 2000
  Pump and Treat
- Activated Carbon: 16000
  Soil vapor extraction
- Diesel,Diesel: 26046
  Coil drilling throughout the project
- Tap Water: 228
  Coil drilling throughout the project
- Maltose Syrup: 456
  Stimulated biological degradation
- Road Transport,Road Transport: 1.089e7, 5.13e6 (2 entries)
  Transport of workers during project
- Contaminated Site: 505

## Use advice
在用此数据集进行生命周期评估时，确保污染范围和修复方法与案例研究的参数相吻合：市中心人口密集区一处面积为505平方米、污染负荷为3300公斤PCE的前干洗场所。考虑地区背景，因为该过程是针对佛兰德斯的条件而设计的。生命周期评估模型应反映氧化剂使用减少和侧重于使用乳酸作为碳源的加强生物降解。功能单位应涵盖消除PCE污染相关潜在人类健康风险所需的所有产品和过程。

## Review details
清单： 内部审查通过几个迭代步骤完成，涉及原始数据验证、原始数据记录、代表性、完整性、与 ISO 14040 和 14044 有关的建模的一致性。

## Data sources
- Huysegoms L ,Rousseau S ,Cappuyns V . Chemical or Natural? Including LCA in Social CBA to Compare Remediation Alternatives for a Dry-Cleaning Facility [J]. Sustainability, 2019, 11 (7): 1975-1975.
