# 电力生产 ; 混合电力 ; 河北

Dataset: ILCD process, Unit process, single operation
Geography: HEB-CN
Reference year: 2019
Classification: Unit processes / Energy carriers and technologies / Electricity
Generated by: 熊若熙, xiongrx0126@163.com
Owner: 天工LCI数据工作小组
Review: Dependent internal review by 天工LCI数据工作小组
Amounts: no units in this file; such an amount is in the reference unit of its flow, which a separate flow dataset defines
copyright: false
licenseType: Free of charge for all users and uses

## General comment
混合电力产生形式包括火力发电、水力发电、风力发电、核能发电和太阳能发电

## Technical purpose
河北混合电力生产所生成的电力可用于多种用途，如居民住宅、商业、工业电源供应，以及可能被用于电动车辆和公共设施。该过程代表了多种能源来源（包括火力、水力、风力、核能和太阳能发电）对区域电网的贡献。

## Reference product
- Electricity: 3.6; missing unimportant
  [{'text': '3.6', 'type': 'text'}]

## Inputs
All rows: missing unimportant
- electricity for thermal power: 3.05202
  [{'text': '3.6', 'type': 'text'}]
- electricity from hydroelectric power plant: 0.01719
  [{'text': '3.6', 'type': 'text'}]
- electricity for nuclear power: 0
  [{'text': '3.6', 'type': 'text'}]
- electricity from wind power: 0.341683
  [{'text': '3.6', 'type': 'text'}]
- electricity for solar power: 0.189108
  [{'text': '3.6', 'type': 'text'}]

## Use advice
在使用此数据集进行生命周期评估时，用户应考虑能源组成的具体比例及其相应的排放和开采影响。重要的是要考虑能源生产的区域差异以及能源组合随时间的变化。此数据应定期更新，以反映河北省能源组合的当前状态。还应考虑包括能源传输、损耗以及基础设施终生命阶段等上游和下游过程。

## Review details
清单： 内部审查通过几个迭代步骤完成，涉及原始数据验证、原始数据记录、代表性、完整性、与 ISO 14040 和 14044 有关的建模的一致性。

## Data sources
- 能源统计年鉴2020
