# 土壤和地下水修复;原位;土壤淋洗;废水处理

Dataset: ILCD process, Unit process, single operation
Geography: KR
Reference year: 2023
Classification: Unit processes / Other Services / Repair and maintenance
Generated by: 黄悦, huangyue@caep.org.cn
Owner: 天工LCI数据工作小组
Review: Dependent internal review by 天工LCI数据工作小组
Amounts: no units in this file; such an amount is in the reference unit of its flow, which a separate flow dataset defines
copyright: false
licenseType: Free of charge for all users and uses

## General comment
使用沉淀池、氢氧化钠等处理废水

## Geography
Incheon City, approximately 50 km east of Seoul, South Korea

## Technical purpose
所描述的土壤和地下水修复过程用于通过原位土壤清洗技术处理受污染的土壤和地下水。这涉及机械清洗土壤以去除污染物，随后使用沉淀池和氢氧化钠处理从此过程中产生的废水，以确保其在排放或进一步使用之前满足环境标准。

## Reference product
- waste water - treated: 1; measured

## Inputs
- Electricity: 97188.8; measured
- sodium hydroxide: 75924; measured
- waste water - untreated: 1; measured

## Outputs
- carbon dioxide (fossil): 116000; measured
- particles (PM10): 0.103; measured
- sulfur oxides: 44; measured
- nitrous oxide: 0.327; measured

## Data treatment and extrapolations
通过使用SiteWiseTM第2版分别计算每个阶段的环境足迹来分析总环境足迹

## Use advice
使用此数据的用户应确保其反映了预期地理区域的适用条件，因为数据是在韩国首尔东部约50公里的仁川市收集的。应根据生命周期阶段的相关性考虑辅助过程的包含或排除。在将此数据与其他LCA数据集整合时，确保方法论上的一致性，特别是在模拟使用阶段行为和潜在的回收过程时。这个数据集使用了SiteWiseTM第2版来计算环境足迹，评估类似过程的足迹时应考虑到这一点。

## Review details
清单： 内部审查通过几个迭代步骤完成，涉及原始数据验证、原始数据记录、代表性、完整性、与 ISO 14040 和 14044 有关的建模的一致性。

## Data sources
- Kim, D.-H., Hwang, B.-R., Moon, D.-H., Kim, Y.-S. & Baek, K. Environmental assessment on a soil washing process of a Pb-contaminated shooting range site: a case study. Environ Sci Pollut Res 20, 8417–8424 (2013).
