# 市政污泥处理与处置;湿污泥 含水率80%;填埋

Dataset: ILCD process, Unit process, single operation
Geography: XM-FJ-CN
Classification: Unit processes / End-of-life treatment / Waste water treatment
Functional unit: The system boundary is defined as the transport of wet sludge (80% moisture content) to the sludge treatment or disposal point to form a complete process route.
Generated by: 金思甜, 2331276@tongji.edu.cn
Owner: 天工LCI数据工作小组
Review: Dependent internal review by 天工LCI数据工作小组
Amounts: no units in this file; such an amount is in the reference unit of its flow, which a separate flow dataset defines
copyright: ['opt4ROkqig']
licenseType: Free of charge for all users and uses

## General comment
在整个工艺路线中，各环节的占地面积、能耗、温室气体、气体污染物排放均纳入环境影响评价范畴之内。

## Technology and included processes
污泥填埋过程涉及到压实机、推土机等机械。

## Technical purpose
所描述的工艺用于含水率为80%的市政污泥的处理与处置。特别是将湿污泥运输到处理或处置设施，进而进行填埋。这主要适用于处理大量市政污泥的废物管理设施。

## Reference product
- Sludge: 1000; input; estimated
  1t湿污泥( 含水率为 80% )

## Inputs
- Diesel: 4.2; measured

## Outputs
- methane (biogenic),methane (biogenic): 19.7; measured
  原文未区分biogenic和fossil，根据专家判断此处为biogenic。

## Use advice
使用此生命周期评估数据集时，用户应确保数据严格对应于含水率为80%的市政污泥运输至填埋场。应注意运输距离、运输方式和当地填埋作业情况，因为这些因素可能会显著影响环境影响。为了准确建模，还应考虑污泥预处理过程的包含或排除以及物料回收或循环再利用的可能性。

## Review details
清单： 内部审查通过几个迭代步骤完成，涉及原始数据验证、原始数据记录、代表性、完整性、与 ISO 14040 和 14044 有关的建模的一致性。

## Data sources
- 刘洪涛,郑海霞,陈俊,等. 城镇污水处理厂污泥处理处置工艺生命周期评价[J]. 中国给水排水,2013,29(6):11-13. DOI:10.3969/j.issn.1000-4602.2013.06.003.
