# Groundwater remediation ; In-situ remediation ; Cement grout vertical barrier ; Engineering implementation ; Cement grout barrier

Dataset: ILCD process, Unit process, single operation
Geography: US
Classification: Other Services / Repair and maintenance
Generated by: Xiao Meng, xiaomeng@mail
Owner: Tiangong LCI Data Working Group
Review: Dependent internal review by Tiangong LCI Data Working Group
Amounts: no units in this file; such an amount is in the reference unit of its flow, which a separate flow dataset defines
licenseType: Free of charge for all users and uses

## General comment
Form a cement grout vertical barrier that can prevent the migration of radioactive isotopes from contaminated soil to groundwater, with a barrier capacity of 83 cubic meters.

## Geography
For this project, a Superfund location at the Brookhaven National Laboratory (BNL) is studied. This particular case was chosen because it is representative of the scale and scenario where soil grouting would be used. It is also one of only a few sites where CS grouting has been used for full scale remediation. BNL has served as a production facility for research and development of radioisotopes for decades. The design of some of the facilities failed to provide adequate safety measures against the spread of radioactivity to the soils and groundwater beneath them and as a result, BNL was added to the Superfund National Priorities List in 1989.

## Technical purpose
The industrial process described is used for environmental remediation purposes, specifically for in-situ groundwater remediation at contaminated sites. It is intended for forming a cement grout vertical barrier to prevent the migration of radioactive isotopes from contaminated soil into the groundwater. This technique is relevant for use in large-scale environmental clean-up projects, such as those classified under the Superfund program, where soil and groundwater contamination by radioisotopes has occurred due to inadequate safety measures in the past.

## Reference product
- Cement slurry barrier: 83; measured
  使用该水泥液浆屏障，所能阻隔放射性同位素向地下水迁移的污染土壤量

## Inputs
- cement: 22970; measured
- Electricity: 30240; measured

## Use advice
When applying this data set for modeling and assessment, users should ensure that the scale and scenarios of the environmental remediation align with those of a Superfund location. Specific attention should be paid to the volume of the cement grout barrier (83 cubic meters in the case study) and the effectiveness of the barrier against the particular radioactive isotopes present. Users must consider the technological applicability of the soil grouting method along with its implementation challenges. Data should only be used for in-situ remediation cases where similar containment methodologies are applicable and feasible.

## Review details
Inventory: The internal review was done by several iteration steps concerning raw data validation, raw data documentation, representativity, completeness and consistency of modelling with regard to ISO 14040 and 14044.

## Data sources
- Gallagher, P. M., Spatari, S. & Cucura, J. Hybrid life cycle assessment comparison of colloidal silica and cement grouted soil barrier remediation technologies. Journal of Hazardous Materials 250–251, 421–430 (2013).
