# Advanced hydrometallurgy process fo ternary lithium batteries

Dataset: ILCD process, Unit process, single operation
Geography: CN
Reference year: 2020
Classification: Materials production / Metals and semimetals
Functional unit: using 1 kWh as the functionalunit
Generated by: Pengfei, pengfei24@email.ncu.edu.cn
Owner: Tiangong LCI Data Working Group
Review: Dependent internal review by Tiangong LCI Data Working Group
Amounts: no units in this file; such an amount is in the reference unit of its flow, which a separate flow dataset defines
copyright: false
licenseType: Free of charge for all users and uses

## General comment
Before adopting the wet process for material recovery, the EoL ternary lithium batteries are safely discharged, disassembled, pyrolyzed, mechanically crushed, and sorted to get powdered lithium-containing waste. Lithium-containing material is added to leaching solvent for leaching, filtered and separated to get lithium-containing solution, added to the purification agent for reaction, filtered, concentrated, and under certain reaction conditions, added to the precipitation agent fully reacted to crystallization and precipitation, filtered, washed and dried to get battery-grade lithium carbonate.Translated with DeepL

## Technical purpose
The advanced hydrometallurgy process for ternary lithium batteries described is utilized in the recycling of end-of-life (EoL) battery materials. Specifically, it is used to recover high-purity lithium carbonate, which is a critical component in the manufacture of new battery cells for consumer electronics, electric vehicles, and energy storage systems.

## Reference product
- EoL NCM battery: 3.6; input; measured

## Inputs
- Sodium carbonate（95%）: 1.43; article inperiodical
  Soda (Na2CO3)
- Citric Acid: 16.7; software or database
  Citric acid，New process based on GREET/CN
- sodium hydroxide: 2.08; article inperiodical
- Electricity: 4.58; article inperiodical
- carbon dioxide: 0.16; article inperiodical
- natural gas: 11.79, 11.79 (2 entries); article inperiodical

## Outputs
- nickel: 0.95; article inperiodical
- manganese: 0.3; article inperiodical
- Lithium carbonate: 0.98; measured
- cobalt: 0.32; measured
- copper: 1.01; measured
- aluminium: 0.8; measured

## Data selection and combination
The data come from multiple papers and are difficult to distinguish.

## Data treatment and extrapolations
calculation basis is GEB2016 (12.0 × 1024 sej)

## Use advice
Users should apply this data set considering the specific end-of-life scenario for ternary lithium batteries, taking into account the energy consumption expressed in GEB2016 (12.0 × 1024 sej) per 1 kWh of battery output. The data should be used to model the environmental impacts of the hydrometallurgy process accurately. It is important to consider the completeness of the data from various papers and ensure methodological alignment with the functional unit of 1 kWh during the life cycle assessment.

## Review details
Inventory: The internal review was done by several iteration steps concerning raw data validation, raw data documentation, representativity, completeness and consistency of modelling with regard to ISO 14040 and 14044.

## Data sources
- Wang, Y. et al. Environmental impact assessment of second life and recycling for LiFePO4 power batteries in China. Journal of Environmental Management 314, 115083 (2022).
