# Soil and groundwater remediation;In-situ;groundwater In-situ Chemical Oxidation;Injection well

Dataset: ILCD process, Unit process, single operation
Geography: CA
Reference year: 2007
Classification: Other Services / Repair and maintenance
Generated by: Wang Ning, wang_ning@caep.org.cn
Owner: Tiangong LCI Data Working Group
Review: Dependent internal review by Tiangong LCI Data Working Group
Amounts: no units in this file; such an amount is in the reference unit of its flow, which a separate flow dataset defines
copyright: false
licenseType: Free of charge for all users and uses

## General comment
Injection well construction

## Geography
The contaminated area was located 600 m from a river shore in the northern part of the prov-ince of Quebec， Canada.

## Technology and included processes
Construction of injection wells using polyvinyl chloride, bentonite, concrete, quartz sand, gravel, diesel fuel, etc.

## Technical purpose
This in-situ chemical oxidation process is intended for the remediation of contaminated soil and groundwater. It is specifically applied to sites where direct treatment in the subsurface is feasible. In this case, it is used for cleaning up an area that is located 600 m away from a river shore in the northern part of Quebec, Canada, where contamination has been identified.

## Reference product
- injection well: 1; estimated

## Inputs
All rows: estimated
- Diesel: 281
- cement: 5117
- bentonite: 1676
- sand: 352
- gravel: 2076
- Polyvinyl chloride: 513

## Use advice
Users of this data set should consider the specific environmental conditions of the contaminated site for which the data is applied. Attention should be given to the proximity of water bodies, such as the mentioned river shore, and local geological and hydrogeological conditions. It is crucial to adapt the design of the injection wells and the chemical oxidation process to the particular contaminants and soil characteristics. Documentation of the site's initial conditions, treatment effectiveness, and post-treatment monitoring data is advisable for comprehensive assessment.

## Review details
Inventory: The internal review was done by several iteration steps concerning raw data validation, raw data documentation, representativity, completeness and consistency of modelling with regard to ISO 14040 and 14044.
