# 锂精矿生产 ; 锂辉石精矿（氧化锂含量2.4%） ; 粉碎 ; 芬兰锂辉石矿（氧化锂含量0.6%）

Dataset: ILCD process, Unit process, single operation
Geography: FI
Reference year: 2016
Classification: Unit processes / Materials production / Non-energetic raw materials
Generated by: 孙鑫, xs389@cornell.edu
Owner: 天工LCI数据工作小组
Review: Dependent internal review by 天工LCI数据工作小组
Amounts: no units in this file; such an amount is in the reference unit of its flow, which a separate flow dataset defines
licenseType: Free of charge for all users and uses

## General comment
本研究审查的未来供应路线是基于从几家锂矿开采和加工公司（Lithium Americas Corp.、Minera Salar Blanco、Nemaska Lithium Inc.和Keliber Oy）的技术报告和环境影响评估报告中收集的数据，这些公司的锂资产正处于不同的开发阶段。这些锂资产正处于不同的开发阶段。预计在 5-10 年内投入运营。这些以卤水为基础的来源的锂浓度较低，也反映了当前供应路线中卤水的未来锂品位。

## Technology and included processes
加拿大 Whabouchi 矿区和芬兰中部 Ostrobothnia 地区的运营技术报告中描述了未来的闪锌矿供应路线。虽然加拿大和芬兰都不是锂储量最大的国家（美国地质调查局，2021 年），但它们代表了新锂供应的范例，可能会随着锂需求的增加而被开采。Whabouchi矿区的钠长石中平均锂浓度约为0.7%，而在中奥斯特罗布特尼亚地区则为0.6%。在这些未来的供应路线中，浓缩的磷灰石会直接转化为 LiOH⋅H2O，而不会产生 Li2CO3 作为中间产物。代表加拿大和芬兰采矿作业的数据集分别基于为内玛斯卡锂业公司（Golder Associates，2013 年；Laferri´ere 等人，2012 年；内玛斯卡锂业公司，2013 年；SENES 咨询有限公司，2013 年）和 Keliber Oy（Keliber Oy，2020a，b；Sweco，2016 年）编写的技术报告。在内玛斯卡锂业公司的报告中，没有关于锂OH⋅H2O 生产单元工艺（来自浓缩锂辉石）的化学品投入的具体数据。因此，在比较不同的锂供应时，Keliber Oy 报告中的化学品用量被用作替代数据。

## Technical purpose
此数据集代表了始于芬兰中区奥斯特罗博尼亚含氧化锂（Li2O）0.6%的锂辉石矿的锂辉石精矿生产过程，其产物氧化锂含量为6%。从该工艺得到的锂精矿通常用于制造锂离子电池，这类电池广泛应用于便携式电子产品、电动车辆以及电网储能解决方案。此外，它还可用于生产高纯度的锂化合物，用于制药及其他特殊的工业应用中。

## Reference product
- Spodumene concentrate (6.3% Li2O): 1000; measured

## Inputs
All rows: measured
- Spodumene（0.6% Li2O）: 3940
- freshwater,freshwater: 9.88
- Diesel: 1740
- Electricity: 1000.8
- sodium hydroxide: 1.94
- Sulfuric acid: 0.606
- Isopropyl Ethyl Thionocarbamate: 6.3
- Polyacrylamide,Polyacrylamide: 0.0152

## Use advice
用户需注意，此数据集未包括原材料的生产过程以及占非常小部分（小于 1%）的能源流。为了精确的生命周期评价（LCA）建模，对这些排除内容必须加以注意，尤其是当这一过程在LCA模型中占有重要部分时。此数据集最适用于计算包含锂基成分产品的环境影响的LCA中。在进行全面的生命周期评价时，可能需要与其他数据集合并使用，这些数据集包括运输、进一步加工以及产品的生命周期终点阶段。

## Review details
清单： 内部审查通过几个迭代步骤完成，涉及原始数据验证、原始数据记录、代表性、完整性、与 ISO 14040 和 14044 有关的建模的一致性。

## Data sources
- Chordia, M., Wickerts, S., Nordelöf, A. & Arvidsson, R. Life cycle environmental impacts of current and future battery-grade lithium supply from brine and spodumene. Resources, Conservation and Recycling 187, 106634 (2022).
