# Catalyticgasolineadsorptiondesulfurizationregenerationfluegas|Refinedgasoline|Catalyticcrackedgasoline|Adsorption|All sizes / 催化汽油吸附脱硫再生烟气|精制汽油|催化裂化汽油|吸附|所有规模

Dataset: ILCD process, Unit process, single operation
Geography: CN
Reference year: 2019
Classification: Energy carriers and technologies / Other non-renewable fuels
Generated by: The data was created by the Office of the Second National Pollution Source Census of the Ministry of Ecology and Environment, and the data was organized by the TianGong Plan team for ILCD format / 生态环境部第二次全国污染源普查工作办公室创建数据，天工计划团队常慧敏整理数据为ILCD格式
Owner: Tiangong LCI Data Working Group / 天工LCI数据工作小组
Amounts: no units in this file; such an amount is in the reference unit of its flow, which a separate flow dataset defines
copyright: false
licenseType: Free of charge for all users and uses

## Technology and included processes
the Technical of end-of-pipe management technology for pollution particles (PM2.5 - PM10)isBag filter，Its Technical efficiency of end-of-pipe management92

## Reference product
- Slurry oil: 1000; input; calculated
  源文件中描述为为催化裂化汽油，此处对其进行了匹配工作，将其匹配到LCAflow库里面相最符合的流，污染物指标备注为工业废气量

## Outputs
All rows: calculated
- Exhaust gas: 52.6
  污染物指标工业废气量的末端治理技术是/，其效率为0，末端治理设施实际运行率（k值）计算公式为k=工艺废气净化装置运行时间/正常生产时间。原文件中描述污染物类别为废气，污染物指标为工业废气量，此处对其进行了匹配工作，将其匹配到LCAflow库里面相最符合的流，污染物指标备注为工业废气量
- sulfur dioxide: 2e-5
  污染物指标二氧化硫的末端治理技术是其他（氢氧化钠法）脱硫，其效率为95，末端治理设施实际运行率（k值）计算公式为k=工艺废气净化装置运行时间/正常生产时间。原文件中描述污染物类别为废气，污染物指标为二氧化硫，此处对其进行了匹配工作，将其匹配到LCAflow库里面相最符合的流，污染物指标备注为二氧化硫
- sulfur dioxide: 2e-5
  污染物指标二氧化硫的末端治理技术是氧化镁法脱硫，其效率为95，末端治理设施实际运行率（k值）计算公式为k=工艺废气净化装置运行时间/正常生产时间。原文件中描述污染物类别为废气，污染物指标为二氧化硫，此处对其进行了匹配工作，将其匹配到LCAflow库里面相最符合的流，污染物指标备注为二氧化硫
- particles (PM2.5 - PM10): 3e-5
  污染物指标颗粒物的末端治理技术是静电除尘，其效率为90，末端治理设施实际运行率（k值）计算公式为k=工艺废气净化装置运行时间/正常生产时间。原文件中描述污染物类别为废气，污染物指标为颗粒物，此处对其进行了匹配工作，将其匹配到LCAflow库里面相最符合的流，污染物指标备注为颗粒物
- particles (PM2.5 - PM10): 3e-5
  污染物指标颗粒物的末端治理技术是其他（湿式电除尘），其效率为90，末端治理设施实际运行率（k值）计算公式为k=工艺废气净化装置运行时间/正常生产时间。原文件中描述污染物类别为废气，污染物指标为颗粒物，此处对其进行了匹配工作，将其匹配到LCAflow库里面相最符合的流，污染物指标备注为颗粒物
- particles (PM2.5 - PM10): 2.4e-5
  污染物指标颗粒物的末端治理技术是袋式除尘，其效率为92，末端治理设施实际运行率（k值）计算公式为k=工艺废气净化装置运行时间/正常生产时间。原文件中描述污染物类别为废气，污染物指标为颗粒物，此处对其进行了匹配工作，将其匹配到LCAflow库里面相最符合的流，污染物指标备注为颗粒物

## Data sources
- 第二次全国污染源普查产排污核算系数手册（试用版）,二级代码25,四级代码2511文件，在完整版文件中第4090页
