# Anoxic/Oxic process

Dataset: ILCD process, Unit process, single operation
Geography: HLJ-CN
Classification: Materials production / Other mineralic materials
Generated by: HUANG Runyao, runyaoh@163.com
Review: Dependent internal review by Tiangong LCI Data Working Group
Amounts: no units in this file; such an amount is in the reference unit of its flow, which a separate flow dataset defines

## Geography
Ashihe River Watershed

## Reference product
- Wastewater: 1; input; article inperiodical

## Inputs
- Electricity: 1.9836; article inperiodical
- Polyferric chloride: 0.0016; article inperiodical

## Outputs
- chemical oxygen demand: 250; article inperiodical

## Review details
Inventory: The internal review was done by several iteration steps concerning raw data validation, raw data documentation, representativity, completeness and consistency of modelling with regard to ISO 14040 and 14044.

## Data sources
- Optimization of wastewater treatment strategies using life cycle assessment from a watershed perspective
