# 变电站的建设和运营;110kV户内变电站;A2-6设计方案

Dataset: ILCD process, Partly terminated system
Geography: HA-JS-CN
Reference year: 2021
Valid until: 2046
Classification: Unit processes / Systems / Construction
Generated by: 王宇轩, wyx135230@163.com
Owner: 天工LCI数据工作小组
Review: Dependent internal review by 天工LCI数据工作小组
Amounts: no units in this file; such an amount is in the reference unit of its flow, which a separate flow dataset defines
copyright: false
licenseType: Free of charge for all users and uses

## General comment
采用全生命周期碳足迹模型对110kV变电站方案中的运行阶段和建设阶段碳排放量进行量化。其中运行过程碳排放包括了维护过程的碳排放，建设碳排放包括了建材的生产以及设备的生产。

## Geography
文中未明确说明该变电站所处的地理位置，选取该作者所在公司的地理位置

## Time period
文章未明确说明数据集的起始时间，选取文献发表时间作为有效起始时间，全生命周期为25年，以2年为有效时间段

## Technology and included processes
运行阶段：1.变电站站用负荷耗能：变电站内设备正常运行供电导致的能 耗，一般为交流负荷、直流负荷、USP负荷。2.电气设备自耗能：变电站中带有线圈的电气设备及有阻抗的元 件在正常工作中产生的电能损耗，属于非设计性 的不可控损耗。3.六氟化硫的排放：在电力行业中被广泛用作高压绝缘和灭弧介质，近年来在中 压开关柜、环网柜中也得到越来越广泛的应用。4.运维过程碳排放：一个人口规模 300 万左右的城市中，传统变电站运维频率为每 月 4 次，变电站距运维中心的距离平均为 30 km。建设阶段：1.变压器矿物油:常规 A2-6 方案中有 2 台 50 MVA 的主变，每台需 矿物油约 22 t，每吨在使用过程中产生碳排放约 1.23 t，共产生碳排放约 54 t。变压器油在运行过 程中补充的量和建设时灌装的量相比很小，可忽略其带来的影响。2.设备原材料。3.建筑原材料：常规 A2-6 方案装配式变 电站建设所需钢材约为 460 t，水泥为 968 t

## Technical purpose
110kV户内变电站依据A2-6设计方案，用于电网中电能的变换与分配。该变电站对于管理大约300万人口城市的电力供应起着关键作用。该变电站专为室内使用设计，此举意在适用于因环境或物流考虑需要最小化物理占用面积或受保护安装的地区。

## Reference product
- Transformer Substation: 1; estimated
  110kV户内变电站，A2-6建设方案

## Inputs
All rows: estimated
- Mineral Oil: 44000
  常规 A2-6 方案中有 2 台 50 MVA的主变，每台需矿物油约22 t。
- copper: 55500
  A2-6 方案 2 台主变原材料中铜 28 t；全站 GIS 原材料中铜 3.3 t；全站开关柜铜 24.2 t
- Steel sections: 76400
  常规A2-6方案2台主变原材料中其他钢材50 t；全站GIS 原材料中钢 2.2 t；全站开关柜用钢10.8 t
- Steel Sheet: 63000
  A2-6 方案 2 台主变原材料中硅钢片 63 t，硅钢片实质上是硅的质量分数为0．5％～5％的极低碳钢板，以已有的流代替
- aluminium: 16600
  全站 GIS 原材料中铝 16.6 t
- Steel sections: 460000
  常规 A2-6 方案装配式变 电站建设所需钢材约为 460 t
- Concrete: 968000

## Outputs
- carbon dioxide (fossil): 353825; calculated
  按一年记，运行阶段碳排放。根据专家研判，此处为二氧化碳（化石源）
- carbon dioxide (fossil): 2.92478e6; calculated
  按一年记，建设阶段碳排放。根据专家研判，此处为二氧化碳（化石源）

## Data selection and combination
从《IPCC 2006 国家温室气体清单指南》与相关论文中选择合适的碳排放因子等数据。建材等原料用量依据A2-6方案得出

## Use advice
在使用110kV户内变电站A2-6设计方案的生命周期评估（LCA）数据时，应注意地理代表性问题，因为数据基于作者所在公司的地理位置，而非变电站实际位置。数据集的起始时间与文献发表时间一致，生命周期被认为是25年，并推荐每2年进行一次分析。用户应注意包括建筑和运营阶段排放的数据，强调与变电站运营相关的能耗（站用负荷能耗、电气设备自耗能）和维护程序。变电站运行过程中变压器油的补充影响相比建设初期注入量被认为是可以忽略的。排放因子应根据《IPCC 2006国家温室气体清单指南》或与项目区域背景相关的学术工作调整。

## Review details
清单： 内部审查通过几个迭代步骤完成，涉及原始数据验证、原始数据记录、代表性、完整性、与 ISO 14040 和 14044 有关的建模的一致性。

## Data sources
- 王卓. 基于全生命周期的110kV变电站降碳方案研究. 电工电气 66–69 (2022).
