# 水泥生产;水泥, 普通硅酸盐水泥, 52.5MPa;新型干法预分解窑

Dataset: ILCD process, Unit process, black box
Geography: BJ-CN
Classification: Materials production / Other mineralic materials
Generated by: 杨思琪, ysqsophia@gmail.com
Owner: 天工LCI数据工作小组
Review: Dependent internal review by 天工LCI数据工作小组
Amounts: no units in this file; such an amount is in the reference unit of its flow, which a separate flow dataset defines
copyright: false
licenseType: Free of charge for all users and uses

## General comment
新型干法预分解窑系统。

## Geography
北京地区某水泥厂

## Technical purpose
该工业过程描述了使用新型干法预分解窑系统生产52.5MPa普通硅酸盐水泥。该过程用于北京地区的一家水泥厂生产水泥。所生产的水泥可用于各种建筑应用，如基础设施建设、混凝土结构施工以及其他需要高等级水泥的土木工程工作。

## Model description
结合水泥生产过程本身的特点，将研究范围界定为：从原料进厂、原料预处理、生料粉磨、生料煅烧、熟料粉磨，直至水泥均化、储存、包装为止。这里不考虑原料的生产加工过程，只考虑生产过程对环境的影响，即直接原料消耗和直接废物排放的过程。以1吨525#普通硅酸盐水泥所具有的使用性能为一个功能单位，1Fu=52.5tMPa。

## Reference product
- cement, ordinary portland cement, 52.5MPa: 1000
  P.O 52.5水泥

## Inputs
- limestone, crushed, for mill: 1318.5
  石灰石
- clay: 94.5
  粘土质原料
- iron, powder: 27
  铁质校正原料
- gypsum stone (CaSO4-dihydrate): 60
  石膏占比为5.5%
- mixed materials, mineral: 200
  混合材
- hard coal; 26.3 MJ/kg: 120
  煤耗
- electricity, medium voltage: 363.6
  电耗
- hard coal: 129.156
  标煤。原文实际是燃料油消耗（L），等量为标煤。原始数据为120kg标准煤，这里换算为硬煤，换算公式为1kg硬煤=0.929kg标准煤。

## Outputs
- Nitrogen oxides: 1.88
  NOx
- sulfur dioxide: 0.004
  SO2
- hydrogen chloride: 0.000436
  HCI
- fluorine: 0.000469
  F
- particles (> PM10): 0.012
  烟尘，未标明粒径，按PM>10处理。
- mercury: 2.2e-6; min 1.7e-6; max 2.7e-6; uniform
  Hg
- arsenic: 4.95e-5; min 1.7e-5; max 8.2e-5; uniform
  AS
- chromium: 3.4e-5
  Cr
- copper: 3.4e-6
  Cu
- lead: 0.000117; min 3.4e-5; max 0.0002; uniform
  Pb
- zinc: 0.0001517; min 3.4e-6; max 0.0003; uniform
  Zn
- cadmium: 8.7e-6; min 3.4e-6; max 1.4e-5; uniform
  Cd
- nickel: 5.1e-5; min 2.7e-5; max 7.5e-5; uniform
  Ni

## Use advice
使用此数据集时，研究人员和分析师必须意识到它仅考虑了生产过程中直接原材料消耗和废物排放对环境的影响，未包括原材料本身的生产加工过程。此外，数据集中不包括CO2排放数据，如果评估过程的整体环境影响，必须考虑这一点。在使用此数据进行生命周期评估或相关环境研究时，必须考虑这些限制，并在相关的地方可能需要补充附加数据。

## Review details
清单： 内部审查通过几个迭代步骤完成，涉及原始数据验证、原始数据记录、代表性、完整性、与 ISO 14040 和 14044 有关的建模的一致性。

## Data sources
- 富丽. (2004). 生态水泥生命周期评价研究 [硕士, 北京工业大学].
