# NMC532湿法回收

Dataset: ILCD process, Unit process, single operation
Geography: CN
Reference year: 2021
Classification: End-of-life treatment / Material recycling
Functional unit: 333.9 kg of the degraded NMC532 can be sorted from per 1 ton of degraded battery
Generated by: 马清源, m1120498928@163.com
Owner: 天工LCI数据工作小组
Review: Dependent internal review by 天工LCI数据工作小组
Amounts: no units in this file; such an amount is in the reference unit of its flow, which a separate flow dataset defines
copyright: false
licenseType: Free of charge for all users and uses

## General comment
使用过的NMC电池首先经过预处理，然后进行酸浸得到金属硫酸盐，通过添加碱进行共沉淀得到NMC前驱体，通过烧结得到新的NMC。

## Technical purpose
NMC532湿法回收工艺用于从废旧NMC电池中回收镍、钴、锰。此回收材料为锂离子电池制造中新的阴极材料提供了有效的供应源。通过处理退化的NMC532电池，该技术支持了电子和汽车行业常用电池的可持续生命周期。

## Reference product
- Degraded NMC532: 740; input; calculated

## Inputs
- P204（95%）P507（95%）: 2190; calculated
- Nickel sulfate: 540; calculated
- sodium hydroxide: 810; calculated
- nitrogen: 30; measured
- Liquid ammonia: 140; measured
- Lithium Hydroxide Monohydrate: 450; calculated
- Average labor (Disassemble degraded battery): 3.65; measured
- Average labor（Material preparation）: 7.3; measured
- water,water: 1.5e6; measured
- Electricity: 55800; calculated
- Equipment Depreciation: 1000; measured

## Outputs
- Sewage treatment: 20000; measured
- Ni-Co-Mn precursor,Ni-Co-Mn precursor: 1.4475e6; measured

## Data treatment and extrapolations
① 我们计算了每吨回收阴极材料的成本。回收过程可分为四个步骤：分解降解电池、提取镍/钴/锰硫酸盐、NCM（OH）2前驱体制备和锂化。②在拆卸过程中，我们使用降解的NMC532作为原材料。③在萃取过程中，生成了Ni/Co/Mn硫酸盐，我们建议产率可达100%。

## Use advice
在使用NMC532湿法回收工艺的数据集时，确保方法论框架能够包括所有指定的四个阶段：拆卸、提取、前驱体制备和锂化。将回收阴极材料的吨成本考虑在内。提取阶段Ni / Co / Mn硫酸盐的预期产率应视为最优，因此以100％的最大比率建模。另外，用户必须考虑从退化电池到可用NMC532的重量转换，具体为每吨处理的电池中有333.9公斤。

## Review details
清单： 内部审查通过几个迭代步骤完成，涉及原始数据验证、原始数据记录、代表性、完整性、与 ISO 14040 和 14044 有关的建模的一致性。

## Data sources
- Qian, G. et al. Value-creating upcycling of retired electric vehicle battery cathodes. Cell Reports Physical Science 3, 100741 (2022).
