# cement production|cement, portland cement, 42.5MPa|other rotary kilns

Dataset: ILCD process, Unit process, black box
Geography: HLJ-CN
Reference year: 2008
Classification: Materials production / Other mineralic materials
Generated by: Siqi Yang
Amounts: no units in this file; such an amount is in the reference unit of its flow, which a separate flow dataset defines
copyright: false

## General comment
Other rotary kilns are used for the production of portland cement. A study was conducted on the process flow and operating parameters of other rotary kiln technologies currently available in the cement industry in Heilongjiang Province, and input and output data of the established product system were collected and calculated and quantified.

## Model description
Using the usability of cement with a compressive strength of 42.5 MPa after 28 days, which corresponds to 1 kg, as the functional unit, i.e. 1FU = 42.5 kg MPa. The evaluation scope covers raw material preparation, clinker calcination, and cement production. The environmental impact caused by the consumption of clay resources is not considered. Iron powder is a correction material and its environmental impact is not considered. The waste mainly includes nitrogen oxides, sulfur dioxide, carbon dioxide, and dust in the output of the product system.

## Reference product
- cement, portland cement, 42.5MPa: 1000
  Portland cement with a strength grade of 42.5.

## Inputs
- limestone, crushed, for mill: 1203.4; article inperiodical
  Limestone
- gypsum (desulphurized): 59; article inperiodical
  Gypsum
- hard coal: 235.386; article inperiodical
  Standard coal. The original data is 0.2187kg standard coal, here converted to hard coal, the conversion formula is 1kg hard coal = 0.929kg standard coal.
- electricity, medium voltage: 413.28; article inperiodical
  Electricity

## Outputs
- particles (> PM10): 0.64; article inperiodical
  Dust, with an unspecified particle size, is treated as PM > 10 micrometers in diameter.
- sulfur dioxide: 0.7554; article inperiodical
  Sulfur dioxide
- Nitrogen oxides: 2.951; article inperiodical
- carbon dioxide: 1181.7; article inperiodical
  Carbon dioxide

## Data sources
- 于淼. (2008). 黑龙江水泥工业可持续发展研究 [硕士, 哈尔滨工业大学].
