# Calcium carbonate powder production | Crushing and screening method, CN

Dataset: ILCD process
Geography: CN
Classification: Materials production / Other mineralic materials
Generated by: Jiaqi Lu, wilsherelu@foxmail.com
Review: Dependent internal review by Tiangong LCI Data Working Group
Amounts: no units in this file; such an amount is in the reference unit of its flow, which a separate flow dataset defines
copyright: false

## Reference product
- Putty Powder: 1000; missing unimportant
  大白粉产品

## Inputs
- Limestone: 1458; missing unimportant
  石灰石
- Light fuel oil: 0.0267; missing unimportant
  柴油
- water: 0.0777; missing unimportant
- electricity mix: 54.972; missing unimportant

## Outputs
All rows: missing unimportant
- Particles (PM0.2 - PM2.5): 0.2
  粉尘
- waste water - untreated: 0.035
  生活污水
- municipal solid waste deposition: 0.1232
  生活垃圾
- used oil: 1.668e-6
  废机油
- nitrous oxide: 0.000415
  氮氧化物（燃油废气）
- carbon monoxide: 0.001117
  一氧化碳（燃油废气）
- total hydrocarbons（THC）: 0.000183
  THC（燃油废气）

## Review details
Inventory: The internal review was done by several iteration steps concerning raw data validation, raw data documentation, representativity, completeness and consistency of modelling with regard to ISO 14040 and 14044.; Documentation: The review of the documentation was performed by Ecobilan and is in compliance with ISO 14040 and 14044. The data set documentation is correct in view of the appropriateness of the information provided. It includes all relevant information in view of data quality and scope of application of the respective LCI result.

## Data sources
- 年产12万吨石膏粉项目环评报告
