# 芳烃生产 ; 芳烃 ; 煤基甲醇制芳烃路线

Dataset: ILCD process, Unit process, black box
Geography: CN
Reference year: 2022
Classification: Materials production / Organic chemicals
Functional unit: The functional unit is defined as 1 kg aromatics production
LCI method principle: Attributional
LCI method approaches: Allocation - market value
Generated by: 任亚楠, renyn15@tsinghua.org.cn
Owner: 天工LCI数据工作小组
Review: Dependent internal review by 天工LCI数据工作小组
Amounts: no units in this file; such an amount is in the reference unit of its flow, which a separate flow dataset defines
copyright: false
licenseType: Free of charge for all users and uses

## General comment
甲醇芳构化过程包括甲醇脱水、烯烃形成和烯烃芳构化，以及聚合、异构和烷基化等复杂的副反应。芳香化后，混合物进入相分离器，分离出用作工厂燃料气体的干气。液相进入稳定器分离液化石油气（LPG），剩余液相继续进入精馏塔分离芳烃和重芳烃（C9+）。芳烃是主要产品，液化石油气和重芳烃是副产品。

## Geography
CBMTA 和 OBNTA 工厂的运行数据来自能源专业知识服务系统（PKSSE）中国先进煤化工产业数据库收集和管理的环境影响评估报告。

## Time period
未提及，以文献发表时间代替

## Technical purpose
煤基甲醇转化为芳烃的工艺用于生产芳烃，它们是制造广泛化学产品的基本组成部分。这些芳烃主要用作合成塑料、树脂、合成纤维、橡胶、染料、洗涤剂、药品及其他化学中间体的原料。副产品液化石油气（LPG）和重芳烃（C9+）分别作为燃料和进一步化工加工使用。

## Model description
该系统不包括上游原料、材料和能源运输阶段，因为它们对整个系统的影响有限，可以根据生命周期评估框架中的截止标准予以忽略。该系统也不考虑下游芳烃运输和利用阶段，因为其功能被定义为生产芳烃产品。

## Reference product
- Aromatic hydrocarbon: 1; measured
  Aromatics

## Inputs
All rows: measured
- Methanol: 3.12
- process water: 0.05
  Process water
- Water (fresh water): 0.96
  Supplement water
- ZSM-5 catalyst: 0.00067
- light fuel oil: 4e-5
  Thermal oil
- electricity mix: 0.396
  Electricity
- natural gas: 1.57
  Natural gas

## Outputs
All rows: measured
- Heavy aromatics: 0.11
- LPG - liquefied petroleum gas: 0.18
  LPG
- Refinery Gas: 2.6
  Dry gas (self-use)
- carbon dioxide: 0.31
  CO2
- Dust (unspecified, from stack): 1e-5
  PM
- volatile organic compound: 0.00122
  VOCs
- sulfur dioxide: 1e-5
  SO2
- nitrous oxide: 8e-5
  NOx

## Deviations from the LCI method approaches
在这里，经济分配是最优的，因为这些产品的化学用途截然不同，但它们具有相同的经济功能，即作为商品出售。

## Data selection and combination
在该系统中，芳烃生产阶段被设定为前景阶段，其大量数据通过现场调查进行监控和收集，而上游原料、材料和能源生产阶段被定义为背景阶段，其数据从成熟的生命周期评估数据库中收集。

## Data treatment and extrapolations
在这里，经济分配是最优的，因为这些产品的化学用途完全不同，但它们具有相同的经济功能，即作为商品出售

## Use advice
使用此生命周期评估(LCA)数据集时，重要的是要清晰区分前景阶段和背景阶段。前景阶段包括直接涉及芳烃生产的所有过程，其数据必须从现场特定调查中收集。背景阶段是指与上游原材料、材料和能源生产相关的阶段，其数据应来源于已建立的LCA数据库。鉴于共产品不同的化学用途和共同的经济功能，应当应用经济分配法。根据LCA框架中的截止标准，不包括上游和下游过程的运输阶段在系统边界内。此数据集的功能单位被定义为生产1公斤芳烃。

## Review details
清单： 内部审查通过几个迭代步骤完成，涉及原始数据验证、原始数据记录、代表性、完整性、与 ISO 14040 和 14044 有关的建模的一致性。

## Data sources
- Li, J. et al. Comparative resource-environment-economy assessment of coal- and oil-based aromatics production. Resources Policy 77, 102629 (2022).
