# raw meal preparation|raw meal

Dataset: ILCD process, Unit process, single operation
Geography: CN
Classification: Materials production / Other mineralic materials
Generated by: Siqi Yang
Amounts: no units in this file; such an amount is in the reference unit of its flow, which a separate flow dataset defines
copyright: false

## General comment
In the preparative phase for raw meal, the crude raw materials are ground into fine particles of a certain size range that meets the procedural requirements; then, water and other necessary materials are added to form raw balls, the final semi-product of the procedural phase. During this phase, input includes limestone, clay, coal, iron powder, and water contained in the raw materials or added in the procedural line. The phase includes three interior transformative processes: grinding the raw materials, coal pulverization, and the formation of raw balls by adding water to the white ground raw materials. Raw balls are the final product of this phase. In this phase, the ball products account for the majority of the total output, amounting to up to 79.32% (not including water). The main emission of pollutants is dust, which accounts for 0.29% of the total output.

## Model description
The system boundary is the preparative phase yielding raw meal (including grinding).

## Reference product
- raw meal: 1000
  Raw ball

## Inputs
All rows: measured
- limestone, crushed, for mill: 719.28
  Limestone
- clay: 149.614
  Clay
- hard coal, run-of-mine: 99.743
  Coal
- iron, powder: 34.961
  Iron powder
- Water (fresh water): 25.193
  Water (water content):water contained in the input materials. As for the indicators in per unit of cement product, the direct inputs of materials include limestone, clay, coal, iron powder additives, mixed materials, gypsum, and oxygen, but exclude the inputs of water added or contained in the raw materials or energy. The total input of materials consists of the direct input of materials and the input of hidden flows, which includes all amounts of water, and the other components of air, aside from oxygen.
- Water (fresh water): 231.877
  Water input

## Outputs
- particles (> PM10): 3.599; measured
  Dust. The particle size is not specified. Here we treat it as PM>10.
- wastewater, unpolluted: 257.069; measured
  Water

## Sampling procedure
The annual output for the cement enterprise with a shaft kiln production system investigated was designed for 100,000 tons of clinker. The overall features of the shaft kiln production line include high energy consumption, limited production capacity, low labor productivity, and a large amount of dust emissions. The dynamic metabolic analysis of the shaft kiln production line is conducted for a unit of time of 1 h at a normal production level.

## Data sources
- Dan Hu, Zhen Guo, Zhen Wang, & Qiang Xiao. (2015). Metabolism analysis and eco-environmental impact assessment of two typical cement production systems in Chinese enterprises. Ecological Informatics 26, 70–77.
