# 西北（富平）小麦-玉米生产 ; 小麦种植

Dataset: ILCD process, Unit process, single operation
Geography: WN-SAX-CN
Reference year: 2013
Valid until: 2013
Classification: Unit processes / Materials production / Agricultural production means
Functional unit: 1t
Generated by: Haoran Zhang, hrzhang@whu.edu.cn
Owner: 天工LCI数据工作小组
Review: Dependent internal review by 天工LCI数据工作小组
Amounts: no units in this file; such an amount is in the reference unit of its flow, which a separate flow dataset defines
copyright: false
licenseType: Free of charge for all users and uses

## General comment
冬小 麦-夏玉米轮作系统生命周期主要包括原材料开采与 运输、农资的生产与运输以及农作物种植三个阶段， 包括煤、石油、天然气、电力等原材料的开采和生产， 土地资源的利用，化肥、农药等农资生产相关的能耗 和污染物排放，包括 CO2、NH3、SO2、CH4、N2O 和 CO 等[11]。与该系统相关的厂房设备、建筑设施、运输工 具的生产和原材料的运输等环节对环境的影响则不 予考虑。

## Geography
富平

## Technology and included processes
研究冬小麦-夏玉米轮作体系从原材料开 采加工、运输到农资生产，再到作物种植过程的资源 利用与环境排放是为冬小麦-夏玉米轮作体系全程的 生产和环境管理提供决策依据。农产品生命周期评价 从矿石和能源开采开始，终止于农作物种植输出，包 括农产品和污染物的输出两部分，土地资源是一切生 产活动的基础，直接进入农作系统。本研究以分别生 产农作物 1 t 为评价的功能单元

## Technical purpose
该数据集集中于西北（富平）地区冬小麦-夏玉米轮作系统的生命周期，专门用于与农业耕作实践、作物产量优化和环境影响评估有关的分析和决策，通常应用于农业环境研究和政策规划。

## Reference product
- wheat: 1000; measured

## Inputs
- arable: 1608.72; measured
- water: 4362.95; measured
- Electricity: 38156.5; measured
- Corn Seeds: 29.62; measured

## Outputs
All rows: measured
- carbon monoxide (fossil): 0.541
- Nitrogen oxides: 3.571
- sulfide: 2.686
- carbon dioxide (fossil),carbon dioxide (fossil): 1146.43
- methane (fossil),methane (fossil): 0.03351
- nitrous oxide: 0.44668
- ammonium: 5.75
- phosphorus, total: 0.01003
- phosphoric acid: 0.04826
- sodium nitrate: 1.34987
- Insecticide: 0.05247
- heavy metals (unspecified): 0.0047

## Deviations from the LCI method approaches
农产品生命周期评价从矿石和能源开采开始，终止于农作物种植输出，包括农产品和污染物的输出两部分，土地资源是一切生产活动的基础，直接进入农作系统。

## Data selection and combination
研究的数据主要来自2013 年8—9 月的实地调研，分别随机调查富平、杨凌两地各30 户种植户的冬小麦-夏玉米种植情况，

## Data treatment and extrapolations
影响评价由影响分类、特征化、标准化、加权评估4 个步骤组成。

## Use advice
使用者应在考虑生命周期评估的方法学范围内应用该数据集，包括矿石和能源的开采与运输、农业输入品的生产和运输以及作物的种植。相关基础设施、设施和材料运输的环境影响被排除在外。应对数据的时间性和地理相关性（2013年，富平和杨凌地区）给予仔细考虑。可能需要进行额外建模以调整随时间变化和不同的农业实践。

## Review details
清单： 内部审查通过几个迭代步骤完成，涉及原始数据验证、原始数据记录、代表性、完整性、与 ISO 14040 和 14044 有关的建模的一致性。

## Data sources
- 彭小瑜, 吴喜慧, 吴发启, 等. 陕西关中地区冬小麦-夏玉米轮作系统生命周期评价[J].农业环境科学学报, 2015, 34(4).
