# Solar grade multi-Si purification

Dataset: ILCD process, Unit process, single operation
Geography: CN
Reference year: 2014
Classification: Materials production / Other mineralic materials
Functional unit: The functional unit of the LCA study was 1 kWh based on a multi-Si PV module
LCI method principle: Attributional
LCI method approaches: Allocation
Generated by: Jinfeng Yang, yjfzfshn@163.com
Review: Dependent internal review by Tiangong LCI Data Working Group
Amounts: no units in this file; such an amount is in the reference unit of its flow, which a separate flow dataset defines
copyright: false

## General comment
Multi-Si

## Geography
This study performs a life-cycle assessment for a photovoltaic (PV) system with multi-crystalline silicon (multi-Si) modules in China

## Time period
Available online

## Reference product
- Solar grade multi-Si: 5.52; article inperiodical

## Inputs
All rows: article inperiodical
- Metallurgical silicon: 6.08
  Metallurgical silicon (>99%)
- Lime: 6.52
  Calcium oxide
- Hydrochloric acid: 2.93
  Hydrochloric acid (30%)
- Hydrofluoric acid: 0.06
  Hydrofluoric acid (20%)
- Hydrogen: 0.5
  Hydrogen (>99.8%)
- Nitric acid: 0.22
  Nitric acid (35%)
- dinitrogen: 71.16
  Nitrogen gaseous
- Silicon tetrachloride: 8.29
  Silicon tetrachloride (>99%)
- Sodium hydroxide: 4.81
  Sodium hydroxide (20%)
- Water (fresh water): 10396.9
  Water
- electricity: 2287.25
  Electricity
- process steam: 385.02
  Steam

## Outputs
All rows: article inperiodical
- chemical oxygen demand: 0.0821
  COD
- Chlorosilane, trimethyl-: 0.02856
  Chlorosilane
- hydrogen chloride: 0.03624
  Hydrogen chloride
- hydrogen fluoride: 0.00022
  Hydrogen fluoride
- nitrogen dioxide: 0.00315
  Nitrogen dioxide
- Silicon: 0.00829
  Silicon dust to air
- Silicon: 0.83
  Silicon dust (99%) for recovery
- Silicon tetrachloride: 0.00923
- Suspended solids, unspecified: 0.05481
  Suspended solids
- Trichlorosilane: 0.03133
- Water (evapotranspiration): 5991.76
  Water (evapotranspiration) emissions to air

## Deviations from the LCI method approaches
The goal of this study was to quantitatively assess the life-cycle
environmental impacts of PV systems in China and provide a scientific basis for policy-making regarding the sustainable development of Chinese PV industry.

## Data selection and combination
The inventory data, including the material consumption and environmental emissions involved in the production of solar-grade silicon, wafers, ingots, cells, and modules, were mainly collected from companies that represent the current domain multi-Si PV technologies in China. The energy consumption data referred to the report “Clean Production ofSolar PV in China” (Li and Chang, 2012). The data of MG-Si production was from literature about MG-Si produced in China

## Review details
Inventory: The internal review was done by several iteration steps concerning raw data validation, raw data documentation, representativity, completeness and consistency of modelling with regard to ISO 14040 and 14044.; Documentation: The review of the documentation was performed by Ecobilan and is in compliance with ISO 14040 and 14044. The data set documentation is correct in view of the appropriateness of the information provided. It includes all relevant information in view of data quality and scope of application of the respective LCI result.

## Data sources
- Fu, Y., Liu, X. & Yuan, Z. Life-cycle assessment of multi-crystalline photovoltaic (PV) systems in China. Journal of Cleaner Production 86, 180–190 (2015).
