# 修复后土壤;土壤修复;实验室研究;微生物电化学修复;TPH污染土壤

Dataset: ILCD process, Unit process, single operation
Geography: IT
Reference year: 2023
Classification: Other Services / Repair and maintenance
Functional unit: The functional unit for this study is related to treated soil polluted with petroleum hydrocarbons using MET (100 g, 0.5 kWh). The initial concentration of total petroleum hydrocarbons is 4500 mg/kg.
Generated by: 杨欣桐, yangxt@caep.org.cn
Owner: 天工LCI数据工作小组
Review: Dependent internal review by 天工LCI数据工作小组
Amounts: no units in this file; such an amount is in the reference unit of its flow, which a separate flow dataset defines
copyright: false
licenseType: Free of charge for all users and uses

## General comment
微生物电化学技术（MET）是一种利用微生物催化（代谢）活性将有机化合物的化学能转化为电能的生物电化学系统。双室MET是一种由质子交换膜分隔阳极和阴极的MET。当微生物通过氧化反应代谢化学物质（基质）时，阳极室中会产生电子和质子。离子选择性渗透膜（在这种情况下，是土壤本身）允许微生物氧化产生的质子进入阴极室。同时，微生物释放的电子被阳极收集，并通过外部电路流入阴极，在那里它们被具有高正氧化还原电位的化学物质吸收和还原，如氧、铁氰化物和其他氧化化学剂。

## Geography
本研究基于室内试验，该处填写的为作者籍贯。

## Technology and included processes
基于先前的研究，使用了双室BES微生物电化学技术（MET）。此外，使用内径为7cm、体积为250mL、工作体积空间为200mL的阳离子交换膜（CEM）将两个类似的Plexi玻璃瓶分离。两个橡胶垫圈和一个用于玻璃瓶的金属夹持器用于保持生物反应器的气密性。使用阳极（石墨）和阴极（钛）电极（6cm长，5cm宽）。这些电极用用热收缩管包裹的钛电线固定。采用Ag/AgCl测定法作为参比电极。将阳极电解液介质倒入阳极室中。在阴极室中，无菌磷酸盐缓冲液（0.5 M PBS）溶液具有（i）Na2HPO4∙12H2O，7.56 g L−1；（ii）KH2PO4，1.5 g L−1；（iii）0.31 g L−1 NH4Cl；（iv）加入0.13 g L−1 KCl，如Rabaey等人（2005）所述，维持pH 7.0。MET反应器在121°C的温度下通过高压釜灭菌30分钟。然后将无菌阳极电解液无菌地添加到阳极室中。本研究的所有实验都是在半间歇模式下进行的。在MET过程开始之前，用100%氮气吹扫阳极室15分钟，以维持厌氧条件。所有实验都将电极连接到单个电阻器（R=1000Ω）上，MET系统包含多环芳烃污染的土壤样品，在20°C下以长期分批补料模式运行20天。（即四个循环）。研究了生物表面活性剂用量对MET体系阳极降解石油烃的影响。使用阳极电解液进料溶液中三种不同的生物表面活性剂浓度，并基于先前的研究选择为10、50和100 mg/L（Ambaye等人，2022a、2022b、2022c、2022d）。此外，在与生物系统相同的条件下，包括阴性对照，但在培养基中不含生物表面活性剂。发现石油烃的最大减少量高达72.5%，而在运行期的20天内，剂量为100 mg/L的MET反应器的电流密度达到9.5 Am−2。

## Technical purpose
双室微生物电化学技术（MET）主要用于研究室规模研究，专注于修复被总石油碳氢化合物（TPH）污染的土壤。这一MET过程专为TPH污染土壤的生物电化学处理而设计，在环境工程特别是土壤修复中显示出应用潜力。其在分析或中试研究中的使用可以提供有关微生物电化学技术降解有害环境污染物特别是土壤中碳氢化合物的可行性洞察。

## Reference product
- Remediated soil: 1

## Inputs
- contaminated soil: 1
- Magnesium Sulfate Heptahydrate: 0.00025; normal
- sodium dihydrogen phosphate,sodium dihydrogen phosphate: 0.00348, 0.00508, 0.00127 (3 entries); normal
- Trisodium Phosphate: 0.00476, 0.00173 (2 entries); normal
- Ammonium Chloride: 0.001, 0.00031 (2 entries); normal
- sodium chloride: 0.0005; normal
- potassium chloride: 0.01013; normal
- Potassium Dihydrogen Phosphate: 0.0015; normal
- Manganese Sulfate Monohydrate: 0.000447; normal
- ferrous sulfate: 5.47e-5; normal
- cobalt,cobalt: 2.48e-5; normal
- Zinc Sulfate Monohydrate: 5.62e-5; normal
- Copper sulphate: 6.4e-6; normal
- Boric acid: 1e-5; normal
- aluminium sulfate, powder: 3.61e-6; normal
- Nickel Sulfate: 1.19e-5; normal
- Molybdenum trioxide: 5.95e-6; normal
- Biosurfactant: 0.0001; normal
- Digested Sludge,Digester sludge: 0.001; normal
- Electricity: 0.36; normal

## Outputs
- Wastewater: 0.00015; normal
- Electricity: 8.208; normal

## Use advice
使用本研究的数据时，请考虑其实验室规模的背景以及评估中排除了维护和接种培养。在将发现应用于实验室条件之外时应谨慎，需考虑到可能需要更多消耗品、材料和能源投入的放大过程。研究人员还必须验证MET过程在现场条件下的适用性，并评估系统在更长的时间框架和可变环境条件下的稳健性。在放大时，建议全面调查包括使用阶段行为和生命周期终点情景在内的环境影响。

## Review details
清单： 内部审查通过几个迭代步骤完成，涉及原始数据验证、原始数据记录、代表性、完整性、与 ISO 14040 和 14044 有关的建模的一致性。

## Data sources
- Gebregiorgis T A ,Francesca F ,Silvia S , et al. Life cycle assessment of bioslurry and bioelectrochemical processes for sustainable remediation of soil polluted with petroleum hydrocarbons: An experimental study [J]. Sustainable Production and Consumption, 2023, 36 416-424.
