# 聚合物铝电解电容器 (PAEC) 生产 ; 聚合物铝电解电容器 (PAEC)>2cm ; ; 原生铝锭

Dataset: ILCD process, Unit process, single operation
Geography: CN
Reference year: 2022
Classification: Unit processes / Materials production / Metals and semimetals
Generated by: 常慧敏, huiminchang@tsinghua.edu.cn
Owner: 天工LCI数据工作小组
Review: Dependent internal review by 天工LCI数据工作小组
Amounts: no units in this file; such an amount is in the reference unit of its flow, which a separate flow dataset defines
copyright: false
licenseType: Free of charge for all users and uses

## General comment
The manufacturing stage of the AECs is divided into several sub-stages in this study based on the actual fabrication segmentation in the AEC industry. First, the high-purity aluminum ingots will be smelt, cast, rolled, and annealed into the aluminum foil with a thickness of about 10–100 μm. Then, anode foil and cathode foil for the AECs will be fabricated, respectively. The same manufacturing processes are applied toward anode foil in three types of AECs. The aluminum blank foil will be etched by the weak acids to increase the superficial area of the foil, and the electrochemical reaction can further form the dielectric (Al2O3). But cathode foil of three types of AECs varies in structure and manufacturing processes due to the differences in electrolytes. The cathode foil of LAECs is made by the etched process, while the cathode foil of PAEC is made by the carbon coating process after the etched process. In PHAECs, when liquid-state electrolyte and solid-state polymer are used simultaneously, the carbon-coated cathode aluminum foil of the PAECs is also replaced by the aluminum foil with TiO2 film to overcome the potential problems on capacitor cycling life. After obtaining the anode and cathode foil, the AECs can be manufactured, assembled, and packed. Besides, there are some differences in the AEC fabrication sub-stage. The specific processes of the three types of AECs are shown in Fig. 2. In detail, the differences in manufacturing processes among the three types of AECs are mainly due to the change of repair conditions of the capacitor dielectric (Al2O3 film) and the introduction of conductive polymer. On the one hand, PAECs and PHAECs cannot use the electrolyte to repair the dielectric layer in the aging process like LAECs, so an additional forming solution is required to perform forming process, which adds extra manufacturing steps. On the other hand, the conductive polymer needs to be effectively introduced into the middle of anode and cathode foils. The conductive polymer (PEDOT) in PAECs is formed by the polymerization reaction of EDOT and oxidizing agents in the capacitor manufacturing process, while the conductive polymer (PEDOT:PSS) in PHAEC is introduced into the capacitors by the dispersive solution. The collected inventory data of LAECs, PAECs, and PHAECs by the FU are summarized in Table 2. The details of the inventory data are available in Sheets 5–7 of Supporting Info B.

## Time period
文献发表于2022-11-15，文献中 The reference year of the elementary data (alumminum ingots, separator paper, tansport, electricity, and water) is around 2016 and qcruired from the Gabi database (Version: 10.6.1.35)

## Technical purpose
该数据集提供了聚合物铝电解电容器（PAECs）生产过程的概述，这些电容器主要用于电子设备的能量存储和过滤应用。这些电容器，特别是尺寸大于2厘米的，使用高纯度铝锭和各种过程（如熔化、铸造、轧制、退火、蚀刻和涂层）来生产阳极和阴极箔。适用于在老化过程中无需使用电解液即可修复介电质，并在箔间引入PEDOT等导电聚合物的应用场景。

## Reference product
- capacitor, electrolyte type, > 2cm height: 1e6; measured
  capacitors (product)

## Inputs
All rows: measured
- electricity, high voltage, aluminium industry: 25645
  Electricity grid mix (China)
- aluminium, primary, ingot: 346
  346=260.8(99.99% Al ingots)+85.2(99.9% Al ingots)
- water, deionised: 84947
- tap water: 37492.5
- section bar extrusion, aluminium: 486.8
  Aluminum profile (China)
- paper, woodfree, uncoated: 65.3
- rubber: 131.8
  Rubber from Gabi database ({401c53f8-0ace-410b-9cc7-9a586f8ac2e6})
- wire drawing, steel: 2.12
  substance flow is leads (Fe) but database from Gabi database is steel wire ({d3e4d4d7-66ee-4bea-b6eb-9704682a0b8a})
- section bar extrusion, aluminium: 15.94
  Tab (alluminium profile (China) )
- sealing tape, aluminium/PE, 50 mm wide: 4.2517
  Tape(PP film ,from Gabi {7d6d2565-aeb4-4f36-a049-f715a80fe954})
- phosphoric acid, industrial grade, without water, in 85% solution state: 71.9654
  H3PO4
- boric acid, anhydrous, powder: 12.7679
  HBO3
- hydrochloric acid, without water, in 30% solution state: 97.4099
  HCl (31%)
- sodium hydroxide, without water, in 50% solution state: 107.943
  NaOH (30%)
- sulfuric acid: 580.563
  H2SO4 (98%)
- nitric acid, without water, in 50% solution state: 29.223
  HNO3 (98%)
- Lubricating oil,Lubricating Oil: 8.9016
  Rolling oil
- Ammonium Citrate: 24.5909
  Ammonium citrate
- Ammonium Pentaborate: 6.7447
  Ammonium pentaborate
- Ammonium adipate: 34.3393
- Ammonium dihydrogen phosphate: 1.124
  NH4H2PO4
- anode, paste, for aluminium electrolysis: 10.9643
  Carbon coating paste
- EDOT: 14.025
- Iron (III) p-toluene sulfonate hexahydrate: 35.3129
- 1-butanol: 28.8924
  N-butanol

## Outputs
All rows: measured
- Aluminium Phosphate: 9.0494
  AlPO4 (by-product)4
- used capacitor: 62925.2
  Capacitors (waste)
- wastewater, average: 73437.4
  Waste water
- sewage sludge: 8.5165
  Sludge
- aluminium scrap, new: 23.7393
  Al scraps
- chemical oxygen demand: 3.2703
  COD

## Data selection and combination
{"code":1140101,"msg":"invalid param","error":{"log_id":"202401100909152F7D91F3C6B6AA2E8E3B"}}

## Use advice
该数据集所提供的清单数据来自三种类型铝电解电容器（包括LAECs、PAECs和PHAECs）的生产过程的不同阶段。用户应考虑特定的制造差异，特别是Al2O3介电质膜的修复条件和导电聚合物的引入。数据集基于2016年从Gabi数据库中获取的数据以及调查制造商提供的信息。为了进行最准确的影响评估，用户应遵循支持文档中提供的详细生命周期清单（LCI）数据和方法学（支持信息B，第5-7页为清单数据，第2页为单位影响），确保在LCA上下文中的适当应用。如果评估中使用了不同的年份或生产技术，则应考虑调整以反映技术进步和能耗变化。

## Review details
清单： 内部审查通过几个迭代步骤完成，涉及原始数据验证、原始数据记录、代表性、完整性、与 ISO 14040 和 14044 有关的建模的一致性。

## Data sources
- Zhang, C., Zheng, Y., Jing, J., Liu, Y. & Huang, H. A comparative LCA study on aluminum electrolytic capacitors: From liquid-state electrolyte, solid-state polymer to their hybrid. J. Clean. Prod. 375, (2022).
