# Mining process | Raw coal, crude oil | Oilfield oil and gas | Drilling

Dataset: ILCD process, Unit process, single operation
Geography: LN-CN
Reference year: 2017
Classification: Materials production / Other mineralic materials
LCI method principle: Attributional
LCI method approaches: Consequential
Generated by: zimeng li, 1577978537@qq.com
Review: Dependent internal review by Tiangong LCI Data Working Group
Amounts: no units in this file; such an amount is in the reference unit of its flow, which a separate flow dataset defines
copyright: false

## General comment
Analysis of the working links of energy, water resources and other resources consumption, waste emissions and other indicators

## Geography
Liaohe Oilfield

## Time period
Time of publication

## Inputs
- LPG - liquefied petroleum gas: 32; uniform; article inperiodical
  原煤输入占油气开发阶段原煤投入的 10.1%
- LPG - liquefied petroleum gas: 21; uniform; article inperiodical
  原油输入占油气开发阶段原煤投入的 10.1%

## Review details
Inventory: The internal review was done by several iteration steps concerning raw data validation, raw data documentation, representativity, completeness and consistency of modelling with regard to ISO 14040 and 14044.; Documentation: The review of the documentation was performed by Ecobilan and is in compliance with ISO 14040 and 14044. The data set documentation is correct in view of the appropriateness of the information provided. It includes all relevant information in view of data quality and scope of application of the respective LCI result.

## Data sources
- 基于LCA的油田油气开发环境影响评价研究 - 中国知网.
