# 铝锭铸造 ; 原生铝锭 ; 液态原铝 ; 2009年

Dataset: ILCD process, Unit process, single operation
Geography: CN
Reference year: 2021
Classification: Unit processes / Materials production / Metals and semimetals
Generated by: 蔡梓萌, caizm6178@163.com
Owner: 天工LCI数据工作小组
Review: Dependent internal review by 天工LCI数据工作小组
Amounts: no units in this file; such an amount is in the reference unit of its flow, which a separate flow dataset defines
copyright: false
licenseType: Free of charge for all users and uses

## General comment
通过铸造过程生产的原生铝锭适用于需要高质量铝材料的各种工业，包括用于生产轻质汽车组件的汽车工业、用于结构元件和面板的建筑业、用于飞机部件的航空工业、以及用于导体和外壳的电子行业。

## Time period
文献发表日期

## Reference product
- aluminium, primary, ingot: 1000; software or database

## Inputs
- aluminium, primary, liquid: 1030.29; software or database

## Data selection and combination
本研究的数据参考了PA、SA、电力等背景数据的LCA数据。PA数据来自统计数据源，SA数据主要来自文献。背景数据主要来自中国科学院生态环境研究中心CASRCEES 2018建立的中国本地化LCA数据库，涵盖能源、材料、交通、废物管理等LCA数据。

## Use advice
使用这份LCA数据的用户应确保他们考虑到数据发布的具体年份，即2009年，因为铝锭生产的环境影响可能随着技术进步而随时间改变。在可能的情况下，应该参考最新的数据。此外，用户需要注意原生铝（PA）和再生铝（SA）数据的来源。在应用这些数据时，应考虑回收过程及其效率。CAS RCEES 2018的背景数据应在中国的背景下使用，因为它们是专门为考虑当地从能源、材料、交通和废物管理产生的环境影响量身定制的。

## Review details
清单： 内部审查通过几个迭代步骤完成，涉及原始数据验证、原始数据记录、代表性、完整性、与 ISO 14040 和 14044 有关的建模的一致性。

## Data sources
- Ding, N., Liu, N., Lu, B. & Yang, J. Life cycle greenhouse gas emissions of aluminum based on regional industrial transfer in China. J. Ind. Ecol. 25, 1657–1672 (2021).
