# 直接燃烧｜电力｜生物质锅炉（30MW）

Dataset: ILCD process, Unit process, single operation
Geography: CN
Reference year: 2020
Classification: Unit processes / Energy carriers and technologies / Heat and steam
Functional unit: Taking the production of 10,000KWh of electric energy as the functional unit (consumption of straw is 1.4kg/kwh)
LCI method principle: Consequential
Generated by: 刘超硕, liucs22@mails.jlu.edu.cn
Owner: 天工LCI数据工作小组
Review: Dependent internal review by 天工LCI数据工作小组
Amounts: no units in this file; such an amount is in the reference unit of its flow, which a separate flow dataset defines
copyright: false
licenseType: Free of charge for all users and uses

## General comment
该数据集描述了一个30MW的生物质锅炉，用于直接燃烧过程以发电。生成10,000 kWh电能的主要燃料是秸秆，消耗率为1.4 kg/kWh。该过程通常用于使用可再生生物质资源的发电厂，以生产电力，供应住宅、商业或工业用电。

## Reference product
- electricity from waste incineration: 36000; measured

## Inputs
- Crop straw: 18000; measured

## Outputs
All rows: measured
- carbon monoxide (biogenic): 2.772
  原文未区分排放源为生物源或化石源，根据专家判断此处为生物源。
- nitrous oxide: 3.038
- sulfur dioxide: 0.476
- particles (> PM10),particles (> PM10): 2.758
- methane (biogenic),methane (biogenic): 0.462
  原文未区分排放源为生物源或化石源，根据专家判断此处为生物源。

## Use advice
在使用此数据集进行生命周期评估时，应考虑将其纳入能源供应链中，特别是关注生物质能源生产。应注意到秸秆的区域性可获得性和质量差异，这可能影响过程的整体效率和排放。用户还应考虑生物质基础设施的生命周期末端处理过程，秸秆采购和运输可能产生的潜在排放，以及生物质锅炉运行期间所需的任何能源投入。确保这些参数在LCA模型中一致应用，以避免误解。

## Review details
清单： 内部审查通过几个迭代步骤完成，涉及原始数据验证、原始数据记录、代表性、完整性、与 ISO 14040 和 14044 有关的建模的一致性。

## Data sources
- Wang, Z. et al. Sustainability assessment of straw direct combustion power generation in China: From the environmental and economic perspectives of straw substitute to coal. Journal of Cleaner Production 273, 122890 (2020).
