# Metallurgical ash production|Metallurgical ash|Mining and burning(D01)

Dataset: ILCD process, Unit process, single operation
Geography: CN
Reference year: 1998
Classification: Materials production / Other mineralic materials
Generated by: Fuxiang, 1162850692@qq.com
Review: Dependent internal review by Tiangong LCI Data Working Group
Amounts: no units in this file; such an amount is in the reference unit of its flow, which a separate flow dataset defines
copyright: false

## General comment
来自表 4-17 D01 钢厂生产吨材环境负荷编目表

## Time period
论文提到钢铁企业环境总体数据为1998年的吨钢环境基础数据。

## Reference product
- Metallurgical ash: 173; measured
  冶金白灰

## Inputs
- Energy, geothermal, converted: 828.731; measured
- water: 70; measured

## Outputs
- Dust (unspecified, from stack): 0.076; measured
- sulfur dioxide: 0.329; measured
- Suspended solids, unspecified: 0.07266; measured
- Spoil (deposited, hibernating in ground, non elementary flow): 6.617; measured

## Review details
Inventory: The internal review was done by several iteration steps concerning raw data validation, raw data documentation, representativity, completeness and consistency of modelling with regard to ISO 14040 and 14044.; Documentation: The review of the documentation was performed by Ecobilan and is in compliance with ISO 14040 and 14044. The data set documentation is correct in view of the appropriateness of the information provided. It includes all relevant information in view of data quality and scope of application of the respective LCI result.

## Data sources
- 1. 周和敏. 钢铁材料生产过程环境协调性评价研究. (北京工业大学, 2001).
