# Soil remediation ; In-situ remediation ; Enhanced bioremediation ; Construction preparation ; Construction of injection wells and monitoring wells

Dataset: ILCD process, Unit process, single operation
Geography: SH-CN
Classification: Other Services / Repair and maintenance
Generated by: Xiao Meng, xiaomeng@mail
Owner: Tiangong LCI Data Working Group
Review: Dependent internal review by Tiangong LCI Data Working Group
Amounts: no units in this file; such an amount is in the reference unit of its flow, which a separate flow dataset defines
licenseType: Free of charge for all users and uses

## General comment
CHC+ISB (Heating-Cooling System + In-situ Bioremediation) is used for site remediation, and during the construction preparation phase, injection wells and monitoring wells are constructed.

## Geography
The aquifer in a certain area in Shanghai, China, is uniformly contaminated with chlorinated volatile organic compounds (CVOCs), with a surface area of 20,000 m2 and a depth of 50 m, with the water table located at a depth of 30 m.

## Technical purpose
The CHC+ISB process described is utilized for the remediation of sites contaminated with chlorinated volatile organic compounds (CVOCs). This in-situ remediation technique, involving the use of heating-cooling systems in conjunction with biological strategies, is designed specifically for the treatment of uniformly contaminated aquifers. It is suitable for application in areas like the one mentioned in Shanghai, where CVOCs contamination is a concern for both soil and groundwater over extensive depths and surface areas.

## Reference product
- injection well: 65
  建成的注射井

## Inputs
- Gravel Sand: 356290; calculated
  Gravel sand
- bentonite: 150432; calculated
- Steel sections: 2720; software or database
- Polyethylene: 27200; software or database
  Polyethylene pipe
- Electricity: 1.69206e6; software or database

## Outputs
- Monitoring well: 63
  建成的监测井

## Use advice
Users of this dataset should pay special attention to the scale of contamination and the characteristics of the site, as the described process is tailored for a specific contamination profile — CVOCs in a sizable aquifer (20,000 m2 surface area, 50 m depth) with a water table at 30 m depth. Users must ensure that the remediation strategy is appropriate for their site's specific conditions. Variations in contaminant concentration, hydrogeology, and environmental regulations may require adjustments to the process. The construction of injection and monitoring wells prior to bioremediation is crucial, and their design should be according to the pollution level and aquifer characteristics. The dataset is intended to guide the implementation of CHC+ISB into practice but does not substitute the need for professional environmental engineering consultancy.

## Review details
Inventory: The internal review was done by several iteration steps concerning raw data validation, raw data documentation, representativity, completeness and consistency of modelling with regard to ISO 14040 and 14044.

## Data sources
- Ni, Z. et al. Comparative Life-Cycle Assessment of Aquifer Thermal Energy Storage Integrated with in Situ Bioremediation of Chlorinated Volatile Organic Compounds. Environ. Sci. Technol. 54, 3039–3049 (2020).
