# Treatment of wasted ultrafiltration module | mix of incineration and landfilling, CN

Dataset: ILCD process, Unit process, single operation
Geography: CN
Reference year: 2022
Classification: Materials production / Other mineralic materials
Functional unit: 1 item of ultrafiltration module
Generated by: Jiaqi Lu, wilsherelu@foxmail.com
Review: Dependent internal review by Tiangong LCI Data Working Group
Amounts: no units in this file; such an amount is in the reference unit of its flow, which a separate flow dataset defines
copyright: false

## Reference product
- Ultrafiltration Component: 1; input; measured
  1 waste Ultrafiltration module

## Outputs
All rows: measured
- waste incineration of plastics (unspecified) fraction in municipal solid waste (MSW): 11.75
  废弃挤压塑料管
- waste incineration of plastics (unspecified) fraction in municipal solid waste (MSW): 4.27
  废弃注塑塑料
- waste incineration of plastics (unspecified) fraction in municipal solid waste (MSW): 2.42
  废弃PU填充剂
- waste incineration of plastics (unspecified) fraction in municipal solid waste (MSW): 21.97
  废弃PVDF膜
- waste incineration of plastics (unspecified) fraction in municipal solid waste (MSW): 29.28
  废弃PVC外壳

## Review details
Inventory: The internal review was done by several iteration steps concerning raw data validation, raw data documentation, representativity, completeness and consistency of modelling with regard to ISO 14040 and 14044.; Documentation: The review of the documentation was performed by Ecobilan and is in compliance with ISO 14040 and 14044. The data set documentation is correct in view of the appropriateness of the information provided. It includes all relevant information in view of data quality and scope of application of the respective LCI result.
