# Potable water production | Ultrafiltration, hollow fiber membrane, CN

Dataset: ILCD process, Unit process, single operation
Geography: CN
Reference year: 2022
Classification: Materials production / Other mineralic materials
Functional unit: 1 t potable water
Generated by: Jiaqi Lu, wilsherelu@foxmail.com
Review: Dependent internal review by Tiangong LCI Data Working Group
Amounts: no units in this file; such an amount is in the reference unit of its flow, which a separate flow dataset defines
copyright: false

## Reference product
- drinking water: 1000; measured
  饮用水

## Inputs
- electricity mix: 6.498; measured
  过滤耗电
- Water (fresh water): 1310; measured
  原水
- Ultrafiltration Component: 2.37e-6; measured
  超滤组件

## Outputs
- waste water - treated: 310; measured
  可直排

## Review details
Inventory: The internal review was done by several iteration steps concerning raw data validation, raw data documentation, representativity, completeness and consistency of modelling with regard to ISO 14040 and 14044.; Documentation: The review of the documentation was performed by Ecobilan and is in compliance with ISO 14040 and 14044. The data set documentation is correct in view of the appropriateness of the information provided. It includes all relevant information in view of data quality and scope of application of the respective LCI result.
