# 修复后土壤;土壤异位修复;异位热脱附

Dataset: ILCD process, Unit process, single operation
Geography: WH-HUB-CN
Reference year: 2022
Classification: Unit processes / Other Services / Repair and maintenance
Functional unit: The functional unit of life cycle assessment is defined as the disposal of foundation pit wastewater generated during the excavation process of 1000m3 contaminated soil, in order to achieve risk-based remediation goals.
Generated by: 杨欣桐, yangxt@caep.org.cn
Owner: 天工LCI数据工作小组
Review: Dependent internal review by 天工LCI数据工作小组
Amounts: no units in this file; such an amount is in the reference unit of its flow, which a separate flow dataset defines
copyright: false
licenseType: Free of charge for all users and uses

## General comment
土壤挖掘过程，受污染地下水会以基坑废水的形式被收集处置。

## Geography
选择位于中国武汉的一个受污染场地作为案例研究。大约125万m3的土壤被受到污染，土壤中测量到40种VOC、SVOC和重金属污染物。

## Technology and included processes
当挖掘受污染的土壤时，作为副产品产生的废水（如受污染的地下水）也需要处理（如絮凝沉淀、化学氧化还原和混凝）。

## Technical purpose
该数据集代表了位于中国武汉的受污染场地采用的土壤异位热脱附修复过程。该场地的土壤被VOC、SVOC和重金属混合物污染，大约有125万立方米的土壤需要处理。诸如所述异位方法的土壤修复过程通常应用于工业和危险性关键区域，其中土壤质量必须符合某些安全和环境标准。在开挖过程中产生的副产品废水（包括受污染地下水）通常需要处理，涉及的技术包括絮凝、沉淀、化学氧化还原和混凝。

## Reference product
- Remediated soil: 1000; measured

## Inputs
- Activated Carbon: 1025.69; measured
- Electricity: 57302; measured
- natural gas,natural gas: 86715; measured
- Excavated soil,Excavated soil: 1000; measured

## Use advice
该数据集的用户应为1000立方米受污染土壤模拟完整的土壤修复过程，以及挖掘过程中产生的基坑废水的处置。值得注意的是，数据仅覆盖现场修复操作阶段，未考虑修复设备制造的影响。用户在将此数据集应用于更广泛的生命周期评估时，应包含基于风险评估标准的修复目标，并考虑当地环境法规和标准。

## Review details
清单： 内部审查通过几个迭代步骤完成，涉及原始数据验证、原始数据记录、代表性、完整性、与 ISO 14040 和 14044 有关的建模的一致性。

## Data sources
- Guangji H ,Huan L ,Chang C , et al. Selection of green remediation alternatives for chemical industrial sites: An integrated life cycle assessment and fuzzy synthetic evaluation approach. Science of the Total Environment, 2022, 845 157211-157211.
