# ZnO module

Dataset: ILCD process
Classification: Materials production / Inorganic chemicals
Functional unit: 1平方米钙钛矿光伏模块
Generated by: Xijing Yao, 15898832265@163.com
Owner: Tiangong LCI Data Working Group
Review: Dependent internal review by Tiangong LCI Data Working Group
Amounts: no units in this file; such an amount is in the reference unit of its flow, which a separate flow dataset defines
licenseType: Free of charge for all users and uses

## Reference product
- Solar Module: 1; log-normal; article inperiodical

## Inputs
All rows: log-normal
- ethanol: 0.0271579; article inperiodical
  Substrate cleaning solvent
- water: 0.0327; article inperiodical
  Substrate cleaning solvent
- zinc oxide: 0.0459; article inperiodical
  Layer thickness 25 nm
- dimethyl formamide: 0.00283; calculated
  Solvent of PbI2
- isopropanol: 0.0112; calculated
  Solvent of CH3NH3I
- chlorobenzene: 0.0118; calculated
  Solvent of spiro-OMeTAD
- silver: 0.00119; article inperiodical
  Layer thickness 150 nm
- polyethylene terephthalate (PET) granulate: 0.0617; article inperiodical
  Applied on 2 sides
- Adhesives: 0.0202; article inperiodical
  3 M 467 MPF
- Electricity: 16.416; calculated

## Outputs
All rows: log-normal
- ethanol: 0.0258; article inperiodical
  Substrate cleaning solvent
- n-butanol: 0.038; article inperiodical
  Solvent of ZnO ink
- methanol: 0.0571; article inperiodical
  Solvent of ZnO ink
- chloroform: 0.0496; article inperiodical
  Solvent of ZnO ink
- dimethyl formamide: 0.00283; calculated
  Solvent of PbI2
- isopropanol: 0.0112; calculated
  Solvent of CH3NH3I
- chlorobenzene: 0.0118; calculated
  Solvent of spiro-OMeTAD
- silver: 0.000215; article inperiodical
  Wasted cathode
- landfill of glas/inert waste: 1.63; article inperiodical

## Review details
Inventory: The internal review was done by several iteration steps concerning raw data validation, raw data documentation, representativity, completeness and consistency of modelling with regard to ISO 14040 and 14044.
