# 柑橘生产

Dataset: ILCD process, Unit process, black box
Geography: SC-CN
Reference year: 2017
Valid until: 2018
Classification: Unit processes / Materials production / Agricultural production means
Functional unit: One hectare of citrus orchard
Generated by: 朱娴, zzhu0918@163.com
Owner: 天工LCI数据工作小组
Review: Dependent internal review by 天工LCI数据工作小组
Amounts: no units in this file; such an amount is in the reference unit of its flow, which a separate flow dataset defines
copyright: false
licenseType: Free of charge for all users and uses

## General comment
培育柑橘树苗，进行农药、化肥、农家肥及水的施用，使用人工和机器配合收获柑橘产品，并且分别对空气、土壤和水中产生排放物。

## Geography
丹棱县位于中国西南部的四川省，是中国柑橘生产30强县之一。

## Time period
基于2017年和2018年对四川省丹棱县155户柑橘种植户的调查问卷，分析了丹棱县柑橘生产的投入产出情况。

## Technical purpose
该数据集表示中国顶尖的柑橘生产区之一丹棱县的柑橘生产输入和输出。该数据可用于环境影响研究、农业效率分析和可持续性评估。它适用于了解种植柑橘植物的资源利用和环境排放，特别适合于大规模农业设置以及与四川省具有相似气候和种植实践的区域。

## Reference product
- Citrus: 24400; min 1880; max 56300; measured

## Inputs
All rows: measured
- Nitrogenous fertilizer: 847; min 140; max 2094
- Phosphate fertilizer: 443; min 84.6; max 1400
- Potassium fertilizer: 693; min 130; max 1754
- Pesticide: 21.2; min 0.43; max 96.6
- Electricity: 284.76; min 19.512; max 1177.2
- diesel oil: 0.0289; max 0.169

## Use advice
用户在应用此数据时应考虑地理和技术背景，因为它是特定于2017年和2018年丹棱县柑橘园的。如果将其作为其他地点或时间的参考数据，重要的是要根据时间和区域差异调整数据。任何外推都应谨慎进行，确保了解当地农业实践、投入类型及施用量和排放因子。在方法论上，用户应考虑在模拟其他过程或地点时产量、投入使用和排放率的潜在变化。

## Review details
清单： 内部审查通过几个迭代步骤完成，涉及原始数据验证、原始数据记录、代表性、完整性、与 ISO 14040 和 14044 有关的建模的一致性。
