# 氧化铝生产; 冶金用氧化铝 ; 铝土矿 ; 2015年

Dataset: ILCD process, Unit process, single operation
Geography: CN
Reference year: 2021
Classification: Unit processes / Materials production / Non-energetic raw materials
Generated by: 封羽真, fyz22
Owner: 天工LCI数据工作小组
Review: Dependent internal review by 天工LCI数据工作小组
Amounts: no units in this file; such an amount is in the reference unit of its flow, which a separate flow dataset defines
copyright: false
licenseType: Free of charge for all users and uses

## General comment
该数据集涉及的氧化铝生产专门用于冶金行业。由铝土矿提取的氧化铝主要用于铝冶炼业，通过霍尔-埃鲁过程生产金属铝。

## Time period
文献发表日期

## Reference product
- aluminium oxide, metallurgical: 1000; software or database
  alumina

## Inputs
All rows: software or database
- soda ash, dense: 145.63
  soda ash
- Petroleum Coke: 905.914
  Energy sources proportion of energy consumption is coal: fuel oil: coke: natural gas: coke even gas=46.0%: 11.0%: 7.1%: 14.1%: 21.7%
- coal gas: 2768.78
  (same comment as for Petroleum Coke)
- natural gas, high pressure: 1799.07
  (same comment as for Petroleum Coke)
- fuel oil, unspecified: 1403.53
  (same comment as for Petroleum Coke)
- hard coal: 5869.3
  (same comment as for Petroleum Coke)
- Water, unspecified natural origin: 1.34
  water consumption

## Data selection and combination
本研究的数据参考了PA、SA、电力等背景数据的LCA数据。PA数据来自统计数据源，SA数据主要来自文献。背景数据主要来自中国科学院生态环境研究中心CASRCEES 2018建立的中国本地化LCA数据库，涵盖能源、材料、交通、废物管理等LCA数据。

## Use advice
使用此数据的用户应注意，生命周期评估(LCA)数据包括氧化铝生产(PA)、辅助活动(SA)、电力及其他背景数据。用户在使用此数据时应考虑PA和SA数据的来源，特别是统计数据和相关文献。此外，为确保LCA模型符合中国本土化的情境，用户应整合来自中国科学院生态环境研究中心2018年(CAS RCEES 2018)数据库的背景数据，包括他们分析中的能源、材料、运输和废物管理等方面。

## Review details
清单： 内部审查通过几个迭代步骤完成，涉及原始数据验证、原始数据记录、代表性、完整性、与 ISO 14040 和 14044 有关的建模的一致性。

## Data sources
- Ding, N., Liu, N., Lu, B. & Yang, J. Life cycle greenhouse gas emissions of aluminum based on regional industrial transfer in China. J. Ind. Ecol. 25, 1657–1672 (2021).
