# 瓦楞纸板生产;废纸;无脱墨

Dataset: ILCD process, Unit process, single operation
Geography: CN
Reference year: 2021
Valid until: 2026
Classification: Unit processes / Materials production / Paper and cardboards
Generated by: 刘晓华, lxh01311@163.com
Owner: 天工LCI数据工作小组
Review: Dependent internal review by 天工LCI数据工作小组
Amounts: no units in this file; such an amount is in the reference unit of its flow, which a separate flow dataset defines
licenseType: Free of charge for all users and uses

## General comment
该数据表示采用旧瓦楞纸箱(OCC)作为主要原料，无脱墨工艺，生产1吨瓦楞纸板。生产出的瓦楞纸板通常用于包装，为各种产品在运输和搬运过程中提供结构支撑。

## Reference product
- corrguted cardboard: 1000; missing unimportant

## Inputs
All rows: missing unimportant
- Waste paper: 1099
  废纸
- hard coal: 351.12
  煤炭
- Electricity: 936.612
  电力
- water: 7.05
  水
- Diesel: 43
  柴油
- Cassava Starch: 48
  木薯淀粉
- Chemicals (unspecified): 8.5
  环压增强剂
- Chemicals (unspecified): 1.9
  过硫酸铵
- Chemicals (unspecified): 0.007
  聚合硫酸铁

## Outputs
- carbon dioxide (fossil): 889.88; missing unimportant
  二氧化碳 原文未区分bio和fossil，根据专家判断此处为fossil
- methane (fossil): 0.009; missing unimportant
  甲烷
- nitrous oxide: 0.014; missing unimportant
  氧化亚氮
- sulfur dioxide: 0.084; missing unimportant
  二氧化硫

## Use advice
使用此数据的用户应考虑与此数据集特定的技术适用性；例如，当使用OCC作为原材料时排除脱墨工艺。建议在需要瓦楞纸板的LCA模型中应用此数据集，特别是在不经脱墨回收废纸的情况下。方法论考虑还应包括瓦楞纸板的下游生命周期阶段，如使用和处置。

## Review details
清单： 内部审查通过几个迭代步骤完成，涉及原始数据验证、原始数据记录、代表性、完整性、与 ISO 14040 和 14044 有关的建模的一致性。

## Data sources
- 基于生命周期评价的瓦楞原纸
