# 丙烯生产 ; 丙烯 ; 甲醇制烯烃 ; 甲醇

Dataset: ILCD process, Unit process, black box
Geography: ZJ-GD-CN
Reference year: 2018
Classification: Unit processes / Materials production / Organic chemicals
Functional unit: A functional unit is defined as 1 ton of propylene product
LCI method principle: Attributional
LCI method approaches: Allocation - mass
Generated by: 任亚楠, renyn15@tsinghua.org.cn
Owner: 天工LCI数据工作小组
Review: Dependent internal review by 天工LCI数据工作小组
Amounts: no units in this file; such an amount is in the reference unit of its flow, which a separate flow dataset defines
copyright: false
licenseType: Free of charge for all users and uses

## General comment
ID11丙烯生产;丙烯;煤制烯烃路线;煤;下属过程5

## Geography
催化裂化路线的案例工厂来自中国石化湛江东兴石油化工有限公司。企业位于广东省湛江市，其催化裂化制烯烃工艺建于2018年，丙烯年产能11.6万吨。

## Time period
工艺建于2018年

## Technical purpose
中石化湛江东兴石油化工有限公司通过催化裂化工艺生产的丙烯用途广泛，主要用于各类化学制品的生产。它是生产聚丙烯塑料、丙烯腈、丙烯氧化物以及众多其他化学中间体和产品的基础原料。鉴于其生产规模，这种丙烯适用于小规模特殊用途和大规模工业应用。

## Model description
考虑了各个子阶段涉及的所有相关投入原材料、能源、电力、蒸汽、水和辅助化学品的消耗，产出考虑了丙烯和副产品(如丙烷脱氢工艺生产的C4产品。采用质量分配法量化产品丙烯和副产品之间的环境负荷。此外，本模型还考虑了各工艺的废物排放。本研究注重于不同丙烯生产工艺的环境影响分析，因此，丙烯烃利用及其产品的报废处理以及、基础设施建设和以及设备维护不在本次评价边界范围之内。

## Reference product
- propene (propylene): 1000; measured
  丙烯

## Inputs
All rows: measured
- Methanol: 4480
  MTO级甲醇
- Hydrogen: 1.24
  氢气
- sodium hydroxide: 30.03
  NaOH溶液
- Dimethyl disulfide: 0.12
  二甲基二硫
- nitrogen: 266.21
  低压氮气
- process steam: 5850
  蒸汽
- freshwater: 2860
  新鲜水
- Electricity: 1432.58
  电

## Outputs
All rows: measured
- ethene (ethylene): 670
  乙烯
- LPG - liquefied petroleum gas: 30
  液化石油气
- C5 Hydrocarbon Mixture: 40
  C5
- gasoline (regular): 60
  汽油
- carbon dioxide (fossil): 270
  CO2
- carbon monoxide (fossil): 0.02542
  CO
- particles (> PM10): 0.00794
  颗粒物
- nitrous oxide: 0.13233
  NOx
- Sodium carboxylate: 1.01837
  羧酸钠
- chemical oxygen demand: 0.42136
  COD
- biological oxygen demand: 0.15143
  BOD5
- Dissolved solids: 0.02164
  TDS

## Data selection and combination
丙烯生产工艺详细的投入产出数据来自企业公开的环境影响评价报告，包括原料和辅料投入、能源和资源消耗，以及废气、废水和固体废物的排放。

## Use advice
使用该数据的用户应当考虑来自企业公开环境影响评价的输入输出数据的精确性，并将此信息应用于其LCA模型时确保1吨丙烯产品的功能单元与模型的系统边界对齐。同时，需要注意的是，丙烯烃的终生处理、基础设施建设和设备维护阶段被排除在评价范围之外。此外，应使用质量分配法在丙烯和副产品之间分配环境负荷，同时注意考虑工艺中的废物排放。

## Review details
清单： 内部审查通过几个迭代步骤完成，涉及原始数据验证、原始数据记录、代表性、完整性、与 ISO 14040 和 14044 有关的建模的一致性。

## Data sources
- 吕琳. 丙烯产品环境负荷及温室气体减排的碳税政策. (大连理工大学, 2022).
