# 铝电解电容器生产 ; 铝电解电容器（35V 1000uf）

Dataset: ILCD process, Unit process, black box
Geography: NT-JS-CN
Reference year: 2020
Classification: Unit processes / Materials production / Metals and semimetals
Generated by: 谢金良, jinliang.research@gmail.com
Owner: 天工LCI数据工作小组
Review: Dependent internal review by 天工LCI数据工作小组
Amounts: no units in this file; such an amount is in the reference unit of its flow, which a separate flow dataset defines
copyright: false
licenseType: Free of charge for all users and uses

## General comment
铝电解电容器，特别是额定电压为35V、电容量为1000微法拉（1000uf）的电容器，是用于电路中储能的电子组件。它们广泛应用于包括消费电子、汽车电子、工业机械、电力电子系统等各种装置的电源滤波、信号整形和电子噪声滤除。

## Time period
数据来自于在2020年进行的调研

## Reference product
- Aluminum Electrolytic Capacitors: 10000; measured
  aluminum electrolytic capacitors (qualified) (10000 pcs)

## Inputs
All rows: measured
- electricity, high voltage, aluminium industry: 4970.09
- electrolyte, KOH, LiOH additive: 115.73
  Electrolyte (soak); The complete composition of electrolyte is 69% main solvent (1,4-butyrolactone), 26% auxiliary solvent (ammonium tetramethylsuccinate), and 5% solute (water). The electrolyte here is assumed to consist of 95% the main solvent and 5% solutes to simplify the analysis of environmental impacts.
- Aluminum ingots(cathode): 59.36
  Al ingots (cathode)
- Aluminum ingots(anode): 106
  Al ingots (anode) ; Al smelting preparation (anode)
- Lead, in ground: 12.91
  Lead from assembly (including sleeving)
- case from assembly (including sleeving): 299.18
- polysulfide, sealing compound: 64.14
  Sealing cover from assembly (including sleeving)
- Sleeve: 17.35
  sleeve from assembly (including sleeving)
- Armature Winding: 12.91
  tab from winding ; 绕组接线片
- sealing tape, aluminium/PE, 50 mm wide: 1.87
  tape from winding
- Separator Paper Coil,Separator Paper Coil: 38.48
  Separator paper coil
- water, deionised: 27291
  deionized water
- tap water: 15274.4
  tape water
- phosphoric acid, industrial grade, without water, in 85% solution state: 28.56
- Perboric acid: 5.19
  perboric acid; HBO3; 过硼酸
- hydrochloric acid, without water, in 30% solution state: 40.19
  HCl (31%)
- Nitrogen: 0.2
  N2 gas (final annealing)
- sodium hydroxide, without water, in 50% solution state: 45.25
  NaOH (30%)
- ammonium nitrate: 0.46
  Ammonium nitrate; 硝酸氢铵; NH4H2PO4
- nitric acid, without water, in 50% solution state: 12.06
  HNO3 (98%)
- Cold Rolling Oil: 3.99
  rolling oil (cold rolling)
- Ammonium Citrate: 10
  Ammonium citrate (formation process); 柠檬酸铵
- Ammonium Pentaborate: 2.74
  Ammonium pentaborate (formation process); 五硼酸铵
- Argon-40: 0.03
  Ar gas (Al smelting preparation)

## Outputs
All rows: measured
- Aluminium Phosphate: 3.68
  Aluminium phosphate (AlPO4) (production of anode formed foil); The environmental impacts from the production stage are all allocated to the capacitors. The by-product AlPO4 in production of anode formed foil is taken as an economical treatment method to address the production waste because of the limited amount and the simplified analysis.
- aluminium scrap, new: 11.35
  Al scraps; The environmental impacts on the specialized recycling processing of the flows are ignored.
- Scraps of Separator Paper: 0.502
  Scraps of separator paper; The environmental impacts on the specialized recycling processing of the flows are ignored.
- Sludge (Sewage Treatment): 3.462
  sludge (Sewage treatment); The environmental impacts on the specialized landfill of the sludge are ignored.
- wastewater, average: 23330.6
  wastewater
- Total Phosphorus (TP): 0.009
  total phosphorous (TP) (production of anode formed foil); 总磷 (污染物);
- total nitrogen: 0.04
  total nitrogen (TN); 总氮 (污染物)
- Suspended solids, unspecified: 0.336
- chemical oxygen demand: 1.008
- Biochemical Oxygen Demand: 0.128
  Biochemical Oxygen Demand (BOD) (Production of Al blank foil); 生化需氧量 (水体污染物)
- ammonia: 0.104
  Ammonia nitrogen (NH3-N)
- Dust: 0.061
  dust (Al smelting preparation)
- Hydrochloric acid: 0.197
- Sulfuric acid: 0.021
- Nitrogen oxides: 0.024
- ammonia: 0.022
- Aluminum Electrolytic Capacitors (Waste): 6281.67
  aluminum electrolytic capacitors (waste) ; The environmental impacts on the specialized recycling processing of the flows are ignored.

## Data selection and combination
三种 AEC 的材料信息和性能参数均来自被调查的制造商。此外，通过对 AEC 行业的几家工厂进行实地调研，获得了铝坯箔制造（由铝锭制成）、阳极/阴极箔制造（由铝坯箔制成）和电容器制造的原始数据。由于技术保密原因，无法直接从供应商处获得 PHAEC 阴极箔制造的 LCI 数据。因此，考虑到两者的相似性，根据 PAECs 阴极箔的涂层工艺数据调整 PHAECs 阴极铝箔的制造 LCI。在运输阶段，主要原材料从材料产地到电容器制造商的数据以及电容器制成品从制造商到客户的数据均来自制造商的供应链系统。使用阶段的能耗是根据 AEC 的物理方程和电气参数计算得出的。为确保分析的完整性，在分析和计算的基础上获得报废阶段的数据。基本数据的参考年份约为 2016 年。基本数据（即铝锭、分离纸、运输、电力和水）来自 Gabi 数据库（版本：10.6.1.35）。此外，一些背景数据，包括 3，4-乙烯二氧噻吩（EDOT）、己二酸铵、柠檬酸铵等，在 Gabi 数据库中无法获得。它们是根据 Gabi 数据库中现有原材料在材料制备过程中发生的化学反应估算出来的。用于制造 PHAECs 的分散溶液（PEDOT:PSS，1%wt）的制备过程数据是根据实验室数据按比例计算的。三种 AEC 的详细 LCI 数据和物质流的单位影响见辅助信息 B 的第 5-7 张和第 2 张。

## Sampling procedure
Life cycle inventory data are mainly collected from environmental impact assessment report of Zhejiangyuhua aluminum alloy production site in China.

## Use advice
使用所提供的生命周期清单（LCI）数据进行环境影响评估时，请注意生产废物（即电容器、铝屑、纸屑和污泥）的特殊处理过程已被排除。由于基于Gabi软件的化学方程式估算LCI数据，1,4-丁内酯、柠檬酸铵、五水合硼酸铵、磷酸二氢铵和硼酸的环境影响可能被低估。用户还必须考虑许多化学反应涉及特定的反应条件，如压力、温度和催化剂，这些都有相关的能源和材料投入，并可能增加环境污染的风险。此外，应该计入可能影响产量并需要后续处理以分离和净化产品的副反应。由于这五种材料的使用有限，它们对最终评估结果的贡献被认为是次要的，但在环境影响分析中应特别注意电解质的完整组成。

## Review details
清单： 内部审查通过几个迭代步骤完成，涉及原始数据验证、原始数据记录、代表性、完整性、与 ISO 14040 和 14044 有关的建模的一致性。

## Data sources
- Zhang, C., Zheng, Y., Huang, H., Liu, Z. & Jing, J. Environmental impact assessment of aluminum electrolytic capacitors in a product family from the manufacturer’s perspective. Int. J. Life Cycle Assess. (2022)
