# Painting/painting|LacquerCrafts|Oil-basedpaint|Painting/painting|All sizes / 刷漆/喷漆|漆器工艺品|油性漆料|刷漆/喷漆|所有规模

Dataset: ILCD process, Unit process, single operation
Geography: CN
Reference year: 2019
Classification: Systems / Paints and chemical preparations
Generated by: The data was created by the Office of the Second National Pollution Source Census of the Ministry of Ecology and Environment, and the data was organized by the TianGong Plan team for ILCD format / 生态环境部第二次全国污染源普查工作办公室创建数据，天工计划团队常慧敏整理数据为ILCD格式
Owner: Tiangong LCI Data Working Group / 天工LCI数据工作小组
Amounts: no units in this file; such an amount is in the reference unit of its flow, which a separate flow dataset defines
copyright: false
licenseType: Free of charge for all users and uses

## Technology and included processes
the Technical of end-of-pipe management technology for pollution volatile organic compoundisDirect discharge，Its Technical efficiency of end-of-pipe management0

## Reference product
- Paint: 1000; input; calculated
  源文件中描述为为油性漆料，此处对其进行了匹配工作，将其匹配到LCAflow库里面相最符合的流，污染物类别备注为①2431雕塑工艺品、2432金属工艺品、2434花画工艺品、2435天然植物纤维编织工艺品、2438珠宝首饰及有关物品、2439其他工艺美术及礼仪用品的生产过程中，如果包含刷漆/喷漆工艺，废气指标可所使用的漆料类别（油性漆料、水性漆料和天然生漆三种）参考本系数。，污染物指标备注为工业废气量

## Outputs
All rows: calculated
- Exhaust gas: 753000
  污染物指标工业废气量的末端治理技术是/，末端治理设施实际运行率（k值）计算公式为/。原文件中描述污染物类别为废气，污染物指标为工业废气量，此处对其进行了匹配工作，将其匹配到LCAflow库里面相最符合的流，污染物类别备注为①2431雕塑工艺品、2432金属工艺品、2434花画工艺品、2435天然植物纤维编织工艺品、2438珠宝首饰及有关物品、2439其他工艺美术及礼仪用品的生产过程中，如果包含刷漆/喷漆工艺，废气指标可所使用的漆料类别（油性漆料、水性漆料和天然生漆三种）参考本系数。，污染物指标备注为工业废气量
- volatile organic compound: 119.6
  污染物指标挥发性有机物的末端治理技术是光催化+活性炭吸附，其效率为80，末端治理设施实际运行率（k值）计算公式为k=废气治理设施运行时间（小时/年）/废气产污核算环节正常生产（小时/年）。原文件中描述污染物类别为废气，污染物指标为挥发性有机物，此处对其进行了匹配工作，将其匹配到LCAflow库里面相最符合的流，污染物类别备注为①2431雕塑工艺品、2432金属工艺品、2434花画工艺品、2435天然植物纤维编织工艺品、2438珠宝首饰及有关物品、2440其他工艺美术及礼仪用品的生产过程中，如果包含刷漆/喷漆工艺，废气指标可所使用的漆料类别（油性漆料、水性漆料和天然生漆三种）参考本系数。，污染物指标备注为挥发性有机物，产污系数备注为①2431雕塑工艺品、2432金属工艺品、2434花画工艺品、2435天然植物纤维编织工艺品、2438珠宝首饰及有关物品、2439其他工艺美术及礼仪用品的生产过程中，如果包含刷漆/喷漆工艺，废气指标可所使用的漆料类别（油性漆料、水性漆料和天然生漆三种）参考本系数。
- volatile organic compound: 358.8
  污染物指标挥发性有机物的末端治理技术是光解，其效率为40，末端治理设施实际运行率（k值）计算公式为k=废气治理设施运行时间（小时/年）/废气产污核算环节正常生产（小时/年）。原文件中描述污染物类别为废气，污染物指标为挥发性有机物，此处对其进行了匹配工作，将其匹配到LCAflow库里面相最符合的流，污染物类别备注为①2431雕塑工艺品、2432金属工艺品、2434花画工艺品、2435天然植物纤维编织工艺品、2438珠宝首饰及有关物品、2441其他工艺美术及礼仪用品的生产过程中，如果包含刷漆/喷漆工艺，废气指标可所使用的漆料类别（油性漆料、水性漆料和天然生漆三种）参考本系数。，污染物指标备注为挥发性有机物，产污系数备注为①2431雕塑工艺品、2432金属工艺品、2434花画工艺品、2435天然植物纤维编织工艺品、2438珠宝首饰及有关物品、2439其他工艺美术及礼仪用品的生产过程中，如果包含刷漆/喷漆工艺，废气指标可所使用的漆料类别（油性漆料、水性漆料和天然生漆三种）参考本系数。
- volatile organic compound: 358.8
  污染物指标挥发性有机物的末端治理技术是光催化，其效率为40，末端治理设施实际运行率（k值）计算公式为k=废气治理设施运行时间（小时/年）/废气产污核算环节正常生产（小时/年）。原文件中描述污染物类别为废气，污染物指标为挥发性有机物，此处对其进行了匹配工作，将其匹配到LCAflow库里面相最符合的流，污染物类别备注为①2431雕塑工艺品、2432金属工艺品、2434花画工艺品、2435天然植物纤维编织工艺品、2438珠宝首饰及有关物品、2442其他工艺美术及礼仪用品的生产过程中，如果包含刷漆/喷漆工艺，废气指标可所使用的漆料类别（油性漆料、水性漆料和天然生漆三种）参考本系数。，污染物指标备注为挥发性有机物，产污系数备注为①2431雕塑工艺品、2432金属工艺品、2434花画工艺品、2435天然植物纤维编织工艺品、2438珠宝首饰及有关物品、2439其他工艺美术及礼仪用品的生产过程中，如果包含刷漆/喷漆工艺，废气指标可所使用的漆料类别（油性漆料、水性漆料和天然生漆三种）参考本系数。
- volatile organic compound: 179.4
  污染物指标挥发性有机物的末端治理技术是活性炭吸附，其效率为70，末端治理设施实际运行率（k值）计算公式为k=废气治理设施运行时间（小时/年）/废气产污核算环节正常生产（小时/年）。原文件中描述污染物类别为废气，污染物指标为挥发性有机物，此处对其进行了匹配工作，将其匹配到LCAflow库里面相最符合的流，污染物类别备注为①2431雕塑工艺品、2432金属工艺品、2434花画工艺品、2435天然植物纤维编织工艺品、2438珠宝首饰及有关物品、2443其他工艺美术及礼仪用品的生产过程中，如果包含刷漆/喷漆工艺，废气指标可所使用的漆料类别（油性漆料、水性漆料和天然生漆三种）参考本系数。，污染物指标备注为挥发性有机物，产污系数备注为①2431雕塑工艺品、2432金属工艺品、2434花画工艺品、2435天然植物纤维编织工艺品、2438珠宝首饰及有关物品、2439其他工艺美术及礼仪用品的生产过程中，如果包含刷漆/喷漆工艺，废气指标可所使用的漆料类别（油性漆料、水性漆料和天然生漆三种）参考本系数。
- volatile organic compound: 598
  污染物指标挥发性有机物的末端治理技术是直排，其效率为0，末端治理设施实际运行率（k值）计算公式为k=废气治理设施运行时间（小时/年）/废气产污核算环节正常生产（小时/年）。原文件中描述污染物类别为废气，污染物指标为挥发性有机物，此处对其进行了匹配工作，将其匹配到LCAflow库里面相最符合的流，污染物类别备注为①2431雕塑工艺品、2432金属工艺品、2434花画工艺品、2435天然植物纤维编织工艺品、2438珠宝首饰及有关物品、2444其他工艺美术及礼仪用品的生产过程中，如果包含刷漆/喷漆工艺，废气指标可所使用的漆料类别（油性漆料、水性漆料和天然生漆三种）参考本系数。，污染物指标备注为挥发性有机物，产污系数备注为①2431雕塑工艺品、2432金属工艺品、2434花画工艺品、2435天然植物纤维编织工艺品、2438珠宝首饰及有关物品、2439其他工艺美术及礼仪用品的生产过程中，如果包含刷漆/喷漆工艺，废气指标可所使用的漆料类别（油性漆料、水性漆料和天然生漆三种）参考本系数。

## Data sources
- 第二次全国污染源普查产排污核算系数手册（试用版）,二级代码24,四级代码2433文件，在完整版文件中第2843页
