# Vegetable Production | Crop Production (Conventional)

Dataset: ILCD process, Unit process, single operation
Geography: HD-HEB-CN
Reference year: 2002
Valid until: 2017
Classification: Materials production / Other mineralic materials
Functional unit: 1T eggplant
Generated by: Haoran Zhang, hrzhang@whu.edu.cn
Review: Dependent internal review by Tiangong LCI Data Working Group
Amounts: no units in this file; such an amount is in the reference unit of its flow, which a separate flow dataset defines
copyright: false

## Geography
Qu Zhou

## Time period
The long-term positioning experiment for greenhouse vegetables started in March 2002.

## Technology and included processes
The experiment used a 60 m long and 7 m wide arched greenhouse for the cultivation of various vegetables in rotation (two crops per year). The study focused on the growth of eggplants from March to August each year, conducting a 4-year experiment from 2013 to 2016. Three treatments were applied: conventional, integrated, and organic.

## Reference product
- eggplant: 1000; calculated
  conventional

## Inputs
- Rice Seeds: 5.8; measured
  comprehensive
- Agricultural film: 41.67; measured
  comprehensive
- Diesel: 50; measured
  comprehensive
- river water: 9425; measured
  comprehensive
- Electricity: 18.18; calculated
  conventional
- arable, non-irrigated: 85.34; calculated
  conventional
- water: 80.44; calculated
  conventional

## Outputs
All rows: calculated
- Hydrocarbons, aliphatic, alkanes, unspecified: 1.24e-5
  conventional
- carbon monoxide: 0.0003
  conventional
- carbon dioxide (fossil): 1.36
  conventional
- ammonium: 1.1134
  conventional
- nitrous oxide: 0.179
  conventional
- Nitrogen oxides: 0.002
  conventional
- nitrate: 2.1173
  conventional
- sulfide: 0.0017
  conventional
- methane: 2.99e-5
  conventional
- phosphorus, total: 0.0165
  conventional
- cadmium: 0.0004
  conventional
- lead-210: 0.0015
  conventional
- copper: 0.0048
  conventional
- zinc: 0.0148
  conventional
- phosphate: 0.0005
  conventional
- Pyrethrins: 0.032
  conventional
- benomyl: 0.0325
  conventional
- carbendazim: 0.0325
  conventional
- mancozeb: 0.0325
  conventional

## Deviations from the LCI method approaches
Life cycle assessment includes the following 4 steps: goal definition and scope delineation, inventory analysis, impact assessment, and result interpretation. Brief descriptions of the main steps are given below.

## Data selection and combination
The inventory analysis includes the collection of data and quantitative processing of the data. In the agricultural input production subsystem, the pollutants produced by fertilizers, organic fertilizers, insecticides, mulching films, and diesel, etc., (including CO, CO2, NOx, SO2, CH4, N2O, and COD, etc.) and energy consumption are calculated referring to the research results of Liang Long [22].

## Data treatment and extrapolations
Nitrous oxide collection uses the static chamber method [19], and the measurement is conducted using the Agilent 7890A gas chromatograph. Soil nitrate nitrogen (NO3-N) and total phosphorus leaching are collected using a free-flow underground leaching collection device in agricultural fields, and after each irrigation, leachate is extracted using a pump within 3 to 5 days, and measured with a flow analyzer (TRAACS2000). The extraction of heavy metals (mainly considering Cu, Zn, Pb, and Cd) in organic fertilizers uses the nitric acid-hydrochloric acid-hydrofluoric acid digestion method, and the test liquid is measured by ICP-MS. When the crops are harvested, each harvest is weighed and recorded, taking the average of three times. Detailed measurement processes for each indicator are referenced in the literature [19].

## Review details
Inventory: The internal review was done by several iteration steps concerning raw data validation, raw data documentation, representativity, completeness and consistency of modelling with regard to ISO 14040 and 14044.; Documentation: The review of the documentation was performed by Ecobilan and is in compliance with ISO 14040 and 14044. The data set documentation is correct in view of the appropriateness of the information provided. It includes all relevant information in view of data quality and scope of application of the respective LCI result.

## Data sources
- 徐强,胡克林,李季等.华北平原不同生产模式设施蔬菜生命周期环境影响评价[J].环境科学,2018,39(05):2480-2488.DOI:10.13227/j.hjkx.201710007.
