# 拆解;废旧光伏组件;人工拆解；玻璃重熔;玻璃碎片;高温重熔；热处理光伏电池;光伏电池;热处理方法；光伏电池封装胶膜分离;在惰性气体中通过厌氧热分解与细胞完全分离；金属提取;铝、钢、铜、银和太阳能级多晶硅（SoG-Si）;酸浸、萃取和热分解

Dataset: ILCD process, Unit process, black box
Geography: CN
Classification: Unit processes / End-of-life treatment / Material recycling
Generated by: 王楠, 1209824595@qq.com
Owner: 天工LCI数据工作小组
Review: Dependent internal review by 天工LCI数据工作小组
Amounts: no units in this file; such an amount is in the reference unit of its flow, which a separate flow dataset defines
copyright: false
licenseType: Free of charge for all users and uses

## General comment
从更主流的回收角度来看，光伏系统通常是先拆解的。拆卸阶段主要耗电。退役的BOS在此阶段生产废金属材料。光伏组件被分解成大型铝合金片、碎玻璃、碎光伏电池和其他废料。碎玻璃需要在高温下重新熔化。热处理方法用于光伏电池的回收利用。EVA在惰性气体中通过厌氧热分解与电池完全分离。经过酸浸、萃取和热分解等多种化学处理，包括铝、钢、铜、银和SoG-Si在内的材料可以直接投入生产。其他废料通常直接焚烧或填埋。

## Technical purpose
此工业流程涉及废旧光伏组件的回收。通过该过程回收的材料，例如铝、钢、铜、银和硅，可作为其各自行业的次级原料用于新产品的制造。高温重熔的玻璃用于生产新的玻璃产品，而处理过的光伏电池可以重新整合到新光伏组件或其他电子产品的制造中。该过程支持太阳能产业中资源的可持续使用。

## Reference product
- PV Module Waste: 1; input; uniform; estimated

## Inputs
- Electricity: 248516; software or database

## Outputs
All rows: software or database
- Lead Acid Battery: 57420
  Lead acid battery
- Solar grade multi-Si: 4164.94
- Glass for recovery (shards): 75601; uniform
- copper: 3146.43
- aluminium: 35650; uniform
- silver: 44.48
- Steel,Steel: 53200; uniform
  Steel

## Use advice
使用涉及所描述过程的数据集时，应该注意各个回收阶段准确的方法论考量。使用者必须确保正确核算拆解过程中的能耗和原材料回收效率。在适用的情况下，包括针对多产出过程的相关分摊程序。另外，确定并包括废物处理（如焚烧或填埋）的环境影响。考虑到技术发展的时间和地域适用性，及当地的回收能力。

## Review details
清单： 内部审查通过几个迭代步骤完成，涉及原始数据验证、原始数据记录、代表性、完整性、与 ISO 14040 和 14044 有关的建模的一致性。

## Data sources
- Shen, Z. et al. A life cycle assessment of Hydropower-Silicon-Photovoltaic industrial chain in China. Journal of Cleaner Production 362, 132411 (2022).
