# Pretreatment|MetalFurniture|Water,reagent,weldingrod,compressedgas|Cleaning, surface treatment, machining (cutting, welding, drilling)|All sizes / 预处理|金属家具|水、试剂、焊条、压缩气体|清洗、表面处理、机加工（切割、焊接、打孔）|所有规模

Dataset: ILCD process, Unit process, single operation
Geography: CN
Reference year: 2019
Classification: Materials production / Metals and semimetals
Generated by: The data was created by the Office of the Second National Pollution Source Census of the Ministry of Ecology and Environment, and the data was organized by the TianGong Plan team for ILCD format / 生态环境部第二次全国污染源普查工作办公室创建数据，天工计划团队常慧敏整理数据为ILCD格式
Owner: Tiangong LCI Data Working Group / 天工LCI数据工作小组
Amounts: no units in this file; such an amount is in the reference unit of its flow, which a separate flow dataset defines
copyright: false
licenseType: Free of charge for all users and uses

## Technology and included processes
the Technical of end-of-pipe management technology for pollution particles (PM2.5 - PM10)isDirect discharge，The formula for calculating the actual operation rate (k-value) of the end-of-pipe treatment facility is /

## Reference product
- Metal Furniture: 1; calculated
  源文件中描述为为金属家具，此处对其进行了匹配工作，将其匹配到LCAflow库里面相最符合的流

## Outputs
All rows: calculated
- Water (river water from technosphere, waste water): 41
  污染物指标工业废水量的末端治理技术未说明。原文件中描述污染物类别为废气，污染物指标为工业废水量，此处对其进行了匹配工作，将其匹配到LCAflow库里面相最符合的流
- Chemical Oxygen Demand: 0.00343
  污染物指标化学需氧量的末端治理技术是化学混凝+上浮分离+A2/O工艺+沉淀分离，其效率为90，末端治理设施实际运行率（k值）计算公式为k=污水治理设施运行时间（小时）/正常生产时间（小时）。原文件中描述污染物类别为废气，污染物指标为化学需氧量，此处对其进行了匹配工作，将其匹配到LCAflow库里面相最符合的流
- particles (PM2.5 - PM10): 0.005
  污染物指标颗粒物的末端治理技术是袋式除尘，其效率为90，末端治理设施实际运行率（k值）计算公式为k=处理设施耗电量（千瓦时/年）/[设备额定功率（千瓦）×运行时间（小时/年）]。原文件中描述污染物类别为废气，污染物指标为颗粒物，此处对其进行了匹配工作，将其匹配到LCAflow库里面相最符合的流
- particles (PM2.5 - PM10): 0.005
  污染物指标颗粒物的末端治理技术是其他（滤芯+旋风），其效率为90，末端治理设施实际运行率（k值）计算公式为k=处理设施耗电量（千瓦时/年）/[设备额定功率（千瓦）×运行时间（小时/年）]。原文件中描述污染物类别为废气，污染物指标为颗粒物，此处对其进行了匹配工作，将其匹配到LCAflow库里面相最符合的流
- particles (PM2.5 - PM10): 0.01
  污染物指标颗粒物的末端治理技术是单筒（多筒并联）旋风，其效率为80，末端治理设施实际运行率（k值）计算公式为k=处理设施耗电量（千瓦时/年）/[设备额定功率（千瓦）×运行时间（小时/年）]。原文件中描述污染物类别为废气，污染物指标为颗粒物，此处对其进行了匹配工作，将其匹配到LCAflow库里面相最符合的流
- Exhaust gas: 20.8
  污染物指标工业废气量的末端治理技术是/，末端治理设施实际运行率（k值）计算公式为/。原文件中描述污染物类别为废气，污染物指标为工业废气量，此处对其进行了匹配工作，将其匹配到LCAflow库里面相最符合的流
- Chemical Oxygen Demand: 0.0343
  污染物指标化学需氧量的末端治理技术是直接排放，末端治理设施实际运行率（k值）计算公式为k=污水治理设施运行时间（小时）/正常生产时间（小时）。原文件中描述污染物类别为废气，污染物指标为化学需氧量，此处对其进行了匹配工作，将其匹配到LCAflow库里面相最符合的流
- particles (PM2.5 - PM10): 0.05
  污染物指标颗粒物的末端治理技术是直接排放，末端治理设施实际运行率（k值）计算公式为k=处理设施耗电量（千瓦时/年）/[设备额定功率（千瓦）×运行时间（小时/年）]。原文件中描述污染物类别为废气，污染物指标为颗粒物，此处对其进行了匹配工作，将其匹配到LCAflow库里面相最符合的流

## Data sources
- 第二次全国污染源普查产排污核算系数手册（试用版）,二级代码21,三级代码213.0文件，在完整版文件中第443页
