# Chemical recycling of waste plastics ,oil production

Dataset: ILCD process, Unit process, single operation
Geography: CN
Reference year: 2013
Classification: End-of-life treatment / Energy recycling
Functional unit: Dispose of 1 ton of waste plastic
Generated by: Jiaqi Lu, wilsherelu@foxmail.com
Owner: Tiangong LCI Data Working Group
Review: Dependent internal review by Tiangong LCI Data Working Group
Amounts: no units in this file; such an amount is in the reference unit of its flow, which a separate flow dataset defines
copyright: false
licenseType: Free of charge for all users and uses

## Reference product
- packaging waste (plastic): 1000; input; measured

## Inputs
- Electricity: 2052; measured
  electricity
- Water for industrial use: 0.14; measured
  water
- natural gas: 50; measured
  Liquefied gas

## Outputs
All rows: measured
- light fuel oil: 260.5
  light oil
- heavy fuel oil: 547.05
  heavy oil
- Paraffin: 60.7833
  paraffin
- carbon: 58.2333
  carbon black
- carbon dioxide (fossil): 249.74
  Natural gas combustion emissions
- nitrogen dioxide: 0.32
  Natural gas combustion emissions
- methane (fossil): 0.0216674
  Natural gas combustion emissions
- sulfur dioxide: 0.101949
  Natural gas combustion emissions
- carbon monoxide: 0.0860491
  Natural gas combustion emissions

## Review details
Inventory: The internal review was done by several iteration steps concerning raw data validation, raw data documentation, representativity, completeness and consistency of modelling with regard to ISO 14040 and 14044.

## Data sources
- 生活垃圾中废塑料资源化（油化）中试研究总结报告，上海耀森环保科技有限公司
