# 底泥修复;异位修复;异位热解析;工程实施;运输

Dataset: ILCD process, Unit process, single operation
Geography: CN
Classification: Other Services / Repair and maintenance
Generated by: 王枫, wangfeng@caep.org.cn
Owner: 天工LCI数据工作小组
Review: Dependent internal review by 天工LCI数据工作小组
Amounts: no units in this file; such an amount is in the reference unit of its flow, which a separate flow dataset defines
copyright: false
licenseType: Free of charge for all users and uses

## General comment
以处理1 t 污泥为功能单位。1）运输环节采用载重5t卡车，运输距离2 km；2）干化环节采用空心桨叶干化机，功率55 kW，整个干化系统规模为50 t/d，24 h工作制；3）热解环节管式炉额定功率4 kW，空载功率1.4 kW，反应前通入2~3 分钟N2以保证无氧环境，热解终温选定350℃；4）热解所产气体首先经过冷却装置，冷凝收集液体成分主要为可以回收利用的生物油，回收分离出的可燃性气体，固体半焦可用作吸附剂。

## Technology and included processes
运输环节采用载重5t卡车，运输距离2 km

## Technical purpose
所描述的工业过程涉及使用异位热解析技术修复受污染沉积物。具体来说，该数据集可代表使用5吨卡车运输1吨污泥2公里的过程，随后进行干化步骤，使用功率为55千瓦的空心桨叶干化机。干化系统日处理能力为50吨，全天候运作。热解步骤在额定功率4千瓦（空载功率1.4千瓦）的管式炉中进行，包括使用氮气预处理2到3分钟以确保无氧环境。该过程最终温度达到350摄氏度。热解产生的气体首先经过冷却；冷凝物主要由具有高热值的生物油组成，可以回收利用。该数据集涉及沉积物修复更广泛语境中的单一单元过程。

## Reference product
- sediment: 1000

## Inputs
- Oils, unspecified: 8e-5; calculated

## Outputs
- nitrogen dioxide: 0.0049; calculated
- carbon dioxide: 1.08; calculated
- sulfur dioxide: 1.3; calculated

## Use advice
在使用这个数据集时，用户应特别注意所描述过程的应用范围，因为它是为沉积物修复的特定情景而设计的。该数据集可能不适用于其他类型的废物处理或不同的环境条件。结果的解释应考虑技术的适用性，如运营规模和使用的具体类型设备。此外，用户应考虑干化和热解步骤提供的能耗细节，以及副产品的回收潜力，在这个案例中是具有高热值的生物油。

## Review details
清单： 内部审查通过几个迭代步骤完成，涉及原始数据验证、原始数据记录、代表性、完整性、与 ISO 14040 和 14044 有关的建模的一致性。

## Data sources
- 王久兵.污泥热解反应机制及其能源化工艺的全生命周期评价研究[D].浙江工业大学,2016.
