# 催化氧化单元;地下水抽出处理

Dataset: ILCD process, Unit process, single operation
Geography: UM
Reference year: 2009
Classification: Unit processes / Other Services / Repair and maintenance
Generated by: 杨欣桐, yangxt@caep.org.cn
Owner: 天工LCI数据工作小组
Review: Dependent internal review by 天工LCI数据工作小组
Amounts: no units in this file; such an amount is in the reference unit of its flow, which a separate flow dataset defines
copyright: false
licenseType: Free of charge for all users and uses

## General comment
PTS通过抽取和使用地上处理设施清除受污染的地下水。PTS处理导致的污染物浓度的降低在初始很快，但通常会导致长期缓慢、稳定的降低

## Geography
该案例研究使用了巴特尔为位于美国多佛空军基地

## Technology and included processes
抽出处理由五个单元系统组成：抽提井、气提单元（ASU）、催化氧化单元（COU）、颗粒活性炭单元（GAC）和处理设施。COU单元被建造为由铝和钢制成的固定床反应器，带有催化剂和电加热器。

## Technical purpose
催化氧化单元通常用于工业和军事场所（如为多佛空军基地设计的修复策略）处理受污染的地下水。它用于减少地下水中的污染物，以解决环境污染问题。该单元与空气剥离、颗粒活性炭处理和其他处理设施结合，形成一个综合的地下水抽出和处理系统（PTS），提供初始的快速降低和长期稳定的污染物浓度降低。

## Reference product
- Air stripping unit: 1; measured

## Inputs
- Aluminium and aluminium alloy products: 110; measured
  Air Stripping Unit Aluminum
- Polyethylene,Polyethylene: 330; measured
  Air Stripping Unit HDPE
- Steel: 50; measured
  Air Stripping Unit Steel (Blower)

## Use advice
使用催化氧化单元过程的生命周期评估数据时，请确保您考虑了系统边界和数据集中的任何限制，例如省略的输入或排放。在确定数据空白时，考虑从文献或基于基本原理的计算中补充额外的输入和输出。应注意仅在使用抽水和处理策略解决地下水污染的类似环境修复场景中应用此数据。数据的技术适用性特定于具有与多佛空军基地案例研究中描述的类似元素的地下水修复过程。

## Review details
清单： 内部审查通过几个迭代步骤完成，涉及原始数据验证、原始数据记录、代表性、完整性、与 ISO 14040 和 14044 有关的建模的一致性。

## Data sources
- Life-Cycle Case Study Comparison of Permeable Reactive Barrier versus Pump-and-Treat Remediation
