# 华东水稻; 上海水稻生产;杀虫

Dataset: ILCD process, Unit process, single operation
Geography: SH-CN
Reference year: 2012
Valid until: 2014
Classification: Unit processes / Materials production / Food and renewable raw materials
Functional unit: 1 t
LCI method principle: Attributional
LCI method approaches: Consequential
Generated by: Haoran Zhang, hrzhang@whu.edu.cn
Owner: 天工LCI数据工作小组
Review: Dependent internal review by 天工LCI数据工作小组
Amounts: no units in this file; such an amount is in the reference unit of its flow, which a separate flow dataset defines
copyright: false
licenseType: Free of charge for all users and uses

## General comment
参照PAS2050规范并结合生命周期评价方法对上海市水稻生产进行了碳足迹评估

## Geography
崇明

## Technology and included processes
主要参照 PAS2050 规范并结合 LCA 方 法进行水稻生产的碳足迹计算。PAS2050 全称“公 众可获 取 的 规 范”( Publicly Available Specification， PAS) ，由英国标准协会( British Standard Institution， BSI) 编制，旨在对产品和服务生命周期内温室气体 排放的评价要求做出明确的规定［19］。

## Technical purpose
上海的华东水稻生产，重点是害虫控制，用于生产主食作物供食用。这些农业过程涉及种植、收割和收获后处理，如稻谷的干燥和储存。LCA数据表示从田间作业到种植期间的温室气体排放的每个生产阶段的碳足迹，并包括进一步加工和包装。

## Reference product
- rice: 1000; measured

## Inputs
- Rice Seeds: 3.91032; calculated

## Outputs
- carbon dioxide (fossil),carbon dioxide (fossil): 0.0064; calculated

## Deviations from the LCI method approaches
主要参照PAS2050 规范并结合LCA方法进行水稻生产的碳足迹计算。PAS2050 全称“公众可获取的规范” ( Publicly Available Specification, PAS)

## Data selection and combination
水稻碳足迹的初级活动水平数据包括田间各项作业活动, 加工存储各项作业活动、深加工与产品包装以及田间温室气体散逸等活动水平数据。

## Data treatment and extrapolations
包括田间作业、稻谷加工、温室气体排放检测

## Use advice
提供的LCA数据集应在仔细考虑指定的系统边界的情况下使用，这些边界包括在水稻种植周期期间，从田间作业到农业产品和污染物输出所用的化肥和电力的生产。数据集不包括商品销售、消费、处置或再生利用等下游过程。因此，在使用这些数据进行进一步的环境影响分析或LCA研究时，至关重要的是要注意这些排除项，并在需要时考虑补充下游过程的数据。

## Review details
清单： 内部审查通过几个迭代步骤完成，涉及原始数据验证、原始数据记录、代表性、完整性、与 ISO 14040 和 14044 有关的建模的一致性。

## Data sources
- 曹黎明,李茂柏,王新其,赵志鹏,潘晓华.基于生命周期评价的上海市水稻生产的碳足迹[J].生态学报,2014,34(02):491-499.
