# Soil remediation ; In-situ remediation ; Multi-phase extraction ; Construction preparation ; SVE system assembly

Dataset: ILCD process, Unit process, single operation
Geography: KR
Reference year: 2011
Classification: Other Services / Repair and maintenance
Generated by: Zhang Jianbin, zhangjb@caep.org.cn
Owner: Tiangong LCI Data Working Group
Review: Dependent internal review by Tiangong LCI Data Working Group
Amounts: no units in this file; such an amount is in the reference unit of its flow, which a separate flow dataset defines
copyright: false
licenseType: Free of charge for all users and uses

## General comment
- Flexible polyurethane hose 340 m - Sand 4 m3 , Concrete 5 m3 - Welding, gas 100 m

## Technology and included processes
1 extraction well and 2 monitoring wells Already manufactured SVE commercial system (ex_x0002_traction+oil and water separator+off gas treatment) applied on the site

## Technical purpose
The described industrial process is intended for soil remediation purposes specifically utilizing in-situ multi-phase extraction techniques. The process involves the installation of a Soil Vapor Extraction (SVE) system, which is commonly applied within a contaminated area of 200m² with a pollution depth of 5 meters. This remediation approach is designed to treat contaminations in soil through the extraction of volatile and semi-volatile contaminants. It is generally used in environmental engineering projects where soil contaminant levels are high and require effective and localized treatment solutions.

## Reference product
- Hardened impermeable ground: 1; missing unimportant

## Inputs
- Flexible Polyurethane Hose: 340; missing unimportant
- sand: 4; missing unimportant
- Concrete: 5; missing unimportant
- CO2 Welding, Laser Beam Welding, Flux-cored Arc Welding, Gas Metal Arc Welding: 100; missing unimportant

## Use advice
When utilizing this LCA data set, it is paramount to consider the specific context of the soil remediation process, including the type of contaminants, the soil composition, and local environmental regulations. This data set reflects a unique application and might not be universally applicable to all remediation projects. Users should ensure the technological parameters such as the area of contamination, depth, and the materials required for the SVE system installation correspond to their project specifications. It is crucial to exclude any recycling benefit in this data set, as the primary focus is on remediation effectiveness. Additionally, use phase behavior modeling should reflect the operational conditions of the SVE system to accurately assess environmental impacts.

## Review details
Inventory: The internal review was done by several iteration steps concerning raw data validation, raw data documentation, representativity, completeness and consistency of modelling with regard to ISO 14040 and 14044.

## Data sources
- Seung-Woo Jeong, Sangwon Suh. Assessment of Environmental Impacts and CO2 Emissions from Soil Remediation Technologies using Life Cycle Assessment - Case Studies on SVE and Biopile Systems -. 大韓環境工學會誌
