# 土壤修复;原位修复;原位化学氧化;配置药剂装置

Dataset: ILCD process, Unit process, single operation
Geography: CN
Reference year: 2021
Classification: Unit processes / Other Services / Repair and maintenance
Generated by: 浩骅, wangyp@caep.org.cn
Owner: 天工LCI数据工作小组
Review: Dependent internal review by 天工LCI数据工作小组
Amounts: no units in this file; such an amount is in the reference unit of its flow, which a separate flow dataset defines
copyright: false
licenseType: Free of charge for all users and uses

## General comment
氧化药剂注入

## Technology and included processes
以每吨污染土壤投放17.6kg过硫酸钠药剂为标准

## Technical purpose
所描述的工业过程用于原位化学氧化（ISCO）土壤修复。这是一种用来处理和净化土壤的环境工程技术，通过向土壤中注入氧化剂，本例中使用的是过硫酸钠。这种方法被用来分解土壤中的污染物，如烃类、氯化合物和某些无机物，而无需开挖土壤。这种方法特别适用于污染的工业或商业用地，在原位处理由于干扰更小且成本低于开挖和场外处理，因此更受青睐。

## Reference product
- A device for configuring solid pharmaceuticals into liquid pharmaceuticals: 1; measured

## Inputs
- Stainless Steel: 100; measured
- Electricity: 1884.6; measured
- Sodium persulfate: 17.568; measured
- sulphuric acid: 0.5; measured

## Outputs
- sulfate: 4.7; measured
- Nitrogen oxides: 1.25; measured
- sulfur dioxide: 0.1; measured
- carbon dioxide (fossil): 121.2; measured

## Use advice
在使用此数据集进行生命周期评估（LCA）时，确保与研究中的其他数据集保持方法论的一致性至关重要。例如，确保按每吨污染土壤的过硫酸钠计量的单元过程与项目的功能单位和参考流保持一致。此外，所包括的能源消耗数据应计入环境影响评估。考虑任何可能影响原位氧化效果的特定场所条件，如土壤组成和污染物分布。如果计划回收或再利用处理后的土壤，请相应地在LCA的系统边界内包括它。注意数据的地理和技术代表性，以确保其适用于您的场景。

## Review details
清单： 内部审查通过几个迭代步骤完成，涉及原始数据验证、原始数据记录、代表性、完整性、与 ISO 14040 和 14044 有关的建模的一致性。

## Data sources
- 王顺扬. 基于多目标决策方法改进LCA的污染场地修复技术比选研究.山西大学（硕士论文）,2021.
