# Pyrometallurgy--Traditional roasting(Process A)

Dataset: ILCD process, Unit process, single operation
Geography: CN
Reference year: 2013
Valid until: 2017
Classification: Materials production / Other mineralic materials
Functional unit: FU is a typical type of LIB electrode material of 100 kg
Generated by: maqingyuan, m1120498928@163.com
Review: Dependent internal review by Tiangong LCI Data Working Group
Amounts: no units in this file; such an amount is in the reference unit of its flow, which a separate flow dataset defines
copyright: false

## General comment
The dismantled electrode materials are directly calcined at a temperature of more than 1200 oC, which removes the graphite in the electrodes and organic materials such as diaphragms, and the metals such as Fe, Mn, Ni and Co are melted into manganese-iron alloys.

## Time period
Data source: 2013-2017

## Reference product
- Electrolyte: 100; input; article inperiodical
  Electrode paste

## Inputs
- water,water: 130; article inperiodical
- hard coal: 49; article inperiodical
  Coal
- Electricity: 33.12; article inperiodical

## Outputs
All rows: article inperiodical
- Al/Cu foil: 1.2
- Nickel salt: 1
  Ni salt/metal
- Cobalt salt: 2
  Co salt/ metal
- Alloy (Ni, Fe, Al, etc.): 36
- Slag (deposited, hibernating in ground, non elementary flow): 17.9
- Metal Fumes: 7.11
  Metal fume
- carbon dioxide: 147
- sulfur dioxide: 0.2
- coke: 110

## Data selection and combination
The input-output of the process comes from the average results of the data reported in the literature review, reflecting the representative process from "tomb" to "cradle". This study does not consider the recycling or treatment of plastic and metal shells, and labor costs, factory construction costs, and their impact on the environment are also not included in this analysis.

## Data treatment and extrapolations
It is worth noting that the EU's data is not specific to a specific industry, and some import and export data and recycling information are not suitable for China's situation. Therefore, the improved CRMs evaluation method also combines official Chinese data, literature reports, and data from other interest groups such as trade/industry associations to conduct the best estimation of data from major LIB manufacturers, recycling companies, official management agencies in China, and other stakeholders. In terms of data timeliness, the reference period used in the evaluation of CRMs is based on the latest 4-year average (i.e. 2013-2016).

## Review details
Inventory: The internal review was done by several iteration steps concerning raw data validation, raw data documentation, representativity, completeness and consistency of modelling with regard to ISO 14040 and 14044.; Documentation: The review of the documentation was performed by Ecobilan and is in compliance with ISO 14040 and 14044. The data set documentation is correct in view of the appropriateness of the information provided. It includes all relevant information in view of data quality and scope of application of the respective LCI result.

## Data sources
- 宋佳丽. 面向能源金属高效回收的资源关键性评价模型与应用. (天津大学, 2019).
