# Zincoxide(hypozincoxide)|Zincbakingsand,zincsootandotherzinc-containingmaterials|Smoking furnace process|All sizes / 氧化锌（次氧化锌）|锌焙砂、锌烟尘等含锌物料|烟化炉窑工艺|所有规模

Dataset: ILCD process, Unit process, single operation
Geography: CN
Reference year: 2019
Classification: Materials production / Inorganic chemicals
Generated by: The data was created by the Office of the Second National Pollution Source Census of the Ministry of Ecology and Environment, and the data was organized by the TianGong Plan team for ILCD format / 生态环境部第二次全国污染源普查工作办公室创建数据，天工计划团队常慧敏整理数据为ILCD格式
Owner: Tiangong LCI Data Working Group / 天工LCI数据工作小组
Review: Dependent internal review by Tiangong LCI Data Working Group / 天工LCI数据工作小组
Amounts: no units in this file; such an amount is in the reference unit of its flow, which a separate flow dataset defines
copyright: false
licenseType: Free of charge for all users and uses

## General comment
the Technical of end-of-pipe management technology for pollution MercuryisNeutralization + chemical precipitation，Its Technical efficiency of end-of-pipe management98

## Reference product
- Zinc oxide: 1000; calculated
  源文件中描述为为氧化锌（次氧化锌），此处对其进行了匹配工作，将其匹配到LCAflow库里面相最符合的流，污染物指标备注为工业废水量

## Outputs
All rows: calculated
- Waste water: 1605
  污染物指标工业废水量的末端治理技术是/，末端治理设施实际运行率（k值）计算公式为K=废水处理设施正常运行时间（小时/年）/企业正常生产时间（小时/年）。原文件中描述污染物类别为废水，污染物指标为工业废水量，此处对其进行了匹配工作，将其匹配到LCAflow库里面相最符合的流，污染物指标备注为工业废水量
- chemical oxygen demand: 0.093056
  污染物指标化学需氧量的末端治理技术是氧化还原法+化学沉淀法，其效率为36，末端治理设施实际运行率（k值）计算公式为K=废水处理设施正常运行时间（小时/年）/企业正常生产时间（小时/年）。原文件中描述污染物类别为废水，污染物指标为化学需氧量，此处对其进行了匹配工作，将其匹配到LCAflow库里面相最符合的流，污染物指标备注为化学需氧量
- chemical oxygen demand: 0.04362
  污染物指标化学需氧量的末端治理技术是中和法+氧化还原法+化学沉淀法+膜分离法，其效率为70，末端治理设施实际运行率（k值）计算公式为K=废水处理设施正常运行时间（小时/年）/企业正常生产时间（小时/年）。原文件中描述污染物类别为废水，污染物指标为化学需氧量，此处对其进行了匹配工作，将其匹配到LCAflow库里面相最符合的流，污染物指标备注为化学需氧量
- chemical oxygen demand: 0.055252
  污染物指标化学需氧量的末端治理技术是中和法+氧化还原法+化学沉淀法，其效率为62，末端治理设施实际运行率（k值）计算公式为K=废水处理设施正常运行时间（小时/年）/企业正常生产时间（小时/年）。原文件中描述污染物类别为废水，污染物指标为化学需氧量，此处对其进行了匹配工作，将其匹配到LCAflow库里面相最符合的流，污染物指标备注为化学需氧量
- chemical oxygen demand: 0.069792
  污染物指标化学需氧量的末端治理技术是中和法+化学沉淀法，其效率为52，末端治理设施实际运行率（k值）计算公式为K=废水处理设施正常运行时间（小时/年）/企业正常生产时间（小时/年）。原文件中描述污染物类别为废水，污染物指标为化学需氧量，此处对其进行了匹配工作，将其匹配到LCAflow库里面相最符合的流，污染物指标备注为化学需氧量
- Ammonia Nitrogen: 0.00814528
  污染物指标氨氮的末端治理技术是氧化还原法+化学沉淀法，其效率为36，末端治理设施实际运行率（k值）计算公式为K=废水处理设施正常运行时间（小时/年）/企业正常生产时间（小时/年）。原文件中描述污染物类别为废水，污染物指标为氨氮，此处对其进行了匹配工作，将其匹配到LCAflow库里面相最符合的流，污染物指标备注为氨氮
- Ammonia Nitrogen: 0.0038181
  污染物指标氨氮的末端治理技术是中和法+氧化还原法+化学沉淀法+膜分离法，其效率为70，末端治理设施实际运行率（k值）计算公式为K=废水处理设施正常运行时间（小时/年）/企业正常生产时间（小时/年）。原文件中描述污染物类别为废水，污染物指标为氨氮，此处对其进行了匹配工作，将其匹配到LCAflow库里面相最符合的流，污染物指标备注为氨氮
- Ammonia Nitrogen: 0.00483626
  污染物指标氨氮的末端治理技术是中和法+氧化还原法+化学沉淀法，其效率为62，末端治理设施实际运行率（k值）计算公式为K=废水处理设施正常运行时间（小时/年）/企业正常生产时间（小时/年）。原文件中描述污染物类别为废水，污染物指标为氨氮，此处对其进行了匹配工作，将其匹配到LCAflow库里面相最符合的流，污染物指标备注为氨氮
- Ammonia Nitrogen: 0.00610896
  污染物指标氨氮的末端治理技术是中和法+化学沉淀法，其效率为52，末端治理设施实际运行率（k值）计算公式为K=废水处理设施正常运行时间（小时/年）/企业正常生产时间（小时/年）。原文件中描述污染物类别为废水，污染物指标为氨氮，此处对其进行了匹配工作，将其匹配到LCAflow库里面相最符合的流，污染物指标备注为氨氮
- phosphorus, total: 0.00126784
  污染物指标总磷的末端治理技术是氧化还原法+化学沉淀法，其效率为36，末端治理设施实际运行率（k值）计算公式为K=废水处理设施正常运行时间（小时/年）/企业正常生产时间（小时/年）。原文件中描述污染物类别为废水，污染物指标为总磷，此处对其进行了匹配工作，将其匹配到LCAflow库里面相最符合的流，污染物指标备注为总磷
- phosphorus, total: 0.0005943
  污染物指标总磷的末端治理技术是中和法+氧化还原法+化学沉淀法+膜分离法，其效率为70，末端治理设施实际运行率（k值）计算公式为K=废水处理设施正常运行时间（小时/年）/企业正常生产时间（小时/年）。原文件中描述污染物类别为废水，污染物指标为总磷，此处对其进行了匹配工作，将其匹配到LCAflow库里面相最符合的流，污染物指标备注为总磷
- phosphorus, total: 0.00075278
  污染物指标总磷的末端治理技术是中和法+氧化还原法+化学沉淀法，其效率为62，末端治理设施实际运行率（k值）计算公式为K=废水处理设施正常运行时间（小时/年）/企业正常生产时间（小时/年）。原文件中描述污染物类别为废水，污染物指标为总磷，此处对其进行了匹配工作，将其匹配到LCAflow库里面相最符合的流，污染物指标备注为总磷
- phosphorus, total: 0.00095088
  污染物指标总磷的末端治理技术是中和法+化学沉淀法，其效率为52，末端治理设施实际运行率（k值）计算公式为K=废水处理设施正常运行时间（小时/年）/企业正常生产时间（小时/年）。原文件中描述污染物类别为废水，污染物指标为总磷，此处对其进行了匹配工作，将其匹配到LCAflow库里面相最符合的流，污染物指标备注为总磷
- Nitrogen, organic bound: 0.0220442
  污染物指标总氮的末端治理技术是氧化还原法+化学沉淀法，其效率为36，末端治理设施实际运行率（k值）计算公式为K=废水处理设施正常运行时间（小时/年）/企业正常生产时间（小时/年）。原文件中描述污染物类别为废水，污染物指标为总氮，此处对其进行了匹配工作，将其匹配到LCAflow库里面相最符合的流，污染物指标备注为总氮
- Nitrogen, organic bound: 0.0103332
  污染物指标总氮的末端治理技术是中和法+氧化还原法+化学沉淀法+膜分离法，其效率为70，末端治理设施实际运行率（k值）计算公式为K=废水处理设施正常运行时间（小时/年）/企业正常生产时间（小时/年）。原文件中描述污染物类别为废水，污染物指标为总氮，此处对其进行了匹配工作，将其匹配到LCAflow库里面相最符合的流，污染物指标备注为总氮
- Nitrogen, organic bound: 0.0130887
  污染物指标总氮的末端治理技术是中和法+氧化还原法+化学沉淀法，其效率为62，末端治理设施实际运行率（k值）计算公式为K=废水处理设施正常运行时间（小时/年）/企业正常生产时间（小时/年）。原文件中描述污染物类别为废水，污染物指标为总氮，此处对其进行了匹配工作，将其匹配到LCAflow库里面相最符合的流，污染物指标备注为总氮
- Nitrogen, organic bound: 0.0165331
  污染物指标总氮的末端治理技术是中和法+化学沉淀法，其效率为52，末端治理设施实际运行率（k值）计算公式为K=废水处理设施正常运行时间（小时/年）/企业正常生产时间（小时/年）。原文件中描述污染物类别为废水，污染物指标为总氮，此处对其进行了匹配工作，将其匹配到LCAflow库里面相最符合的流，污染物指标备注为总氮
- lead: 0.00041604
  污染物指标铅的末端治理技术是氧化还原法+化学沉淀法，其效率为98，末端治理设施实际运行率（k值）计算公式为K=废水处理设施正常运行时间（小时/年）/企业正常生产时间（小时/年）。原文件中描述污染物类别为废水，污染物指标为铅，此处对其进行了匹配工作，将其匹配到LCAflow库里面相最符合的流，污染物指标备注为铅
- lead: 0.00010401
  污染物指标铅的末端治理技术是中和法+氧化还原法+化学沉淀法+膜分离法，其效率为99.5，末端治理设施实际运行率（k值）计算公式为K=废水处理设施正常运行时间（小时/年）/企业正常生产时间（小时/年）。原文件中描述污染物类别为废水，污染物指标为铅，此处对其进行了匹配工作，将其匹配到LCAflow库里面相最符合的流，污染物指标备注为铅
- lead: 0.00020802
  污染物指标铅的末端治理技术是中和法+氧化还原法+化学沉淀法，其效率为99，末端治理设施实际运行率（k值）计算公式为K=废水处理设施正常运行时间（小时/年）/企业正常生产时间（小时/年）。原文件中描述污染物类别为废水，污染物指标为铅，此处对其进行了匹配工作，将其匹配到LCAflow库里面相最符合的流，污染物指标备注为铅
- lead: 0.00041604
  污染物指标铅的末端治理技术是中和法+化学沉淀法，其效率为98，末端治理设施实际运行率（k值）计算公式为K=废水处理设施正常运行时间（小时/年）/企业正常生产时间（小时/年）。原文件中描述污染物类别为废水，污染物指标为铅，此处对其进行了匹配工作，将其匹配到LCAflow库里面相最符合的流，污染物指标备注为铅
- arsenic: 0.00041284
  污染物指标砷的末端治理技术是氧化还原法+化学沉淀法，其效率为98，末端治理设施实际运行率（k值）计算公式为K=废水处理设施正常运行时间（小时/年）/企业正常生产时间（小时/年）。原文件中描述污染物类别为废水，污染物指标为砷，此处对其进行了匹配工作，将其匹配到LCAflow库里面相最符合的流，污染物指标备注为砷
- arsenic: 0.00010321
  污染物指标砷的末端治理技术是中和法+氧化还原法+化学沉淀法+膜分离法，其效率为99.5，末端治理设施实际运行率（k值）计算公式为K=废水处理设施正常运行时间（小时/年）/企业正常生产时间（小时/年）。原文件中描述污染物类别为废水，污染物指标为砷，此处对其进行了匹配工作，将其匹配到LCAflow库里面相最符合的流，污染物指标备注为砷
- arsenic: 0.00020642
  污染物指标砷的末端治理技术是中和法+氧化还原法+化学沉淀法，其效率为99，末端治理设施实际运行率（k值）计算公式为K=废水处理设施正常运行时间（小时/年）/企业正常生产时间（小时/年）。原文件中描述污染物类别为废水，污染物指标为砷，此处对其进行了匹配工作，将其匹配到LCAflow库里面相最符合的流，污染物指标备注为砷
- arsenic: 0.00041284
  污染物指标砷的末端治理技术是中和法+化学沉淀法，其效率为98，末端治理设施实际运行率（k值）计算公式为K=废水处理设施正常运行时间（小时/年）/企业正常生产时间（小时/年）。原文件中描述污染物类别为废水，污染物指标为砷，此处对其进行了匹配工作，将其匹配到LCAflow库里面相最符合的流，污染物指标备注为砷
- cadmium: 7.028e-5
  污染物指标镉的末端治理技术是氧化还原法+化学沉淀法，其效率为98，末端治理设施实际运行率（k值）计算公式为K=废水处理设施正常运行时间（小时/年）/企业正常生产时间（小时/年）。原文件中描述污染物类别为废水，污染物指标为镉，此处对其进行了匹配工作，将其匹配到LCAflow库里面相最符合的流，污染物指标备注为镉
- cadmium: 1.757e-5
  污染物指标镉的末端治理技术是中和法+氧化还原法+化学沉淀法+膜分离法，其效率为99.5，末端治理设施实际运行率（k值）计算公式为K=废水处理设施正常运行时间（小时/年）/企业正常生产时间（小时/年）。原文件中描述污染物类别为废水，污染物指标为镉，此处对其进行了匹配工作，将其匹配到LCAflow库里面相最符合的流，污染物指标备注为镉
- cadmium: 3.514e-5
  污染物指标镉的末端治理技术是中和法+氧化还原法+化学沉淀法，其效率为99，末端治理设施实际运行率（k值）计算公式为K=废水处理设施正常运行时间（小时/年）/企业正常生产时间（小时/年）。原文件中描述污染物类别为废水，污染物指标为镉，此处对其进行了匹配工作，将其匹配到LCAflow库里面相最符合的流，污染物指标备注为镉
- cadmium: 7.028e-5
  污染物指标镉的末端治理技术是中和法+化学沉淀法，其效率为98，末端治理设施实际运行率（k值）计算公式为K=废水处理设施正常运行时间（小时/年）/企业正常生产时间（小时/年）。原文件中描述污染物类别为废水，污染物指标为镉，此处对其进行了匹配工作，将其匹配到LCAflow库里面相最符合的流，污染物指标备注为镉
- Mercury: 2.062e-5
  污染物指标汞的末端治理技术是氧化还原法+化学沉淀法，其效率为98，末端治理设施实际运行率（k值）计算公式为K=废水处理设施正常运行时间（小时/年）/企业正常生产时间（小时/年）。原文件中描述污染物类别为废水，污染物指标为汞，此处对其进行了匹配工作，将其匹配到LCAflow库里面相最符合的流，污染物指标备注为汞
- Mercury: 5.155e-6
  污染物指标汞的末端治理技术是中和法+氧化还原法+化学沉淀法+膜分离法，其效率为99.5，末端治理设施实际运行率（k值）计算公式为K=废水处理设施正常运行时间（小时/年）/企业正常生产时间（小时/年）。原文件中描述污染物类别为废水，污染物指标为汞，此处对其进行了匹配工作，将其匹配到LCAflow库里面相最符合的流，污染物指标备注为汞
- Mercury: 1.031e-5
  污染物指标汞的末端治理技术是中和法+氧化还原法+化学沉淀法，其效率为99，末端治理设施实际运行率（k值）计算公式为K=废水处理设施正常运行时间（小时/年）/企业正常生产时间（小时/年）。原文件中描述污染物类别为废水，污染物指标为汞，此处对其进行了匹配工作，将其匹配到LCAflow库里面相最符合的流，污染物指标备注为汞
- Mercury: 2.062e-5
  污染物指标汞的末端治理技术是中和法+化学沉淀法，其效率为98，末端治理设施实际运行率（k值）计算公式为K=废水处理设施正常运行时间（小时/年）/企业正常生产时间（小时/年）。原文件中描述污染物类别为废水，污染物指标为汞，此处对其进行了匹配工作，将其匹配到LCAflow库里面相最符合的流，污染物指标备注为汞

## Use advice
This dataset is derived from the Pollution Source Census Report and contains information on pollution emissions and related products. However, it does not include data on energy or chemical consumption, nor does it provide information on waste or co-product generation. When utilizing this dataset, please supplement the missing data based on actual conditions before use
该数据集来源于污染源普查报告，包含污染物排放及相关产品信息，但不包含能源或化学品消耗数据，也不提供废弃物或共生产物产生信息。在使用该数据集时，请根据实际情况补充缺失数据后再使用。

## Review details
Inventory: The internal review was done by several iteration steps concerning raw data validation, raw data documentation, representativity, completeness and consistency of modelling with regard to ISO 14040 and 14044.
清单： 内部审查通过几个迭代步骤完成，涉及原始数据验证、原始数据记录、代表性、完整性、与 ISO 14040 和 14044 有关的建模的一致性。

## Data sources
- 第二次全国污染源普查产排污核算系数手册（试用版）,四级代码3212文件，在完整版文件中第4878页
