# Propylene Production | Propylene | Steam Cracking Route | Naphtha

Dataset: ILCD process, Unit process, black box
Geography: DL-LN-CN
Reference year: 2018
Classification: Materials production / Other mineralic materials
Functional unit: A functional unit is defined as 1 ton of propylene product
LCI method principle: Attributional
LCI method approaches: Allocation - mass
Generated by: Yanan Ren, renyn15@tsinghua.org.cn
Review: Dependent internal review by Tiangong LCI Data Working Group
Amounts: no units in this file; such an amount is in the reference unit of its flow, which a separate flow dataset defines
copyright: false

## General comment
The steam cracking process mainly includes ethylene cracking unit, dry gas recovery unit (ROG), waste alkali oxidation unit (WAO), pressure swing adsorption hydrogen production (PSA) unit and cryogenic storage tank area. Key parameters input for this project include raw materials (naphtha, refinery dry gas, n-butane), energy sources (electricity, steam, fresh water). The process supplies products including hydrogen, ethylene, propylene, mixed C4, pyrolysis gasoline, pyrolysis fuel oil.

## Geography
The process case factory is Hengli Petrochemical Chemical Co., Ltd. The company is located in Dalian City, Liaoning Province. Its steam cracking process was built in 2018, and its propylene production capacity is 400,000 tons per year.

## Time period
Craft built in 2018

## Technology and included processes
The factory is an integrated refining and chemical system, that is, an integrated production model that combines oil refining and naphtha cracking to produce chemicals. Therefore, the main raw materials (naphtha, refinery dry gas, n-butane, n-pentane) for steam cracking process to produce propylene are provided by the petrochemical plant as intermediate products, so the life cycle assessment model ignores the environment of its raw material transportation stage Influence.

## Reference product
- propene (propylene): 1000; measured
  丙烯

## Inputs
All rows: measured
- Refinery Gas: 2680
  炼厂干气
- naphtha: 2970
  轻石脑油
- Butane: 1520
  正丁烷
- C5 Hydrocarbon Mixture: 1250
  C5+
- Methanol: 0.08247
  甲醇
- sodium hydroxide: 23.9153
  氢氧化钠
- Dimethyl disulfide: 0.63398
  二甲基二硫
- Phosphate: 0.13621
  磷酸盐
- natural gas: 1230
  燃料气
- process steam: 3660
  蒸汽
- Water (fresh water): 9050
  新鲜水
- electricity mix: 721.08
  电

## Outputs
All rows: measured
- ethene (ethylene): 3710
  乙烯
- Pyrolysis gasoline: 920
  裂解汽油
- Cracked fuel oil: 120
  裂解燃料油
- C4 Hydrocarbon Mixture: 610
  C4+
- Hydrogen: 170
  氢气
- Methane: 2080
  甲烷
- carbon dioxide: 3560
  CO2
- sulfur dioxide: 0.30451
  SO2
- nitrous oxide: 2.58821
  NOx
- Dust (unspecified, from stack): 0.30451
  颗粒物
- chemical oxygen demand: 5.08618
  COD

## Deviations from the LCI method approaches
Quantification of environmental load between product propylene and by-products using mass distribution method

## Data selection and combination
The detailed input-output data of the propylene production process comes from the company's public environmental impact assessment report, including the input of raw materials and auxiliary materials, energy and resource consumption, and discharge of waste gas, wastewater and solid waste.

## Review details
Inventory: The internal review was done by several iteration steps concerning raw data validation, raw data documentation, representativity, completeness and consistency of modelling with regard to ISO 14040 and 14044.; Documentation: The review of the documentation was performed by Ecobilan and is in compliance with ISO 14040 and 14044. The data set documentation is correct in view of the appropriateness of the information provided. It includes all relevant information in view of data quality and scope of application of the respective LCI result.

## Data sources
- 吕琳. 丙烯产品环境负荷及温室气体减排的碳税政策. (大连理工大学, 2022).
