# Sinteredbricksandbuildingblocks|Clay,shale,flyash,sludge,etc.|All sizes / /|烧结类砖瓦及建筑砌块|粘土、页岩、粉煤灰、污泥等|砖瓦工业焙烧窑炉(单条)（燃煤等）|所有规模

Dataset: ILCD process, Partly terminated system
Geography: CN
Reference year: 2019
Classification: Materials production / Other mineralic materials
Generated by: The data was created by the Office of the Second National Pollution Source Census of the Ministry of Ecology and Environment, and the data was organized by the TianGong Plan team for ILCD format / 生态环境部第二次全国污染源普查工作办公室创建数据，天工计划团队常慧敏整理数据为ILCD格式
Amounts: no units in this file; such an amount is in the reference unit of its flow, which a separate flow dataset defines
copyright: false

## Technology and included processes
the Technical of end-of-pipe management technology for pollution Sintered Brickis/
污染物指标工业废气量（窑炉）（燃煤等）的末端治理技术是/

## Reference product
- Sintered Brick: 10000, 10000 (2 entries); calculated
  原文件中描述污染物类别为Product，污染物指标为烧结类砖瓦及建筑砌块，此处对其进行了匹配工作，将其匹配到LCAflow库里面相最符合的流，污染物指标备注为工业废气量（窑炉）（燃煤等）

## Outputs
- Exhaust gas: nan; calculated
  原文件中描述污染物类别为废气，污染物指标为工业废气量（窑炉）（燃煤等），此处对其进行了匹配工作，将其匹配到LCAflow库里面相最符合的流，污染物指标备注为工业废气量（窑炉）（燃煤等）
- particles (PM2.5 - PM10): 0.06375, 0.0085, 0.034, 0.17, 0.425 (5 entries); calculated
  原文件中描述污染物类别为废气，污染物指标为颗粒物（窑炉）（天然气），此处对其进行了匹配工作，将其匹配到LCAflow库里面相最符合的流，污染物指标备注为颗粒物（窑炉）（天然气）
- sulfur dioxide: 0.0177, 0.0354, 0.0531, 1.36 (4 entries); calculated
  原文件中描述污染物类别为废气，污染物指标为二氧化硫（窑炉）（天然气），此处对其进行了匹配工作，将其匹配到LCAflow库里面相最符合的流，污染物指标备注为二氧化硫（窑炉）（天然气）
- Nitrogen oxides: 0.68, 0.544, 1.36 (3 entries); calculated
  原文件中描述污染物类别为废气，污染物指标为氮氧化物（窑炉）（天然气），此处对其进行了匹配工作，将其匹配到LCAflow库里面相最符合的流，污染物指标备注为氮氧化物（窑炉）（天然气）

## Data sources
- 第二次全国污染源普查产排污核算系数手册（试用版）,二级代码30,四级代码3031文件，在完整版文件中第3368页
