# 稀土氧化物选矿;稀土氧化物;稀土氧化物工艺;白云鄂博

Dataset: ILCD process, Unit process, single operation
Geography: NMG-CN
Reference year: 2014
Classification: Unit processes / Materials production / Non-energetic raw materials
Functional unit: The scope of the LCA is cradle-to-gate and the functional unit was chosen as 1 kg of REO.
LCI method principle: Attributional
LCI method approaches: Allocation - market value; Allocation - exergetic content
Generated by: 汪涛, twang@iue.ac.cn
Owner: 天工LCI数据工作小组
Review: Dependent internal review by 天工LCI数据工作小组
Amounts: no units in this file; such an amount is in the reference unit of its flow, which a separate flow dataset defines
copyright: false
licenseType: Free of charge for all users and uses

## General comment
该数据集的技术用途是描述中国白云鄂博矿稀土氧化物（REO）生产的过程链。白云鄂博矿的原矿，包括独居石和氟碳铈矿，经过采矿、选矿、煅烧、提取和焙烧等一系列过程来生产REO。该数据集可用于理解生产对电子产品、清洁能源技术和各种高科技应用必不可少的稀土元素的环境影响和过程效率。

## Geography
Bayan Obo (China)

## Technology and included processes
REO 生产的工艺链包括采矿，然后是选矿、煅烧、提取和焙烧阶段，见图 2。REO 生产的第一步是采矿，其中原矿石被爆破并运输以进一步精炼。从白云鄂博矿开采的原矿石由独居石和氟碳铈矿组成。

## Reference product
- ammonia: 0.002; measured

## Inputs
All rows: measured
- water: 76.344
- Sodium silicate: 0.163
- Sodium carbonate: 0.022
  Soda ash
- Fatty acid: 0.011
- ammonia: 0.041
- Electricity: 0.128
  Separation
- electricity from hydroelectric power plant: 0.054

## Outputs
- nitrogen: 0.003; measured

## Deviations from the LCI method approaches
Life cycle data was obtained from the Ecoinvent database, and mass-based-allocation was performed to partition the environmental impacts among crude ore and REO, as well as allocate the environmental impact among light, medium, heavy, and neodymium REOs. Two alternative allocations schemes, (I) market-based and (II) exegetic-based allocation, were considered as a means to partition the environmental impacts among REOs. The results for market- as well as exergetic-based allocation are provided in the Supporting Information. It is important to note that allocation based on market-value is the preferred method of the metals industry.23 When possible, Chinese-specificlifecycledatawas considered in the analysis; otherwise, European life cycle inventory (LCI) databases were used. The LCA results for REO production presented in this study provide a conservative benchmark for the environmental profile of REE. Furthermore, the LCI and LCA results can be extended/applied to evaluate the production of individual REE and REE-based technologies and products.

## Use advice
该数据集的用户应使用基于质量的分配方法来评估与原矿和REO生产相关的环境影响。此外，该数据集还提供了市场基准和以能值为基准的分配方案，用于划分不同REO（轻、中、重和钕）之间的环境影响。建议优先使用基于市场价值的分配，因为这是金属行业的偏好方法。在分析REE的环境概况时，如有可能，建议考虑中国特定的生命周期数据。否则，可以使用欧洲的生命周期清单（LCI）数据。该LCA的范围是摇篮到大门，功能单位为1公斤REO。因此，数据可以用来扩展评估单个REE的生产以及REE基技术和产品中的应用。

## Review details
清单： 内部审查通过几个迭代步骤完成，涉及原始数据验证、原始数据记录、代表性、完整性、与 ISO 14040 和 14044 有关的建模的一致性。

## Data sources
- Zaimes, G. G., Hubler, B. J., Wang, S. & Khanna, V. Environmental Life Cycle Perspective on Rare Earth Oxide Production. ACS Sustainable Chem. Eng. 3, 237–244 (2015).
