# secondary copper production|Refined copper|NerinGutai-Lu (NGL) scrap refining technology|copper scrap

Dataset: ILCD process, Unit process, single operation
Geography: JX-CN
Reference year: 2022
Classification: Materials production / Other mineralic materials
Functional unit: the production of 1 ton of refined copper is taken as the functional unit.
LCI method principle: Attributional
LCI method approaches: Allocation - market value
Generated by: Peng Wang, 2867919560@qq.com
Review: Dependent internal review by Tiangong LCI Data Working Group
Amounts: no units in this file; such an amount is in the reference unit of its flow, which a separate flow dataset defines
copyright: false

## Geography
Life Cycle Inventory (LCI) data of refined copper were derived from on-site surveys and annual monitoring report of several copper production enterprises located in Anhui province and Jiangxi province of China.

## Technology and included processes
Critical processes of this technology include classification and compression of copper scrap, top blown converting of copper scrap, “NGL” refining and casting of crude copper, and electrolysis of anode copper.

## Reference product
- Refined copper: 1000; measured
  Refined copper needs to be supplemented

## Inputs
- copper scrap: 1200; measured
  Copper scrap needs to be supplemented
- quartz sand: 40.2; software or database
  Quartz sand
- Quicklime: 0; software or database
  Quick lime needs to be replenished
- freshwater: 2.93; software or database
  Fresh water needs to be replenished
- Limestone: 20.1; software or database
- Hydrochloric acid: 0.151; software or database
  Hydrochloric acid needs to be supplemented
- Sulfuric acid(98%): 5.21; software or database
  Sulfuric acid needs to be supplemented with resourse
- Gelatin: 0.045; software or database
  Gelatin needs supplementation
- Thiourea: 0.075; software or database
  Thiourea needs to replenish the resource
- barium sulfate: 60.3; software or database
  Barium sulfate
- Natural gas, at consumer EU-27: 115; software or database
  Natural gas
- Electricity: 3121.2; measured

## Outputs
All rows: software or database
- chemical oxygen demand: 0.036
  COD needs to be supplemented
- ammonium: 0.00573
  Ammonia nitrogen needs to be supplemented
- sulfur dioxide: 0.0637
  Sulfur dioxide
- nitrous oxide: 0.296
  Nitrogen oxide
- particles (PM2.5 - PM10): 0.0603
- lead: 0.00195
  Lead
- mercury: 0
  Mercury
- arsenic: 0.000219
  Arsenic
- cadmium: 1.92e-5
  Cadmium
- chromium: 2.17e-5
  Chromium
- fluorine: 0
  Fluoride

## Deviations from the LCI method approaches
This study selects the ReCiPe model for LCIA since it is widely applied.

## Data selection and combination
data of refined copper were derived from on-site surveys and annual monitoring report of several copper production enterprises located in Anhui province and Jiangxi province of China.Other material production data for this LCA analysis were derived from Eco-invent database.

## Review details
Inventory: The internal review was done by several iteration steps concerning raw data validation, raw data documentation, representativity, completeness and consistency of modelling with regard to ISO 14040 and 14044.

## Data sources
- Zhang, J., Tian, X., Chen, W., Geng, Y. & Wilson, J. Measuring environmental impacts from primary and secondary copper production under the upgraded technologies in key Chinese enterprises. Environmental Impact Assessment Review 96, 106855 (2022).
