# Frozenvegetables|Onionandgarlic|Washing + quick freezing|All sizes / /|速冻蔬菜|葱蒜类|水洗+速冻|所有规模

Dataset: ILCD process, Partly terminated system
Geography: CN
Reference year: 2019
Classification: Materials production / Other mineralic materials
Generated by: The data was created by the Office of the Second National Pollution Source Census of the Ministry of Ecology and Environment, and the data was organized by the TianGong Plan team for ILCD format / 生态环境部第二次全国污染源普查工作办公室创建数据，天工计划团队常慧敏整理数据为ILCD格式
Amounts: no units in this file; such an amount is in the reference unit of its flow, which a separate flow dataset defines
copyright: false

## Technology and included processes
the Technical of end-of-pipe management technology for pollution phosphorus, totalisPrecipitation separation，Its Technical efficiency of end-of-pipe management10，The formula for calculating the actual operation rate (k-value) of the end-of-pipe treatment facility is /
污染物指标总磷的末端治理技术是沉淀分离，其效率为10，末端治理设施实际运行率（k值）计算公式为k=1

## Reference product
- Quick-frozen vegetables: 1000; calculated
  原文件中描述污染物类别为Product，污染物指标为速冻蔬菜，此处对其进行了匹配工作，将其匹配到LCAflow库里面相最符合的流

## Outputs
- chemical oxygen demand: 1.035, 0.828 (2 entries); calculated
  原文件中描述污染物类别为废水，污染物指标为化学需氧量，此处对其进行了匹配工作，将其匹配到LCAflow库里面相最符合的流
- Ammonia Nitrogen: 0.129, 0.117 (2 entries); calculated
  原文件中描述污染物类别为废水，污染物指标为氨氮，此处对其进行了匹配工作，将其匹配到LCAflow库里面相最符合的流
- Nitrogen, organic bound: 0.315, 0.2835 (2 entries); calculated
  原文件中描述污染物类别为废水，污染物指标为总氮，此处对其进行了匹配工作，将其匹配到LCAflow库里面相最符合的流
- phosphorus, total: 0.039, 0.0351 (2 entries); calculated
  原文件中描述污染物类别为废水，污染物指标为总磷，此处对其进行了匹配工作，将其匹配到LCAflow库里面相最符合的流

## Data sources
- 第二次全国污染源普查产排污核算系数手册（试用版）,四级代码1371文件，在完整版文件中第2624页
