# Recycled paper production;cardboard

Dataset: ILCD process, Unit process, single operation
Geography: CN
Classification: Materials production / Paper and cardboards
LCI method principle: Attributional
Generated by: Yixiang Gao, 22210740040@m.fudan.edu.cn
Owner: Tiangong LCI Data Working Group
Review: Dependent internal review by Tiangong LCI Data Working Group
Amounts: no units in this file; such an amount is in the reference unit of its flow, which a separate flow dataset defines
copyright: false
licenseType: Free of charge for all users and uses

## General comment
The process described pertains to the production of recycled cardboard, beginning with the collection of waste paper. The lifecycle of recycled cardboard includes the manufacturing stages such as pulping of waste paper, creation of the cardboard, rewinding, packaging, and storage. Once it is delivered to the users or distributors, it serves as raw material for downstream manufacturing industries, effectively transforming the nature of the cardboard. The usage of cardboard is widespread in the production of boxes and packaging materials used by various industries. This dataset specifically covers a 'cradle-to-gate' scenario, which includes all the stages up until the product is ready to be shipped to the consumer, but excludes the use and end-of-life treatment of the product. The extraction of fuels, production of vehicles, and construction of infrastructure are excluded from this study. The unit process assessments in this dataset can provide guidance for carbon accounting and reduction in China's papermaking industry.

## Geography
评估结果对我国造纸行业碳排放核算及碳减排具有借鉴作用。

## Technology and included processes
废纸在收集、分类过程中需进行运输、分拣、打包等过程，会产生 GHG 排放。

## Reference product
- Cardboard: 1000; measured
  cardboard(papermaking stage)

## Outputs
All rows: calculated
- Greenhouse Gases: 139.9
  GHG(Waste paper collection phase)
- Greenhouse Gases: 345.3
  GHG(Pulping stage)
- Greenhouse Gases: 1111.6
  GHG(papermaking stage)
- Greenhouse Gases: 20.2
  GHG(Scrap paper stage)
- Greenhouse Gases: 130.7
  GHG(Transportation stage)
- Greenhouse Gases: 50.9
  GHG(Sewege treatment stage)

## Deviations from the LCI method approaches
根据企业调研情况，所用废纸来源于美国、欧洲及国内，因此不同运输方式产生的排放根据废纸来源地的用量及运输方式进行分配。2.生产过程中，蒸汽、 电力等能源消耗的分配依据产品产量进行分配; 对能源生产过程中所排放的污染物的分配，根据各单元过程的能源消耗量进行分配。

## Data selection and combination
本研究采集了箱纸板工厂 一年的活动数据，并进行分析、筛选，计算得到生产每吨箱纸板的输入、输出数据。数据计算过程中，由于某些原因，如某个过程不在组织控制、数据调研成本过高等原因导致初级活动水平数据无法获取。对于无法获取初级活动水平数据的情况，寻求次级水平数据予以填补。本研究中次级活动数据主要来源有ecoinvent 数据库和文献资料中的数据。

## Use advice
When using this data for Life Cycle Assessment, pay close attention to the system boundaries and exclusions, such as the exclusion of equipment and building-related production and maintenance processes. The data set focuses on cardboard production within a defined boundary and excludes post-consumer use and waste treatment. GHG emissions related to the collection, sorting, and baling of waste paper should be accounted for. The methodology used for allocation of emissions from transportation should reflect the amount of waste paper sourced from different locations and the mode of transport. Energy use from steam and electricity during production should also be appropriately allocated based on output. Data gaps from primary activities have been filled with secondary data, primarily from the ecoinvent database and literature sources. The study sets a cutoff rule for trivial emission sources constituting less than 1% of the total, with an overall allowance of omitted sources not exceeding 5% of the product's carbon footprint. To comply with PAS 2050, emissions from the production of capital goods should not be included in the product's lifecycle GHG emissions. The functional unit chosen for the study is 1000 kg of cardboard product.

## Review details
Inventory: The internal review was done by several iteration steps concerning raw data validation, raw data documentation, representativity, completeness and consistency of modelling with regard to ISO 14040 and 14044.

## Data sources
- 张清文 & 陈曦. 100%OCC生产的箱纸板碳足迹评价. 中国造纸 34, 20–24 (2015).
