# 处理后地下水;地下水抽出处理

Dataset: ILCD process, Unit process, single operation
Geography: UM
Reference year: 2009
Classification: Other Services / Repair and maintenance
Generated by: 杨欣桐, yangxt@caep.org.cn
Owner: 天工LCI数据工作小组
Review: Dependent internal review by 天工LCI数据工作小组
Amounts: no units in this file; such an amount is in the reference unit of its flow, which a separate flow dataset defines
copyright: false
licenseType: Free of charge for all users and uses

## General comment
PTS通过抽取和使用地上处理设施清除受污染的地下水。PTS处理导致的污染物浓度的降低在初始很快，但通常会导致长期缓慢、稳定的降低

## Geography
该案例研究使用了巴特尔为位于美国多佛空军基地

## Technology and included processes
抽出处理由五个单元系统组成：抽提井、气提单元（ASU）、催化氧化单元（COU）、颗粒活性炭单元（GAC）和处理设施。在建造和组装之后，该系统使用从美国电网获得的电力运行。PTS型号唯一考虑的维护活动是每10年更换一次GAC过滤单元。

## Technical purpose
地下水抽出处理（PTS）工艺用于修复受污染的地下水。它适用于军事基地、工业场所或任何地下水受到污染的地点。该过程特别适用于需要立即和长期降低地下水污染物浓度的场所。

## Reference product
- Remediated groundwater: 1; measured

## Inputs
All rows: measured
- contaminated groundwater: 1
- Energy, unspecified: 35300
  Extraction Well Operation Energy per year and per well is 35.3 GJ
- Energy, unspecified: 70500
  Catalytic Oxidation Unit Operating Encrgy is 70.5 GJ per year
- Energy, unspecified: 23600
  Air Suipping Unil Operaling Energy is 23.6 GJ per year
- Extraction wel: 1
- Air stripping unit,Catalytic oxidation unit: 1
- Air stripping unit: 1
- Granular active carbon unit: 1
- Treatment facilities: 1

## Use advice
在使用该数据集进行生命周期评估时，确保包括所有相关子系统至关重要——抽提井、气提单元（ASU）、催化氧化单元（COU）、颗粒活性炭单元（GAC）和处理设施。注意电力来源，因为系统使用来自美国电网的电力运行。GAC过滤单元每10年更换一次的频率应计入生命周期的维护阶段。任何数据库中未涵盖的输入或排放都应使用适当的科学方法仔细估计或计算，或者用合理的理由省略。

## Review details
清单： 内部审查通过几个迭代步骤完成，涉及原始数据验证、原始数据记录、代表性、完整性、与 ISO 14040 和 14044 有关的建模的一致性。

## Data sources
- Life-Cycle Case Study Comparison of Permeable Reactive Barrier versus Pump-and-Treat Remediation
