# Gypsum powder production | CN

Dataset: ILCD process
Geography: CN
Classification: Materials production / Other mineralic materials
Generated by: Jiaqi Lu, wilsherelu@foxmail.com
Review: Dependent internal review by Tiangong LCI Data Working Group
Amounts: no units in this file; such an amount is in the reference unit of its flow, which a separate flow dataset defines
copyright: false

## Reference product
- Gypsum Powder: 1000; missing unimportant
  石膏粉产品

## Inputs
All rows: missing unimportant
- Limestone: 400
  石灰石
- gypsum: 880
  天然石膏
- Cellulose: 8
  纤维素
- water: 110
- electricity mix: 180.36
- process steam: 720
  蒸汽

## Outputs
- nitrous oxide: 1700; missing unimportant
  氮氧化物[排放到大气（未指定类型）]
- sulfur dioxide: 20870; missing unimportant
  二氧化硫[排放到大气（未指定类型）]
- Particles (PM0.2 - PM2.5): 25330; missing unimportant
  总颗粒物[排放到大气（未指定类型）]

## Review details
Inventory: The internal review was done by several iteration steps concerning raw data validation, raw data documentation, representativity, completeness and consistency of modelling with regard to ISO 14040 and 14044.; Documentation: The review of the documentation was performed by Ecobilan and is in compliance with ISO 14040 and 14044. The data set documentation is correct in view of the appropriateness of the information provided. It includes all relevant information in view of data quality and scope of application of the respective LCI result.

## Data sources
- 永平县石膏粉厂年产 150000 吨双飞粉生产线技改扩建项目环评报告公示
