# 原油开采;正常原油;自喷采油法

Dataset: ILCD process
Geography: CN
Reference year: 2006
Classification: Unit processes / Energy carriers and technologies / Crude oil based fuels
Functional unit: 1kg crude oil production
Generated by: 刘晓华, lxh01311@163.com
Owner: 天工LCI数据工作小组
Review: Dependent internal review by 天工LCI数据工作小组
Amounts: no units in this file; such an amount is in the reference unit of its flow, which a separate flow dataset defines
copyright: false
licenseType: Free of charge for all users and uses

## General comment
该数据集代表使用自喷采油法开采正常原油的过程。它适用于能源行业，特别是在原油生产的上游环节。提取的原油可用作燃料生产、石化制造和各种工业过程的原材料。

## Reference product
- Fuel Oil: 1000; measured
  原油

## Inputs
- Raw coal: 0.56287; measured
  原煤
- Crude oil: 5.30924; measured
  原油
- natural gas,natural gas: 0.00714301; measured
  天然气

## Outputs
All rows: measured
- carbon dioxide (fossil): 1.5104
  CO2 原文未区分bio和fossil，根据专家判断此处为fossil
- sulfur dioxide: 0.008076
  SO2
- Nitrogen oxides: 0.00731
  NOx
- carbon monoxide (fossil): 0.00156577
  CO 原文未区分bio和fossil，根据专家判断此处为fossil
- methane (fossil): 0.00296586
  CH4 原文未区分bio和fossil，根据专家判断此处为fossil
- fume: 0.0056896
  烟尘
- Wastewater: 4.089
  液体废物
- Solid Waste: 0.11839
  固体废物

## Use advice
使用此数据集的用户在将数据集成到其生命周期评估模型时，应考虑原油开采过程的地理和技术特点。自喷采油法与其他开采方法相比可能具有不同的环境影响；因此，用户必须确保数据与评估系统的相关性。另外，用户在应用此数据集时，必须考虑运输、提炼和潜在共产品分配。

## Review details
清单： 内部审查通过几个迭代步骤完成，涉及原始数据验证、原始数据记录、代表性、完整性、与 ISO 14040 和 14044 有关的建模的一致性。

## Data sources
- 聚碳酸酯和聚乳酸的生命周期评价
