# cement production|cement, ordinary portland cement, 42.5MPa|new dry process|mixed solid wastes

Dataset: ILCD process, Unit process, black box
Geography: HLJ-CN
Reference year: 2008
Classification: Materials production / Other mineralic materials
Generated by: Siqi Yang
Amounts: no units in this file; such an amount is in the reference unit of its flow, which a separate flow dataset defines
copyright: false

## General comment
Laboratory data. Carbide slag replaces limestone for cement production. The proportion of carbide slag in the raw material is 30%.
The cement is produced by burning carbide slag generated by the acetylene industry in Heilongjiang.
A pre-drying, dry grinding, and dry burning process developed by the Hefei Cement Research & Design Institute is used, which is currently an advanced dry process for producing cement using carbide slag. This process can increase the proportion of carbide slag in the raw material to over 60%, and the substitution rate of limestone can reach over 80%, and the stable formula increases the stability of carbide slag in the mill.

## Model description
Using the usability of cement with a compressive strength of 42.5 MPa after 28 days, which corresponds to 1 kg, as the functional unit, i.e. 1FU = 42.5 kg MPa. The evaluation scope covers raw material preparation, clinker calcination, and cement production. The environmental impact caused by the consumption of clay resources is not considered. Iron powder is a correction material and its environmental impact is not considered. The waste mainly includes nitrogen oxides, sulfur dioxide, carbon dioxide, and dust in the output of the product system.

## Reference product
- cement, ordinary portland cement, 42.5MPa: 1000
  42.5 Ordinary silicate cement

## Inputs
- limestone, crushed, for mill: 588.5
  Limestone
- Carbide slag: 349.1
  Carbide slag. In the raw material, the carbide slag ratio is 30%.
- gypsum (desulphurized): 51.3
  Gypsum
- ash: 98.7
  Fly ash
- hard coal: 125.927
  Standard coal. The original data is 0.117kg standard coal, here converted to hard coal, the conversion formula is 1kg hard coal = 0.929kg standard coal.
- electricity, medium voltage: 388.8
  Electricity

## Outputs
- particles (> PM10): 0.324
  Dust, with an unspecified particle size, is treated as PM > 10 micrometers in diameter.
- sulfur dioxide: 0.3893
  Sulfur dioxide
- Nitrogen oxides: 1.557
- carbon dioxide: 597.9
  Carbon dioxide

## Data sources
- 于淼. (2008). 黑龙江水泥工业可持续发展研究 [硕士, 哈尔滨工业大学].
