# 废旧光伏组件拆解;废旧光伏组件;手工拆解

Dataset: ILCD process, Unit process, single operation
Geography: CN
Classification: Unit processes / End-of-life treatment / Material recycling
Generated by: 王楠, 1209824595@qq.com
Owner: 天工LCI数据工作小组
Review: Dependent internal review by 天工LCI数据工作小组
Amounts: no units in this file; such an amount is in the reference unit of its flow, which a separate flow dataset defines
copyright: false
licenseType: Free of charge for all users and uses

## General comment
铝框的边缘在回收过程中首先被切割。从电缆中分离出来的塑料件需要进行后续处理。没有框架和电缆的废面板被引入玻璃分离过程。

## Technical purpose
这个工业过程是为了回收废旧光伏组件而设计的。具体来说，它包括多硅光伏组件的手工拆解，其中铝框会先被切割，电缆中的塑料件需要分离出来并进行进一步处理，其余无框架和电缆的废旧面板将进入玻璃分离过程。这一过程对材料的回收至关重要，支持光伏系统可持续的生命周期管理，最终服务于不断增长的可再生能源行业。

## Reference product
- PV Module Waste: 84; input; software or database

## Outputs
- Glass for recovery (shards): 47.5; software or database
- Ethylene-vinyl acetate copolymer,Ethylene-vinyl acetate copolymer,Ethylene-vinyl acetate copolymer: 15.4; software or database
  EVA
- aluminium: 12.7; software or database

## Data selection and combination
多硅光伏组件的库存数据来源于多个来源:(1)Fu(2013)等文献，其中包含江苏省多家光伏企业的材料库存;Diao和Shi(2011)，其中包含北京两家光伏企业的材料库存;He(2013)，其中包含甘肃和四川四家光伏企业的材料库存。(2)四川(环评-四川，2008)、河南(环评-河南，2009)和重庆(环评-重庆，2008)多硅光伏生产企业环境影响评价报告(eia)。(3)《中国光伏发展市场前瞻与投资展望行业报告(2014)》和《中国多晶硅发展市场前瞻与投资展望行业报告(2014)》。当特定材料有不同的数据源时，应用平均值。

## Use advice
在使用此工业过程的生命周期评估数据时，必须考虑不同材料来源提供的平均值，以确保对多硅光伏组件回收过程的准确表示。在方法上应关注包括来自多个环境影响评价报告（EIAS）和行业报告的数据以捕捉来自不同光伏企业的完整材料库存。这些数据应谨慎地融合到光伏回收和环境可持续性评估的更广泛背景中。

## Review details
清单： 内部审查通过几个迭代步骤完成，涉及原始数据验证、原始数据记录、代表性、完整性、与 ISO 14040 和 14044 有关的建模的一致性。

## Data sources
- Huang, B. et al. Environmental influence assessment of China’s multi-crystalline silicon (multi-Si) photovoltaic modules considering recycling process. Solar Energy 143, 132–141 (2017).
