# Existing pyrometallurgy process for lithium iron phosphate batteries

Dataset: ILCD process, Unit process, single operation
Geography: CN
Reference year: 2018
Classification: End-of-life treatment / Material recycling
Functional unit: using 1 kWh as the functionalunit
Generated by: Pengfei, pengfei24@email.ncu.edu.cn
Review: Dependent internal review by Tiangong LCI Data Working Group
Amounts: no units in this file; such an amount is in the reference unit of its flow, which a separate flow dataset defines
copyright: false

## General comment
Fully discharged EoL LFP batteries are first disassembled and crushed. The battery material is then processed through a 1400℃ smelting (or sintering) process. This is followed by acid leaching and solvent extraction. Finally, oxidation and roasting at 900℃ to obtain LiCoO2.

## Reference product
- EoL LFP battery: 3.6; input; article inperiodical

## Inputs
All rows: article inperiodical
- Limestone: 1.36
  Limestone, gravel, production mix、EU-28
- Sulphuric acid: 4.39
  Sulphuric acid, production mix、EU-28
- sodium hydroxide: 3
  Sodium hydroxide, production mix、EU-28
- hydrogen peroxide: 0.25
  Hydrogen peroxide
- Electricity: 0.074
- natural gas: 6.84, 6.84 (2 entries)

## Outputs
- carbon dioxide: 10.32; article inperiodical
- copper: 0.98; article inperiodical
- iron: 0.91; article inperiodical
- aluminium: 0.14; article inperiodical

## Data selection and combination
The data come from multiple papers and are difficult to distinguish.

## Review details
Inventory: The internal review was done by several iteration steps concerning raw data validation, raw data documentation, representativity, completeness and consistency of modelling with regard to ISO 14040 and 14044.

## Data sources
- Wang, Y. et al. Environmental impact assessment of second life and recycling for LiFePO4 power batteries in China. Journal of Environmental Management 314, 115083 (2022).
