# Electricity production ; Electricity ; Thermal power (88.0%) + hydropower (1.5%) + wind power (6.7%) + solar power (3.8%)

Dataset: ILCD process, Partly terminated system
Geography: SX-CN
Reference year: 2019
Classification: Energy carriers and technologies / Electricity
LCI method principle: Other
Generated by: Ruoxi Xiong, xiongrx0126@163.com
Owner: Tiangong LCI Data Working Group
Review: Dependent internal review by Tiangong LCI Data Working Group
Amounts: no units in this file; such an amount is in the reference unit of its flow, which a separate flow dataset defines
copyright: false
licenseType: Free of charge for all users and uses

## General comment
Forms of electricity generation include thermal power, hydropower, wind power and solar power

## Time period
Calculated based on data from the 2019 Energy Statistics Yearbook

## Technical purpose
This dataset represents electricity generation processes, including thermal power, hydropower, wind power, and solar power. It reflects the proportional mix of these processes in the power generation industry, typical for a country or region's energy profile. This data can be used to understand the environmental impact of electricity consumption in various sectors and for the life cycle assessment of products and services where the source of electricity is a relevant factor.

## Reference product
- Electricity: 3.6; calculated

## Outputs
- carbon dioxide: 0.76; calculated
- sulfur dioxide: 0.000146; calculated
- Nitrogen oxides: 0.00023193; calculated
- Dust (unspecified, from stack): 2.8799e-5; calculated

## Data treatment and extrapolations
For the accounting method, please refer to the "Enterprise Greenhouse Gas Emissions Accounting Methods and Reporting Guidelines for Power Generation Facilities". Different forms of power generation and fuel consumption come from Chapter 3 (Energy Production) and Chapter 6 (Regional Energy Balance Sheet) in the "China Energy Statistical Yearbook 2020". The fuel parameters such as low calorific value and carbon content per unit calorific value used to calculate the carbon dioxide emission factor come from the "2019 China Regional Power Grid Carbon Dioxide Baseline Emission Factor Calculation Instructions OM" and the "Enterprise Greenhouse Gas Emission Accounting Method and Reporting Guide for Power Generation Facilities" 》

## Use advice
When using this dataset for lifecycle assessment, ensure that the electricity mix corresponds to the geographical location being assessed, as energy profiles can vary significantly by region. Take into account the specific year of the data provided, as the energy mix and technologies are subject to change over time. For accurate results, align the carbon emission factors with the year and regional scope of your assessment. Exclude any recycling processes unless they are specifically mentioned in the methodology of the dataset. The dataset should be adjusted if the electricity consumption in the assessed product or service does not reflect the average mix detailed in the dataset.

## Review details
Inventory: The internal review was done by several iteration steps concerning raw data validation, raw data documentation, representativity, completeness and consistency of modelling with regard to ISO 14040 and 14044.

## Data sources
- 熊若熙. 中国电力生产和消费二氧化碳与污染物排放因子核算. (清华大学, 2023).
