# Electricity production ; Electricity ; Thermal power (12.5%) + hydropower (85.0%) + wind power (1.8%) + solar power (0.7%)

Dataset: ILCD process, Partly terminated system
Geography: SC-CN
Reference year: 2019
Classification: Energy carriers and technologies / Electricity
LCI method principle: Other
Generated by: Ruoxi Xiong, xiongrx0126@163.com
Owner: Tiangong LCI Data Working Group
Review: Dependent internal review by Tiangong LCI Data Working Group
Amounts: no units in this file; such an amount is in the reference unit of its flow, which a separate flow dataset defines
copyright: false
licenseType: Free of charge for all users and uses

## General comment
Forms of electricity generation include thermal power, hydropower, wind power and solar power

## Time period
Calculated based on data from the 2019 Energy Statistics Yearbook

## Technical purpose
This data set characterizes the mixed electricity production profile for a region where thermal power constitutes 12.5% of the production mix, hydropower covers a majority of 85.0%, while wind power contributes 1.8%, and solar power 0.7%. The data is representative of a power supply that combines these sources of electricity predominantly used for general purposes, including residential, commercial, and industrial energy consumption.

## Reference product
- Electricity: 3.6; calculated

## Outputs
- carbon dioxide: 0.114; calculated
- sulfur dioxide: 1.8e-5; calculated
- Nitrogen oxides: 3.0177e-5; calculated
- Dust (unspecified, from stack): 4.202e-6; calculated

## Data treatment and extrapolations
For the accounting method, please refer to the "Enterprise Greenhouse Gas Emissions Accounting Methods and Reporting Guidelines for Power Generation Facilities". Different forms of power generation and fuel consumption come from Chapter 3 (Energy Production) and Chapter 6 (Regional Energy Balance Sheet) in the "China Energy Statistical Yearbook 2020". The fuel parameters such as low calorific value and carbon content per unit calorific value used to calculate the carbon dioxide emission factor come from the "2019 China Regional Power Grid Carbon Dioxide Baseline Emission Factor Calculation Instructions OM" and the "Enterprise Greenhouse Gas Emission Accounting Method and Reporting Guide for Power Generation Facilities" 》

## Use advice
Users of this data set should reference the 'Enterprise Greenhouse Gas Emissions Accounting Methods and Reporting Guidelines for Power Generation Facilities' for the accounting method. Additionally, it is necessary to consider the consumption of different forms of electricity and fuel based on Chapter 3 'Energy Production' and Chapter 6 'Regional Energy Balance Sheet' from 'China Energy Statistical Yearbook 2020'. When calculating CO2 emissions factors, fuel parameters must be sourced from the '2019 China Regional Power Grid Carbon Dioxide Baseline Emission Factor Calculation Instructions OM' alongside the enterprise guidelines. Special attention should be paid to the methodology applicable for the regional context and the defined scope of the electricity generation mix.

## Review details
Inventory: The internal review was done by several iteration steps concerning raw data validation, raw data documentation, representativity, completeness and consistency of modelling with regard to ISO 14040 and 14044.

## Data sources
- 熊若熙. 中国电力生产和消费二氧化碳与污染物排放因子核算. (清华大学, 2023).
