# 蔬菜生产 ; 设施构筑物（塑料大棚）

Dataset: ILCD process, Unit process, single operation
Geography: XA-SAX-CN
Reference year: 2012
Valid until: 2013
Classification: Unit processes / Materials production / Agricultural production means
Functional unit: 1000 kg tomatoes
Generated by: Haoran Zhang, hrzhang@whu.edu.cn
Owner: 天工LCI数据工作小组
Review: Dependent internal review by 天工LCI数据工作小组
Amounts: no units in this file; such an amount is in the reference unit of its flow, which a separate flow dataset defines
copyright: false
licenseType: Free of charge for all users and uses

## General comment
研究区为陕西省西安市郊区，该区域常年太阳 辐射总量为 4．81 MJ·m－2，年日照时数为 2163．8 h， 年平均气温为 12．9°C ，平均降水量为 630 mm，平均 蒸发量为 884 mm，无霜期为 221 d．该区日光温室属 于土墙钢架 结 构，种植蔬菜以番茄为主，多 数 采 用 一年种植两茬番茄的耕作方式． 塑料大棚属于钢架 结构，一般早春茬种植瓜类，秋延茬种植番茄． 本研 究选择了 10 个日光温室( 面积均为 6 m × 90 m) 和 5 个塑料大棚( 面积均为 9 m×110 m) 为研究对象， 调查了日光温室和塑料大棚建设及日常运行的物 资消耗，并全程详尽记录了 2012 年 7 月到 2013 年 6 月番茄、西瓜生产的投入和产出． 期间，10 个日光温 室均种植了两茬番茄，2012 年 7 月捂棚，8 月中旬定 植，11 月中旬开始采收，2013 年 1 月中、下旬拉秧， 2 月上旬定植第 2 茬番茄，4 月上、中旬开始采收， 6 月中下旬终收． 5 个塑料大棚 3 月中下旬定植西 瓜，5 月中下旬采收，6 月中下旬拉秧，7 月中旬定植 番茄，9 月中下旬采收，11 月下旬拉秧． 定植前进行 土壤消毒 和 翻 耕，有机肥与磷肥定植前全部施入， 追肥随灌溉水冲施，灌溉水为深井水．

## Technology and included processes
数据分别取10个日光温室和5个塑料大棚的平均值.根据建材的一般使用年限, 建设日光温室和塑料大棚消耗的建材和能源按使用寿命15年、PVC输水管按使用寿命5年棚膜按使用寿命1年 (塑料大棚按3年) 、防寒膜 (塑料大棚的裙膜) 按使用寿命3年分别折算为1年的用量.塑料大棚1年的建材消耗量平均分配给番茄和西瓜,

## Technical purpose
该数据集代表了在日光温室和塑料大棚这两种设施内生产番茄等蔬菜的生命周期数据。该设施提供了一个适宜的农业环境，有利于蔬菜如番茄和西瓜的高产量和保护性栽培。这份数据可为评估基于温室种植蔬菜环境足迹的项目提供物资和能源消耗，农业投入使用以及温室建设与运营的宝贵信息。

## Reference product
- Tomato: 1000; measured
  塑料大棚

## Inputs
- water: 0.245; measured
  塑料大棚
- Electricity: 563.82; measured
  塑料大棚

## Outputs
All rows: measured
- carbon dioxide (fossil): 62.147
  塑料大棚
- carbon monoxide: 2.593
  塑料大棚
- methane (fossil): 0.345
  塑料大棚
- non-methane volatile organic compounds: 0.021
  塑料大棚
- acetylene: 0.006
  塑料大棚
- sulfur dioxide: 767
  塑料大棚
- Nitrogen oxides: 0.215
  塑料大棚

## Deviations from the LCI method approaches
本研究定义的系统边界包括设施构筑物建设和日常运行 (下文简称为设施构筑物) 所需材料 (水泥、钢材、砖和棚膜等) 的生产，农资 (化肥、地膜、杀菌剂和杀虫剂) 生产、番茄种植 (育苗、翻地、定植、覆膜、施肥、喷药、灌溉、收获) 及各过程使用能源的生产和消耗,不包括农用机械的生产、番茄运输到市场销售和消费者消费的过程.

## Data selection and combination
能源生产和使用过程的环境影响数据取自文献 (Di et al., 2007;胡志远等, 2006) ;生产钢材、水泥、砖、棚膜、防寒膜、地膜、PVC输水管和化肥的资源、能源和环境排放数据分别取自文献以及《磷肥行业清洁生产指标体系》《氮肥行业清洁生产指标体系》由于缺乏详尽的研究数据, 杀虫剂和杀菌剂生产过程只考虑能耗和CO2排放量, 以有效成分质量表示, 数据采用West等 (2002) 的研究结果.

## Sampling procedure
本研究选择了10个日光温室 (面积均为6 m×90 m) 和5个塑料大棚 (面积均为9 m×110 m) 为研究对象, 调查了日光温室和塑料大棚建设及日常运行的物资消耗

## Use advice
在应用这些数据时，用户必须考虑到将建材分配到设施内种植的特定作物，特别是番茄和西瓜。确保根据指定的服务寿命调整建筑材料消耗数据（日光温室和塑料大棚的一般建筑材料15年，PVC输水管5年，温室薄膜1年并延长到塑料大棚的3年，以及防寒膜的3年）。为了准确的生命周期分析，请从系统边界中排除诸如农业机械生产、市场运输和消费者消费等过程。进行生命周期分析时，应注意能源生产和农用化学品的环境影响数据来源于文献，并且可能需要更新以获取更近期的数据集。

## Review details
清单： 内部审查通过几个迭代步骤完成，涉及原始数据验证、原始数据记录、代表性、完整性、与 ISO 14040 和 14044 有关的建模的一致性。

## Data sources
- 王效琴,吴庆强,周建斌,陈妍,吴发启.设施番茄生产系统的环境影响生命周期评价[J].环境科学学报,2014,34(11):2940-2947.
