# Modules assembly

Dataset: ILCD process, Unit process, single operation
Geography: SC-CN
Reference year: 2013
Classification: Systems / Other materials
Functional unit: 1 kg solar grade multi-Si
LCI method principle: Attributional
LCI method approaches: Allocation
Generated by: Jinfeng Yang, yjfzfshn@163.com
Owner: Tiangong LCI Data Working Group
Review: Dependent internal review by Tiangong LCI Data Working Group
Amounts: no units in this file; such an amount is in the reference unit of its flow, which a separate flow dataset defines
copyright: false
licenseType: Free of charge for all users and uses

## General comment
Multi-Si

## Geography
A solar module manufacturer in Sichuan

## Time period
Available online

## Technology and included processes
After soldering in series and parallel connection with special wires, the module is sealed on the high transmission toughened glass to form a solar module product

## Reference product
- Solar Module: 1e6; measured
  Solar module (MW)

## Inputs
All rows: measured
- Multi-Si solar cell: 5808
  solar cells
- electricity: 22320
  Power consumption
- Water (fresh water): 348610
  fresh water
- Glass: 60
- TPT film: 430
  TPT backplane
- Ethylene-vinyl acetate copolymer: 30
  EVA film
- Organic Silicone: 40
  Silicone
- aluminium: 10
  Aluminum frame

## Outputs
- volatile organic compound: 3.24; measured
  TVOC
- Welding Fumes: 1.04; measured
  welding fume
- industrial waste (unspecified): 132; measured
  Solid Waste

## Deviations from the LCI method approaches
In this paper, solar-grade polysilicon is taken as the research object, and the value of resource, energy input and environment emission of solar-grade polysilicon life cycle process at domestic and general production level is calculated quantitatively by using LCA evaluation method

## Data selection and combination
According to a solar module production enterprise in Sichuan production process data

## Review details
Inventory: The internal review was done by several iteration steps concerning raw data validation, raw data documentation, representativity, completeness and consistency of modelling with regard to ISO 14040 and 14044.

## Data sources
- 何洋. 太阳能级多晶硅的生命周期评价. (西南交通大学, 2013).
