# 铝锭铸造 ; 原生铝锭 ; 液态原铝 ; 2016年

Dataset: ILCD process, Unit process, single operation
Geography: CN
Reference year: 2021
Classification: Unit processes / Materials production / Metals and semimetals
Generated by: 蔡梓萌, caizm6178@163.com
Owner: 天工LCI数据工作小组
Review: Dependent internal review by 天工LCI数据工作小组
Amounts: no units in this file; such an amount is in the reference unit of its flow, which a separate flow dataset defines
copyright: false
licenseType: Free of charge for all users and uses

## General comment
本数据集描述的原生铝锭铸造工艺用于从液态原铝生产原生铝锭。该工艺对于创造应用于汽车、航空航天、建筑和电子行业的高纯度铝制品至关重要。通过此过程形成的铝锭可以进一步加工制造铝制组件和部件。

## Time period
文献发表日期

## Reference product
- aluminium, primary, ingot: 1000; software or database

## Inputs
- aluminium, primary, liquid: 1025.67; software or database

## Data selection and combination
本研究的数据参考了PA、SA、电力等背景数据的LCA数据。PA数据来自统计数据源，SA数据主要来自文献。背景数据主要来自中国科学院生态环境研究中心CASRCEES 2018建立的中国本地化LCA数据库，涵盖能源、材料、交通、废物管理等LCA数据。

## Use advice
使用这份数据集的用户应考虑数据的特定年份（2016年）和生命周期评估的范围。原生铝（PA）、再生铝（SA）、电力和其他背景信息的数据来源于统计数据和文献，其他背景数据则来自中国本地化生命周期评估数据库CAS RCEES 2018年。应用这些数据到LCA研究时，确保方法论的一致性是至关重要的。需要考量的因素包括数据的地理相关性、自2016年以来生产技术的潜在改变，以及与正在进行的LCA的目标和范围的对齐。用户可能需要考虑铝的质量变化，以及根据相关的方法学选择，通过包括或排除某些生命周期阶段或过程来为特定目的调整数据集。

## Review details
清单： 内部审查通过几个迭代步骤完成，涉及原始数据验证、原始数据记录、代表性、完整性、与 ISO 14040 和 14044 有关的建模的一致性。

## Data sources
- Ding, N., Liu, N., Lu, B. & Yang, J. Life cycle greenhouse gas emissions of aluminum based on regional industrial transfer in China. J. Ind. Ecol. 25, 1657–1672 (2021).
