# 煤炭回采;井下综合机械化开采煤炭

Dataset: ILCD process, Unit process, black box
Geography: ZZ-SD-CN
Reference year: 2022
Classification: Unit processes / Energy carriers and technologies / Energetic raw materials
Generated by: 尹琳琳, yinlinlin0623@163.com
Owner: 天工LCI数据工作小组
Review: Dependent internal review by 天工LCI数据工作小组
Amounts: no units in this file; such an amount is in the reference unit of its flow, which a separate flow dataset defines
licenseType: Free of charge for all users and uses

## General comment
本文运用生命周期思想，确定了不同地质条件下综采过程的碳排放边界。本研究的目的是计算煤炭地下开采过程中各碳排放源释放的CO2量。

## Geography
金达煤矿五—二开采区位于中国山东省滕州市。五—二开采区的东西宽度平均为0.66km,南北长度平均为2.9km,总体区域面积为1.94平方千米。

## Technology and included processes
综采工艺由落煤采煤、运煤、顶板支护、煤矿采空区处理四个具体工艺组成。

## Technical purpose
金达煤矿五—二区位于中国山东省滕州市开采的煤炭主要用于能源生产和各种工业应用。井下综合机械化开采工艺确保了高效提取适用于电厂、制造过程以及作为化工原料的煤炭。区域特定的特点，如开采区域的尺寸和使用的采矿技术，影响了所提取煤炭的质量和适用性。

## Reference product
- Hard coal, at consumer EU-27: 1.42728e6; uniform; estimated
  5-2采煤区域整个综采（4个工艺流程）过程开采的煤炭量。

## Inputs
- Hard coal, at consumer EU-27: 1.42728e6; uniform; estimated
  文献中没有说明煤炭的投入量，假设：煤炭的投入量:产出量=1:1

## Outputs
- carbon dioxide (fossil): 4.1671e7; uniform; calculated
  5-2采煤区域整个综采（4个工艺流程）过程的CO2排放量;原文未区分bio和fossil的流，根据专家判断此处为fossil。

## Data selection and combination
收集金达煤矿开采过程中碳排放的相关数据，利用B - R模型得到该矿区开采过程中的碳排放量。

## Use advice
在使用金达煤矿五—二区的生命周期评估数据时，需要考虑采矿过程的具体条件，例如技术水平、地质条件和采用的采矿技术。使用B-R模型确保碳排放数据的准确表达，该模型已针对该矿区的采矿过程进行了特别适配。请注意，数据集不包括输入流，重点关注煤炭和CO2的输出流。在没有适当规范化的情况下，数据不应用于与采用不同开采方法或技术设置的矿山进行比较。

## Review details
清单： 内部审查通过几个迭代步骤完成，涉及原始数据验证、原始数据记录、代表性、完整性、与 ISO 14040 和 14044 有关的建模的一致性。

## Data sources
- Li, B. et al. Research on a Carbon Emission Calculation Model and Method for an Underground Fully Mechanized Mining Process. Energies 15, 2871 (2022).
