# 生物乙醇 ; 溶剂法处理 ; 收集与运输

Dataset: ILCD process
Geography: GLO
Classification: Unit processes / Energy carriers and technologies / Renewable fuels
Generated by: Jiayi Yuan, jiayi_y@mail.bnu.edu.cn
Owner: 天工LCI数据工作小组
Review: Dependent internal review by 天工LCI数据工作小组
Amounts: no units in this file; such an amount is in the reference unit of its flow, which a separate flow dataset defines
copyright: false
licenseType: Free of charge for all users and uses

## General comment
该数据集代表了生物乙醇产生的生命周期清单（LCI），包括收集和运输，并专注于基于溶剂的预处理技术。生产的生物乙醇适合作为可再生燃料替代化石燃料，在车辆中燃烧使用。在需要低碳足迹燃料的情境中可以实施，特别是在汽车工业中，向可持续能源转变至关重要。

## Technology and included processes
通过数据质量评估，从474篇已发表论文的561个数据集中选择了141个具有高完整性和一致性的数据集，并将其分类为由预处理技术确定的8种技术配置。预处理后的技术步骤都是相同的，尽管实际流量和参数值在文献中观察到不同

## Inputs
- Diesel: 0.0006
  L/kg

## Data selection and combination
在可能的情况下使用了全球数据集，因为该研究不适用于任何特定地区。一种名为“汽车中生物乙醇燃烧”的外部过程的LCI数据来自GREET数据库

## Data treatment and extrapolations
我们通过不确定性传播（蒙特卡罗）、可辨别性分析、全局敏感性分析和场景变化评估了建模结果的鲁棒性。

## Use advice
数据集使用者应注意，所选数据集基于从众多来源报告的数据的高完整性和一致性进行选择，并且通过包括不确定性传播和灵敏度分析在内的各种分析方法验证了建模结果。然而，由于使用了全球数据集，且研究不具有区域特定性，用户在将数据应用于特定地理环境时需要根据当地参数进行调整。在具体的生命周期评估（LCA）研究框架内，应仔细考虑回收过程的包含/排除，以及生物乙醇的使用阶段。应探索额外的情景变化，以便在特定LCA研究中适当地将数据置于上下文中。

## Review details
清单： 内部审查通过几个迭代步骤完成，涉及原始数据验证、原始数据记录、代表性、完整性、与 ISO 14040 和 14044 有关的建模的一致性。
