# HDPE production;HDPE

Dataset: ILCD process, Unit process, black box
Geography: CN
Reference year: 2020
Classification: Materials production / Plastics
Functional unit: considering 1 kg resin production as the functional unit.
Generated by: Huijuan Guo, GHJ@email.ncu.edu.cn
Owner: Tiangong LCI Data Working Group
Review: Dependent internal review by Tiangong LCI Data Working Group
Amounts: no units in this file; such an amount is in the reference unit of its flow, which a separate flow dataset defines
copyright: false
licenseType: Free of charge for all users and uses

## General comment
Ethylene and propylene were obtained by early-stage crude oil refining and then polymerized to PE and PP, respectively. For PE, HDPE and LDPE were obtained according to different polymerization methods

## Geography
Process-based data from China were used, yet if not available, data from Europe were applied instead.

## Time period
Process-based data from China were used, yet if not available, data from Europe were applied instead. The electricity input was developed based on the national grid structure in China (Table S3), which was obtained from the share of the electric power structure in 2020 (National Bureau Statistics of China, 2020).

## Reference product
- polyethylene high density granulate (PE-HD): 1; missing unimportant

## Inputs
- ethylene: 1.02; missing unimportant
- naphtha: 0.075; missing unimportant
- Hydrogen: 0.11; missing unimportant
- Electricity: 1.5; missing unimportant

## Outputs
All rows: missing unimportant
- carbon dioxide: 2.35
- carbon monoxide: 1.76
- hydrocarbons (unspecified): 0.33
- Nitrogen oxides: 0.32
- ethane: 0.016
- toluene: 9e-9
- benzene: 6.5e-7
- phenol: 2e-9
- Waste (unspecified): 1.27
- Suspended substances: 0.33

## Data treatment and extrapolations
ReCiPe method (Europe H/H) was used as the assessment method for consistency.

## Review details
Inventory: The internal review was done by several iteration steps concerning raw data validation, raw data documentation, representativity, completeness and consistency of modelling with regard to ISO 14040 and 14044.

## Data sources
- An, J., Wu, F., Wang, D. & You, J. Estimated material metabolism and life cycle greenhouse gas emission of major plastics in China: A commercial sector-scale perspective. Resources, Conservation and Recycling 180, (2022).
