# Corn-based ethylene glycol production | Ethylene glycol | Catalytical reaction | Miscanthus

Dataset: ILCD process, Unit process, black box
Geography: CN
Classification: Materials production / Other mineralic materials
Functional unit: The functional unit was defined as the production of 1 metric ton of EG in China.
LCI method principle: Attributional
Generated by: Zirui Tang, tangzirui123@gmail.com
Review: Dependent internal review by Tiangong LCI Data Working Group
Amounts: no units in this file; such an amount is in the reference unit of its flow, which a separate flow dataset defines
copyright: false

## General comment
The designed bio-EG production model includes feedstock supply logistics, feedstock pretreatment, reaction, product separation, wastewater treatment and utility.

## Geography
The functional unit was defined as the production of 1 metric ton of EG in China.

## Technology and included processes
Miscanthus passes the pretreatment unit to liberate cellulose and hemicellulose, which are converted into EG under certain conditions in the reaction unit. Raw product flow includes EG, propanediol (PDO), butanediol (BDO), water, and other by-products, and is purified in the following product separation unit. In addition, feedstock supply logistics, utility generation, and wastewater treatment units are designed to support sufficient raw materials and energy, recover valuable components, and dispose of unusable substances.

## Reference product
- Ethylene glycol: 1000; article inperiodical

## Inputs
All rows: article inperiodical
- Miscanthus sinensis: 7200
- Diesel: 100
- water: 104600
- sodium hydroxide: 700
- Hydrogen: 100
- Limestone: 100
  Lime
- Tungstic acid: 300
- Diisobutyl Ketone: 40
- Electricity: 1440

## Outputs
- waste water - untreated: 104800; article inperiodical
- Production residues (unspecified): 1800; article inperiodical
  includes diols (0.3 t), heavy fraction (0.8 t), and light fraction (0.7 t).

## Data selection and combination
The whole production system excluding feedstock supply logistics was developed through steady-state simulation of Aspen Plus, while feedstock supply logistics unit was estimated according to previous work [44].

## Review details
Inventory: The internal review was done by several iteration steps concerning raw data validation, raw data documentation, representativity, completeness and consistency of modelling with regard to ISO 14040 and 14044.; Documentation: The review of the documentation was performed by Ecobilan and is in compliance with ISO 14040 and 14044. The data set documentation is correct in view of the appropriateness of the information provided. It includes all relevant information in view of data quality and scope of application of the respective LCI result.

## Data sources
- Zhao, Z., Jiang, J., Zheng, M. & Wang, F. Advancing development of biochemicals through the comprehensive evaluation of bio-ethylene glycol. Chemical Engineering Journal 411, 128516 (2021).
