# 稀土还原;稀土;熔盐电解;钕铁硼磁铁废料

Dataset: ILCD process, Unit process, single operation
Geography: CN
Reference year: 2013
Valid until: 2016
Classification: Unit processes / Materials production / Metals and semimetals
Functional unit: The functional unit of this analysis was chosen as the production of one kg Nd–Pr alloy through extraction from NdFeB magnet scrap
LCI method principle: Attributional
LCI method approaches: Allocation - market value
Generated by: 汪涛, twang@iue.ac.cn
Owner: 天工LCI数据工作小组
Review: Dependent internal review by 天工LCI数据工作小组
Amounts: no units in this file; such an amount is in the reference unit of its flow, which a separate flow dataset defines
copyright: false
licenseType: Free of charge for all users and uses

## General comment
此过程涉及从钕铁硼磁铁废料中回收和再循环稀土金属，特指Nd–Pr合金。其应用目的是为了从废旧磁体中回收稀土金属，尤其是钕和镨，这些金属是制造新型高强度永磁体的关键，永磁体广泛应用于各种技术中，包括电动机、风力涡轮发电机和硬盘驱动器。

## Technology and included processes
代尔夫特理工大学正在实验室规模上开发一种从废磁铁中提取稀土金属的一步回收工艺。实验中使用未磁化、未涂层的磁体样品。将磁体在惰性气氛下球磨以增加表面积以促进电化学反应，并将粉末插入盐浴中。

## Reference product
- Rare Earth Oxides: 1; calculated

## Inputs
- Electricity: 39.6; min 32.4; max 46.8; uniform; calculated
  Reduction of rare earth oxides in molten salts: Energy consumption during electro-lysis,

## Outputs
- HFC-116: 0.00151516; min 3.031e-5; max 0.003; uniform; calculated
  Reduction of rare earth oxides in molten salts
- FC-14: 0.0300069; min 6.905e-6; max 0.03; uniform; calculated
  Reduction of rare earth oxides in molten salts

## Deviations from the LCI method approaches
The allocation of environmental flows to Nd and Pr was updated. Value allocation was used to share the process impacts from both multi-output stages, reflecting prices from recent years (2013–2016). There are two stages in the primary production of rare earths for which assumptions regarding coproductions are necessary: the beneficiation stage, where concentrated iron ore and rare earth concentrate are separated, and the solvent extraction stage undertaken to separate individual rare earths.

## Use advice
使用此数据集的用户需注意，该生命周期评估数据基于代尔夫特理工大学开发的实验室规模上的一步回收工艺，因此可能并不直接反映工业规模的操作。重要的是要考虑这些数据应用于初步评估和理论评价，并且在将数据应用于更大规模生产场景时需仔细关注比例因子。用户还应根据近年来（2013-2016）价格反映的更新值分配，特别是在选矿阶段和溶剂萃取阶段，来考虑环境影响在Nd和Pr之间的分配。

## Review details
清单： 内部审查通过几个迭代步骤完成，涉及原始数据验证、原始数据记录、代表性、完整性、与 ISO 14040 和 14044 有关的建模的一致性。

## Data sources
- Schulze, R., Abbasalizadeh, A., Bulach, W., Schebek, L. & Buchert, M. An Ex-ante LCA Study of Rare Earth Extraction from NdFeB Magnet Scrap Using Molten Salt Electrolysis. J. Sustain. Metall. 4, 493–505 (2018).
