# Polyester and cotton production|Polyester and cotton|Printing and dyeing|Reduction

Dataset: ILCD process, Unit process, single operation
Geography: CN
Reference year: 2018
Classification: Materials production / Other mineralic materials
Generated by: Yingfan Duan, 1300925579@qq.com
Review: Dependent internal review by Tiangong LCI Data Working Group
Amounts: no units in this file; such an amount is in the reference unit of its flow, which a separate flow dataset defines
copyright: false

## General comment
印染阶段生产环节较多，可进一步分为烧毛、退浆、丝光、前定型、轧染、热熔、还原、定型、预缩环节。

## Inputs
- Water (fresh water): 44700; measured
- Electricity: 631.44; software or database
- Crude coal: 15800; software or database

## Outputs
All rows: measured
- Dust (unspecified, from stack): 3160
- carbon dioxide: 41370
- sulfur dioxide: 143
- Nitrogen oxides: 117
- waste water - untreated: 39500
- chemical oxygen demand: 16.2
- sodium hydroxide: 2.766e6
- Suspended solids, unspecified: 2

## Review details
Inventory: The internal review was done by several iteration steps concerning raw data validation, raw data documentation, representativity, completeness and consistency of modelling with regard to ISO 14040 and 14044.

## Data sources
- 康宏. 基于LCA的棉印染生产过程改进设计研究. (大连理工大学, 2018).
