# Copper slag Recycling|Cement|production of cement after Electric Furnace treatment|Copper slag

Dataset: ILCD process, Unit process, single operation
Geography: CN
Reference year: 2010
Classification: Materials production / Other mineralic materials
Functional unit: The functional unit was defined as the recycling of 1 ton of copper slag from copper smelting process.
LCI method principle: Attributional
LCI method approaches: Substitution
Generated by: Peng Wang, 2867919560@qq.com
Review: Dependent internal review by Tiangong LCI Data Working Group
Amounts: no units in this file; such an amount is in the reference unit of its flow, which a separate flow dataset defines
copyright: false

## Geography
a dominant copper company in China.

## Time period
were obtained from internal report of relevant company in 2010.

## Technology and included processes
four scenarios of copper slag recycling were developed in terms of technological availability: (1) production of cement directly, (2) production of cement after Electric Furnace treatment, (3) production of cement after Floatation, and (4) production of unfired brick after Floatation.

## Reference product
- carbon dioxide (fossil): 5265.9; measured
  CO2

## Inputs
All rows: measured
- Hard coal, at consumer EU-27: 1648.3
  Hard coal
- crude oil; 42.3 MJ/kg: 46.6
  Crude oil
- natural gas; 44.1 MJ/kg: 38.2
  Natural gas
- Limestone: 6567.7
- clay: 1315.1
  Clay
- gypsum: 400.9
  Gypsum

## Outputs
- carbon monoxide: 3.5; measured
  CO
- sulfur dioxide: 19.2; measured
  SO2
- Hard coal: 17; measured
  NOx需要补充
- particles (PM2.5 - PM10): 23.3; measured
  Dust需要补充

## Deviations from the LCI method approaches
characterization, normalization and weighting, after the allocation procedure by using the avoided burdens method.

## Data selection and combination
The data of copper slag treatment were mainly derived from a dominant copper company in China. The production data of cement and brick mostly came from real plant that adopts advanced equipment and processes, supplemented by published literature.

## Data treatment and extrapolations
GaBi 4 software was used to model the copper recycling system and determine the environmental impacts in this study. The Eco-Indicator 99 (EI99) was applied for the life cycle impact assessment

## Review details
Inventory: The internal review was done by several iteration steps concerning raw data validation, raw data documentation, representativity, completeness and consistency of modelling with regard to ISO 14040 and 14044.; Documentation: The review of the documentation was performed by Ecobilan and is in compliance with ISO 14040 and 14044. The data set documentation is correct in view of the appropriateness of the information provided. It includes all relevant information in view of data quality and scope of application of the respective LCI result.

## Data sources
- Song, X. L., Yang, J. X., Wang, J. W. & Wu, W. J. Assessing the Life Cycle Environmental and Economic Performance of Copper Slag Recycling. AMR 878, 219–225 (2014).
