# 铝电解 ; 液态原铝 ; 预焙 ; 冶金用氧化铝 ; 2011年

Dataset: ILCD process, Unit process, single operation
Geography: CN
Reference year: 2021
Classification: Unit processes / Materials production / Metals and semimetals
Generated by: 蔡梓萌, caizm6178@163.com
Owner: 天工LCI数据工作小组
Review: Dependent internal review by 天工LCI数据工作小组
Amounts: no units in this file; such an amount is in the reference unit of its flow, which a separate flow dataset defines
copyright: false
licenseType: Free of charge for all users and uses

## General comment
所描述的铝电解过程专用于使用冶金用氧化铝通过预焙步骤生产液态原铝。这种原铝通常用于生产各种铝制品，例如建筑材料、汽车零部件、电气组件和包装材料。数据特定年份表明该过程适用于2011年的技术和方法学。

## Time period
文献发表日期

## Reference product
- aluminium, primary, liquid: 1000; software or database

## Inputs
All rows: software or database
- Integrated AC power consumption: 48705.1
- aluminium oxide, metallurgical: 1918.82
- fluoride salt: 21.89
- anode, prebake, for aluminium electrolysis: 424.39
- Water, unspecified natural origin: 2.76

## Data selection and combination
本研究的数据参考了PA、SA、电力等背景数据的LCA数据。PA数据来自统计数据源，SA数据主要来自文献。背景数据主要来自中国科学院生态环境研究中心CASRCEES 2018建立的中国本地化LCA数据库，涵盖能源、材料、交通、废物管理等LCA数据。

## Use advice
本生命周期评价数据的用户应注意，来自统计数据的原铝（PA）数据和主要来自文献的再生铝（SA）数据必须在2011年的技术框架内进行考量。使用中国本地化生命周期评价数据库CAS RCEES 2018的背景数据时应理解，它反映了与中国特定环境相关的能源、材料、运输和废物管理的环境影响。建议在将此数据应用于当前情境时，考虑技术或环境法规的任何变化。

## Review details
清单： 内部审查通过几个迭代步骤完成，涉及原始数据验证、原始数据记录、代表性、完整性、与 ISO 14040 和 14044 有关的建模的一致性。

## Data sources
- Ding, N., Liu, N., Lu, B. & Yang, J. Life cycle greenhouse gas emissions of aluminum based on regional industrial transfer in China. J. Ind. Ecol. 25, 1657–1672 (2021).
