# 锂精矿生产 ; 锂辉石精矿（氧化锂含量5%） ; 粉碎 ; 西澳锂辉石矿（氧化锂含量0.8%-0.9%）

Dataset: ILCD process, Unit process, single operation
Geography: AU
Reference year: 2018
Classification: Unit processes / Materials production / Non-energetic raw materials
Generated by: 孙鑫, xs389@cornell.edu
Owner: 天工LCI数据工作小组
Review: Dependent internal review by 天工LCI数据工作小组
Amounts: no units in this file; such an amount is in the reference unit of its flow, which a separate flow dataset defines
licenseType: Free of charge for all users and uses

## General comment
锂在世界各地的几种不同矿石结构中含量丰富。澳大利亚西部盛产钠长石矿，长期以来一直是全球锂的来源。正长岩（LiAlSi2O6）含有高达 8%的 Li2O（按质量计），可通过提炼获得锂化学品，如 Li2CO3 或 LiOH-H2O。我们考察了澳大利亚西部从含锂矿石中提炼出的浓缩闪长岩，以及在中国将其转化为 Li2CO3 或 LiOH-H2O 的情况。

## Technology and included processes
我们为澳大利亚西部的锂矿开采和加工参数开发了一套 LCI 数据集。现场假设包括每年需要开采 1400 万吨材料，年产量为 200 万吨矿石，我们假设矿石中含有 0.8%-0.9% 的氧化锂。采矿场的主要作业是使用柴油卡车挖掘和运输材料。我们按 10 辆卡车连续作业估算了这些卡车的柴油消耗量。据估计，每年将消耗 100 万立方米的水，其中部分水可能会排放到水系统中。我们假定，开采出的鳞片矿将被浓缩在一个设施中，该设施设计有一个使用柴油的独立发电厂。该工厂将接收矿石，并通过一系列减小粒度、分离和提纯操作将其浓缩，这些操作将消耗相对较少的试剂和水。该设施将生产精矿。我们假定，精矿中的纯度至少为 63%，其余部分为石英和长石。因此，按质量计算，所交付的钠长石矿石中至少含有 ~5% 的 Li2O。表 4 列出了从澳大利亚西部矿山开采和生产精矿所需的假定材料和能源投入。

## Technical purpose
该工艺生产的含6%氧化锂（Li2O）的锂辉石精矿，主要用于锂电池制造行业的各种应用。这种高品位精矿通常作为生产锂化合物的主要原料，这些锂化合物是可充电锂离子电池、陶瓷、玻璃及其他需要高纯度锂的工业产品制造中的关键组成部分。

## Reference product
- Spodumene concentrate (6% Li2O): 1000; measured

## Inputs
- Spodumene（0.8% Li2O）: 4500; measured
- sodium carbonate: 15; measured
- freshwater,freshwater: 3; measured
- Diesel: 4500; measured

## Use advice
在使用此数据集进行生命周期评估时，需注意原材料的生产流程和占总过程小于1%的相关能源流已被排除在外。用户在将此数据集置于锂离子电池生产的完整生命周期背景下使用时，应确保包括合适的系统边界，考虑所有相关的上游和下游过程，包括提取、提纯及最终电池制造。同样需要关注数据集的地理特定性，因为它与源自西澳洲的锂辉石矿石相关。

## Review details
清单： 内部审查通过几个迭代步骤完成，涉及原始数据验证、原始数据记录、代表性、完整性、与 ISO 14040 和 14044 有关的建模的一致性。

## Data sources
- Kelly, J. C., Wang, M., Dai, Q. & Winjobi, O. Energy, greenhouse gas, and water life cycle analysis of lithium carbonate and lithium hydroxide monohydrate from brine and ore resources and their use in lithium ion battery cathodes and lithium ion batteries. Resources, Conservation and Recycling 174, 105762 (2021).
