# 气提单元;地下水抽出处理

Dataset: ILCD process, Unit process, single operation
Geography: UM
Reference year: 2009
Classification: Other Services / Repair and maintenance
Generated by: 杨欣桐, yangxt@caep.org.cn
Owner: 天工LCI数据工作小组
Review: Dependent internal review by 天工LCI数据工作小组
Amounts: no units in this file; such an amount is in the reference unit of its flow, which a separate flow dataset defines
copyright: false
licenseType: Free of charge for all users and uses

## General comment
PTS通过抽取和使用地上处理设施清除受污染的地下水。PTS处理导致的污染物浓度的降低在初始很快，但通常会导致长期缓慢、稳定的降低

## Geography
该案例研究使用了巴特尔为位于美国多佛空军基地

## Technology and included processes
抽出处理由五个单元系统组成：抽提井、气提单元（ASU）、催化氧化单元（COU）、颗粒活性炭单元（GAC）和处理设施。ASU单元由一个铝塔和一个0.75 kW (1 hp)的鼓风机组成。

## Technical purpose
技术用途：抽提处理系统（PTS）主要用于受污染地下水的整治。它涉及提取污染水并利用地面设施进行处理。具体来说，此过程适用于环境清理项目，例如军事基地和工业场所，其中土壤和地下水已被污染。此系统在美国多佛空军基地的研究提供了通过一系列处理阶段（包括气提、催化氧化和颗粒活性炭过滤）解决污染的方法。

## Reference product
- Air stripping unit,Catalytic oxidation unit: 1; measured

## Inputs
- Aluminium and aluminium alloy products: 50; measured
  Calalylic Oxidalion Unil Aluminum
- Steel: 50; measured
  Catalytic Oxidation Unit Steel

## Use advice
数据使用说明：在应用此数据集进行生命周期评估（LCA）时，用户应考虑所提供数据的完整性和代表性。任何未包含在数据库中的输入或排放的单元过程都应基于类似过程或科学文献仔细估计。此数据应在所述的气提、催化氧化和颗粒活性炭单元的技术适用性限制内使用。某些输入或输出的遗漏应该被透明记录，并且应该进行敏感性分析，以评估它们对LCA结果的潜在影响。

## Review details
清单： 内部审查通过几个迭代步骤完成，涉及原始数据验证、原始数据记录、代表性、完整性、与 ISO 14040 和 14044 有关的建模的一致性。

## Data sources
- Life-Cycle Case Study Comparison of Permeable Reactive Barrier versus Pump-and-Treat Remediation
