# Sandandgravelaggregate|Crushedstone,sandandgravel|Crushing, screening, washing|All sizes / 砂石骨料|碎石、砂石|破碎、筛分、水洗|所有规模

Dataset: ILCD process, Unit process, single operation
Geography: CN
Reference year: 2019
Classification: Materials production / Non-energetic raw materials
Generated by: The data was created by the Office of the Second National Pollution Source Census of the Ministry of Ecology and Environment, and the data was organized by the TianGong Plan team for ILCD format / 生态环境部第二次全国污染源普查工作办公室创建数据，天工计划团队常慧敏整理数据为ILCD格式
Owner: Tiangong LCI Data Working Group / 天工LCI数据工作小组
Amounts: no units in this file; such an amount is in the reference unit of its flow, which a separate flow dataset defines
copyright: false
licenseType: Free of charge for all users and uses

## Technology and included processes
the Technical of end-of-pipe management technology for pollution Petroleum-related wasteis/，Its Technical efficiency of end-of-pipe management0

## Reference product
- Sandstone: 1000; calculated
  源文件中描述为为砂石骨料，此处对其进行了匹配工作，将其匹配到LCAflow库里面相最符合的流，污染物指标备注为工业废气量

## Outputs
All rows: calculated
- Exhaust gas: 1215
  污染物指标工业废气量的末端治理技术是/。原文件中描述污染物类别为废气，污染物指标为工业废气量，此处对其进行了匹配工作，将其匹配到LCAflow库里面相最符合的流，污染物指标备注为工业废气量
- particles (PM2.5 - PM10): 0.0189
  污染物指标颗粒物的末端治理技术是袋式除尘，其效率为99，末端治理设施实际运行率（k值）计算公式为k=处理设施耗电量（千瓦时/年）/（设备额定功率（千瓦）×设备运行时间（小时/年））。原文件中描述污染物类别为废气，污染物指标为颗粒物，此处对其进行了匹配工作，将其匹配到LCAflow库里面相最符合的流，污染物指标备注为颗粒物
- particles (PM2.5 - PM10): 0.189
  污染物指标颗粒物的末端治理技术是湿式除尘，其效率为90，末端治理设施实际运行率（k值）计算公式为k=处理设施耗电量（千瓦时/年）/（设备额定功率（千瓦）×设备运行时间（小时/年））。原文件中描述污染物类别为废气，污染物指标为颗粒物，此处对其进行了匹配工作，将其匹配到LCAflow库里面相最符合的流，污染物指标备注为颗粒物
- particles (PM2.5 - PM10): 0.378
  污染物指标颗粒物的末端治理技术是其他①，其效率为80，末端治理设施实际运行率（k值）计算公式为k=处理设施耗电量（千瓦时/年）/（设备额定功率（千瓦）×设备运行时间（小时/年）），①其他包括机械除尘、喷雾降尘等。。原文件中描述污染物类别为废气，污染物指标为颗粒物，此处对其进行了匹配工作，将其匹配到LCAflow库里面相最符合的流，污染物指标备注为颗粒物
- particles (PM2.5 - PM10): 1.89
  污染物指标颗粒物的末端治理技术是/，其效率为0。原文件中描述污染物类别为废气，污染物指标为颗粒物，此处对其进行了匹配工作，将其匹配到LCAflow库里面相最符合的流，污染物指标备注为颗粒物
- Waste water: 2160
  污染物指标工业废水量的末端治理技术是/，末端治理设施实际运行率（k值）计算公式为/。原文件中描述污染物类别为废水，污染物指标为工业废水量，此处对其进行了匹配工作，将其匹配到LCAflow库里面相最符合的流，污染物指标备注为工业废水量
- chemical oxygen demand: 0.00798
  污染物指标化学需氧量的末端治理技术是沉淀分离+循环利用①，其效率为30，末端治理设施实际运行率（k值）计算公式为k=处理设施耗电量（千瓦时/年）/（设备额定功率（千瓦）×设备运行时间（小时/年）），①末端治理技术效率为沉淀分离效率，循环利用效率按废水回用公式计算。
  。原文件中描述污染物类别为废水，污染物指标为化学需氧量，此处对其进行了匹配工作，将其匹配到LCAflow库里面相最符合的流，污染物指标备注为化学需氧量
- chemical oxygen demand: 0.00912
  污染物指标化学需氧量的末端治理技术是压滤（过滤）+循环利用①，其效率为20，末端治理设施实际运行率（k值）计算公式为k=处理设施耗电量（千瓦时/年）/（设备额定功率（千瓦）×设备运行时间（小时/年）），①末端治理技术效率为沉淀分离效率，循环利用效率按废水回用公式计算。
  。原文件中描述污染物类别为废水，污染物指标为化学需氧量，此处对其进行了匹配工作，将其匹配到LCAflow库里面相最符合的流，污染物指标备注为化学需氧量
- chemical oxygen demand: 0.0114
  污染物指标化学需氧量的末端治理技术是/，其效率为0。原文件中描述污染物类别为废水，污染物指标为化学需氧量，此处对其进行了匹配工作，将其匹配到LCAflow库里面相最符合的流，污染物指标备注为化学需氧量
- Petroleum-related waste: 0.000994
  污染物指标石油类的末端治理技术是沉淀分离+循环利用①，其效率为30，末端治理设施实际运行率（k值）计算公式为k=处理设施耗电量（千瓦时/年）/（设备额定功率（千瓦）×设备运行时间（小时/年）），①末端治理技术效率为沉淀分离效率，循环利用效率按废水回用公式计算。
  。原文件中描述污染物类别为废水，污染物指标为石油类，此处对其进行了匹配工作，将其匹配到LCAflow库里面相最符合的流，污染物指标备注为石油类
- Petroleum-related waste: 0.000852
  污染物指标石油类的末端治理技术是压滤（过滤）+循环利用①，其效率为40，末端治理设施实际运行率（k值）计算公式为k=处理设施耗电量（千瓦时/年）/（设备额定功率（千瓦）×设备运行时间（小时/年）），①末端治理技术效率为沉淀分离效率，循环利用效率按废水回用公式计算。
  。原文件中描述污染物类别为废水，污染物指标为石油类，此处对其进行了匹配工作，将其匹配到LCAflow库里面相最符合的流，污染物指标备注为石油类
- Petroleum-related waste: 0.00142
  污染物指标石油类的末端治理技术是/，其效率为0。原文件中描述污染物类别为废水，污染物指标为石油类，此处对其进行了匹配工作，将其匹配到LCAflow库里面相最符合的流，污染物指标备注为石油类

## Data sources
- 第二次全国污染源普查产排污核算系数手册（试用版）,二级代码30,四级代码3039文件，在完整版文件中第3368页
