# 铝电解电容器生产 ; 铝电解用阴极 ; 阴极箔分切 ; 0.05 mm阴极蚀刻铝箔的铝线圈

Dataset: ILCD process, Unit process, single operation
Geography: JS-CN
Reference year: 2020
Classification: Unit processes / Materials production / Metals and semimetals
Generated by: 常慧敏, huiminchang@tsinghua.edu.cn
Owner: 天工LCI数据工作小组
Review: Dependent internal review by 天工LCI数据工作小组
Amounts: no units in this file; such an amount is in the reference unit of its flow, which a separate flow dataset defines
copyright: false
licenseType: Free of charge for all users and uses

## General comment
阴极箔分切 ; 铝电解电容器 (AEC) 生产 ; 420V 680uf

## Time period
The investigated manufacturer produced about 1.183 billion AECs of all kinds in 2020.

## Technical purpose
所描述的工业过程涉及铝电解电容器的生产，特别是用于铝电解的阴极的创建。该过程包括切割阴极箔和制造铝线圈，其具有0.05毫米蚀刻阴极的铝箔。这些组件对于制造420V 680uf电容器单元至关重要，这些电容器单元被广泛用于电子产品中，用于能量存储和滤波。生产出的电容器适用于需要耐用且可靠的电子组件的各种应用。

## Reference product
- cathode, for aluminium electrolysis: 361.173; measured
  Cathode etched foil [kg]

## Inputs
- electricity, high voltage, aluminium industry: 6.5232; measured
  Electricity [kWh]
- Al coil of 0.05mm cathode etched foil: 373.885; measured
  Al coil of 0.05mm cathode etcthed foil [kg]

## Outputs
- cathode, for aluminium electrolysis: 12.712; measured
  Scraps of cathode etched foil [kg]

## Data selection and combination
电容器生产的库存数据来自 AEC 位于中国江苏省的生产工厂。每道工序的 LCI 数据收集的截止标准是至少覆盖输入流和输出流 95% 的质量和能量。阳极箔生产和阴极箔生产的库存数据是根据生产工艺和相应工艺参数分析获得的。上游数据（即铝锭、分选纸、运输、电力和水）来自 Gabi 软件（版本：10.6.1.35）。具体而言，《中国电力年鉴》中的中国电网概况以 2016 年为基准年。铝锭生产的基准年为 2015 年。无法获取的柠檬酸铵、五硼酸铵、NH4H2PO4 和 HBO3 数据是根据 Gabi 软件中现有材料（反应物）的化学方程式估算的。使用和报废阶段的库存数据是通过分析和计算获得的。

## Use advice
在使用与铝电解电容器生产相关的生命周期清单（LCI）数据时，必须遵守指定的截止标准，确保至少覆盖95％的投入和产出流的质量和能量。数据用户应该知道，电网和铝锭生产的参考年分别是2016年和2015年。对于像柠檬酸铵、五硼酸铵、磷酸二氢铵和硼酸这样数据无法获取的元素，用户应使用Gabi软件中可用的反应物基于化学方程式进行估算。使用和产品寿命终端阶段的数据来源于分析和计算，应在生命周期评估研究中相应应用。

## Review details
清单： 内部审查通过几个迭代步骤完成，涉及原始数据验证、原始数据记录、代表性、完整性、与 ISO 14040 和 14044 有关的建模的一致性。

## Data sources
- Zhang, C., Jing, J., Yun, L., Zheng, Y. & Huang, H. A cradle-to-grave life cycle assessment of high-voltage aluminum electrolytic capacitors in China. J. Clean. Prod. 370, (2022).
