# 变压器的制造 ; 30个箱式变压器的制造

Dataset: ILCD process, Unit process, single operation
Geography: NMG-CN
Reference year: 2017
Classification: Systems / Other machines
Functional unit: The functional unit is 1.5 MW wind turbine
LCI method principle: Attributional
LCI method approaches: Allocation
Generated by: 赵云志, ll10088@163.com
Owner: 天工LCI数据工作小组
Review: Dependent internal review by 天工LCI数据工作小组
Amounts: no units in this file; such an amount is in the reference unit of its flow, which a separate flow dataset defines
copyright: false
licenseType: Free of charge for all users and uses

## General comment
本工艺制造的箱式变压器用于风电场的风力涡轮发电系统中。这些变压器专门设计用于处理1.5兆瓦（MW）风力涡轮机的功率需求，使它们适用于大型风力发电项目，如文献中参考的内蒙古的风电场。这些变压器对于将风力涡轮机的电气输出转换为适合电网的电压至关重要。

## Geography
风电功率参数的数据来自Wang ( 2012 )。以装有33台国产1.5兆瓦( MW )风电机组的风电场为案例，分析其环境影响及其替代效应。该风电场位于我国风电装机最多的省份- -内蒙古东北部。

## Reference product
- Transformer: 30; article inperiodical

## Inputs
- copper: 78000; article inperiodical
- iron: 312000; article inperiodical
  Steel and iron

## Deviations from the LCI method approaches
风电的生命周期清单如下所示。生产制造阶段包括风电机组、变电站、电缆的生产，这些设备消耗大量能源，排放污染物( Xue et al . , 2015)。

## Use advice
在使用风电系统生命周期评估数据集时，用户应考虑与制造30个箱式变压器相关的特定环境影响。评估应包括变压器生产过程中的能源消耗和排放，同时考虑内蒙古特有的能源结构和环境政策。还应评估替代效应，以了解风电对传统能源来源的替代。这些方法论方面对于准确描述风力发电基础设施的环境效益和影响至关重要。

## Review details
清单： 内部审查通过几个迭代步骤完成，涉及原始数据验证、原始数据记录、代表性、完整性、与 ISO 14040 和 14044 有关的建模的一致性。

## Data sources
- Li, H., Jiang, H.-D., Dong, K.-Y., Wei, Y.-M. & Liao, H. A comparative analysis of the life cycle environmental emissions from wind and coal power: Evidence from China. Journal of Cleaner Production 248, 119192 (2020).
