# Electricity production ; Electricity ; Thermal power (96.1%) + hydropower (2.2%) + wind power (0.7%) + solar power (1.1%)

Dataset: ILCD process, Partly terminated system
Geography: BJ-CN
Reference year: 2019
Classification: Energy carriers and technologies / Electricity
LCI method principle: Other
Generated by: Ruoxi Xiong, xiongrx0126@163.com
Owner: Tiangong LCI Data Working Group
Review: Dependent internal review by Tiangong LCI Data Working Group
Amounts: no units in this file; such an amount is in the reference unit of its flow, which a separate flow dataset defines
copyright: false
licenseType: Free of charge for all users and uses

## General comment
Forms of electricity generation include thermal power, hydropower, wind power and solar power

## Time period
Calculated based on data from the 2019 Energy Statistics Yearbook

## Technical purpose
This dataset represents various forms of electricity generation: thermal power, hydropower, wind power, and solar power, which can be used in grid distribution for residential, commercial, and industrial applications. Specifically, the majority of the electricity, generated mainly through thermal power, is likely used in high-demand scenarios such as industrial manufacturing processes, while the renewable sources (hydropower, wind power, and solar power) could be employed for both on-grid and off-grid sustainable energy solutions.

## Reference product
- Electricity: 3.6; calculated

## Outputs
- carbon dioxide: 0.345; calculated
- sulfur dioxide: 2e-5; calculated
- Nitrogen oxides: 3.6e-5; calculated
- Dust (unspecified, from stack): 8e-6; calculated

## Data treatment and extrapolations
For the accounting method, please refer to the "Enterprise Greenhouse Gas Emissions Accounting Methods and Reporting Guidelines for Power Generation Facilities". Different forms of power generation and fuel consumption come from Chapter 3 (Energy Production) and Chapter 6 (Regional Energy Balance Sheet) in the "China Energy Statistical Yearbook 2020". The fuel parameters such as low calorific value and carbon content per unit calorific value used to calculate the carbon dioxide emission factor come from the "2019 China Regional Power Grid Carbon Dioxide Baseline Emission Factor Calculation Instructions OM" and the "Enterprise Greenhouse Gas Emission Accounting Method and Reporting Guide for Power Generation Facilities" 》

## Use advice
When using this dataset for Life Cycle Assessment, it is important to consider the carbon emission factor tied to the form of electricity generation, calculated using authoritative sources such as the 2019 Energy Statistics Yearbook. The dataset should be used in conjunction with the guidelines outlined in the 'Enterprise Greenhouse Gas Emissions Accounting Methods and Reporting Guidelines for Power Generation Facilities'. Attention must be given to the specific mix of power generation when modeling the use phase to reflect the appropriate environmental impact, and the methodology should account for regional variations in energy production and fuel use outlined in the provided references.

## Review details
Inventory: The internal review was done by several iteration steps concerning raw data validation, raw data documentation, representativity, completeness and consistency of modelling with regard to ISO 14040 and 14044.

## Data sources
- 熊若熙. 中国电力生产和消费二氧化碳与污染物排放因子核算. (清华大学, 2023).
