# Polyester and cotton production|Polyester and cotton|Final disposal

Dataset: ILCD process, Unit process, single operation
Geography: CN
Reference year: 2018
Classification: Materials production / Other mineralic materials
Generated by: Yingfan Duan, 1300925579@qq.com
Review: Dependent internal review by Tiangong LCI Data Working Group
Amounts: no units in this file; such an amount is in the reference unit of its flow, which a separate flow dataset defines
copyright: false

## Outputs
All rows: article inperiodical
- carbon dioxide: 421
- sulfur dioxide: 0.7
- Nitrogen oxides: 0.4
- methane: 13.2
- mercury: 0.4

## Review details
Inventory: The internal review was done by several iteration steps concerning raw data validation, raw data documentation, representativity, completeness and consistency of modelling with regard to ISO 14040 and 14044.

## Data sources
- 康宏. 基于LCA的棉印染生产过程改进设计研究. (大连理工大学, 2018).
