# 铝箔生产 ; 电池铝箔 ; 摇篮

Dataset: ILCD process, Unit process, black box
Geography: AH-CN
Reference year: 2019
Classification: Unit processes / Materials production / Metals and semimetals
Generated by: 谢金良, jinliang.research@gmail.com
Owner: 天工LCI数据工作小组
Review: Dependent internal review by 天工LCI数据工作小组
Amounts: no units in this file; such an amount is in the reference unit of its flow, which a separate flow dataset defines
copyright: false
licenseType: Free of charge for all users and uses

## General comment
该数据集描述了专门用于电池的铝箔的制造过程。所生产的铝箔适用于各种类型的电池，包括在便携电子设备、电动汽车和可再生能源存储系统中常用的锂离子电池。

## Time period
论文发表年

## Reference product
- aluminum foil: 1; measured
  Aluminum foil

## Inputs
- transport, freight, lorry 16-32 metric ton, unregulated: 0.209; measured
  Lorry, 30t
- electricity, high voltage, aluminium industry: 2.6172; measured
  Electricity
- aluminium: 1.11; measured
  Aluminum，居然没有flow？
- Lubricating oil,Lubricating Oil: 0.0267; measured
  Lubricant oil

## Outputs
- non-methane volatile organic compounds: 0.00044; measured
  NMVOC
- chemical oxygen demand: 7.9e-5; measured
  COD

## Use advice
在使用此数据集进行生命周期评估时，应注意数据的范围是从“摇篮”（即从原材料提取到电池铝箔生产）。用户应基于他们的具体应用来估算随后的生命周期阶段，如分销、使用阶段和生命周期末端管理。该数据集是一个单元过程（黑箱），定义为发表该研究的论文发表年。如果自发表日期以来有更新的生产技术或方法论，请确保调整您的LCA模型。

## Review details
清单： 内部审查通过几个迭代步骤完成，涉及原始数据验证、原始数据记录、代表性、完整性、与 ISO 14040 和 14044 有关的建模的一致性。

## Data sources
- Yin, R., Hu, S. & Yang, Y. Life cycle inventories of the commonly used materials for lithium-ion batteries in China. J. Clean. Prod. 227, 960–971 (2019).
