# 修复后土壤;土壤修复;原位修复;生物修复;增强还原脱氯

Dataset: ILCD process, Unit process, black box
Geography: DK
Reference year: 2010
Classification: Unit processes / Other Services / Repair and maintenance
Functional unit: The functional unit provided by all options compared in this study is the treatment of the 700 m3 of contaminated soil with a 98% removal of the contaminant mass within this volume. The estimated mass of TCE in the ap proximately 700 m3 of contaminated soil is 40 kg.
Generated by: 杨欣桐, yangxt@caep.org.cn
Owner: 天工LCI数据工作小组
Review: Dependent internal review by 天工LCI数据工作小组
Amounts: no units in this file; such an amount is in the reference unit of its flow, which a separate flow dataset defines
copyright: false
licenseType: Free of charge for all users and uses

## General comment
增强还原脱氯（ERD）旨在通过注射含有特定降解生物和可发酵基质的生物培养物，来实现厌氧还原脱氯过程中微生物降解能力的强化。依次将三氯乙烯（TCE）降解为顺式二氯乙烯（顺式DCE）、氯乙烯（VC），最后降解为乙烯/乙烷。

## Geography
哥本哈根市中心的一个TCE污染场地位于供水集水区内

## Technology and included processes
增强还原脱氯（ERD）旨在通过厌氧还原脱氯途径增强微生物降解，依次将三氯乙烯（TCE）降解为顺式二氯乙烯（顺式DCE）、氯乙烯（VC），最后降解为乙烯/乙烷。通过注射含有特定降解生物和可发酵基质的生物培养物来实现增强。

## Technical purpose
所描述的土壤修复过程旨在通过增强还原脱氯（ERD）技术，处理在供水集水区内受三氯乙烯（TCE）污染的土壤。该技术用于原位处理，将TCE降解为毒性较低的化合物，如顺式二氯乙烯（顺式DCE）、氯乙烯（VC），以及最终的乙烯/乙烷。该技术适用于旨在减少土壤中氯化溶剂污染的环境修复项目，特别是在封闭和提取操作不切实际或不受欢迎的地区。

## Reference product
- Remediated soil: 700; measured

## Inputs
All rows: measured
- bentonite: 456
  Installation—6 monitoring wells in upper aquifer (5 m deep); Bentonite use per well in upper aquifer (4.5 m depth, Ø150 mm, density 950 kg/m3): 76 kg
- sand: 198
  Installation—6 monitoring wells in upper aquifer (5 m deep); Screen sand use per well in upper aquifer (1.5 m screen): 33 kg
- Steel: 30
  Installation—6 monitoring wells in upper aquifer (5 m deep); Steel use per well cover plate: 5 kg
- bentonite: 444
  Installation—4 monitoring wells in regional aquifer (10meter deep); Bentonite use per well in regional aquifer (8 m depth, Ø150 mm, density 950 kg/m3): 111 kg
- sand: 176
  Installation—4 monitoring wells in regional aquifer (10meter deep); Screen sand use per well in regional aquifer (2 m screen): 44 kg
- Steel: 20
  Installation—4 monitoring wells in regional aquifer (10meter deep); Steel use per well cover plate: 5 kg
- Road Transport,Road Transport: 450000, 3.15e6, 4.68e6 (3 entries)
  Distance of round trip for consultants for supervision and monitoring is set to 90 km based on the actual distance between the site and the consultant.
- White Granulated Sugar: 5000
  5000 kg sugar canemolasses transported by ship from Brazil
- Biological Medium: 6700
  6700 kg bioculture by truck from the Netherlands
- Electricity: 28944
  Bioculture production: 1.2 kWh per liter of culture. Density of bioculture: 1 kg/L
- Groundwater sample and TVOC analysis: 232
  Monitoring
- Soil Sample: 50
  Monitoring
- Electricity: 576.288
  Estimated electricity use for groundwater sampling (0.65 kw, 0.6 h): 0.39 kWh/per screen
- Diesel,Diesel: 0.35
  Geoprobe diesel use for injection: 10 L/day . (with injections at 25 cm intervals from 3-8 meters below surface).5 days per injection round, 7 injection rounds
- contaminated soil: 700

## Use advice
在使用该数据集进行生命周期评估时，必须确保研究的功能单元与定义的处理体积和污染物质量去除率相匹配。数据专门适用于700立方米三氯乙烯（TCE）受污染土壤的98％效率处理。用户必须在计算中包括原材料的采购、材料生产、使用阶段和报废过程的所有相关阶段。如果应用于不同的污染物浓度或体积，则需要进行调整。该方法还取决于特定降解生物和适合的可发酵基质的存在；因此，在应用中必须满足这些条件。

## Review details
清单： 内部审查通过几个迭代步骤完成，涉及原始数据验证、原始数据记录、代表性、完整性、与 ISO 14040 和 14044 有关的建模的一致性。

## Data sources
- Gitte L ,Z M H ,Julie C , et al. Environmental impacts of remediation of a trichloroethene-contaminated site: life cycle assessment of remediation alternatives. Environmental science & technology, 2010, 44 (23): 9163-9.
