# refined copper production|Refined copper|copper pyrometallurgy|copper ore

Dataset: ILCD process, Unit process, single operation
Geography: CN
Reference year: 2011
Classification: Materials production / Other mineralic materials
Functional unit: The function unit is defined as 1000kg of refined copper.
LCI method principle: Attributional
Generated by: Peng Wang, 2867919560@qq.com
Review: Dependent internal review by Tiangong LCI Data Working Group
Amounts: no units in this file; such an amount is in the reference unit of its flow, which a separate flow dataset defines
copyright: false

## Geography
the background data of copper smelting come from China nonferrous metals industry yearbook 2011

## Reference product
- Refined copper: 1000; software or database
  需要补充refined copper

## Inputs
All rows: article inperiodical
- pyrite: 10
  Pyrite
- copper: 195000
  Copper ore
- Sandstone: 6040
  Sandstone需要补充
- iron: 389
  Iron ore
- Crude coal: 3780
  Crude coal需要补充
- crude oil; 42.3 MJ/kg: 573
  Crude oil
- natural gas; 44.1 MJ/kg: 0
  Natural gas

## Outputs
- carbon dioxide (fossil): 6720; software or database
  CO2
- carbon monoxide: 44.6; software or database
- non-methane volatile organic compounds: 8.57; software or database
- methane (fossil): 17.1; software or database
  CH4
- sulfur oxides: 47.6; software or database
  SO2
- nitrous oxide: 30.7; software or database
  NOX
- particles (PM2.5 - PM10): 1010; software or database
- chemical oxygen demand: 0; software or database
  COD需要补充
- cadmium: 0.00193; software or database
  Cd
- lead: 0.0103; software or database
- Waste liquid: 221000; article inperiodical
  Waste liquid需要补充
- Waste solid: 2280; article inperiodical
  Waste solid需要补充

## Deviations from the LCI method approaches
The impact potential was quantified by CML methodology.

## Data selection and combination
In terms of environmental data collection, the background data of copper smelting come from China nonferrous metals industry yearbook 2011The LCI of energy generation including power generation, coal and coke production were all derived from Sinocenter database . All of these data were calculated based on national statistical data which can reflect the average level of energy production in China. The data related to copper ore and limestone mining was also sited from Sinocenter database , while the inventories of sandstone mining were from Ecoinvent database

## Review details
Inventory: The internal review was done by several iteration steps concerning raw data validation, raw data documentation, representativity, completeness and consistency of modelling with regard to ISO 14040 and 14044.; Documentation: The review of the documentation was performed by Ecobilan and is in compliance with ISO 14040 and 14044. The data set documentation is correct in view of the appropriateness of the information provided. It includes all relevant information in view of data quality and scope of application of the respective LCI result.

## Data sources
- Wang, H. T. et al. Life Cycle Assessment of Metallic Copper Produced by the Pyrometallurgical Technology of China. MSF 814, 559–563 (2015).
