# cement production|cement, portland-composite cement|new dry process precalciner kiln, 4000 t/d|mixed solid wastes

Dataset: ILCD process, Unit process, black box
Geography: CN
Classification: Materials production / Other mineralic materials
Generated by: Siqi Yang
Amounts: no units in this file; such an amount is in the reference unit of its flow, which a separate flow dataset defines
copyright: false

## General comment
The new dry pre-decomposition cement production model is selected.

## Model description
The life cycle functional unit is defined as 1 ton of cement, and the system boundary of the cement industry includes cement production, raw material production and transportation, and electricity production, excluding cement use and disposal.
The auxiliary materials such as slag and fly ash will only be considered for their transportation and preparation processes, and their production processes will not be included in the analysis.

## Reference product
- cement, portland-composite cement: 1000
  Composite silicate cement

## Inputs
- limestone, crushed, for mill: 848.37; calculated
  Limestone
- clay: 143.55; calculated
  Clay
- iron, powder: 26.04; calculated
  Iron powder
- gypsum (desulphurized): 50; estimated
  Gypsum. The standard values of GB-175-2007 General Portland Cement in China are used for each component of the cement.
- granulated blast furnace slag: 100
  blast furnace slag. Each general-purpose cement component uses China GB-175-2007 general-purpose silicate cement standard value.
- ash: 200; estimated
  Fly ash. Each general-purpose cement component uses China GB-175-2007 general-purpose silicate cement standard value.
- hard coal, run-of-mine: 68.4; estimated
  Coal. The statistical values of Chinese production lines are used, and the standard coal consumption for large and medium-sized precalciner kilns is 114 kg/t clinker. The coal consumption can also be calculated based on the chemical composition of coal ash and the industrial analysis values of coal.
- electricity, medium voltage: 354.06
  Electricity consumption. The average level of domestic electricity consumption in China is used. For dry-process cement production lines, the electricity consumption for milling operations accounts for more than 60% of the total electricity consumption, with raw material milling accounting for about 30% and cement milling accounting for about 40%. Due to limited data on raw material mining, a simplified treatment is adopted for various raw materials, and the electricity consumption data of 13.89 kWh/t raw materials are used. For different types of blended cement, the electricity consumption for milling different raw materials varies due to differences in their shapes and properties. The estimation is based on the percentage of electricity consumption for milling raw materials in the United States.

## Outputs
- carbon dioxide: 604
  CO2. The CO2 emissions during the cement production stage come from two parts: one is the decomposition of calcium carbonate and magnesium carbonate in the raw materials during the calcination process, and the other is the release of CO2 from coal combustion as fuel. The formulas for CO2 emissions from raw materials are: CaCO3→CaO+CO2; MgCO3→MgO+CO2. The emission factor for CO2 from coal combustion is based on the carbon emission coefficient from the Chinese Academy of Engineering, which is 2.4933 kg CO2 per kg of standard coal.
- sulfur dioxide: 0.372
  SO2. The emission of SO2 is based on the results of the first national survey of pollution sources in the Chinese cement industry (SO2 0.066kg/t clinker).
- Nitrogen oxides: 1.92
  NOx. The emission of NOx is based on the results of the first national survey of pollution sources in the Chinese cement industry (NOx 1.584kg/t clinker).
- particles (> PM10): 0.341
  Dust, with an unspecified particle size, is treated as PM > 10 micrometers in diameter. The emissions of dust during cement production are based on the upper limit values of the Chinese cement industry atmospheric pollutant emission standards. According to the dust emission concentration from different equipment in cement production, the dust emission quantity from each production stage can be calculated. Among them, the dust emission from raw material grinding accounts for approximately 55% of the total, cement grinding accounts for about 20%, coal preparation stage accounts for 13%, and clinker calcination process accounts for 12%.
- chemical oxygen demand: 0.0102
  COD. The emission of COD is based on the results of the first national survey of pollution sources in the Chinese cement industry (COD 0.06g/t clinker).
- Oils, unspecified: 0.261
  Oil
- methane: 0.733
  Methane
- mercury: 0.00793
  Mercury

## Deviations from the LCI method approaches
Using GaBi4 professional life cycle assessment software, a life cycle model will be established to conduct a life cycle assessment of cement. GaBi4 software will be utilized to divide the entire life cycle of cement into five major modules, with each module being a plan model. Each plan model will include data inputs for various stages of cement production.

## Cut-off and completeness
Only the transport and preparation process of industrial waste is considered, and the environmental impact of the production of industrial waste is borne by the producer who generated it.

## Data selection and combination
The emission data for pollutants from limestone and gypsum extraction are obtained from the China Life Cycle Database (CLCD). Due to the lack of data for clay and iron ore extraction, and their relatively low extraction quantities, the emission data from limestone extraction are used as an estimate. The emission data for coal mining are obtained from the original coal extraction data in the China Life Cycle Database (CLCD).
The emission data for electricity production are based on the national average grid electricity mix and transmission data in the China Life Cycle Database (CLCD).
The transportation stage considers the transportation of all raw materials required for cement production, including limestone, clay, iron powder, gypsum, coal, and industrial waste. For ease of calculation, a 10-ton diesel truck on the highway with an average distance of 100 km is used as an example. The emission data for pollutants from a 10-ton diesel truck are obtained from the China Life Cycle Database (CLCD).

## Data sources
- 徐小宁. (2013). 中国水泥工业的生命周期评价 [硕士, 大连理工大学].
