# Soil remediation ; In-situ remediation ; Multi-phase extraction ; Construction preparation ; Well drilling

Dataset: ILCD process, Unit process, single operation
Geography: KR
Reference year: 2011
Classification: Other Services / Repair and maintenance
Generated by: Zhang Jianbin, zhangjb@caep.org.cn
Owner: Tiangong LCI Data Working Group
Review: Dependent internal review by Tiangong LCI Data Working Group
Amounts: no units in this file; such an amount is in the reference unit of its flow, which a separate flow dataset defines
copyright: false
licenseType: Free of charge for all users and uses

## General comment
3 wells

## Technology and included processes
PVC 45 kg Sand 0.3 m3 , Bentonite 211 kg - Mortar 2,291 kg - drilling equipment diesel 11 L

## Technical purpose
This data set describes a soil remediation process known as in-situ multi-phase extraction which involves the construction of extraction wells. This process is specifically used to remove contamination from soil onsite without excavation. It is applicable in environmental engineering fields for cleaning up contaminated land, often as part of environmental remediation projects or soil conservation efforts.

## Reference product
- diesel: 0.011; input; missing unimportant

## Inputs
- waste incineration of plastics (rigid PVC): 45; missing unimportant
- sand: 0.3; missing unimportant
- bentonite: 211; missing unimportant
- Mortar: 2291; missing unimportant

## Outputs
- Extraction wel: 3; missing unimportant
  3 wells

## Use advice
When using this data set, include all listed components and their amounts in the Life Cycle Assessment. This means accounting for 45 kg of PVC, 0.3 cubic meters of sand, 211 kg of bentonite, 2,291 kg of mortar, and 11 liters of diesel fuel for the drilling equipment. Special attention should be given to the system boundaries to ensure that the use phase and end-of-life phase are defined according to the specific scenario this data is applied to. This includes, but is not limited to, the consideration of possible emissions during the extraction process, energy use, and the management of recovered materials.

## Review details
Inventory: The internal review was done by several iteration steps concerning raw data validation, raw data documentation, representativity, completeness and consistency of modelling with regard to ISO 14040 and 14044.

## Data sources
- Seung-Woo Jeong, Sangwon Suh. Assessment of Environmental Impacts and CO2 Emissions from Soil Remediation Technologies using Life Cycle Assessment - Case Studies on SVE and Biopile Systems -. 大韓環境工學會誌
