# 水泥生产;水泥, 硅酸盐水泥, 42.5MPa;立窑

Dataset: ILCD process, Unit process, black box
Geography: HLJ-CN
Reference year: 2008
Classification: Materials production / Other mineralic materials
Generated by: 杨思琪, ysqsophia@gmail.com
Owner: 天工LCI数据工作小组
Review: Dependent internal review by 天工LCI数据工作小组
Amounts: no units in this file; such an amount is in the reference unit of its flow, which a separate flow dataset defines
copyright: false
licenseType: Free of charge for all users and uses

## General comment
立窑生产硅酸盐水泥。对黑龙江省水泥工业目前所具备的立窑工艺的工艺流程和工业运行参数进行研究，收集了所确定产品系统的输入、输出数据，并对数据进行了计算、量化。

## Technical purpose
本硅酸盐水泥产品具有28天压强42.5MPa的特性，适用于要求较高结构完整性的普通建筑、基础设施、建筑和土木工程项目。其使用立窑的生产工艺适用于黑龙江省目前水泥工业的技术能力范围。

## Model description
以1kg28天抗压强度为42.5MPa的水泥所具有的使用性能作为功能单位，即1Fu=42.5kgMPa。评价范围为生料准备、熟料煅烧和水泥制备。粘土类资源消耗造成的环境负荷暂不考虑。铁粉属于铁质校正材料，其引发的环境影响不予考虑。产品系统输出端考虑排放的废弃物主要包括氮氧化物、二氧化硫、二氧化碳及粉尘。

## Reference product
- cement, portland cement, 42.5MPa: 1000
  1kg42.5强度等级的硅酸盐水泥

## Inputs
- limestone, crushed, for mill: 1137.5
  石灰石
- gypsum stone (CaSO4-dihydrate): 59.3
  石膏
- hard coal: 204.82
  标准煤。原始数据为0.1903kg标准煤，这里换算为硬煤，换算公式为1kg硬煤=0.929kg标准煤。
- electricity, medium voltage: 357.48
  电力

## Outputs
- particles (> PM10): 0.64
  粉尘，未标明粒径，按PM>10处理。
- sulfur dioxide: 0.4662
  二氧化硫
- Nitrogen oxides: 1.602
  氮氧化物
- carbon dioxide: 1092.8
  二氧化碳。

## Use advice
当使用这份数据集进行生命周期评价时，分析者应以1kg具有42.5MPa 28天抗压强度的水泥为功能单位。用户应在影响评估中包括氮氧化物、二氧化硫、二氧化碳和粉尘等排放物质。目前阶段，来源于粘土类资源消耗和作为校正材料使用的铁粉的环境影响应从分析中省略。方法学范围包括生料准备、熟料煅烧和水泥生产，而且用户应仔细考量与该地区工业特定的立窑技术的适用性。

## Review details
清单： 内部审查通过几个迭代步骤完成，涉及原始数据验证、原始数据记录、代表性、完整性、与 ISO 14040 和 14044 有关的建模的一致性。

## Data sources
- 于淼. (2008). 黑龙江水泥工业可持续发展研究 [硕士, 哈尔滨工业大学].
