# 铜箔生产;铜箔;润滑油、铜、硫酸

Dataset: ILCD process, Unit process, single operation
Geography: AH-CN
Classification: Materials production / Metals and semimetals
Functional unit: Produce 1kg of copper foil
LCI method principle: Attributional
Generated by: 陈鑫, xinchen@mail.nankai.edu.cn
Owner: 天工LCI数据工作小组
Review: Dependent internal review by 天工LCI数据工作小组
Amounts: no units in this file; such an amount is in the reference unit of its flow, which a separate flow dataset defines
copyright: false
licenseType: Free of charge for all users and uses

## General comment
生产过程涉及熔炼、铸锭、退火、成分分析、清洗、后处理等工艺

## Geography
安徽众源新材料股份有限公司

## Technical purpose
安徽众源新材料股份有限公司生产的铜箔被用于多种应用，包括印刷电路板（PCB）、电磁屏蔽和电子设备中的热传导通路。铜箔的高精度和纯度使其适用于需要可靠导电性和耐久性的先进电子组件。

## Reference product
- copper foil: 1
  数据来源于安徽众源新材料股份有限公司环境影响评价报告

## Inputs
- copper(99%): 1
  数据来源于安徽众源新材料股份有限公司环境影响评价报告
- lubricating oil: 1
  数据来源于安徽众源新材料股份有限公司环境影响评价报告
- Sulfuric acid: 0.0003
  数据来源于安徽众源新材料股份有限公司环境影响评价报告
- Electricity: 0.0011988
  数据来源于安徽众源新材料股份有限公司环境影响评价报告
- transport in t*km: 0.184
  数据来源于安徽众源新材料股份有限公司环境影响评价报告

## Outputs
- chemical oxygen demand: 6.73e-5
  数据来源于安徽众源新材料股份有限公司环境影响评价
- biological oxygen demand: 1.83e-5
  数据来源于安徽众源新材料股份有限公司环境影响评价
- ammonium: 3e-6
  数据来源于安徽众源新材料股份有限公司环境影响评价
- Suspended solids, unspecified: 5.45e-5
  数据来源于安徽众源新材料股份有限公司环境影响评价

## Data selection and combination
数据来源于环境影响评价报告

## Use advice
在使用该数据集进行生命周期评估时，需要考虑铜箔应用的具体场景。用户应考虑产品寿命末期铜箔可能的回收，并根据铜箔实际集成的电子设备来模拟使用阶段的行为。还建议反映铜生产的地区差异对环境影响，并确保环境绩效评估报告数据与安徽众源新材料股份有限公司的具体技术实践相一致。

## Review details
清单： 内部审查通过几个迭代步骤完成，涉及原始数据验证、原始数据记录、代表性、完整性、与 ISO 14040 和 14044 有关的建模的一致性。

## Data sources
- Yin, R., Hu, S. & Yang, Y. Life cycle inventories of the commonly used materials for lithium-ion batteries in China. Journal of Cleaner Production227, 960–971 (2019).
