# 稀土氧化物开采;稀土氧化物;氟碳铈矿路线;含稀土元素矿石

Dataset: ILCD process, Unit process, single operation
Geography: CN
Reference year: 2007
Valid until: 2020
Classification: Unit processes / Materials production / Non-energetic raw materials
Functional unit: The study considered 15 different functional units corresponding to different RE metals. The assessment included three main RE production sites in China: REO production in Bayan Obo, Sichuan, and IACs. Primary data were collected for foreground production processes from Chinese and further international scientific literature, industry reports, government and industry surveys. The authors assumed a baseline for aqueous and gaseous emissions using national discharge standards for industry from the Chinese Ministry of
LCI method principle: Attributional
LCI method approaches: Allocation
Generated by: 汪涛, twang@iue.ac.cn
Owner: 天工LCI数据工作小组
Review: Dependent internal review by 天工LCI数据工作小组
Amounts: no units in this file; such an amount is in the reference unit of its flow, which a separate flow dataset defines
copyright: false
licenseType: Free of charge for all users and uses

## General comment
此描述的稀土氧化物(REO)开采过程旨在从位于中国南方省份白云鄂博地区含氟碳铈矿的矿石中提取稀土氧化物。该过程的产出是电子、可再生能源技术和航空航天工程等高科技行业中的关键资源。具体来说，提取的稀土元素是制造永磁体、电池、催化剂和荧光粉等产品的关键组件。

## Geography
白云鄂博, 中国南方省份

## Technology and included processes
由于没有白云鄂博的初级采矿数据，研究中的生命周期清单数据（Sprecher、Arshi、Marx、Bailey（Classen 等人，2007 年））基于不同的数据源，要么来自铁矿开采，要么来自 Althaus 的磷矿开采。主要投入是能源和爆破剂

## Reference product
- Primary energy: 56.1; input; calculated

## Inputs
- blasting: 12.75; calculated
  Blasting agent

## Outputs
- particles (PM10): 0.1; calculated

## Deviations from the LCI method approaches
Goal of this chapter is to identify the most important differences and uncertainties of crucial parameters in the LCIs and to link those directly to the affected LCIAs. However, comparability of LCIA results shown in Fig. 4 is limited due to different LCIA methods, as already mentioned in the chapter “methods”. All LCIA results are shown in Tables S1 and S3 (Supplementary material). It should also be mentioned that we calculated Althaus' LCIA data, as he provided only the LCI in the ecoinvent database. For this, we rebuilt Althaus' original process “rare earth oxide production from bastnasite” in the GaBi software and evaluated it with two LCIA methods for comparison (Table S1).

## Use advice
此生命周期清单(LCI)数据的用户应考虑比较LCIA结果时突出的方法学变化和不确定性。建议在使用此数据集进行比较目的时应用一致的LCIA方法。在使用前，用户应确认水和气体排放的假设基线是否与当前标准一致。此数据集改编自铁矿和磷矿数据源；因此，用户在将数据应用于特定稀土开采环境时必须考虑固有差异。

## Review details
清单： 内部审查通过几个迭代步骤完成，涉及原始数据验证、原始数据记录、代表性、完整性、与 ISO 14040 和 14044 有关的建模的一致性。

## Data sources
- Schreiber, A., Marx, J. & Zapp, P. Life Cycle Assessment studies of rare earths production - Findings from a systematic review. Science of The Total Environment 791, 148257 (2021).
