# 轮胎生产;混合化合物;切割和成型;纤维织物，钢织物

Dataset: ILCD process, Unit process, single operation
Geography: CN
Reference year: 2014
Classification: Unit processes / Materials production / Non-energetic raw materials
Generated by: Cui, di, 2806553850@qq.com
Owner: 天工LCI数据工作小组
Review: Dependent internal review by 天工LCI数据工作小组
Amounts: no units in this file; such an amount is in the reference unit of its flow, which a separate flow dataset defines
copyright: false
licenseType: Free of charge for all users and uses

## General comment
生产阶段相当复杂，包括复合共混、轧制、挤出、包环生产、切割成型、硫化和测试等工艺。我们将密切相关的流程与避免分配。确定了以下四种主要生产工艺：复合共混、轧制和挤出，切割成型，硫化成型。

## Time period
”评估中使用了中国最大的轮胎公司之一在2014年现场收集的数据“。文章中已说明数据调研与2014年，但没有具体时间，所以该时间定位2014年1月1日。

## Technical purpose
该生命周期评估数据集详细说明了工业领域轮胎生产的复杂过程。此数据特别适用于含有复合共混、轧制和挤出、切割成型、硫化和测试等制造实践的生产过程。这些过程是生产配备有纤维和钢织物的汽车车辆轮胎的不可或缺的部分。这些流程产出的产品在汽车工业中得到广泛应用，为各种车辆提供重要的性能和安全特性。

## Reference product
- Tire: 9.497; measured

## Inputs
- Electricity: 1.7; measured
- steam: 0.39; measured

## Outputs
- Waste wire cord fabric,Waste steel wire: 0.015, 0.003 (2 entries); measured
- Waste rubber,Waste fiber fabric: 0.02; measured

## Data selection and combination
调查轮胎产品中使用的原材料数据来源于中国最大轮胎公司之一的现场调查。这些数据是在2014年目标轮胎产品制造期间收集的。还考虑了其他材料，如活性粘土、氧化锌、硬脂酸、加工剂和润滑油。这些其他材料的生命周期背景数据来自Ecoinvent 3.0的全球平均LCI数据

## Use advice
在使用此生命周期评估数据时，用户需注意该数据集表示与轮胎生产密切相关的流程，因此通过结合相关程序避免了分摊。提供的数据由中国主要轮胎制造商于2014年现场收集，并且仅涉及当年的活动。如活性粘土、氧化锌、硬脂酸、加工剂和润滑油等次要材料的背景数据来源于Ecoinvent 3.0全球平均LCI数据集。重要的是，用户不应在不进行技术变化和市场变动适当调整的情况下，将此数据集外推至其他时间周期。

## Review details
清单： 内部审查通过几个迭代步骤完成，涉及原始数据验证、原始数据记录、代表性、完整性、与 ISO 14040 和 14044 有关的建模的一致性。

## Data sources
- Sun X, Liu J, Hong J, et al. Life cycle assessment of Chinese radial passenger vehicle tire[J]. The International Journal of Life Cycle Assessment, 2016, 21: 1749-1758.
