# LFP湿法回收

Dataset: ILCD process, Unit process, single operation
Geography: CN
Reference year: 2020
Classification: Unit processes / End-of-life treatment / Material recycling
Functional unit: The product systems evaluated in this study are EB batteries. The service provided by these batteries is the distance driven; thus, the functional unit in this study is defined as an overall 100-km driving distance of a typical EB driven by a group of batteries (4 × 12 V, 20 Ah). According to the data of EB manufacturers, LFP, and NCM batteries can support a typical EB to travel for approximately 45 km and 50 km with one charge, the calculated lifetime distance is of 36, 000 km, and 30,000 km, respectively.
Generated by: 马清源, m1120498928@163.com
Owner: 天工LCI数据工作小组
Review: Dependent internal review by 天工LCI数据工作小组
Amounts: no units in this file; such an amount is in the reference unit of its flow, which a separate flow dataset defines
copyright: false
licenseType: Free of charge for all users and uses

## General comment
LFP电池的主流回收工艺是通过湿法冶金工艺回收碳酸锂和磷酸铁（盐酸浸出过氧化氢氧化苏打灰调节pH）

## Technical purpose
所描述的LFP（磷酸锂铁）湿法回收工艺用于回收碳酸锂和磷酸铁，这些是生产LFP电池的关键材料。这些LFP电池被设计用来为电动自行车（EB）供电。提及的LFP和NCM（镍钴锰）电池为EB操作提供必要的能量，对于LFP和NCM电池，典型单位每充电一次的行驶距离分别为45公里和50公里。

## Reference product
- Lithium carbonate: 0.508; measured

## Inputs
All rows: measured
- Hydrochloric acid (30%): 7.92
- Sodium hydroxide（30%）: 5.83
- Hydrogen peroxide (30%): 1.32
- Sodium carbonate: 1.21
- magnesium chloride: 0.008
- potassium chloride: 0.00085
- sodium chloride: 0.00099
- Coke: 0.005
- carbon: 0.0002
  活性炭
- Heavy oil: 0.04
- silicon: 0.042
- Light gas oil: 0.025
- process steam: 0.143
  蒸汽（煤转化）
- Water for industrial use: 2.2
- Electricity: 0.0576

## Outputs
All rows: measured
- Ferric pyrophosphate: 3.3
- Secondary Aluminum: 2.708
- Secondary copper: 0.809
- Separator scrap: 0.352
  废隔膜
- Waste Graphite: 0.004
- hydrogen chloride: 0.000616
- Total particulate matter: 0.00019
- sulfur dioxide: 1e-5
- nitrogen monoxide: 3.8e-5
- 2,3,7,8-tetrachlorodibenzo-p-dioxin: 1.41e-14
- fluorine: 7.06e-8
- chemical oxygen demand: 0.0049
- Ammonia Nitrogen: 4.05e-8
- copper: 8.18e-7
- lithium: 0.000458
- zinc: 8.18e-7

## Data selection and combination
NCM和LFP电池的生命周期清单是根据2018年至2019年的调查数据建立的，代表了锂离子电池技术的现状。

## Sampling procedure
电池回收的LCI是根据中国几家电池回收商的调查数据建立的，包括春星、宇光金铅（用于LAB）、GEM和Brump（用于LIB）。假设从废电池收集点到电池回收厂的距离为100公里。

## Use advice
所提供的LCA数据集代表了2018-2019年间锂离子电池的技术状况，应考虑此后任何技术进步。用户需注意，数据特定于提到的中国电池回收商的回收过程和实践。包括的假设，如废弃物收集到回收设施的100公里运输距离，若将数据用于不同的地理或物流场景，则应进行相应调整。此外，在评估EB电池的环境影响时，至关重要的是要根据所提供的LFP和NCM电池的预期使用寿命来模拟使用阶段的行为。

## Review details
清单： 内部审查通过几个迭代步骤完成，涉及原始数据验证、原始数据记录、代表性、完整性、与 ISO 14040 和 14044 有关的建模的一致性。

## Data sources
- Liu, W., Liu, H., Liu, W. & Cui, Z. Life cycle assessment of power batteries used in electric bicycles in China. RENEWABLE & SUSTAINABLE ENERGY REVIEWS 139, (2021).
