# 氢氧化锂生产 ; 电池级单水氢氧化锂 ; 硫酸锂法 ; 加拿大锂辉石精矿

Dataset: ILCD process, Unit process, single operation
Geography: CA
Reference year: 2013
Classification: Unit processes / Materials production / Inorganic chemicals
Generated by: 孙鑫, xs389@cornell.edu
Owner: 天工LCI数据工作小组
Review: Dependent internal review by 天工LCI数据工作小组
Amounts: no units in this file; such an amount is in the reference unit of its flow, which a separate flow dataset defines
licenseType: Free of charge for all users and uses

## General comment
本研究审查的未来供应路线是基于从几家锂矿开采和加工公司（Lithium Americas Corp.、Minera Salar Blanco、Nemaska Lithium Inc.和Keliber Oy）的技术报告和环境影响评估报告中收集的数据，这些公司的锂资产正处于不同的开发阶段。这些锂资产正处于不同的开发阶段。预计在 5-10 年内投入运营。这些以卤水为基础的来源的锂浓度较低，也反映了当前供应路线中卤水的未来锂品位。

## Technology and included processes
加拿大 Whabouchi 矿区和芬兰中部 Ostrobothnia 地区的运营技术报告中描述了未来的闪锌矿供应路线。虽然加拿大和芬兰都不是锂储量最大的国家（美国地质调查局，2021 年），但它们代表了新锂供应的范例，可能会随着锂需求的增加而被开采。Whabouchi矿区的钠长石中平均锂浓度约为0.7%，而在中奥斯特罗布特尼亚地区则为0.6%。在这些未来的供应路线中，浓缩的磷灰石会直接转化为 LiOH⋅H2O，而不会产生 Li2CO3 作为中间产物。代表加拿大和芬兰采矿作业的数据集分别基于为内玛斯卡锂业公司（Golder Associates，2013 年；Laferri´ere 等人，2012 年；内玛斯卡锂业公司，2013 年；SENES 咨询有限公司，2013 年）和 Keliber Oy（Keliber Oy，2020a，b；Sweco，2016 年）编写的技术报告。在内玛斯卡锂业公司的报告中，没有关于锂OH⋅H2O 生产单元工艺（来自浓缩锂辉石）的化学品投入的具体数据。因此，在比较不同的锂供应时，Keliber Oy 报告中的化学品用量被用作替代数据。

## Technical purpose
该数据集涉及使用硫酸锂法生产的电池级单水氢氧化锂，其源自加拿大锂辉石精矿。这种高纯度化学品对于制造不同应用的锂离子电池至关重要，包括电动汽车、便携式电子设备和能源存储系统。

## Reference product
- Lithium Hydroxide Monohydrate: 1000; measured

## Inputs
All rows: measured
- Spodumene concentrate (7.6% Li2O): 5810
- Electricity: 43920, 5364 (2 entries)
- Natural gas, at consumer EU-27: 42500, 20700 (2 entries)
- sodium hydroxide: 112, 1120 (2 entries)
- sodium carbonate: 1580, 1580 (2 entries)
- hydrogen chloride: 72, 72 (2 entries)
- Calcium carbonate (> 63 microns): 1820, 1820 (2 entries)
- freshwater,freshwater: 76.9, 74.9 (2 entries)

## Use advice
使用此数据集时，用户必须注意，原材料的生产流程和少于1%的能源流未包括在此数据集中。因此，当可以合理地省略这些小规模流时，此数据集适合于生命周期评估研究。在将此数据集与未作此类排除的其他数据集进行比较时应谨慎，因为这可能会导致低估与这些小规模输入相关的环境影响或资源使用。

## Review details
清单： 内部审查通过几个迭代步骤完成，涉及原始数据验证、原始数据记录、代表性、完整性、与 ISO 14040 和 14044 有关的建模的一致性。

## Data sources
- Chordia, M., Wickerts, S., Nordelöf, A. & Arvidsson, R. Life cycle environmental impacts of current and future battery-grade lithium supply from brine and spodumene. Resources, Conservation and Recycling 187, 106634 (2022).
