# 石灰;石灰生产;农田土壤;原位稳定化

Dataset: ILCD process, Unit process, black box
Geography: HZ-GD-CN
Reference year: 2021
Classification: Unit processes / Other Services / Repair and maintenance
Functional unit: Limestone undergoes processes such as crushing, screening, calcination, hydration, and grading to produce 800kg of lime.
Generated by: 杨欣桐, yangxt@caep.org.cn
Owner: 天工LCI数据工作小组
Review: Dependent internal review by 天工LCI数据工作小组
Amounts: no units in this file; such an amount is in the reference unit of its flow, which a separate flow dataset defines
copyright: false
licenseType: Free of charge for all users and uses

## General comment
石灰是一种以氧化钙为主要成分的气硬性无机胶凝材料。

## Geography
研究地点位于中国南方珠江三角洲惠州市龚庄镇，是一片受镉污染的稻田。

## Technology and included processes
石灰生产过程包括破碎和筛分、煅烧、水合和分级

## Technical purpose
石灰在多种应用场景中的应用包括农田土壤修复，特别是用于原位稳定化受镉（Cd）污染的田地。它还用于水处理、建筑及废物管理的中和剂等多种工业过程中。在中国南方珠江三角洲惠州市龚庄镇生产的石灰特别用于该地区受镉污染的稻田治理和稳定化。

## Reference product
- Lime,Lime: 800; measured
  由于我国南方有早稻和晚稻两个生长季节，修复剂的施用量为3000公斤/公顷，施用频率为每年2次。从2017年到2018年，每个场景的整个修复时间为2年。总施加剂量=3000kg/ha*0.07ha*2次/年*2年≈800kg

## Inputs
All rows: measured
- Limestone: 2500
- Tap Water: 320
- Electricity: 18
- natural gas,natural gas: 700
- Diesel,Diesel: 220

## Outputs
- carbon dioxide (fossil): 683; measured
  原表给出的仅为二氧化碳排放，我们通过分析，选择二氧化碳由化石燃料，即柴油燃烧产生
- nitrogen dioxide: 915; measured

## Use advice
在应用这个石灰生产的生命周期评价数据集时，用户应该考虑所有生命周期阶段，确保包括每个阶段的输入和输出 - 材料、能源、资源、排放和碳。另外，用户必须考虑数据的地理特性，因为它关联到中国南方的珠江三角洲。在模拟使用阶段行为时，特别是对于农业应用如原位土壤稳定化，应考虑当地的环境状况和污染类型，以便获得准确的生命周期评估结果。

## Review details
清单： 内部审查通过几个迭代步骤完成，涉及原始数据验证、原始数据记录、代表性、完整性、与 ISO 14040 和 14044 有关的建模的一致性。

## Data sources
- Kai L ,Liping F ,Fangbai L , et al. Sustainability assessment and carbon budget of chemical stabilization based multi-objective remediation of Cd contaminated paddy field. The Science of the total environment, 2021, 819 152022-152022.
