# 铝再生 ; 再生铝锭 ; 废铝 ; 2016年

Dataset: ILCD process, Unit process, single operation
Geography: CN
Reference year: 2021
Classification: Unit processes / Materials production / Metals and semimetals
Generated by: 蔡梓萌, caizm6178@163.com
Owner: 天工LCI数据工作小组
Review: Dependent internal review by 天工LCI数据工作小组
Amounts: no units in this file; such an amount is in the reference unit of its flow, which a separate flow dataset defines
copyright: false
licenseType: Free of charge for all users and uses

## General comment
此数据集代表了从废铝回收制造再生铝锭的过程。这些再生铝锭可被广泛应用于不同行业，包括但不限于汽车、建筑、电子、包装和航空航天业。这些铝锭可以进一步加工成铝产品，如铝板、铝片、铝线和铝管，这些产品用于生产利用铝的轻质特性的零部件和结构。

## Time period
文献发表日期

## Reference product
- secondary aluminium ingot: 1000; missing unimportant
  ingot

## Inputs
- electricity, high voltage, aluminium industry: 1148.4; missing unimportant
  electricity
- aluminium scrap, unspecified: 1180; missing unimportant
  aluminum scrap

## Data selection and combination
本研究的数据参考了PA、SA、电力等背景数据的LCA数据。PA数据来自统计数据源，SA数据主要来自文献。背景数据主要来自中国科学院生态环境研究中心CASRCEES 2018建立的中国本地化LCA数据库，涵盖能源、材料、交通、废物管理等LCA数据。

## Use advice
LCA数据使用者应考虑铝材回收的技术适用性和相关的方法学建议。需要注意的是，来自统计数据的原铝（PA）和文献的再生铝（SA）数据应准确归属于相关的产品系统。此外，数据用户在使用中国科学院生态环境研究中心（CAS RCEES）2018年数据库的背景数据时要谨慎，确保数据的时间相关性（即此数据集的年份为2016年）以及对中国所指定地区的特定性。任何数据的外推或修改都应考虑自数据发布日期以来工业过程或技术改进的变化。

## Review details
清单： 内部审查通过几个迭代步骤完成，涉及原始数据验证、原始数据记录、代表性、完整性、与 ISO 14040 和 14044 有关的建模的一致性。

## Data sources
- Ding, N., Liu, N., Lu, B. & Yang, J. Life cycle greenhouse gas emissions of aluminum based on regional industrial transfer in China. J. Ind. Ecol. 25, 1657–1672 (2021).
