# 电力生产 ; 混合电力 ; 广西壮族自治区

Dataset: ILCD process, Unit process, single operation
Geography: GX-CN
Reference year: 2019
Classification: Unit processes / Energy carriers and technologies / Electricity
Generated by: 熊若熙, xiongrx0126@163.com
Owner: 天工LCI数据工作小组
Review: Dependent internal review by 天工LCI数据工作小组
Amounts: no units in this file; such an amount is in the reference unit of its flow, which a separate flow dataset defines
copyright: false
licenseType: Free of charge for all users and uses

## General comment
混合电力产生形式包括火力发电、水力发电、风力发电、核能发电和太阳能发电

## Technical purpose
该混合电力数据集代表了广西壮族自治区电力生产的综合概况。该混合包括通过火力、水力、风能、核能和太阳能发电的方式产生的电力。该混合对于了解区域电力消耗的环境影响至关重要，适用于依赖区域电网的服务、产品或工艺过程。示例包括利用公共电力供应的工厂、住宅建筑和基础设施项目的电力消耗。

## Reference product
- Electricity: 3.6; missing unimportant
  [{'text': '3.6', 'type': 'text'}]

## Inputs
All rows: missing unimportant
- electricity for thermal power: 1.96232
  [{'text': '3.6', 'type': 'text'}]
- electricity from hydroelectric power plant: 1.15613
  [{'text': '3.6', 'type': 'text'}]
- electricity for nuclear power: 0.335336
  [{'text': '3.6', 'type': 'text'}]
- electricity from wind power: 0.118926
  [{'text': '3.6', 'type': 'text'}]
- electricity for solar power: 0.0272952
  [{'text': '3.6', 'type': 'text'}]

## Use advice
使用此数据集时，用户应考虑混合电力中各种发电方法的比例，因为每种电源都有不同的环境足迹。此数据适用于区域生命周期评估，并应用来代表广西的平均电力供应。如果评估针对特定类型的电力消费，用户应根据实际消费情况调整混合电力比例，前提是有详细数据可用。注意数据的时间界限，并定期更新，以反映能源组合的变化。

## Review details
清单： 内部审查通过几个迭代步骤完成，涉及原始数据验证、原始数据记录、代表性、完整性、与 ISO 14040 和 14044 有关的建模的一致性。

## Data sources
- 能源统计年鉴2020
