# 土壤修复;异位修复;土壤淋洗;土柱淋洗;鼠李糖脂泡沫淋洗;得到修复的土柱

Dataset: ILCD process, Unit process, single operation
Geography: CN
Reference year: 2023
Classification: Unit processes / Other Services / Repair and maintenance
Generated by: 黄悦, huangyue@caep.org.cn
Owner: 天工LCI数据工作小组
Review: Dependent internal review by 天工LCI数据工作小组
Amounts: no units in this file; such an amount is in the reference unit of its flow, which a separate flow dataset defines
copyright: false
licenseType: Free of charge for all users and uses

## General comment
使用鼠李糖脂泡沫淋洗受污染土柱，得到修复后的土柱

## Technical purpose
该过程用于土壤异位修复，特别是采用鼠李糖脂生物表面活性剂泡沫在土壤淋洗技术中去除土柱中的污染物。这种修复方法适用于环境工程和废物管理行业，用于恢复受污染的土壤，使其适合在农业、景观恢复和建筑等多种应用中重新使用。

## Reference product
- Remediated soil columns: 0.0008

## Inputs
- rhamnolipid: 0.00018
- Nitrogen: 0.0131
- Activated Carbon: 0.03354
- Methanol: 0.00018
- Tap Water: 0.00525
- Electricity: 0.396
- Contaminated soil columns: 0.0008

## Outputs
- quartz sand: 0.09
- polycyclic aromatic hydrocarbons: 0.00036, 0.0331 (2 entries)

## Use advice
数据集用户应确保处理好所有方法论考虑，如土壤修复的系统边界划定、能源和材料投入的评估，以及环境影响的评价。如果纳入生命周期，必须有适当的回收和能源回收分配程序。用户还应考虑技术适用性限制，并确保使用正确的土柱特性，以反映正在修复的具体土壤类型和污染程度。

## Review details
清单： 内部审查通过几个迭代步骤完成，涉及原始数据验证、原始数据记录、代表性、完整性、与 ISO 14040 和 14044 有关的建模的一致性。

## Data sources
- 张雅鑫 et al. 基于生命周期评价的焦化污染土壤 淋洗技术环境影响研究. 安全、健康和环境 23, (2023).
