# 开采阶段;石油;利用二氧化碳油藏提取处理分离

Dataset: ILCD process, Unit process, single operation
Geography: UM
Reference year: 2001
Classification: Unit processes / Energy carriers and technologies / Crude oil based fuels
LCI method principle: Attributional
LCI method approaches: Consequential
Generated by: 李梓萌, 1577978537@qq.com
Owner: 天工LCI数据工作小组
Review: Dependent internal review by 天工LCI数据工作小组
Amounts: no units in this file; such an amount is in the reference unit of its flow, which a separate flow dataset defines
copyright: false
licenseType: Free of charge for all users and uses

## General comment
该工业流程用于加强油田回收（EOR）操作。具体来说，它适用于石油工业从德克萨斯州西部二叠纪盆地的圣安德烈斯白云岩油藏中提取石油。该过程包括利用二氧化碳进行长期储存和初步水驱后的额外石油提取，其中二氧化碳作为互溶气体用于增加具有特定特性（如孔隙度、渗透率和深度）油藏的石油回收率。

## Geography
德克萨斯州西部的二叠纪盆地,这是一种层状白云岩，平均孔隙度为8.5%，平均渗透率为1.5 md。产层来自圣安德烈斯白云岩，平均深度为1585 m，产层厚度为15 ~ 70 m。该单元占地13130英亩，已经进行了水驱，

## Time period
论文发表时间

## Technology and included processes
化学物质以二氧化碳为基础的合成燃料可能是指甲烷、甲醇、汽油和航空燃料。从电厂废气中捕获的二氧化碳可以直接用于催化合成气体的生成过程。合成气，作为CO和氢气的混合物，是至关重要的是生产氢、氨、甲醇和合成烃的原料燃料。作为一种中间体，它可以用于合成石油的生产费托过。

## Reference product
- LPG - liquefied petroleum gas: 1; uniform; missing unimportant
  石油回收量，具体到每个储层，这取决于石油占用的孔隙空间的百分比，以及预计被二氧化碳扫过的孔隙空间。

## Inputs
- carbon dioxide (fossil): 5.5; uniform; missing unimportant
  没有讨论CO2混相生产过程的性能，也没有特别考虑在地层中注入酸性气体所引起的问题。需要注入的二氧化碳量，是预期的累积二氧化碳利用率，代表了过去每天的注入量和未来每天的预测，标准化为该EOR石油生产项目40年的生命周期。这个量很重要，因为它显示了在采油过程中需要供应多少二氧化碳。它最终强调了提高采收率项目对二氧化碳的需求，原文未区分bio和fossil，根据专家判断此处为fossil
- methane (fossil): 0.29; uniform; missing unimportant
  消耗的甲烷量

## Outputs
- methane (fossil): 0.0015; uniform; missing unimportant
  排放的甲烷量
- carbon dioxide (fossil): 0.4; uniform; missing unimportant
  排放的二氧化碳量,原文未区分bio和fossil，根据专家判断此处为fossil

## Use advice
在使用该数据集进行生命周期评估时，尽管本研究专注于温室气体排放（二氧化碳CO2、甲烷CH4和氧化亚氮N2O）的研究，重要的是要包括所有排放和排放以获得全面的视角。用户应严格限定系统边界到所述设施，涵盖石油提取、气体处理，以及与二氧化碳运输和注入相关的操作。单元的地质特性，如孔隙度和渗透性以及二氧化碳注入的最小混溶压力（85大气压）也应纳入评估中。数据集不包括从外部源头到油藏的二氧化碳运输，如果适用，应单独考虑。

## Review details
清单： 内部审查通过几个迭代步骤完成，涉及原始数据验证、原始数据记录、代表性、完整性、与 ISO 14040 和 14044 有关的建模的一致性。

## Data sources
- Aycaguer, A.-C., Lev-On, M., & Winer, A. M. (2001). Reducing Carbon Dioxide Emissions with Enhanced Oil Recovery Projects: A Life Cycle Assessment Approach. Energy & Fuels, 15(2), 303–308.
