# 混凝土生产 ; 高性能海工混凝土( C40 ) ; 整个风电场

Dataset: ILCD process, Unit process, single operation
Geography: SH-CN
Reference year: 2009
Classification: Materials production / Other mineralic materials
Functional unit: The functional unit is 1 kWh on-grid electricity provision.
LCI method principle: Attributional
LCI method approaches: Allocation
Generated by: 赵云志, ll10088@163.com
Owner: 天工LCI数据工作小组
Review: Dependent internal review by 天工LCI数据工作小组
Amounts: no units in this file; such an amount is in the reference unit of its flow, which a separate flow dataset defines
copyright: false
licenseType: Free of charge for all users and uses

## General comment
本数据集中描述的高性能海工混凝土(C40)专为中国的东海大桥海上风电场(DBOWF)等海上风电场的建设量身定做。其卓越的性能使其适用于恶劣的海洋环境和风力发电机基础以及其他必要的大型海上风能生产基础设施组件的重大结构要求。

## Geography
所研究的风电场- -东海大桥海上风电场( DBOWF )是中国在上海管辖范围内的第一个海上风电场，也是欧洲以外的第一个海上风电场。工程分两期施工，分别位于东海大桥两侧(图1 )。

## Reference product
- Concrete: 43000; article inperiodical

## Inputs
- Energy, geothermal, converted: 5.94e7; software or database

## Outputs
- carbon dioxide: 9.93e6; software or database
- particles (PM2.5): 2020; software or database
- sulfur dioxide: 9550; software or database
- nitrous oxide: 23200; software or database

## Deviations from the LCI method approaches
本研究采用PLCA建模方法计算了中国某典型海上风电场的能源和环境排放。从摇篮到坟墓的过程包括材料和设备制造、运输和安装、操作和维护、拆解和回收4个阶段(图2 )。

## Data selection and combination
风机、基础和电缆的技术参数从DBOWF的设计文件中获得(表2)。能源和排放因子(即单位材料和构件生产的能源消耗和环境排放)来源于Ecoinvent 2.2数据集(生态发明中心, 2009)，优先参考中国实践的系数。对于关键材料和设备，其海上运输能量由运输负荷和海运能量强度计算得到。根据施工方案，对设施安装能耗和排放进行了估算。风电场的运行和维护数据，如维护的频率和工作时间，是通过与工程技术人员的现场调查获得的。与模型参数和输入数据相关的不确定性在本文的敏感性分析部分进行了说明。

## Use advice
使用本数据集的用户应注意，提供的信息基于东海大桥海上风电场(DBOWF)的具体案例研究，因此可能反映特定地区的实践。节能和排放因素来源于Ecoinvent 2.2数据库，使用时应考虑对当地实践的变化进行参考或适应。对于关键材料和设备的运输，应用提供的海上运输能耗计算。安装能耗和排放、运行和维护细节必须反映所讨论项目的实际建设和运行条件。将此数据应用于LCA模型时，用户应特别注意敏感性分析部分的任何相关不确定性，并确保为其上下文进行适当调整。

## Review details
清单： 内部审查通过几个迭代步骤完成，涉及原始数据验证、原始数据记录、代表性、完整性、与 ISO 14040 和 14044 有关的建模的一致性。

## Data sources
- Yang, J. et al. The life-cycle energy and environmental emissions of a typical offshore wind farm in China. Journal of Cleaner Production 180, 316–324 (2018).
