# Rare earth filtrate precipitation and HCl leaching|Dysprosium|IAC|REE containing ore

Dataset: ILCD process, Unit process, single operation
Geography: CN
Reference year: 2010
Valid until: 2019
Classification: Materials production / Other mineralic materials
Functional unit: The goal of this investigation is to compare environmental impacts related to the production of 1 kg Dy (functional unit) from IAC (Southern China), from B/M ore (Bayan Obo), and from an eudialyte deposit (Norra Kärr) using the LCA method
LCI method principle: Attributional
LCI method approaches: Allocation - mass
Generated by: Tao Wang, twang@iue.ac.cn
Review: Dependent internal review by Tiangong LCI Data Working Group
Amounts: no units in this file; such an amount is in the reference unit of its flow, which a separate flow dataset defines
copyright: false

## Geography
Southern China and Bayan Obo

## Technology and included processes
The goal of this investigation is to compare environmental impacts related to the production of 1 kg Dy (functional unit) from IAC (Southern China), from B/M ore (Bayan Obo), and from an eudialyte deposit (Norra Kärr) using the LCA method

## Reference product
- Leaching solution: 208; article inperiodical
  Leaching solution. Input for next process: Solvent extraction

## Inputs
- Electricity: 1.62; calculated
  Estimated on base of throughput in solvent extractio, electricity mix 2014
- Ammonium bicarbonate: 5.4; calculated
  Ammonium bicarbonate. Stoichiometric calculation with 25 % excess, ammonium bicarbonate, at plant
- sulphuric acid: 0.66; min 0.26; max 1.06; uniform; article inperiodical
  For adjusting a pH value of 5 for further processing, sulphuric acid, liquid, at plant. Average
- Lime: 1.885; min 0.74; max 3.03; uniform; article inperiodical
  Lime production, hydrated, packe, for adjusting a pH value of 10 to separate impurities. Average
- hydrogen chloride: 11.48; article inperiodical
  Hydrochloric acid, 36 % in H2O, from reacting propylene and chlorine, for adjusting a pH value of 4 for REE chloride solution
- water: 197; article inperiodical
  For dilution of HCl
- transport in t*km,transport in t*km: 2.565; min 2.07; max 3.06; uniform; software or database
  Chemicals: 320 km average distance deposit -Guangzhou, carbonate: 200 km deposit - Shaoguan, HCl: 230 km Guangzhou - Shaoguan. Market for transport, freight, lorry >32 metric ton, EURO3, average

## Outputs
- Sludge: 5.14
  Assumed to be dumped at the deposit area
- aluminium: 0.000146; article inperiodical
  Aluminium [Inorganic emissions to fresh water]
- calcium: 0.000808; article inperiodical
  Calcium [Inorganic emissions to fresh water]
- iron: 1.7e-6; article inperiodical
  Iron [Heavy metals to fresh water]
- magnesium: 7.07e-5; article inperiodical
  Magnesium [Inorganic emissions to fresh water]
- manganese: 2.31e-5; article inperiodical
  Manganese [Heavy metals to fresh water
- potassium: 6.72; article inperiodical
  Potassium [Inorganic emissions to fresh water]
- Activated silica: 0.000147; article inperiodical
  Activated silica. Silicon dioxide (silica) [Particles to air]
- sodium: 0.000105; article inperiodical
  Sodium [Inorganic emissions to fresh water]

## Deviations from the LCI method approaches
In this study, an allocation method based on the mass of produced REEs combined with their market prices (based on an international metals market analysis and pricing index company ) are considered, as usual for metals with strongly different prices. As the ores have different compositions, the allocation factor has to be assessed individually for each site.

## Review details
Inventory: The internal review was done by several iteration steps concerning raw data validation, raw data documentation, representativity, completeness and consistency of modelling with regard to ISO 14040 and 14044.; Documentation: The review of the documentation was performed by Ecobilan and is in compliance with ISO 14040 and 14044. The data set documentation is correct in view of the appropriateness of the information provided. It includes all relevant information in view of data quality and scope of application of the respective LCI result.

## Data sources
- Zapp, P., Marx, J., Schreiber, A., Friedrich, B. & Voßenkaul, D. Comparison of dysprosium production from different resources by life cycle assessment. Resources, Conservation and Recycling 130, 248–259 (2018).
