# 华东水稻; 上海水稻生产;灌溉

Dataset: ILCD process, Unit process, single operation
Geography: SH-CN
Reference year: 2012
Valid until: 2014
Classification: Unit processes / Materials production / Agricultural production means
Functional unit: 1 t
LCI method principle: Attributional
LCI method approaches: Consequential
Generated by: Haoran Zhang, hrzhang@whu.edu.cn
Owner: 天工LCI数据工作小组
Review: Dependent internal review by 天工LCI数据工作小组
Amounts: no units in this file; such an amount is in the reference unit of its flow, which a separate flow dataset defines
copyright: false
licenseType: Free of charge for all users and uses

## General comment
参照PAS2050规范并结合生命周期评价方法对上海市水稻生产进行了碳足迹评估

## Geography
崇明

## Technology and included processes
主要参照 PAS2050 规范并结合 LCA 方 法进行水稻生产的碳足迹计算。PAS2050 全称“公 众可获 取 的 规 范”( Publicly Available Specification， PAS) ，由英国标准协会( British Standard Institution， BSI) 编制，旨在对产品和服务生命周期内温室气体 排放的评价要求做出明确的规定［19］。

## Technical purpose
该数据集详细说明了上海崇明地区水稻生产的应用。它主要用于农业基准评估和提高水稻种植的可持续发展实践。该信息可用于评估整个生产过程产生的碳足迹，包括但不限于田间作业、稻米加工和相关温室气体排放。该数据适用于农业领域的生态研究、政策制定、农业优化战略和供应链管理。

## Reference product
- rice: 1000; measured

## Inputs
- Electricity: 83.6184; calculated

## Outputs
- carbon dioxide (fossil),carbon dioxide (fossil): 0.0176; calculated

## Deviations from the LCI method approaches
主要参照PAS2050 规范并结合LCA方法进行水稻生产的碳足迹计算。PAS2050 全称“公众可获取的规范” ( Publicly Available Specification, PAS)

## Data selection and combination
水稻碳足迹的初级活动水平数据包括田间各项作业活动, 加工存储各项作业活动、深加工与产品包装以及田间温室气体散逸等活动水平数据。

## Data treatment and extrapolations
包括田间作业、稻谷加工、温室气体排放检测

## Use advice
在使用水稻生产数据集进行生命周期评估时，必须遵循PAS2050规范。用户应注意，数据仅涵盖主要原材料，包括种子、化肥、农药，并评估温室气体排放、农业机械使用以及稻米加工和储存。该数据集不包括下游过程，例如商品销售、消费者使用或废弃和回收阶段。用户在整合这些数据时应小心谨慎，确保他们评估中的系统边界是一致的，并且该数据集应在农业和作物生产系统的定义范围内适当应用。

## Review details
清单： 内部审查通过几个迭代步骤完成，涉及原始数据验证、原始数据记录、代表性、完整性、与 ISO 14040 和 14044 有关的建模的一致性。

## Data sources
- 曹黎明,李茂柏,王新其,赵志鹏,潘晓华.基于生命周期评价的上海市水稻生产的碳足迹[J].生态学报,2014,34(02):491-499.
