# Refinedtea|Woolentea|Refined processing|All sizes / 精制茶|毛茶|精制加工|所有规模

Dataset: ILCD process, Unit process, single operation
Geography: CN
Reference year: 2019
Classification: Materials production / Food and renewable raw materials
Generated by: The data was created by the Office of the Second National Pollution Source Census of the Ministry of Ecology and Environment, and the data was organized by the TianGong Plan team for ILCD format / 生态环境部第二次全国污染源普查工作办公室创建数据，天工计划团队常慧敏整理数据为ILCD格式
Owner: Tiangong LCI Data Working Group / 天工LCI数据工作小组
Amounts: no units in this file; such an amount is in the reference unit of its flow, which a separate flow dataset defines
copyright: false
licenseType: Free of charge for all users and uses

## Technology and included processes
the treatment technology for the pollution of Tea Refiningdidn't offered，Its Technical efficiency of end-of-pipe management65

## Reference product
- Tea Refining: 1000; calculated
  源文件中描述为为精制茶，此处对其进行了匹配工作，将其匹配到LCAflow库里面相最符合的流

## Outputs
- Flue dust: 0.08; calculated
  污染物指标茶粉尘的末端治理技术是袋式除尘，其效率为92，末端治理设施实际运行率（k值）计算公式为k=除尘设备运行时间（小时）/精制茶生产时间（小时）。原文件中描述污染物类别为废气，污染物指标为茶粉尘，此处对其进行了匹配工作，将其匹配到LCAflow库里面相最符合的流
- Flue dust: 0.12; calculated
  污染物指标茶粉尘的末端治理技术是旋风除尘，其效率为88，末端治理设施实际运行率（k值）计算公式为k=除尘设备运行时间（小时）/精制茶生产时间（小时）。原文件中描述污染物类别为废气，污染物指标为茶粉尘，此处对其进行了匹配工作，将其匹配到LCAflow库里面相最符合的流
- Flue dust: 0.35; calculated
  污染物指标茶粉尘的末端治理技术是/(室内自然沉降)，其效率为65，末端治理设施实际运行率（k值）计算公式为k=1。原文件中描述污染物类别为废气，污染物指标为茶粉尘，此处对其进行了匹配工作，将其匹配到LCAflow库里面相最符合的流

## Data sources
- 第二次全国污染源普查产排污核算系数手册（试用版）,三级代码153.0文件，在完整版文件中第2689页
