# modified granulated copper slag production|modified granulated copper slag

Dataset: ILCD process, Unit process, single operation
Geography: CS-HUN-CN
Classification: Materials production / Other mineralic materials
Generated by: Siqi Yang
Amounts: no units in this file; such an amount is in the reference unit of its flow, which a separate flow dataset defines
copyright: false

## General comment
Modified granulated copper slag (MGCS).
MGCS preparation is a crucial phase. The original copper slag was procured from a smelter of Boliden Mineral AB, Stockholm, Sweden. This was ground in the raw mill to form GCS with a particle size lower than 0.60 mm. The CaO (99.9% pure) was supplied by Changsha Danuo Building Materials Co., Ltd., Changsha, China. The procedure of MGCS production is as follows. The granulated copper slag (GCS) and CaO (20 wt.%) were charged in the furnace while the heating temperature was raised to approximately 1550 ◦C, at which point the mixtures were completely molten. The water-quenching method was then adopted to form the MGCS. The entire process was carried out within a nitrogen atmosphere with a flow rate of 150 mL/min. This procedure was conducted in the Changsha Research Institute of Mining and Metallurgy Co., Ltd., Changsha, China. The produced MGCS was eventually transported by trucks to the cement plant, which uses electricity as the main energy source.

## Geography
A typical cement plant in Changsha, Hunan Province, China

## Model description
The functional unit (FU) is defined as 1 kg blended cement with a compressive strength of 42.9 MPa.

## Reference product
- Modified granulated copper slag: 1000
  Modified granulated copper slag (MGCS)

## Inputs
- calcium oxide: 190.968; measured
  CaO
- Granulated copper slag: 954.839; measured
  Granulated copper slag (GCS)
- electricity, medium voltage: 1800; measured
  Electricity

## Outputs
- particles (> PM10): 1.17742; measured
  PM. The particle size is not specified. Here we treat it as PM>10.

## Deviations from the LCI method approaches
Some data related to the background system were obtained from the Ecoinvent 3.1 database.

## Cut-off and completeness
The impact of the origin copper slag preparation was not considered in this study since it can be regarded as a waste product and is allocated no environmental burden according to EU directives . Accordingly, only impacts incurred during the grinding and modification of granulated copper slag (GCS) will be taken into account.

## Data selection and combination
The inventory data of the foreground system were directly collected in the studied cement plant located in Changsha, Hunan Province, China.

## Data sources
- Qinli Zhang, Bingyi Zhang, & Daolin Wang. (2022). Environmental Benefit Assessment of Blended Cement with Modified Granulated Copper Slag. MATERIALS, 15(15).
