# Soil remediation ; In-situ remediation ; Multi-phase extraction ; Construction preparation ; SVE operation

Dataset: ILCD process, Unit process, single operation
Geography: KR
Reference year: 2011
Classification: Other Services / Repair and maintenance
Generated by: Zhang Jianbin, zhangjb@caep.org.cn
Owner: Tiangong LCI Data Working Group
Review: Dependent internal review by Tiangong LCI Data Working Group
Amounts: no units in this file; such an amount is in the reference unit of its flow, which a separate flow dataset defines
copyright: false
licenseType: Free of charge for all users and uses

## General comment
Electricity 148,748 kwh

## Technology and included processes
SVE operation - Electricity 148,748 kwh

## Technical purpose
This soil remediation process, utilizing Soil Vapor Extraction (SVE), is applied in-situ for the treatment of contaminated land areas. The multi-phase extraction system operates continuously for 750 days to ensure efficiency and effectiveness of the contamination removal process. It's utilized for environmental restoration projects where the reduction of volatile organic compounds (VOCs) in soil is required.

## Reference product
- Remediated soil: 1000; missing unimportant

## Inputs
- Electricity: 535493; missing unimportant

## Use advice
When utilizing this LCA data set, it is important to include specific considerations such as the energy consumption for the operation of the SVE system, noted here as 148,748 kWh over a 750-day extraction period. This data should be used with precision for modeling and assessing environmental impacts within a corresponding timeframe and contamination level. Moreover, this dataset is relevant only for scenarios that align with the technical specifications of in-situ soil vapor extraction and may not be applicable for other soil remediation technologies. Ensure that the application of this data aligns with the technological scope and the regional environmental guidelines.

## Review details
Inventory: The internal review was done by several iteration steps concerning raw data validation, raw data documentation, representativity, completeness and consistency of modelling with regard to ISO 14040 and 14044.

## Data sources
- Seung-Woo Jeong, Sangwon Suh. Assessment of Environmental Impacts and CO2 Emissions from Soil Remediation Technologies using Life Cycle Assessment - Case Studies on SVE and Biopile Systems -. 大韓環境工學會誌
