# Groundwater remediation;In-situ;Permeable Reactive Barriers; Reactive media construction

Dataset: ILCD process, Unit process, single operation
Geography: US
Reference year: 2011
Classification: Other Services / Repair and maintenance
Generated by: Zhang Jianbin, zhangjb@caep.org.cn
Owner: Tiangong LCI Data Working Group
Review: Dependent internal review by Tiangong LCI Data Working Group
Amounts: no units in this file; such an amount is in the reference unit of its flow, which a separate flow dataset defines
copyright: false
licenseType: Free of charge for all users and uses

## General comment
Filling reactive materials

## Geography
in Dover Air Force Base.

## Technology and included processes
Fe0 and quartz sand mixture

## Technical purpose
The described process pertains to groundwater remediation at the Dover Air Force Base, specifically using an in-situ permeable reactive barrier (PRB) approach. PRBs are subsurface structures that allow groundwater to flow through a reactive medium, which is designed to remove or degrade pollutants. The construction of a PRB typically involves the emplacement of reactive media in the subsurface to create a barrier that treats the contaminated groundwater. Technical usage includes the management of contaminated groundwater at military sites or other locations with similar environmental concerns.

## Reference product
- Reactive barrier: 1; measured

## Inputs
- iron: 139000; measured
- quartz sand: 139000; measured
- Primary energy: 483000; measured

## Use advice
Users of this data set should be aware that it pertains specifically to the construction and filling of a PRB with reactive media for groundwater remediation. Attention should be given to local geological conditions, hydrogeological properties, the specific contaminants present, and their concentration levels. The methodological advice includes ensuring compatibility with the technology choice, pollutant removal efficiency expected, and the long-term maintenance and monitoring plans. It is also essential to consider possible environmental impacts, including any emissions and energy use associated with the construction and maintenance of the PRB.

## Review details
Inventory: The internal review was done by several iteration steps concerning raw data validation, raw data documentation, representativity, completeness and consistency of modelling with regard to ISO 14040 and 14044.

## Data sources
- Mark S. H. Mak and Irene M. C. Lo.Environmental Life Cycle Assessment of Permeable Reactive Barriers: Effects of Construction Methods, Reactive Materials and Groundwater Constituents[J].Environmental Science & Technology 2011, 45, 23, 10148-10154
