# Metallurgical silicon smelting

Dataset: ILCD process, Unit process, single operation
Geography: CN
Reference year: 2014
Classification: Materials production / Other mineralic materials
Functional unit: The functional unit of the LCA study was 1 kWh based on a multi-Si PV module
LCI method principle: Attributional
LCI method approaches: Allocation
Generated by: Jinfeng Yang, yjfzfshn@163.com
Review: Dependent internal review by Tiangong LCI Data Working Group
Amounts: no units in this file; such an amount is in the reference unit of its flow, which a separate flow dataset defines
copyright: false

## General comment
Multi-Si

## Geography
This study performs a life-cycle assessment for a photovoltaic (PV) system with multi crystalline silicon (multi-Si) modules in China

## Time period
Available online

## Reference product
- Metallurgical silicon: 6.08; article inperiodical
  Silicon (99%)

## Inputs
- quartz sand: 20.48; article inperiodical
  Quartz sand
- hard coal: 45.4; article inperiodical
  Standard coal

## Outputs
All rows: article inperiodical
- carbon dioxide: 132.91
  Carbon dioxide
- carbon monoxide: 1.7
  Carbon monoxide
- Slag: 4.38
- Nitrogen oxides: 279.55
- Silicon dioxide: 1.7
- sulfur dioxide: 0.79
  Sulfur dioxide

## Deviations from the LCI method approaches
The goal of this study was to quantitatively assess the life-cycle environmental impacts of PV systems in China and provide a scientific basis for policy-making regarding the sustainable development of Chinese PV industry.

## Data selection and combination
The inventory data, including the material consumption and
environmental emissions involved in the production of solar-grade silicon, wafers, ingots, cells, and modules, were mainly collected from companies that represent the current domain multi-Si PV technologies in China. The energy consumption data referred to the report “Clean Production ofSolar PV in China” (Li and Chang, 2012). The data of MG-Si production was from literature about MG-Si produced in China

## Review details
Inventory: The internal review was done by several iteration steps concerning raw data validation, raw data documentation, representativity, completeness and consistency of modelling with regard to ISO 14040 and 14044.; Documentation: The review of the documentation was performed by Ecobilan and is in compliance with ISO 14040 and 14044. The data set documentation is correct in view of the appropriateness of the information provided. It includes all relevant information in view of data quality and scope of application of the respective LCI result.

## Data sources
- Fu, Y., Liu, X. & Yuan, Z. Life-cycle assessment of multi-crystalline photovoltaic (PV) systems in China. Journal of Cleaner Production 86, 180–190 (2015).
