# 焦化;焦炭;焦化（Z08）

Dataset: ILCD process, Unit process, single operation
Geography: CN
Reference year: 1998
Classification: Energy carriers and technologies / Energetic raw materials
Generated by: 付翔, 1162850692@qq.com
Owner: 天工LCI数据工作小组
Review: Dependent internal review by 天工LCI数据工作小组
Amounts: no units in this file; such an amount is in the reference unit of its flow, which a separate flow dataset defines
copyright: false
licenseType: Free of charge for all users and uses

## General comment
来自表 4-16 Z08 钢厂生产吨材环境负荷编目表

## Time period
论文提到钢铁企业环境总体数据为1998年的吨钢环境基础数据。

## Technical purpose
该过程中生产的焦炭用于钢铁工业。它作为一个关键的碳源和热源，在高炉中的铁制造过程中发挥作用，能够还原铁矿石以生产生铁。

## Reference product
- coke,Coke: 635.5; measured
  焦炭

## Inputs
- Energy, geothermal, converted: 3231.43; measured
- water: 17915; measured

## Outputs
All rows: measured
- Dust (unspecified, from stack): 0.066
  烟尘
- Dust (unspecified, from stack): 0.217
- sulfur dioxide: 0.836
- cyanide: 0.000117
- phenol: 0.00028
  挥发酚
- Hydrocarbons, aliphatic, alkanes, unspecified: 0.008439
  石油类
- Suspended solids, unspecified: 0.124971
- chemical oxygen demand: 0.192747
- Dust (unspecified, from stack): 5.618
  集尘
- Spoil (deposited, hibernating in ground, non elementary flow): 0.127

## Use advice
该数据集的用户应注意，环境负荷数据反映的是1998年的技术和实践。从那时起焦炭生产技术可能发生了重大进步，可能改变了环境影响。用户应确保数据的技术适用性，通过进行调整以反映当前技术或验证与现代焦化生产过程的相关性。

## Review details
清单： 内部审查通过几个迭代步骤完成，涉及原始数据验证、原始数据记录、代表性、完整性、与 ISO 14040 和 14044 有关的建模的一致性。

## Data sources
- 周和敏. 钢铁材料生产过程环境协调性评价研究. (北京工业大学, 2001).
