# Blast furnace ironmaking | pellet sinter | pig iron

Dataset: ILCD process, Unit process, single operation
Geography: HUN-CN
Reference year: 2013
Classification: Materials production / Other mineralic materials
Generated by: Wanghuanyu, wanghuanyu00@126.com
Review: Dependent internal review by Tiangong LCI Data Working Group
Amounts: no units in this file; such an amount is in the reference unit of its flow, which a separate flow dataset defines

## Geography
湖南华菱湘潭钢铁有限公司

## Reference product
- Molten Iron: 950; article inperiodical
  生铁

## Inputs
- Sinter: 1000; article inperiodical
  烧结矿
- Pellet: 1000; article inperiodical
  球团矿

## Review details
Inventory: The internal review was done by several iteration steps concerning raw data validation, raw data documentation, representativity, completeness and consistency of modelling with regard to ISO 14040 and 14044.; Documentation: The review of the documentation was performed by Ecobilan and is in compliance with ISO 14040 and 14044. The data set documentation is correct in view of the appropriateness of the information provided. It includes all relevant information in view of data quality and scope of application of the respective LCI result.

## Data sources
- 1.
