# 铝电解碳阳极生产 ; 碳阳极 ; 石油焦 ; 2014年

Dataset: ILCD process, Unit process, single operation
Geography: CN
Reference year: 2021
Classification: Unit processes / Materials production / Non-energetic raw materials
Generated by: 蔡梓萌, caizm6178@163.com
Owner: 天工LCI数据工作小组
Review: Dependent internal review by 天工LCI数据工作小组
Amounts: no units in this file; such an amount is in the reference unit of its flow, which a separate flow dataset defines
copyright: false
licenseType: Free of charge for all users and uses

## General comment
通过使用石油焦进行铝电解生产的碳阳极主要用于铝冶炼工业。由于其电导率，它作为从铝矿石中提取铝的关键组件而服务。因此，它适合铝是关键材料的行业，包括汽车、航空航天、包装和建筑行业。

## Time period
文献发表日期

## Reference product
- anode, for metal electrolysis: 1000; software or database
  anode

## Inputs
All rows: software or database
- electricity, high voltage, aluminium industry: 748.8
  electricty
- heavy fuel oil: 65
  fuel oil
- coal tar: 214
  coal tar pitch
- Petroleum Coke: 1089
  petroleum coak
- coal gas: 1277

## Data selection and combination
本研究的数据参考了PA、SA、电力等背景数据的LCA数据。PA数据来自统计数据源，SA数据主要来自文献。背景数据主要来自中国科学院生态环境研究中心CASRCEES 2018建立的中国本地化LCA数据库，涵盖能源、材料、交通、废物管理等LCA数据。

## Use advice
在使用此碳阳极生产的LCA数据时，必须考虑数据集基于2014年的统计数据和文献。使用者在将此数据应用于当前情况时，应考虑技术和市场条件的潜在更改。此外，来自CAS RCEES 2018的背景数据应根据更新或特定情境进行适应。对于涉及回收或生命周期阶段超出生产（如使用和生命周期终点）的方法论，需要进行调整，以准确反映相关的系统边界和环境影响。

## Review details
清单： 内部审查通过几个迭代步骤完成，涉及原始数据验证、原始数据记录、代表性、完整性、与 ISO 14040 和 14044 有关的建模的一致性。

## Data sources
- Ding, N., Liu, N., Lu, B. & Yang, J. Life cycle greenhouse gas emissions of aluminum based on regional industrial transfer in China. J. Ind. Ecol. 25, 1657–1672 (2021).
