# 土壤修复;原位修复;土壤气相抽提;运行阶段;颗粒活性炭更换

Dataset: ILCD process, Unit process, single operation
Geography: KR
Reference year: 2011
Classification: Other Services / Repair and maintenance
Generated by: 雷秋霜, leiqs@caep.org.cn
Owner: 天工LCI数据工作小组
Review: Dependent internal review by 天工LCI数据工作小组
Amounts: no units in this file; such an amount is in the reference unit of its flow, which a separate flow dataset defines
copyright: false
licenseType: Free of charge for all users and uses

## General comment
该工业过程用于原位土壤修复，具体为土壤气相抽提作业阶段，使用颗粒活性炭（GAC）。这一单元过程（单一操作）对处理受污染土壤至关重要，它通过抽提和吸附作用物理移除挥发性和半挥发性有机化合物。

## Reference product
- Activated Carbon: 18000; input; measured
  颗粒活性炭

## Outputs
- Activated Carbon: 18000
  废弃的颗粒活性炭

## Use advice
使用该数据集时，用户应确保准确表示颗粒活性炭更换频率和容量，并考虑到具体污染物和土壤属性。集成实际操作条件的数据至关重要，如气流速率和温度，以准确反映土壤气相抽提系统的效率。注意用过的颗粒活性炭的废弃处理，并考虑潜在的二次污染。必须保持与土壤修复整体生命周期评估框架的方法论一致性。

## Review details
清单： 内部审查通过几个迭代步骤完成，涉及原始数据验证、原始数据记录、代表性、完整性、与 ISO 14040 和 14044 有关的建模的一致性。

## Data sources
- Assessment of Environmental Impacts and CO2 Emissions from Soil Remediation Technologies using Life cycle Assessment - Case Studies on SVE and Biopile Systems
