# Starterleadbatteries|Lead,sulfuricacidglassfiber(orPVC)|Internalized polar plates manufacturing + assembly|greater than or equal to0.5 million kVA / 起动型铅蓄电池|铅、硫酸玻璃纤维（或PVC）|内化成极板制造+组装|大于等于50万千伏安时

Dataset: ILCD process, Unit process, single operation
Geography: CN
Reference year: 2019
Classification: Energy carriers and technologies / Electricity
Generated by: The data was created by the Office of the Second National Pollution Source Census of the Ministry of Ecology and Environment, and the data was organized by the TianGong Plan team for ILCD format / 生态环境部第二次全国污染源普查工作办公室创建数据，天工计划团队常慧敏整理数据为ILCD格式
Owner: Tiangong LCI Data Working Group / 天工LCI数据工作小组
Amounts: no units in this file; such an amount is in the reference unit of its flow, which a separate flow dataset defines
copyright: false
licenseType: Free of charge for all users and uses

## Technology and included processes
the Technical of end-of-pipe management technology for pollution leadisSpray tower/water shock bath + others (filter cartridge high-efficiency dust removal method)，Its Technical efficiency of end-of-pipe management98

## Reference product
- Power storage battery: 3.6; calculated
  源文件中描述为为起动型铅蓄电池，此处对其进行了匹配工作，将其匹配到LCAflow库里面相最符合的流，污染物指标备注为工业废水量，单位说明为文件中记录的单位是千伏安时，为匹配LCA单位库，将其改为kWh，依据如下：千伏安时（kVAh）和千瓦时（kWh）都是用于测量电能的单位，但是它们之间有一些区别。千伏安时（kVAh）：这个单位考虑了系统的总功率，包括有用功率（实功率）和无用功率（虚功率）。它是由电压（V）和电流（A）的乘积得到的，不考虑功率因数。千瓦时（kWh）：这个单位只考虑了系统的有用功率，即实际做功的部分。它是实际消耗或产生的电能的单位。这两个单位之间的关系可以通过功率因数（PF）来表示：kWh=kVAh×PF，其中，PF 是功率因数，是一个无单位的值，表示实功率和总功率之间的比例，其值范围是 0 到 1。如果系统只有有用功率，没有无用功率，那么功率因数就是 1，此时 kVAh 和 kWh 是相等的。如果系统有无用功率，那么功率因数就小于 1，此时 kVAh 会大于 kWh。

## Outputs
All rows: calculated
- Waste water: 0.071, 0.0107 (2 entries)
  污染物指标工业废水量的末端治理技术是－。原文件中描述污染物类别为废水，污染物指标为工业废水量，此处对其进行了匹配工作，将其匹配到LCAflow库里面相最符合的流，污染物指标备注为工业废水量
- chemical oxygen demand: 0.00288, 0.000432 (2 entries)
  污染物指标化学需氧量的末端治理技术是中和法、其他（化学凝絮沉淀法）膜分离，其效率为60，末端治理设施实际运行率（k值）计算公式为k=废水处理设备正常运转时间（小时/年）/正常生产时间（小时/年）。原文件中描述污染物类别为废水，污染物指标为化学需氧量，此处对其进行了匹配工作，将其匹配到LCAflow库里面相最符合的流，污染物指标备注为化学需氧量
- chemical oxygen demand: 0.00288, 0.000432 (2 entries)
  污染物指标化学需氧量的末端治理技术是膜分离，其效率为60，末端治理设施实际运行率（k值）计算公式为k=废水处理设备正常运转时间（小时/年）/正常生产时间（小时/年）。原文件中描述污染物类别为废水，污染物指标为化学需氧量，此处对其进行了匹配工作，将其匹配到LCAflow库里面相最符合的流，污染物指标备注为化学需氧量
- lead: 2.21e-5, 3.32e-6 (2 entries)
  污染物指标总铅的末端治理技术是中和法、其他（化学凝絮沉淀法）膜分离，其效率为90，末端治理设施实际运行率（k值）计算公式为k=废水处理设备正常运转时间（小时/年）/正常生产时间（小时/年）。原文件中描述污染物类别为废水，污染物指标为总铅，此处对其进行了匹配工作，将其匹配到LCAflow库里面相最符合的流，污染物指标备注为总铅
- lead: 2.21e-5, 3.32e-6 (2 entries)
  污染物指标总铅的末端治理技术是膜分离，其效率为90，末端治理设施实际运行率（k值）计算公式为k=废水处理设备正常运转时间（小时/年）/正常生产时间（小时/年）。原文件中描述污染物类别为废水，污染物指标为总铅，此处对其进行了匹配工作，将其匹配到LCAflow库里面相最符合的流，污染物指标备注为总铅
- Exhaust gas: 439, 1980 (2 entries)
  污染物指标工业废气量的末端治理技术是－。原文件中描述污染物类别为废气，污染物指标为工业废气量，此处对其进行了匹配工作，将其匹配到LCAflow库里面相最符合的流，污染物指标备注为工业废气量
- lead: 0.0001976, 2.96e-5 (2 entries)
  污染物指标铅的末端治理技术是电袋组合+喷淋塔/水冲击浴，其效率为98，末端治理设施实际运行率（k值）计算公式为k=废气处理设备耗电量（千瓦时/年）/(废气处理设备额定功率（千瓦）×废气处理设备运行时间（小时/年）)。原文件中描述污染物类别为废气，污染物指标为铅，此处对其进行了匹配工作，将其匹配到LCAflow库里面相最符合的流，污染物指标备注为铅
- lead: 0.0001976, 2.96e-5 (2 entries)
  污染物指标铅的末端治理技术是袋式除尘+喷淋塔/水冲击浴，其效率为98，末端治理设施实际运行率（k值）计算公式为k=废气处理设备耗电量（千瓦时/年）/(废气处理设备额定功率（千瓦）×废气处理设备运行时间（小时/年）)。原文件中描述污染物类别为废气，污染物指标为铅，此处对其进行了匹配工作，将其匹配到LCAflow库里面相最符合的流，污染物指标备注为铅
- lead: 0.0001976, 2.96e-5 (2 entries)
  污染物指标铅的末端治理技术是喷淋塔/水冲击浴、其他（滤筒高效除尘法），其效率为98，末端治理设施实际运行率（k值）计算公式为k=废气处理设备耗电量（千瓦时/年）/(废气处理设备额定功率（千瓦）×废气处理设备运行时间（小时/年）)。原文件中描述污染物类别为废气，污染物指标为铅，此处对其进行了匹配工作，将其匹配到LCAflow库里面相最符合的流，污染物指标备注为铅

## Data sources
- 第二次全国污染源普查产排污核算系数手册（试用版）,二级代码38,四级代码3843文件，在完整版文件中第3413页
