# NGH mining | Methane hydrate | LCA and LCC analysis

Dataset: ILCD process, Unit process, single operation
Geography: GD-CN
Reference year: 2009
Classification: Materials production / Other mineralic materials
LCI method principle: Attributional
LCI method approaches: Consequential
Generated by: Shikang Kang, 908798159@qq.com
Review: Dependent internal review by Tiangong LCI Data Working Group
Amounts: no units in this file; such an amount is in the reference unit of its flow, which a separate flow dataset defines
copyright: false

## General comment
In this paper, LCA analysis of hydrate mining is carried out, and the most important process links and impact categories that affect the environment in its life cycle are obtained, the causes are analyzed, and reasonable improvement opinions are put forward

## Geography
Data development site

## Time period
Publication time of literature

## Technology and included processes
Using life cycle assessment (LCA) and life cycle cost analysis (LCC), the environmental effects and economic benefits of marine NGH exploitation are systematically analyzed and compared with those of natural gas (NG) exploitation. The results show that the acid gas emission from NGH mining is close to zero and the greenhouse gas emission is relatively small, and the life cycle cost of NGH mining is lower than that of NG mining.

## Reference product
- process steam from natural gas: 0.31; log-normal; article inperiodical
  开采工程成本,数据为分布，量中填写的数据为取平均（取中值）的结果

## Outputs
All rows: log-normal; article inperiodical
- process steam from natural gas: 0.000623
  Exploitation engineering,数据为分布，量中填写的数据为取平均（取中值）的结果
- process steam from natural gas: 0.001
  Drilling engineering,数据为分布，量中填写的数据为取平均（取中值）的结果
- process steam from natural gas: 0.00099
  Surface engineering,数据为分布，量中填写的数据为取平均（取中值）的结果
- process steam from natural gas: 0.481
  Mining engineering,数据为分布，量中填写的数据为取平均（取中值）的结果
- process steam from natural gas: 0.484
  Total,数据为分布，量中填写的数据为取平均（取中值）的结果

## Data selection and combination
Guangzhou Marine Geological Survey has carried out special hydrate investigation in Dongsha, Shenhu, Xisha and Qiongdongnan in the northern South China Sea for 9 years, and completed comprehensive investigation and research for 18 voyages. It has found a large number of cold spring carbonates and methane bacteria biota that live on natural gas. To a great extent, it can be judged that there are large leakage NGH deposits [5], which are characterized by high grade, shallow burial and concentrated distribution.

## Data treatment and extrapolations
The environmental and economic performance of NGH mining are comprehensively evaluated by using the life cycle method. Effective identification of key emissions and environmental impact potential, find out the most important environmental costs, and provide quantitative scientific basis for the selection of technical schemes. It shows that the mining of NGH is feasible.

## Review details
Inventory: The internal review was done by several iteration steps concerning raw data validation, raw data documentation, representativity, completeness and consistency of modelling with regard to ISO 14040 and 14044.; Documentation: The review of the documentation was performed by Ecobilan and is in compliance with ISO 14040 and 14044. The data set documentation is correct in view of the appropriateness of the information provided. It includes all relevant information in view of data quality and scope of application of the respective LCI result.

## Data sources
- 樊栓狮;梁华杰;郎雪梅;王燕鸿; 天然气水合物开采的全生命周期分析. 天然气化工(C1化学与化工) 73–78 (2010).
