# 土壤修复;原位修复;土壤气相抽提;建设阶段;材料运输

Dataset: ILCD process, Unit process, single operation
Geography: KR
Reference year: 2011
Classification: Other Services / Repair and maintenance
Generated by: 雷秋霜, leiqs@caep.org.cn
Owner: 天工LCI数据工作小组
Review: Dependent internal review by 天工LCI数据工作小组
Amounts: no units in this file; such an amount is in the reference unit of its flow, which a separate flow dataset defines
copyright: false
licenseType: Free of charge for all users and uses

## General comment
此工艺流程用于原位土壤修复，运用土壤气相抽提技术(SVE)。这份数据集可适用于旨在清洁被污染土地的环境工程项目。当存在挥发性有机化合物(VOCs)时，常常使用SVE方法。建设阶段和材料运输特定于需要现场设置SVE系统和设备的项目。

## Reference product
- Equipment and Materials Arriving on Site: 99800; measured
  运输到场地的材料

## Inputs
- transport in t*km: 2994; measured

## Use advice
使用者在应用此数据时应考虑其环境修复项目的范围。在计算环境影响时，必须考虑运输距离（往返30公里）和所有材料的质量（99.8吨）。数据仅适用于SVE设置的建设阶段，用户应确保与相关的地方环境法规和标准兼容。方法学建议包括考虑系统边界以包括或排除上游活动（如材料生产）和下游过程（如维护）。

## Review details
清单： 内部审查通过几个迭代步骤完成，涉及原始数据验证、原始数据记录、代表性、完整性、与 ISO 14040 和 14044 有关的建模的一致性。

## Data sources
- Assessment of Environmental Impacts and CO2 Emissions from Soil Remediation Technologies using Life cycle Assessment - Case Studies on SVE and Biopile Systems
