# 土壤修复;异位修复;土壤淋洗;土柱淋洗;黄腐酸溶液淋洗 ;得到修复的土柱

Dataset: ILCD process, Unit process, single operation
Geography: CN
Reference year: 2023
Classification: Unit processes / Other Services / Repair and maintenance
Generated by: 黄悦, huangyue@caep.org.cn
Owner: 天工LCI数据工作小组
Review: Dependent internal review by 天工LCI数据工作小组
Amounts: no units in this file; such an amount is in the reference unit of its flow, which a separate flow dataset defines
copyright: false
licenseType: Free of charge for all users and uses

## General comment
使用鼠黄腐酸溶液淋洗受污染土柱，得到修复后的土柱

## Technical purpose
该工业流程用于土壤修复，具体使用异位土柱淋洗技术。使用黄腐酸溶液淋洗受污染的土柱，以获取修复后的土壌。该方法通常用于环境工程，清洁受污染或危险废物污染的土壤，使其适合安全处理或重复使用。

## Reference product
- Remediated soil columns: 0.0008

## Inputs
- Humic Acid: 0.0018
- Activated Carbon: 0.0251
- Tap Water: 0.00553
- Electricity: 0.432
- Contaminated soil columns: 0.0008

## Outputs
- quartz sand: 0.09
- polycyclic aromatic hydrocarbons: 0.00042, 0.0246 (2 entries)

## Use advice
在使用该数据集进行生命周期评估时，用户必须确保充分考虑与该过程相关的所有主要原材料和能源消耗。应考虑黄腐酸溶液的来源及其对整体环境影响的效果。如果修复过程产生副产品，也必须包括其后续管理在评估中。数据用户在模型中应考虑使用阶段的行为特性，包括不同类型的污染物以及对不同类型土壤修复效果的具体特性。

## Review details
清单： 内部审查通过几个迭代步骤完成，涉及原始数据验证、原始数据记录、代表性、完整性、与 ISO 14040 和 14044 有关的建模的一致性。

## Data sources
- 张雅鑫 et al. 基于生命周期评价的焦化污染土壤 淋洗技术环境影响研究. 安全、健康和环境 23, (2023).
