# 华东水稻; 上海水稻生产;除菌

Dataset: ILCD process, Unit process, single operation
Geography: SH-CN
Reference year: 2012
Valid until: 2014
Classification: Unit processes / Materials production / Food and renewable raw materials
Functional unit: 1 t
LCI method principle: Attributional
LCI method approaches: Consequential
Generated by: Haoran Zhang, hrzhang@whu.edu.cn
Owner: 天工LCI数据工作小组
Review: Dependent internal review by 天工LCI数据工作小组
Amounts: no units in this file; such an amount is in the reference unit of its flow, which a separate flow dataset defines
copyright: false
licenseType: Free of charge for all users and uses

## General comment
参照PAS2050规范并结合生命周期评价方法对上海市水稻生产进行了碳足迹评估

## Geography
崇明

## Technology and included processes
主要参照 PAS2050 规范并结合 LCA 方 法进行水稻生产的碳足迹计算。PAS2050 全称“公 众可获 取 的 规 范”( Publicly Available Specification， PAS) ，由英国标准协会( British Standard Institution， BSI) 编制，旨在对产品和服务生命周期内温室气体 排放的评价要求做出明确的规定［19］。

## Technical purpose
该数据集代表了华东上海水稻生产过程中的碳足迹，包括除菌阶段。该信息对于监测谷类作物种植，特别是水稻的气候影响的农业和环境分析师来说是相关且重要的。这些信息对于致力于可持续农业并希望改进水稻生产实践的制造商、农业企业和认证机构至关重要。

## Reference product
- rice: 1000; measured

## Inputs
- Insecticide: 0.406674; calculated

## Outputs
- carbon dioxide (fossil),carbon dioxide (fossil): 0.0019; calculated

## Deviations from the LCI method approaches
主要参照PAS2050 规范并结合LCA方法进行水稻生产的碳足迹计算。PAS2050 全称“公众可获取的规范” ( Publicly Available Specification, PAS)

## Data selection and combination
水稻碳足迹的初级活动水平数据包括田间各项作业活动, 加工存储各项作业活动、深加工与产品包装以及田间温室气体散逸等活动水平数据。

## Data treatment and extrapolations
包括田间作业、稻谷加工、温室气体排放检测

## Use advice
用户应将此数据应用于指定系统边界内的农作物种植范围，该范围包括肥料和电力的生产直到农产品和污染物的产出。该数据集用于碳足迹评估，不应用于农业生产和作物生产系统之外。它未考虑产品销售、消费者使用或处置和回收过程等方面。在使用此数据集时，必须严格遵守PAS2050指南和LCA方法论指导。

## Review details
清单： 内部审查通过几个迭代步骤完成，涉及原始数据验证、原始数据记录、代表性、完整性、与 ISO 14040 和 14044 有关的建模的一致性。

## Data sources
- 曹黎明,李茂柏,王新其,赵志鹏,潘晓华.基于生命周期评价的上海市水稻生产的碳足迹[J].生态学报,2014,34(02):491-499.
