# 钢铁产品;钢铁;原生钢铁生产

Dataset: ILCD process, Unit process, single operation
Geography: JL-CN
Reference year: 2016
Classification: Unit processes / Materials production / Metals and semimetals
Generated by: 王环宇, wanghuanyu00@126.com
Owner: 天工LCI数据工作小组
Review: Dependent internal review by 天工LCI数据工作小组
Amounts: no units in this file; such an amount is in the reference unit of its flow, which a separate flow dataset defines
copyright: false
licenseType: Free of charge for all users and uses

## General comment
此数据集代表原生钢铁生产过程，包括将铁矿石、石灰石和焦炭等原材料转化为生铁的步骤。从此过程得到的钢铁产品用途广泛，包括用于建筑业、汽车制造、造船、基础设施以及家用电器和机械的生产。

## Reference product
- iron: 1000; measured
  钢材

## Inputs
- Energy, geothermal, converted: 20491.9; measured
  标煤

## Outputs
- phenol,Sulphur oxides (as SO2): 1.227; measured
- nitrogen monoxide: 2.324; measured

## Use advice
在使用本数据集进行生命周期评估时，用户应考虑原生钢铁生产过程中使用的具体技术和能源来源，因为它们可以显著影响环境影响。重要的是注意数据是否反映了特定的地理区域和时间段，以确保在LCA建模中的准确性。钢铁回收应根据建模的生命周期末端情景进行考虑。用户应该意识到共产品和副产品潜在的分配程序，以确保在环境分析中进行一致和公平的核算。

## Review details
清单： 内部审查通过几个迭代步骤完成，涉及原始数据验证、原始数据记录、代表性、完整性、与 ISO 14040 和 14044 有关的建模的一致性。

## Data sources
- 王宪恩, 栾天阳, 陈英姿, & 段海燕. 基于LCA的废旧资源循环利用节能减排效果评估模式与方法研究——以吉林省某钢铁企业为例. 中国人口·资源与环境 26, 69–77 (2016).
