# 西瓜生产

Dataset: ILCD process, Unit process, black box
Geography: IR
Reference year: 2012
Valid until: 2013
Classification: Unit processes / Materials production / Agricultural production means
Functional unit: One hectare of watermelon land
Generated by: 朱娴, zzhu0918@163.com
Owner: 天工LCI数据工作小组
Review: Dependent internal review by 天工LCI数据工作小组
Amounts: no units in this file; such an amount is in the reference unit of its flow, which a separate flow dataset defines
copyright: false
licenseType: Free of charge for all users and uses

## General comment
种植前的西瓜种子及材料的准备工作，播种以及种植后的浇水、施肥等过程，以及西瓜的收获。

## Geography
伊朗中部的克尔曼省,具体到该省南部的吉罗夫特市

## Technical purpose
该数据集描述了伊朗中部克尔曼省南部吉罗夫特市西瓜种植过程。包括整个种植周期：种植前西瓜种子及材料的准备、播种、种植后的浇水和施肥，以及从一公顷土地上收获西瓜。该信息适用于农业科学家、园艺师和环境分析师，他们对于研究、农业规划和环境影响评估中的西瓜生产生命周期评估感兴趣。

## Reference product
- Watermelon: 19945; measured

## Inputs
All rows: measured
- Nitrogenous fertilizer: 159.3
- Phosphate fertilizer: 145.5
- Potassium fertilizer: 148.8
- Farmyard manure: 162.5
- Electricity: 32570.3
- Labor: 10.7208
- diesel oil: 0.0626
- waste incineration of plastics (rigid PVC): 84.1
- Seeds: 1.5

## Use advice
在使用此数据集进行生命周期评估时，用户应考虑克尔曼省吉罗夫特地区的特定农业实践。该数据代表干旱地区大规模种植西瓜的情况，但可能需要调整以适应其他地区的本地农业条件。关注系统边界：数据包括从种植前准备到收获的实践，但不包括收获后加工和分配。在模型系统扩展或替代时，应包括特定于该地区实践的潜在副产品或废物处理方法。

## Review details
清单： 内部审查通过几个迭代步骤完成，涉及原始数据验证、原始数据记录、代表性、完整性、与 ISO 14040 和 14044 有关的建模的一致性。
