# 土壤和地下水修复;原位;土壤生物通风;得到修复的土壤

Dataset: ILCD process, Unit process, single operation
Geography: US
Reference year: 2009
Classification: Unit processes / Other Services / Repair and maintenance
Generated by: 王宁, wang_ning@caep.org.cn
Owner: 天工LCI数据工作小组
Review: Dependent internal review by 天工LCI数据工作小组
Amounts: no units in this file; such an amount is in the reference unit of its flow, which a separate flow dataset defines
copyright: false
licenseType: Free of charge for all users and uses

## General comment
使用电力运行生物通风系统，使受污染的土壤得到修复

## Technology and included processes
使用电力驱动土壤通风系统，使受污染的土壤得到修复

## Technical purpose
此工业过程专为环境修复目的设计。它通过生物通风使用电力系统原位应用于受污染土壤的修复，以实现土壤脱污。在土壤污染是一个问题并且需要修复以恢复土壤的自然状态和功能的环境工程领域中常见使用。

## Reference product
- Remediated soil: 1; estimated

## Inputs
- Electricity: 63072; estimated
- contaminated soil: 1; estimated
- injection well: 1; estimated

## Use advice
在使用此数据集进行生命周期评估时，确保评估范围包括生物通风修复过程中的电能消耗是至关重要的。用户必须考虑输入电力的质量和来源。此外，必须考虑修复前受污染土壤的状态及其处理后的潜在用途。如果数据集用于涉及不同修复技术或与所描述的生物通风方法明显不同的过程，则不应使用该数据集。如果适用，还应考虑材料的生命终止处理或回收。

## Review details
清单： 内部审查通过几个迭代步骤完成，涉及原始数据验证、原始数据记录、代表性、完整性、与 ISO 14040 和 14044 有关的建模的一致性。

## Data sources
- Dhaliwal, H. Sustainable site remediation : a life cycle assessment approach.
