# 熟料煅烧;熟料;预分解窑

Dataset: ILCD process, Unit process, single operation
Geography: CN
Classification: Unit processes / Materials production / Other mineralic materials
Generated by: #REF!, ysqsophia@gmail.com
Owner: 天工LCI数据工作小组
Review: Dependent internal review by 天工LCI数据工作小组
Amounts: no units in this file; such an amount is in the reference unit of its flow, which a separate flow dataset defines
copyright: false
licenseType: Free of charge for all users and uses

## General comment
以常见的预分解窑为研究对象。

## Technical purpose
该数据集代表使用常见的预分解窑进行水泥熟料生产的过程。所产生的水泥熟料通常用于建筑行业，作为生产水泥的原材料，水泥是混凝土、砂浆和其他建筑材料的基本成分。

## Model description
功能单元为1吨水泥熟料。研究范围：水泥煅烧。

## Reference product
- clinker: 1000
  熟料

## Inputs
- limestone, crushed, for mill: 1207.3
  石灰石
- clay: 282.4
  粘土
- iron, powder: 28.2
  铁粉
- hard coal; 26.3 MJ/kg: 133.3
  燃煤。能耗数据来自文献，燃煤热值以5500kcal/kg计，固定碳以50%计。
- Electricity: 312.66
  电。能耗数据来自文献。

## Outputs
- carbon dioxide (fossil): 752.53
  CO2。燃煤CO2由固定碳计算而来，原料CO2按碳酸钙Cao含量为50%计算得到。
- carbon monoxide (fossil): 4.5
  CO。CO排放按废气浓度算得。
- sulfur dioxide: 0.0869
  SO2。NOx、SO2量由建材行业平均排放因子计算。
- Nitrogen oxides: 0.5545
  NOx。NOx、SO2量由建材行业平均排放因子计算。
- hydrocarbons (unspecified): 0.0226
  CxHy。由于缺乏来源，其它污染数据参考电厂燃煤按能耗换算得到。

## Use advice
使用该数据集的用户在模拟环境影响时，应考虑使用预分解窑熟料生产的特定条件和排放。功能单元定义为1吨水泥熟料；用户应确保其计算结果归一化到该功能单元。请注意，如果后续流程(如研磨、混合和其他添加剂混合)包含在生命周期评估的范围内，则应分别考虑。

## Review details
清单： 内部审查通过几个迭代步骤完成，涉及原始数据验证、原始数据记录、代表性、完整性、与 ISO 14040 和 14044 有关的建模的一致性。

## Data sources
- 刘顺妮. (2003). 水泥-混凝土体系环境影响评价及其应用研究 [博士, 武汉理工大学].
