# 电力生产 ; 混合电力 ; 河南

Dataset: ILCD process, Unit process, single operation
Geography: HEN-CN
Reference year: 2019
Classification: Unit processes / Energy carriers and technologies / Electricity
Generated by: 熊若熙, xiongrx0126@163.com
Owner: 天工LCI数据工作小组
Review: Dependent internal review by 天工LCI数据工作小组
Amounts: no units in this file; such an amount is in the reference unit of its flow, which a separate flow dataset defines
copyright: false
licenseType: Free of charge for all users and uses

## General comment
混合电力产生形式包括火力发电、水力发电、风力发电、核能发电和太阳能发电

## Technical purpose
来自河南的混合电力用于包括居民、商业和工业用途在内的多种应用。该电力混合包括热能（煤、天然气、石油）、水力发电、风力、核能和太阳能等各种形式的发电，反映了该地区综合性的发电特性。此数据集代表了河南的电力概况，并可用于评估在该省消耗电力对各种终端用途的环境影响。

## Reference product
- Electricity: 3.6; missing unimportant
  [{'text': '3.6', 'type': 'text'}]

## Inputs
All rows: missing unimportant
- electricity for thermal power: 3.18248
  [{'text': '3.6', 'type': 'text'}]
- electricity from hydroelectric power plant: 0.180716
  [{'text': '3.6', 'type': 'text'}]
- electricity for nuclear power: 0
  [{'text': '3.6', 'type': 'text'}]
- electricity from wind power: 0.109678
  [{'text': '3.6', 'type': 'text'}]
- electricity for solar power: 0.127123
  [{'text': '3.6', 'type': 'text'}]

## Use advice
在应用该数据集进行生命周期评估（LCA）时，用户应根据数据代表的河南平均能源组合来计算。重要的是要注意，能源来源的地区差异可能会导致环境影响的差异。应考虑可能影响能源组合的时间方面，如水电的季节性供应。如果评估专注于特定行业，请将此数据集的使用与行业特定的能源消费模式对齐。为了方法论上的一致性，用户还应考虑与数据收集年份相对应的技术和能源效率。

## Review details
清单： 内部审查通过几个迭代步骤完成，涉及原始数据验证、原始数据记录、代表性、完整性、与 ISO 14040 和 14044 有关的建模的一致性。

## Data sources
- 能源统计年鉴2020
