# 土壤修复;异位修复;热脱附;案例2;污染土挖掘;挖掘出的土壤

Dataset: ILCD process, Unit process, single operation
Geography: FI
Reference year: 2017
Classification: Unit processes / Other Services / Repair and maintenance
Generated by: 王宁, wang_ning@caep.org.cn
Owner: 天工LCI数据工作小组
Review: Dependent internal review by 天工LCI数据工作小组
Amounts: no units in this file; such an amount is in the reference unit of its flow, which a separate flow dataset defines
copyright: false
licenseType: Free of charge for all users and uses

## General comment
使用挖掘机将污染土壤挖掘出来

## Technology and included processes
场地污染无土壤方量为45916m3，挖掘机效率为44.6 m3/ h，耗油量为22l/h

## Technical purpose
此过程用于环境修复，具体是挖掘和热脱附污染土壤，适用于原位治疗不可行或无效的情况。该工艺通常用于处理大量土壤污染，需要挖掘大量土壤以便后续的脱污处理。然后使用热脱附技术处理挖掘出的土壤，去除污染物，之后土壤才被认为是干净且潜在可重复使用的。

## Reference product
- Excavated soil,Excavated soil: 45916; measured

## Inputs
- Diesel,Diesel: 22.6492; measured

## Use advice
使用此数据集的用户应确保LCA数据正确反映了从污染程度和土壤量类似的现场挖掘和处理污染土壤的过程。必须考虑包括挖掘机的燃油消耗在内的所有能源输入，以及热脱附阶段所需的任何额外运输或能源。当将这些数据纳入更广泛的LCA模型时，用户应考虑物质恢复潜力以及最终处置去污土壤的环境影响。应审查数据的技术适用性，以确保符合当地环境法规和处理标准。

## Review details
清单： 内部审查通过几个迭代步骤完成，涉及原始数据验证、原始数据记录、代表性、完整性、与 ISO 14040 和 14044 有关的建模的一致性。

## Data sources
- Song, Y. et al. Environmental and socio-economic sustainability appraisal of contaminated land remediation strategies: A case study at a mega-site in China. Science of The Total Environment 610–611, 391–401 (2018).
