# 华东(恒台)玉米生产 ; 玉米种植（N1）

Dataset: ILCD process, Partly terminated system
Geography: ZB-SD-CN
Reference year: 2003
Valid until: 2004
Classification: Unit processes / Materials production / Food and renewable raw materials
Functional unit: 1t
Generated by: Haoran Zhang, hrzhang@whu.edu.cn
Owner: 天工LCI数据工作小组
Review: Dependent internal review by 天工LCI数据工作小组
Amounts: no units in this file; such an amount is in the reference unit of its flow, which a separate flow dataset defines
copyright: false
licenseType: Free of charge for all users and uses

## General comment
本文把研究对象分为3个阶段即原料开采与 运输阶段、农用化学品生产与运输阶段和夏玉米田 间种植阶段分别简称原料阶段、农资阶段和种植 阶段．原料阶段的影响包括矿石和化石能源开采等 引起的能源与资源消耗及污染排放；农资阶段的影 响有农用化学品生产所导致的大量能源消耗和废 水、废气及污染物排放；种植阶段的影响包括整地、 灌溉、施肥、病虫害防治等管理措施引起的燃料、电 力、水资源消耗及径流、淋溶、挥发等过程的污染物 排放；各阶段中运输过程的影响主要是燃料消耗及 由此产生的尾气排放．

## Geography
恒台县

## Technology and included processes
依据ＩＳＯ（2006）提出的ＬＣＡ原则与框架ＬＣＡ 由4个相互关联的阶段组成即：目标定义与范围界 定（ｇｏａｌａｎｄｓｃｏｐｅｄｅｆｉｎｉｔｉｏｎ）、清单分析（ｉｎｖｅｎｔｏｒｙ）、 影响评价（ｉｍｐａｃｔａｓｓｅｓｓｍｅｎｔ）和生命周期解释 （ｉｎｔｅｒｐｒ

## Technical purpose
该数据集涉及中国东部恒台县的玉米种植，重点评估原料阶段、农用投入品阶段和种植阶段环境影响的生命周期。数据集旨在用于环境绩效评价、政策制定和农业实践优化，特别关注玉米生产过程中资源消耗和SO2、CH4、CO2、CO、N2O、COD、NH3和NOx等污染物的排放。

## Reference product
- maize grain: 1000; measured

## Outputs
All rows: measured
- water: 192
  N1
- carbon monoxide (fossil): 0.21
  N1
- Nitrogen oxides: 0.18, 2.13 (2 entries)
  N1
- carbon dioxide (fossil),carbon dioxide (fossil): 979.07
  N1
- methane (fossil),methane (fossil): 0.67
  N1
- sulfur dioxide: 1.5
  N1
- ammonia: 2.06
  N1
- nitrate: 0.5
  N1
- ammonium: 0.26
  N1
- nitrogen, total (excluding N2): 0.02
  N1
- phosphorus, total: 0.03
  N1
- chemical oxygen demand: 0.19
  N1

## Deviations from the LCI method approaches
研究的起始边界从与夏玉米生命周期有关的 矿石和能源开采开始终止边界为作物种植管理输 出农产品和污染物

## Data selection and combination
原料阶段和农资阶段的能耗、水耗等技术经济 指标来自《中国统计年鉴》（2005～2008）、《中国环 境年鉴》（2004～2006）、《中国能源统计年鉴》（2004 ～2006）、《中国化学工业年鉴》（2006）和《中国电力 年鉴》（2005～2006）等种植阶段的相关数据来自 田间记录．各阶段主要的大气污染物和水污染物包 括ＳＯ2、ＣＨ4、ＣＯ2、ＣＯ、Ｎ2Ｏ、ＣＯＤ、ＮＨ3和ＮＯｘ等其 排放系数来自国内公开发表文献（狄向华等2005； 胡志远等2006；段宁2007）．种植阶段与碳、氮有 关的各种排污系数来自中国农业大学山东桓台实 验站及其它研究机构在华北平原开展的研究报道

## Data treatment and extrapolations
分为特 征化、标准化和加权评估3个步骤

## Sampling procedure
中国农业大学山东桓台实验站2003～ 2004年夏玉米肥料实验的4个施氮处理为典型研 究对象4个氮肥处理用量分别是0、100、200、300 ｋｇ·ｈｍ—2·ａ—1分别以Ｎ0、Ｎ1、Ｎ2、Ｎ3表示

## Use advice
在使用这些数据进行华东玉米生产的生命周期评估（LCA）时，用户必须将指定的施氮量（N0、N1、N2、N3）视为方法学边界的一部分。必须包括来自矿石开采、农用化学品生产和种植各阶段的排放。确保采用引用来源的排放系数以获得准确评估。方法论应遵循特征化、标准化和加权评估的三个步骤，同时承认所描述的能源、水和排放。

## Review details
清单： 内部审查通过几个迭代步骤完成，涉及原始数据验证、原始数据记录、代表性、完整性、与 ISO 14040 和 14044 有关的建模的一致性。

## Data sources
- 王明新,吴文良,夏训峰. 2010. 华北高产粮区夏玉米生命周期环境影响评价 [J]. 环境科学学报 30(6): 1339—1344
