# 液态铝电解电容器 (LAEC) 运输 ; 液态铝电解电容器 (LAEC)

Dataset: ILCD process, Unit process, single operation
Geography: CN
Reference year: 2022
Classification: Unit processes / Transport services / Other transport
Generated by: 封羽真, fyz22
Owner: 天工LCI数据工作小组
Review: Dependent internal review by 天工LCI数据工作小组
Amounts: no units in this file; such an amount is in the reference unit of its flow, which a separate flow dataset defines
copyright: false
licenseType: Free of charge for all users and uses

## General comment
接着48，待定，不知道什么是Total freight volume

## Time period
文献发表于2022-11-15，文献中 The reference year of the elementary data (alumminum ingots, separator paper, tansport, electricity, and water) is around 2016 and qcruired from the Gabi database (Version: 10.6.1.35)

## Technical purpose
液态铝电解电容器（LAEC）由于其高电容量和电压等级，在各种电子设备中得到广泛应用。这些电容器通常用于电源、音频应用以及电路中的过滤器。描述的过程涉及LAEC的运输，这是从生产地到包括电子设备制造商和批发商在内的各种客户的关键步骤。

## Reference product
- capacitor, electrolyte type, > 2cm height: 1e6; measured

## Inputs
- transport, freight, lorry 16-32 metric ton, unregulated: 691.38; missing unimportant
- capacitor, electrolyte type, > 2cm height: 1e6; measured

## Data selection and combination
三种 AEC 的材料信息和性能参数均来自被调查的制造商。此外，通过对 AEC 行业的几家工厂进行实地调研，获得了铝坯箔制造（由铝锭制成）、阳极/阴极箔制造（由铝坯箔制成）和电容器制造的原始数据。由于技术保密原因，无法直接从供应商处获得 PHAEC 阴极箔制造的 LCI 数据。因此，考虑到两者的相似性，根据 PAECs 阴极箔的涂层工艺数据调整 PHAECs 阴极铝箔的制造 LCI。在运输阶段，主要原材料从材料产地到电容器制造商的数据以及电容器制成品从制造商到客户的数据均来自制造商的供应链系统。使用阶段的能耗是根据 AEC 的物理方程和电气参数计算得出的。为确保分析的完整性，在分析和计算的基础上获得报废阶段的数据。基本数据的参考年份约为 2016 年。基本数据（即铝锭、分离纸、运输、电力和水）来自 Gabi 数据库（版本：10.6.1.35）。此外，一些背景数据，包括 3，4-乙烯二氧噻吩（EDOT）、己二酸铵、柠檬酸铵等，在 Gabi 数据库中无法获得。它们是根据 Gabi 数据库中现有原材料在材料制备过程中发生的化学反应估算出来的。用于制造 PHAECs 的分散溶液（PEDOT:PSS，1%wt）的制备过程数据是根据实验室数据按比例计算的。三种 AEC 的详细 LCI 数据和物质流的单位影响见辅助信息 B 的第 5-7 张和第 2 张。

## Use advice
液态铝电解电容器（LAEC）运输生命周期评价（LCA）数据的用户应注意，基础数据的参考年份约为2016年。由于技术的进步和生产过程的变化，用户必须考虑数据的时间相关性。对于Gabi数据库中未包含的任何材料或过程，用户应基于类似的化学反应推导估计值，或咨询替代数据库或文献以获取适当的代理数据。应特别注意在PHAECs的阴极箔的保密调整制造LCI数据。在利用供应链背景下的运输阶段数据时，确保运输距离和模式代表当前实践。最后，在使用使用阶段的能源消耗数据时，用户应根据适用于当前AEC模型的最新电气参数和物理方程更新这些数字。

## Review details
清单： 内部审查通过几个迭代步骤完成，涉及原始数据验证、原始数据记录、代表性、完整性、与 ISO 14040 和 14044 有关的建模的一致性。

## Data sources
- Zhang, C., Zheng, Y., Jing, J., Liu, Y. & Huang, H. A comparative LCA study on aluminum electrolytic capacitors: From liquid-state electrolyte, solid-state polymer to their hybrid. J. Clean. Prod. 375, (2022).
