# PVC wood-plastic board production | CN

Dataset: ILCD process
Geography: CN
Classification: Materials production / Other mineralic materials
Generated by: Jiaqi Lu, wilsherelu@foxmail.com
Review: Dependent internal review by Tiangong LCI Data Working Group
Amounts: no units in this file; such an amount is in the reference unit of its flow, which a separate flow dataset defines
copyright: false

## Reference product
- PVC Wood Plastic Composite: 1000; missing unimportant
  PVC 木塑板产品

## Inputs
All rows: missing unimportant
- Bis(2-ethylhexyl) terephthalate: 5.2
  对苯二甲酸二辛酯
- Antioxidant: 0.26
  抗氧化剂
- Magnesium Aluminide: 3.4
  镁铝化合物
- Wood: 102.57
  木粉
- calcium carbonate: 359.3
  碳酸钙
- Zinc stearate: 21.58
  硬脂酸锌
- polyvinylchloride resin (E-PVC): 506.86
  PVC树脂
- stearoyl benzoyl methane: 0.52
  β— 二酮
- electricity mix: 873.684
  电耗
- water: 399.21
  水耗

## Outputs
All rows: missing unimportant
- Nitrogenous Matter (unspecified, as N): 0.00526
  氨氮[排放到水体（未指定类型）
- 1,2-dichloroethane: 0.000535
  二氯乙烯[排放到大气（未指定类型）]
- chemical oxygen demand: 0.05
  化学需氧量[排放到水体（未指定类型）]
- hydrogen chloride: 0.009
  氯化氢[排放到大气（未指定类型）]
- Particles (PM0.2 - PM2.5): 0.12
  总颗粒物[排放到大气（未指定类型）]
- phosphorus, total: 0.0006
  总磷[排放到水体（未指定类型）]

## Review details
Inventory: The internal review was done by several iteration steps concerning raw data validation, raw data documentation, representativity, completeness and consistency of modelling with regard to ISO 14040 and 14044.; Documentation: The review of the documentation was performed by Ecobilan and is in compliance with ISO 14040 and 14044. The data set documentation is correct in view of the appropriateness of the information provided. It includes all relevant information in view of data quality and scope of application of the respective LCI result.

## Data sources
- 年生产PVC木塑板线条1000吨项目环评报告公示
