# Soil and Groundwater Remediation;In Situ;Soil Bioventilation; Soil Remediated

Dataset: ILCD process, Unit process, single operation
Geography: CA
Reference year: 2007
Classification: Other Services / Repair and maintenance
Generated by: Wang Ning, wang_ning@caep.org.cn
Owner: Tiangong LCI Data Working Group
Review: Dependent internal review by Tiangong LCI Data Working Group
Amounts: no units in this file; such an amount is in the reference unit of its flow, which a separate flow dataset defines
copyright: false
licenseType: Free of charge for all users and uses

## General comment
Contaminated soil remediated by using electricity to run a bioventilation system

## Geography
The contaminated area was located 600 m from a river shore in the northern part of the prov-ince of Quebec， Canada.

## Technology and included processes
Remediation of contaminated soil using electrically powered soil aeration systems

## Technical purpose
The data set describes an in-situ soil bioventilation process designed to remediate contaminated soil. The process involves the use of electrically powered soil aeration systems to treat polluted sites by enhancing microbial degradation of contaminants in the soil. This remediation technique is applied directly at the contaminated site, eliminating the need for soil excavation or transport. It is a suitable method for soil restoration projects near water bodies, such as rivers, where minimizing environmental disruption is crucial. This particular instance of soil bioventilation is used within the context of a contaminated area located 600 m from a river shore in the northern part of Quebec, Canada.

## Reference product
- Remediated soil: 1; estimated
  得到修复的土壤

## Inputs
- Electricity: 174000; estimated
  生物通风系统运行所消耗的电力
- contaminated soil: 1; estimated
  受污染的土壤

## Use advice
When utilizing this data set, it is important to consider the specific context of the soil bioventilation process, as outcomes may vary depending on regional environmental conditions, such as soil composition and climate. This data should be applied to contexts with similar geographical and environmental characteristics for accurate impact assessment. Users must account for the electricity consumption of the soil aeration systems, and they should ensure the appropriate modelling of the electricity mix used in the process. Additionally, the direct emissions associated with the operation should be considered, and any transport or indirect emissions should be included if they are relevant to the remediation activity being assessed.

## Review details
Inventory: The internal review was done by several iteration steps concerning raw data validation, raw data documentation, representativity, completeness and consistency of modelling with regard to ISO 14040 and 14044.
