# 氧化铝生产; 冶金用氧化铝 ; 铝土矿 ; 2017年

Dataset: ILCD process, Unit process, single operation
Geography: CN
Reference year: 2021
Classification: Unit processes / Materials production / Non-energetic raw materials
Generated by: 蔡梓萌, caizm6178@163.com
Owner: 天工LCI数据工作小组
Review: Dependent internal review by 天工LCI数据工作小组
Amounts: no units in this file; such an amount is in the reference unit of its flow, which a separate flow dataset defines
copyright: false
licenseType: Free of charge for all users and uses

## General comment
氧化铝生产2017

## Time period
文献发表日期

## Technical purpose
本工艺产出的氧化铝专用于冶金应用。它被用作通过电解霍尔-埃鲁法生产铝金属的前体。冶金级氧化铝被用于铝锭、板材、箔材以及金属铸造和轧制行业中的其他铝产品的生产。

## Reference product
- aluminium oxide, metallurgical: 1000; software or database
  alumina

## Inputs
All rows: software or database
- soda ash, dense: 162.85
  soda ash
- Petroleum Coke: 853.311
  Energy sources proportion of energy consumption is coal: fuel oil: coke: natural gas: coke even gas=46.0%: 11.0%: 7.1%: 14.1%: 21.7%
- coal gas: 2608.01
  (same comment as for Petroleum Coke)
- natural gas, high pressure: 1694.6
  (same comment as for Petroleum Coke)
- fuel oil, unspecified: 1322.03
  (same comment as for Petroleum Coke)
- hard coal: 5528.49
  (same comment as for Petroleum Coke)
- Water, unspecified natural origin: 1.53
  water consumption

## Data selection and combination
本研究的数据参考了PA、SA、电力等背景数据的LCA数据。PA数据来自统计数据源，SA数据主要来自文献。背景数据主要来自中国科学院生态环境研究中心CASRCEES 2018建立的中国本地化LCA数据库，涵盖能源、材料、交通、废物管理等LCA数据。

## Use advice
在应用此氧化铝生产LCA数据时，用户应确保他们考虑了预期的冶金应用。验证材料回收在生命周期阶段内是否已准确核算至关重要，以符合提及的技术适用性。此外，用户必须参考定义的背景数据来源，特别是关注2017年的数据，并且如果将LCA应用于不同的时间背景，可能需要更新或调整这些数据点。如果生产过程已经演变，或应用了更新的技术，那么LCA数据将需要相应修改，以代表当前状态。

## Review details
清单： 内部审查通过几个迭代步骤完成，涉及原始数据验证、原始数据记录、代表性、完整性、与 ISO 14040 和 14044 有关的建模的一致性。

## Data sources
- Ding, N., Liu, N., Lu, B. & Yang, J. Life cycle greenhouse gas emissions of aluminum based on regional industrial transfer in China. J. Ind. Ecol. 25, 1657–1672 (2021).
