# Alkalimethod|Pharmaceuticalgelatin|Skimmedbeefbone,porkboneparticles,etc.asrawmaterials|Alkalimethod|>1500 t/a / 碱法|药用明胶|脱脂牛骨、猪骨骨粒等为原料|碱法|大于1500吨/年

Dataset: ILCD process, Unit process, single operation
Geography: CN
Reference year: 2019
Classification: Materials production / Organic chemicals
Generated by: The data was created by the Office of the Second National Pollution Source Census of the Ministry of Ecology and Environment, and the data was organized by the TianGong Plan team for ILCD format / 生态环境部第二次全国污染源普查工作办公室创建数据，天工计划团队常慧敏整理数据为ILCD格式
Owner: Tiangong LCI Data Working Group / 天工LCI数据工作小组
Amounts: no units in this file; such an amount is in the reference unit of its flow, which a separate flow dataset defines
copyright: false
licenseType: Free of charge for all users and uses

## Technology and included processes
the Technical of end-of-pipe management technology for pollution volatile organic compoundisPhotolysis，Its Technical efficiency of end-of-pipe management24，The formula for calculating the actual operation rate (k-value) of the end-of-pipe treatment facility is k = operating time of waste gas treatment facilities (hours) / annual normal production time of enterprise (hours)

## Reference product
- Gelatin: 1000; calculated
  源文件中描述为为药用明胶，此处对其进行了匹配工作，将其匹配到LCAflow库里面相最符合的流，污染物指标备注为工业废水量

## Outputs
All rows: calculated
- Waste water: 850000
  污染物指标工业废水量的末端治理技术是/，末端治理设施实际运行率（k值）计算公式为/。原文件中描述污染物类别为废水，污染物指标为工业废水量，此处对其进行了匹配工作，将其匹配到LCAflow库里面相最符合的流，污染物指标备注为工业废水量
- chemical oxygen demand: 266.899
  污染物指标化学需氧量的末端治理技术是A2/O工艺，其效率为70，末端治理设施实际运行率（k值）计算公式为k=设备耗电量（千瓦时）/(设备额定功率（千瓦）×设备运行时间（小时）)。原文件中描述污染物类别为废水，污染物指标为化学需氧量，此处对其进行了匹配工作，将其匹配到LCAflow库里面相最符合的流，污染物指标备注为化学需氧量
- chemical oxygen demand: 222.416
  污染物指标化学需氧量的末端治理技术是SBR类，其效率为75，末端治理设施实际运行率（k值）计算公式为k=设备耗电量（千瓦时）/(设备额定功率（千瓦）×设备运行时间（小时）)。原文件中描述污染物类别为废水，污染物指标为化学需氧量，此处对其进行了匹配工作，将其匹配到LCAflow库里面相最符合的流，污染物指标备注为化学需氧量
- chemical oxygen demand: 222.416
  污染物指标化学需氧量的末端治理技术是生物接触氧化法，其效率为75，末端治理设施实际运行率（k值）计算公式为k=设备耗电量（千瓦时）/(设备额定功率（千瓦）×设备运行时间（小时）)。原文件中描述污染物类别为废水，污染物指标为化学需氧量，此处对其进行了匹配工作，将其匹配到LCAflow库里面相最符合的流，污染物指标备注为化学需氧量
- chemical oxygen demand: 266.899
  污染物指标化学需氧量的末端治理技术是厌氧水解类，其效率为70，末端治理设施实际运行率（k值）计算公式为k=设备耗电量（千瓦时）/(设备额定功率（千瓦）×设备运行时间（小时）)。原文件中描述污染物类别为废水，污染物指标为化学需氧量，此处对其进行了匹配工作，将其匹配到LCAflow库里面相最符合的流，污染物指标备注为化学需氧量
- Ammonia Nitrogen: 6.7761
  污染物指标氨氮的末端治理技术是A2/O工艺，其效率为70，末端治理设施实际运行率（k值）计算公式为k=设备耗电量（千瓦时）/(设备额定功率（千瓦）×设备运行时间（小时）)。原文件中描述污染物类别为废水，污染物指标为氨氮，此处对其进行了匹配工作，将其匹配到LCAflow库里面相最符合的流，污染物指标备注为氨氮
- Ammonia Nitrogen: 5.64675
  污染物指标氨氮的末端治理技术是SBR类，其效率为75，末端治理设施实际运行率（k值）计算公式为k=设备耗电量（千瓦时）/(设备额定功率（千瓦）×设备运行时间（小时）)。原文件中描述污染物类别为废水，污染物指标为氨氮，此处对其进行了匹配工作，将其匹配到LCAflow库里面相最符合的流，污染物指标备注为氨氮
- Ammonia Nitrogen: 5.64675
  污染物指标氨氮的末端治理技术是生物接触氧化法，其效率为75，末端治理设施实际运行率（k值）计算公式为k=设备耗电量（千瓦时）/(设备额定功率（千瓦）×设备运行时间（小时）)。原文件中描述污染物类别为废水，污染物指标为氨氮，此处对其进行了匹配工作，将其匹配到LCAflow库里面相最符合的流，污染物指标备注为氨氮
- Ammonia Nitrogen: 6.7761
  污染物指标氨氮的末端治理技术是厌氧水解类，其效率为70，末端治理设施实际运行率（k值）计算公式为k=设备耗电量（千瓦时）/(设备额定功率（千瓦）×设备运行时间（小时）)。原文件中描述污染物类别为废水，污染物指标为氨氮，此处对其进行了匹配工作，将其匹配到LCAflow库里面相最符合的流，污染物指标备注为氨氮
- phosphorus, total: 5.2482
  污染物指标总磷的末端治理技术是化学沉淀法，其效率为70，末端治理设施实际运行率（k值）计算公式为k=设备耗电量（千瓦时）/(设备额定功率（千瓦）×设备运行时间（小时）)。原文件中描述污染物类别为废水，污染物指标为总磷，此处对其进行了匹配工作，将其匹配到LCAflow库里面相最符合的流，污染物指标备注为总磷
- phosphorus, total: 10.4964
  污染物指标总磷的末端治理技术是A2/O工艺，其效率为40，末端治理设施实际运行率（k值）计算公式为k=设备耗电量（千瓦时）/(设备额定功率（千瓦）×设备运行时间（小时）)。原文件中描述污染物类别为废水，污染物指标为总磷，此处对其进行了匹配工作，将其匹配到LCAflow库里面相最符合的流，污染物指标备注为总磷
- phosphorus, total: 10.4964
  污染物指标总磷的末端治理技术是SBR类，其效率为40，末端治理设施实际运行率（k值）计算公式为k=设备耗电量（千瓦时）/(设备额定功率（千瓦）×设备运行时间（小时）)。原文件中描述污染物类别为废水，污染物指标为总磷，此处对其进行了匹配工作，将其匹配到LCAflow库里面相最符合的流，污染物指标备注为总磷
- phosphorus, total: 10.4964
  污染物指标总磷的末端治理技术是生物接触氧化法，其效率为40，末端治理设施实际运行率（k值）计算公式为k=设备耗电量（千瓦时）/(设备额定功率（千瓦）×设备运行时间（小时）)。原文件中描述污染物类别为废水，污染物指标为总磷，此处对其进行了匹配工作，将其匹配到LCAflow库里面相最符合的流，污染物指标备注为总磷
- phosphorus, total: 10.4964
  污染物指标总磷的末端治理技术是厌氧水解类，其效率为40，末端治理设施实际运行率（k值）计算公式为k=设备耗电量（千瓦时）/(设备额定功率（千瓦）×设备运行时间（小时）)。原文件中描述污染物类别为废水，污染物指标为总磷，此处对其进行了匹配工作，将其匹配到LCAflow库里面相最符合的流，污染物指标备注为总磷
- Nitrogen, organic bound: 8.9454
  污染物指标总氮的末端治理技术是A2/O工艺，其效率为70，末端治理设施实际运行率（k值）计算公式为k=设备耗电量（千瓦时）/(设备额定功率（千瓦）×设备运行时间（小时）)。原文件中描述污染物类别为废水，污染物指标为总氮，此处对其进行了匹配工作，将其匹配到LCAflow库里面相最符合的流，污染物指标备注为总氮
- Nitrogen, organic bound: 7.4545
  污染物指标总氮的末端治理技术是SBR类，其效率为75，末端治理设施实际运行率（k值）计算公式为k=设备耗电量（千瓦时）/(设备额定功率（千瓦）×设备运行时间（小时）)。原文件中描述污染物类别为废水，污染物指标为总氮，此处对其进行了匹配工作，将其匹配到LCAflow库里面相最符合的流，污染物指标备注为总氮
- Nitrogen, organic bound: 7.4545
  污染物指标总氮的末端治理技术是生物接触氧化法，其效率为75，末端治理设施实际运行率（k值）计算公式为k=设备耗电量（千瓦时）/(设备额定功率（千瓦）×设备运行时间（小时）)。原文件中描述污染物类别为废水，污染物指标为总氮，此处对其进行了匹配工作，将其匹配到LCAflow库里面相最符合的流，污染物指标备注为总氮
- Nitrogen, organic bound: 8.9454
  污染物指标总氮的末端治理技术是厌氧水解类，其效率为70，末端治理设施实际运行率（k值）计算公式为k=设备耗电量（千瓦时）/(设备额定功率（千瓦）×设备运行时间（小时）)。原文件中描述污染物类别为废水，污染物指标为总氮，此处对其进行了匹配工作，将其匹配到LCAflow库里面相最符合的流，污染物指标备注为总氮
- Exhaust gas: 33259
  污染物指标工业废气量的末端治理技术是/，末端治理设施实际运行率（k值）计算公式为/。原文件中描述污染物类别为废气，污染物指标为工业废气量，此处对其进行了匹配工作，将其匹配到LCAflow库里面相最符合的流，污染物指标备注为工业废气量
- particles (PM2.5 - PM10): 1.075
  污染物指标颗粒物的末端治理技术是袋式除尘，其效率为95，末端治理设施实际运行率（k值）计算公式为k=设备耗电量（千瓦时）/(设备额定功率（千瓦）×设备运行时间（小时）)。原文件中描述污染物类别为废气，污染物指标为颗粒物，此处对其进行了匹配工作，将其匹配到LCAflow库里面相最符合的流，污染物指标备注为颗粒物
- particles (PM2.5 - PM10): 1.075
  污染物指标颗粒物的末端治理技术是旋风+布袋，其效率为95，末端治理设施实际运行率（k值）计算公式为k=设备耗电量（千瓦时）/(设备额定功率（千瓦）×设备运行时间（小时）)。原文件中描述污染物类别为废气，污染物指标为颗粒物，此处对其进行了匹配工作，将其匹配到LCAflow库里面相最符合的流，污染物指标备注为颗粒物
- ammonia: 0.06
  污染物指标氨的末端治理技术是物理吸附法，其效率为50，末端治理设施实际运行率（k值）计算公式为k=设备耗电量（千瓦时）/(设备额定功率（千瓦）×设备运行时间（小时）)。原文件中描述污染物类别为废气，污染物指标为氨，此处对其进行了匹配工作，将其匹配到LCAflow库里面相最符合的流，污染物指标备注为氨
- ammonia: 0.06
  污染物指标氨的末端治理技术是生物过滤法，其效率为50，末端治理设施实际运行率（k值）计算公式为k=设备耗电量（千瓦时）/(设备额定功率（千瓦）×设备运行时间（小时）)。原文件中描述污染物类别为废气，污染物指标为氨，此处对其进行了匹配工作，将其匹配到LCAflow库里面相最符合的流，污染物指标备注为氨
- volatile organic compound: 0.0512
  污染物指标挥发性有机物的末端治理技术是吸附+蒸气解析，其效率为36，末端治理设施实际运行率（k值）计算公式为k=设备耗电量（千瓦时）/(设备额定功率（千瓦）×设备运行时间（小时）)。原文件中描述污染物类别为废气，污染物指标为挥发性有机物，此处对其进行了匹配工作，将其匹配到LCAflow库里面相最符合的流，污染物指标备注为挥发性有机物
- volatile organic compound: 0.0512
  污染物指标挥发性有机物的末端治理技术是吸附/催化燃烧法，其效率为36，末端治理设施实际运行率（k值）计算公式为k=设备耗电量（千瓦时）/(设备额定功率（千瓦）×设备运行时间（小时）)。原文件中描述污染物类别为废气，污染物指标为挥发性有机物，此处对其进行了匹配工作，将其匹配到LCAflow库里面相最符合的流，污染物指标备注为挥发性有机物
- volatile organic compound: 0.0656
  污染物指标挥发性有机物的末端治理技术是低温等离子体，其效率为18，末端治理设施实际运行率（k值）计算公式为k=设备耗电量（千瓦时）/(设备额定功率（千瓦）×设备运行时间（小时）)。原文件中描述污染物类别为废气，污染物指标为挥发性有机物，此处对其进行了匹配工作，将其匹配到LCAflow库里面相最符合的流，污染物指标备注为挥发性有机物
- volatile organic compound: 0.0608
  污染物指标挥发性有机物的末端治理技术是光解，其效率为24，末端治理设施实际运行率（k值）计算公式为k=设备耗电量（千瓦时）/(设备额定功率（千瓦）×设备运行时间（小时）)。原文件中描述污染物类别为废气，污染物指标为挥发性有机物，此处对其进行了匹配工作，将其匹配到LCAflow库里面相最符合的流，污染物指标备注为挥发性有机物

## Data sources
- 第二次全国污染源普查产排污核算系数手册（试用版）,二级代码27,四级代码2780文件，在完整版文件中第3258页
