# 烧结矿生产;烧结矿;烧结;粉矿

Dataset: ILCD process, Unit process, single operation
Geography: CN
Reference year: 2006
Classification: Unit processes / Materials production / Metals and semimetals
Generated by: 王环宇, wanghuanyu00@126.com
Owner: 天工LCI数据工作小组
Review: Dependent internal review by 天工LCI数据工作小组
Amounts: no units in this file; such an amount is in the reference unit of its flow, which a separate flow dataset defines
copyright: false
licenseType: Free of charge for all users and uses

## General comment
烧结矿生产工业过程主要用于铁矿石细粒的预处理，以形成烧结矿。烧结矿是高炉的输入物料。烧结过程包括加热粉矿至部分熔化点，导致铁矿石粒子聚集成为一个有孔的块状物，称为烧结矿。该过程对于铁和钢铁工业的高效运行至关重要，因为它通过提高燃气透过性和从输入铁矿石中获得更高的产量来改善高炉性能。

## Geography
Z12工厂同一名称的工艺过程

## Reference product
- Sinter / Pellet Dust: 0.3472; measured
  z13

## Inputs
- iron: 928; measured
  含铁原料
- anthracite: 69; measured
  固体燃料/无烟煤
- Energy, geothermal, converted: 2315.3; measured
  z13

## Outputs
- phenol,Sulphur oxides (as SO2): 0.043; measured
  z13
- Flue dust: 0.64; measured
  z13

## Use advice
使用烧结矿生产生命周期评估（LCA）数据集的用户应考虑烧结过程的技术适用性及其与特定项目需求的相关性。确保在分析中使用的系统边界和假设与评估的烧结矿生产实际条件相匹配至关重要。用户还应确保准确模拟烧结过程相关的排放和能源消耗，包括任何上游和下游的环境影响。此外，如果评估系统包括回收再利用，用户需要应用适当的方法论来计算材料回收的优点和负担。

## Review details
清单： 内部审查通过几个迭代步骤完成，涉及原始数据验证、原始数据记录、代表性、完整性、与 ISO 14040 和 14044 有关的建模的一致性。

## Data sources
- 刘微. LCI数据质量体系中的分析方法研究. (北京工业大学, 2006).
