# Petfeed|Protein-basedrawmaterials(soybeanmeal,etc.),corn,vitamins,traceelementsandotherrawandauxiliarymaterials|Crushing+mixing+granulating+dustremoval|All sizes / 宠物饲料|蛋白质类原料（豆粕等）、玉米、维生素、微量元素等原辅料|粉碎+混合+制粒+除尘|所有规模

Dataset: ILCD process, Unit process, single operation
Geography: CN
Reference year: 2019
Classification: Materials production / Food and renewable raw materials
Generated by: The data was created by the Office of the Second National Pollution Source Census of the Ministry of Ecology and Environment, and the data was organized by the TianGong Plan team for ILCD format / 生态环境部第二次全国污染源普查工作办公室创建数据，天工计划团队常慧敏整理数据为ILCD格式
Owner: Tiangong LCI Data Working Group / 天工LCI数据工作小组
Amounts: no units in this file; such an amount is in the reference unit of its flow, which a separate flow dataset defines
copyright: false
licenseType: Free of charge for all users and uses

## Technology and included processes
the Technical of end-of-pipe management technology for pollution Assorted Feedis/，The formula for calculating the actual operation rate (k-value) of the end-of-pipe treatment facility is (After the wastewater is directly discharged into the relevant sewage pipe network, it will be uniformly treated by the industrial park or relevant municipal sewage treatment plants)

## Reference product
- Assorted Feed: 1000; calculated
  源文件中描述为为宠物饲料，此处对其进行了匹配工作，将其匹配到LCAflow库里面相最符合的流

## Outputs
- particles (PM2.5 - PM10): 0.099; calculated
  污染物指标颗粒物的末端治理技术是/，末端治理设施实际运行率（k值）计算公式为/。原文件中描述污染物类别为废气，污染物指标为颗粒物，此处对其进行了匹配工作，将其匹配到LCAflow库里面相最符合的流

## Data sources
- 第二次全国污染源普查产排污核算系数手册（试用版）,三级代码132.0文件，在完整版文件中第2527页
