# Electricity production ; Thermal power ; Jilin

Dataset: ILCD process, Unit process, single operation
Geography: JL-CN
Reference year: 2019
Classification: Unit processes / Energy carriers and technologies / Electricity
Generated by: Ruoxi Xiong, xiongrx0126@163.com
Owner: Tiangong LCI Data Working Group
Review: Dependent internal review by Tiangong LCI Data Working Group
Amounts: no units in this file; such an amount is in the reference unit of its flow, which a separate flow dataset defines
copyright: false
licenseType: Free of charge for all users and uses

## General comment
Thermal power generation includes seventeen fossil fuels such as raw coal, washed coal, oil and natural gas. The process only considers the direct power generation process, not the upstream raw material extraction and processing and the downstream power consumption

## Time period
Calculated based on data from the 2019 Energy Statistics Yearbook

## Technical purpose
The thermal power generation process described is used for producing electricity by combusting various fossil fuels including raw coal, washed coal, oil, and natural gas in Jilin province. It supplies power for residential, commercial, and industrial needs. The data set represents generation of electricity specifically through the combustion of seventeen fossil fuels and it's applicable for large-scale power supply networks.

## Reference product
- electricity for thermal power: 3.6; calculated

## Inputs
All rows: calculated
- Raw coal: 0.481767
- Other Washed Coal: 0.0127396
- Gangue, in ground: 0.0416192
- Coke oven gas: 0.003834
- blast furnace gas: 0.010173
- Converter gas: 0.000494
- Diesel: 4.175e-5
- fuel oil, unspecified: 5.273e-5
- refinery gas: 0.00053613
- natural gas: 0.001483

## Outputs
- carbon dioxide (fossil): 1.08909; calculated
- sulfur dioxide: 0.000186345; calculated
- Nitrogen oxides: 0.000294169; calculated
- particles (> PM10): 3.6203e-5; calculated

## Data treatment and extrapolations
For the accounting method, please refer to the "Enterprise Greenhouse Gas Emissions Accounting Methods and Reporting Guidelines for Power Generation Facilities". Different forms of power generation and fuel consumption come from Chapter 3 (Energy Production) and Chapter 6 (Regional Energy Balance Sheet) in the "China Energy Statistical Yearbook 2020". The fuel parameters such as low calorific value and carbon content per unit calorific value used to calculate the carbon dioxide emission factor come from the "2019 China Regional Power Grid Carbon Dioxide Baseline Emission Factor Calculation Instructions OM" and the "Enterprise Greenhouse Gas Emission Accounting Method and Reporting Guide for Power Generation Facilities" 》

## Use advice
Users should apply the data set for evaluating direct electricity generation operations without considering the upstream raw material extraction or the downstream power consumption. The data are based on the 2019 Energy Statistics Yearbook with emission factors from regional grid baseline reports and enterprise guidelines. Special attention should be given to the methodological advice of the referenced greenhouse gas accounting methods when modeling power generation facilities.

## Review details
Inventory: The internal review was done by several iteration steps concerning raw data validation, raw data documentation, representativity, completeness and consistency of modelling with regard to ISO 14040 and 14044.

## Data sources
- 熊若熙. 中国电力生产和消费二氧化碳与污染物排放因子核算. (清华大学, 2023).
