# cement production|cement, portland cement|post-combustion CO2 capture

Dataset: ILCD process, Unit process, black box
Geography: CN
Reference year: 2008
Classification: Materials production / Other mineralic materials
Generated by: Siqi Yang
Amounts: no units in this file; such an amount is in the reference unit of its flow, which a separate flow dataset defines
copyright: false

## General comment
Cement production with post-combustion carbon capture and storage (CCS).
For post-combustion CO2 capture technology, a CO2 separation process is added before the fluegas is discharged to the atmosphere. The separated high-purity CO2, after being compressed, canthen be transported and stored. Chemical absorption is currently the most widely used method forcapturing CO2 from low pressure and low concentration flue gases, and MonoEthanolAmine (MEA) is the most widely useochemical adsorbent. Therefore, the MEA adsorption method was selected as a case study forpost-combustion CO2 capture technology. Extra energy is required for MEA CO2 capture because MEA has to be regenerated by a large amount of low-pressure steam after the CO2 has been absorbed in the MEA. We assumed that steam will be supplied by an onsite combined heat and power (CHP) plantand that the plant can also meet the power requirements of the post-combustion capture process ancother production processes in the cement plant. NOx and SO2 in the kiln flue gas can have negativeimpacts on the MEA absorption process, so they have to be reduced to the required level before theflue gas is passed to the CO2 capture unit. A selective catalytic reduction (SCR) unit isconsidered to eliminate NOx and a flue gas desulphurization (FDG) unit is considered to remove SO2 from the flue gas.

## Geography
http://documents.ieaghg.org/index.php/s/YKm6B7zikUpPgGA?path=%2F2008

## Reference product
- cement, portland cement: 1000
  Cement products. Data taken from the technical report, IEA Greenhous Gas R&D Programme (IEA GHG). CO2 Capture in the Cement Industry. 2008. Available online: http://documents.ieaghg.org/index.php/s/YKm6B7zikUpPgGA?path=%2F2008 (accessed on 5 September 2017).

## Inputs
All rows: article inperiodical
- hard coal, run-of-mine: 291.6
  Coal. Data taken from the technical report, IEA Greenhous Gas R&D Programme (IEA GHG). CO2 Capture in the Cement Industry. 2008. Available online: http://documents.ieaghg.org/index.php/s/YKm6B7zikUpPgGA?path=%2F2008 (accessed on 5 September 2017).
- petroleum coke: 31.9
  Petroleum coke. Data taken from the technical report, IEA Greenhous Gas R&D Programme (IEA GHG). CO2 Capture in the Cement Industry. 2008. Available online: http://documents.ieaghg.org/index.php/s/YKm6B7zikUpPgGA?path=%2F2008 (accessed on 5 September 2017).
- electricity, medium voltage: -81.828
  Electricity. Data taken from the technical report, IEA Greenhous Gas R&D Programme (IEA GHG). CO2 Capture in the Cement Industry. 2008. Available online: http://documents.ieaghg.org/index.php/s/YKm6B7zikUpPgGA?path=%2F2008 (accessed on 5 September 2017).
- limestone, crushed, for mill: 1258.51
  Limestone. Data taken from the technical report, IEA Greenhous Gas R&D Programme (IEA GHG). CO2 Capture in the Cement Industry. 2008. Available online: http://documents.ieaghg.org/index.php/s/YKm6B7zikUpPgGA?path=%2F2008 (accessed on 5 September 2017).
- ferric oxide: 7.47
  Iron oxide. Data taken from the technical report, IEA Greenhous Gas R&D Programme (IEA GHG). CO2 Capture in the Cement Industry. 2008. Available online: http://documents.ieaghg.org/index.php/s/YKm6B7zikUpPgGA?path=%2F2008 (accessed on 5 September 2017).
- gypsum (desulphurized): 23.63
  Gypsum. Data taken from the technical report, IEA Greenhous Gas R&D Programme (IEA GHG). CO2 Capture in the Cement Industry. 2008. Available online: http://documents.ieaghg.org/index.php/s/YKm6B7zikUpPgGA?path=%2F2008 (accessed on 5 September 2017).
- ammonia, anhydrous, liquid: 1.85
  Ammonia. Data taken from the technical report, IEA Greenhous Gas R&D Programme (IEA GHG). CO2 Capture in the Cement Industry. 2008. Available online: http://documents.ieaghg.org/index.php/s/YKm6B7zikUpPgGA?path=%2F2008 (accessed on 5 September 2017).
- monoethanolamine: 2.24
  MonoEthanolAmine (MEA). Data taken from the technical report, IEA Greenhous Gas R&D Programme (IEA GHG). CO2 Capture in the Cement Industry. 2008. Available online: http://documents.ieaghg.org/index.php/s/YKm6B7zikUpPgGA?path=%2F2008 (accessed on 5 September 2017).

## Outputs
- carbon dioxide: 1067.73; article inperiodical
  CO2 captured. Data taken from the technical report, IEA Greenhous Gas R&D Programme (IEA GHG). CO2 Capture in the Cement Industry. 2008. Available online: http://documents.ieaghg.org/index.php/s/YKm6B7zikUpPgGA?path=%2F2008 (accessed on 5 September 2017).
- carbon dioxide: 188.42; article inperiodical
  CO2 emitted. Data taken from the technical report, IEA Greenhous Gas R&D Programme (IEA GHG). CO2 Capture in the Cement Industry. 2008. Available online: http://documents.ieaghg.org/index.php/s/YKm6B7zikUpPgGA?path=%2F2008 (accessed on 5 September 2017).
- particles (PM2.5): 0.0109; software or database
  Particulates, <2.5um. Data taken from ecoinvent database, Ecoinvent Database v3. Available online: http://www.ecoinvent.org/database/ecoinvent-33/ecoinvent-33.html (accessed on 15 April 2018). There was a 50% reduction in particulates for the post-combustion case due to the additional flue gas desulfurization (FDG) and selective catalytic reduction (SCR) processes.
- particles (> PM10): 0.0026; software or database
  Particulates, >10um. Data taken from ecoinvent database, Ecoinvent Database v3. Available online: http://www.ecoinvent.org/database/ecoinvent-33/ecoinvent-33.html (accessed on 15 April 2018). There was a 50% reduction in particulates for the post-combustion case due to the additional flue gas desulfurization (FDG) and selective catalytic reduction (SCR) processes.
- particles (PM2.5 - PM10): 0.0036; software or database
  Particulates, >2.5 um, and <10 um. Data taken from ecoinvent database, Ecoinvent Database v3. Available online: http://www.ecoinvent.org/database/ecoinvent-33/ecoinvent-33.html (accessed on 15 April 2018). There was a 50% reduction in particulates for the post-combustion case due to the additional flue gas desulfurization (FDG) and selective catalytic reduction (SCR) processes.

## Cut-off and completeness
There was a small electricity surplus in the combined heat and power (CHP) plant, which was sent to the electric grid. The offset of environmental impacts of surplus electricity were not considered.

## Sampling procedure
Production capacity was set to 1 Mt/y of cement and the proportion of clinker in cement products at 91%.

## Data sources
- Jing An, Richard S. Middleton, & Yingnan Li. (2019). Environmental Performance Analysis of Cement Production with CO2 Capture and Storage Technology in a Life-Cycle Perspective. Sustainability 11, 2626.
