# Polyethylene production | polyethylene | low-pressure gas-phase fluidized bed 550000t/a

Dataset: ILCD process, Unit process, black box
Geography: CN
Reference year: 2009
Classification: Materials production / Other mineralic materials
Functional unit: 1 ton of polythene
Generated by: Xiaoyu Cheng, chengxiaoyu-0@qq.com
Review: Dependent internal review by Tiangong LCI Data Working Group
Amounts: no units in this file; such an amount is in the reference unit of its flow, which a separate flow dataset defines
copyright: false

## General comment
According to the low-pressure gas-phase fluidized bed polymerization polyethylene production process, the lifecycle stages of the polyethylene production process are divided into the following substages: crude oil extraction and transportation, distillation and refining, ethylene manufacturing, and polyethylene manufacturing.

## Geography
A large petrochemical enterprise in Northeast China

## Time period
Publication time of literature

## Reference product
- Polyethylene: 1000; measured

## Inputs
- energy (recovered): 32300; article inperiodical
- Gasoline (regular): 85.05; measured
- Diesel: 56.81; measured
- crude oil; 42.3 MJ/kg: 2326.28; measured
- Light Hydrocarbon: 459.17; measured
- naphtha: 1392.77; measured
- Complement component 3 (C3): 72.48; measured
- C-4: 442.87; measured
- Hydrocracking Tail Oil: 565.13; measured
- ethylene: 958.93; measured
- butene: 37.07; measured
- hexane: 20.07; measured
- Butane: 2.4; measured
- hydrogen: 0.11; measured

## Outputs
All rows: measured
- carbon dioxide (fossil): 91.07
- sulfur dioxide: 0.63
- Nitrogen oxides: 1.03
- carbon monoxide: 2.64
- hydrocarbons (unspecified): 7.1
- Total Suspended Particles: 4.96
- waste water - untreated: 7.22
- Waste (solid): 77.53

## Data treatment and extrapolations
Necessary supplements and corrections

## Review details
Inventory: The internal review was done by several iteration steps concerning raw data validation, raw data documentation, representativity, completeness and consistency of modelling with regard to ISO 14040 and 14044.

## Data sources
- 李蔓, 王震 & 孙德智. 聚乙烯生产生命周期评价的研究. 环境科学与技术 191–195 (2009).
