# Remediated soil ; Soil ex situ remediation ; Thermal desorption

Dataset: ILCD process, Unit process, single operation
Geography: CN
Reference year: 2022
Classification: Unit processes / Other Services / Repair and maintenance
Generated by: Wang Feng, wangfeng@caep.org.cn
Owner: Tiangong LCI Data Working Group
Review: Dependent internal review by Tiangong LCI Data Working Group
Amounts: no units in this file; such an amount is in the reference unit of its flow, which a separate flow dataset defines
copyright: false
licenseType: Free of charge for all users and uses

## General comment
Remediation of 1 cubic meter of contaminated soil by ectopic thermal desorption, the contaminated soil is transported to the rotary kiln through the feeder and the conveying device, and the contaminated soil is transported to the rotary kiln through the natural gas.

## Geography
我国华东区域5 个污染土壤异位热脱附修复工程案例

## Technology and included processes
Through the feeding machine and the transmission device, the contaminated soil is transported to the rotary kiln, and the natural gas is introduced to the contaminated soil.

## Technical purpose
The industrial process detailed represents soil ex situ remediation via thermal desorption. This process involves heating contaminated soil to specific temperatures in a rotary kiln, where pollutants are evaporated. The treated soil can potentially be reintegrated as a clean fill material for construction or landscaping. The data set primarily relates to remediation projects in the East China region where natural gas is used as the heating medium.

## Reference product
- Remediated soil: 1; measured

## Inputs
All rows: measured
- Diesel: 0.0002
- Steel: 0.08
- natural gas,natural gas: 35
- Electricity: 5.4
- Pre-treatment Soil: 1

## Outputs
- Exhaust gas: 1; missing unimportant
  文中没有给出异位热脱附修复1m3污染土壤所生成的尾气量是多少，仅给出尾气净化的碳排放，所以将它认为是1项，而没有按体积计算

## Use advice
When utilizing this data set for Life Cycle Assessment (LCA), ensure to consider the regional specificity of the thermal desorption process as it is based on cases from the East China region. Take into account that the energy source for the process is natural gas and that the outputs are specific to the remediation of 1 cubic meter of soil. When modeling the system boundaries, include the transportation of contaminated soil to the treatment facility and the subsequent handling of treated soil. Be cautious to not generalize the data for different soil types or contaminant profiles without appropriate adjustments.

## Review details
Inventory: The internal review was done by several iteration steps concerning raw data validation, raw data documentation, representativity, completeness and consistency of modelling with regard to ISO 14040 and 14044.

## Data sources
- 刘爽,陈盼,宋慧敏等.我国华东地区污染土壤异位热脱附修复碳排放及减排策略[J].环境工程学报,2022,16(08):2663-2671.
