# 页岩气生产;场地准备阶段;井垫建设

Dataset: ILCD process, Unit process, black box
Geography: SC-CN
Reference year: 2014
Valid until: 2016
Classification: Unit processes / Energy carriers and technologies / Natural gas based fuels
Generated by: Pu Hong, 15695258655@163.com
Owner: 天工LCI数据工作小组
Review: Dependent internal review by 天工LCI数据工作小组
Amounts: no units in this file; such an amount is in the reference unit of its flow, which a separate flow dataset defines
copyright: false
licenseType: Free of charge for all users and uses

## General comment
该数据集代表页岩气生产过程中场地准备阶段的井垫建设。这一特定过程适用于涉及页岩气提取的行业，重点是准备钻探和未来提取所需的初始步骤。通常，这涉及建设一个稳定的平台或‘垫’，作为钻井设备和相关设备的基础。该数据集与在中国四川和重庆地区从事页岩气作业的公司和实体相关。

## Geography
我国页岩气开采工作目前集中在四川及重庆地区，选取四川及重庆的数据进行LCA计算。

## Time period
原始数据时间介于2014-2016之间

## Reference product
- Well pad: 8100; min 7350; max 9600; uniform; measured
  场地准备阶段--建成井场的面积

## Inputs
- gravel: 1.005e6; min 912000; max 1.191e6; uniform; measured
  场地准备阶段--井场建设所用碎石
- Diesel: 4122; min 3741; max 4886; uniform; measured
  场地准备阶段--井场建设设备及碎石等运输

## Use advice
用于生命周期评估计算时，使用提供的数据集，特别适用于四川和重庆的页岩气场地准备场景。鉴于数据的地域焦点，使用模型时重要的是确保它适用于当地的地质和基础设施条件。用户应该考虑2014-2016年原始数据的时间相关性，并在有必要的情况下更新，以反映当前实践。井垫建设阶段是场地稳定和未来生产效率的关键；因此，在模型中应注意准确表示。排除回收过程，因为这个数据集涉及到初始建设，没有考虑到生命周期的最后阶段。

## Review details
清单： 内部审查通过几个迭代步骤完成，涉及原始数据验证、原始数据记录、代表性、完整性、与 ISO 14040 和 14044 有关的建模的一致性。

## Data sources
- Wang, J., Liu, M., McLellan, B. C., Tang, X. & Feng, L. Environmental impacts of shale gas development in China: A hybrid life cycle analysis. Resources, Conservation and Recycling 120, 38–45 (2017).
