# Coldprocessing|GlassBeads|Quartzsand,crushedglass,sodaash,calcite,etc.|Cutting and grinding|All sizes / 冷加工|玻璃珠|石英砂、碎玻璃、纯碱、方解石等|切削打磨|所有规模

Dataset: ILCD process, Unit process, single operation
Geography: CN
Reference year: 2019
Classification: Materials production / Glass and ceramics
Generated by: The data was created by the Office of the Second National Pollution Source Census of the Ministry of Ecology and Environment, and the data was organized by the TianGong Plan team for ILCD format / 生态环境部第二次全国污染源普查工作办公室创建数据，天工计划团队常慧敏整理数据为ILCD格式
Owner: Tiangong LCI Data Working Group / 天工LCI数据工作小组
Amounts: no units in this file; such an amount is in the reference unit of its flow, which a separate flow dataset defines
copyright: false
licenseType: Free of charge for all users and uses

## Technology and included processes
the Technical of end-of-pipe management technology for pollution chemical oxygen demandisPrecipitation separation，Its Technical efficiency of end-of-pipe management35，The formula for calculating the actual operation rate (k-value) of the end-of-pipe treatment facility is k = 1

## Reference product
- Glass Bead: 1000; calculated
  源文件中描述为为玻璃珠，此处对其进行了匹配工作，将其匹配到LCAflow库里面相最符合的流

## Outputs
- Waste water: 2530; calculated
  污染物指标废水量的末端治理技术是/。原文件中描述污染物类别为废水，污染物指标为废水量，此处对其进行了匹配工作，将其匹配到LCAflow库里面相最符合的流
- chemical oxygen demand: 0.02925; calculated
  污染物指标化学需氧量的末端治理技术是沉淀分离，其效率为35，末端治理设施实际运行率（k值）计算公式为k=治理设施正常运行小时数(小时/年)/企业正常运转小时数（小时/年）。原文件中描述污染物类别为废水，污染物指标为化学需氧量，此处对其进行了匹配工作，将其匹配到LCAflow库里面相最符合的流

## Data sources
- 第二次全国污染源普查产排污核算系数手册（试用版）,二级代码30,三级代码305.0,四级代码3059文件，在完整版文件中第783页
