# 牛奶生产 ; 奶牛生产阶段

Dataset: ILCD process, Unit process, single operation
Geography: HLJ-CN
Reference year: 2012
Classification: Unit processes / Materials production / Agricultural production means
Functional unit: In this study, the functional unit was set to 1 ton FPCM (fat-protein corrected milk).
Generated by: 杨瑞, 1632707028@qq.com
Owner: 天工LCI数据工作小组
Review: Dependent internal review by 天工LCI数据工作小组
Amounts: no units in this file; such an amount is in the reference unit of its flow, which a separate flow dataset defines
copyright: false
licenseType: Free of charge for all users and uses

## General comment
奶牛品种为荷斯坦奶牛， 釆用散栏词养方式,奶牛平均体重为539kg，平均产奶量为6073.71kg/head/year，乳脂率为3.8%,乳蛋白率为3.1%.

## Geography
本文采用LCA方法对黑龙江省奶牛场生产系统进行环境影响评估。

## Technology and included processes
本研究把奶牛生产分为接牛期、 育成期、泌乳期和干奶期4个阶段， 不考虑接牛期的污 染物排放

## Technical purpose
该数据集描述了奶牛生产阶段的牛奶生产过程，具体为荷斯坦奶牛。所描绘的应用适用于专注于奶牛饲养和牛奶生产的农业操作，包括通过育成期、泌乳期和干奶期等各个阶段管理和照顾奶牛的过程。这些信息特别适用于奶农、农业研究人员和食品工业利益相关者，他们旨在理解和优化牛奶生产，以及评估黑龙江省奶牛场运营的环境影响。

## Reference product
- milk: 1000; measured
  1t FPCM

## Inputs
- maize grain: 348.79
- soybean: 211.75; measured
- wheat: 474.92; measured
- alfalfa: 2650; measured
- silage corn: 16290; measured

## Outputs
All rows: measured
- carbon monoxide (fossil): 0.23135
  原文未区分bio和fossil，根据专家判断此处为fossil
- nitrogen, total (excluding N2): 1.33257
  1氮氧化物
- carbon dioxide (biogenic): 591.132
- nitrous oxide: 0.13
- methane (fossil): 18.62
- sulfur oxides: 0.80381
  1硫氧化物
- ammonia: 0.64501

## Use advice
使用该数据集进行生命周期评估（LCA）的用户应仔细建模奶牛饲养系统，考虑奶牛生产的不同阶段：育成期、泌乳期和干奶期。本研究中未考虑接牛期的污染物排放，在相关时应予以考虑。研究的功能单位是1吨FPCM（脂肪-蛋白校正奶），在建模环境影响时应保持一致应用。该数据集应用于评估黑龙江省奶牛生产的环境影响，并可能需要在应用于不同地点时进行区域适应。

## Review details
清单： 内部审查通过几个迭代步骤完成，涉及原始数据验证、原始数据记录、代表性、完整性、与 ISO 14040 和 14044 有关的建模的一致性。

## Data sources
- 曹正纲. 黑龙江省奶牛场生命周期评价. (东北农业大学, 2012).
