# 铝锭铸造 ; 原生铝锭 ; 液态原铝 ; 2014年

Dataset: ILCD process, Unit process, single operation
Geography: CN
Reference year: 2021
Classification: Unit processes / Materials production / Metals and semimetals
Generated by: 蔡梓萌, caizm6178@163.com
Owner: 天工LCI数据工作小组
Review: Dependent internal review by 天工LCI数据工作小组
Amounts: no units in this file; such an amount is in the reference unit of its flow, which a separate flow dataset defines
copyright: false
licenseType: Free of charge for all users and uses

## General comment
该数据集代表了使用液态原铝的铝锭铸造过程，专门用于生产原生铝锭。该材料数据与航空航天、建筑、包装和汽车行业中使用的铝制品的生产相关联，由于其高导电性，也用于电气应用。

## Time period
文献发表日期

## Reference product
- aluminium, primary, ingot: 1000; software or database

## Inputs
- aluminium, primary, liquid: 1028.78; software or database

## Data selection and combination
本研究的数据参考了PA、SA、电力等背景数据的LCA数据。PA数据来自统计数据源，SA数据主要来自文献。背景数据主要来自中国科学院生态环境研究中心CASRCEES 2018建立的中国本地化LCA数据库，涵盖能源、材料、交通、废物管理等LCA数据。

## Use advice
在使用此LCA数据集时，必须考虑数据收集的具体年份（2014年），因为自那以后技术或效率可能发生了变化。该数据集源自原铝（PA）、再生铝（SA）和电力使用情况以及其他背景数据的统计数据。为了获得准确的结果，评估的范围应与数据来源的地理和技术背景一致，并参考CAS RCEES 2018用于中国的背景数据，并在将此数据集应用于全球背景或与其他地区的数据结合使用时考虑方法论的差异。

## Review details
清单： 内部审查通过几个迭代步骤完成，涉及原始数据验证、原始数据记录、代表性、完整性、与 ISO 14040 和 14044 有关的建模的一致性。

## Data sources
- Ding, N., Liu, N., Lu, B. & Yang, J. Life cycle greenhouse gas emissions of aluminum based on regional industrial transfer in China. J. Ind. Ecol. 25, 1657–1672 (2021).
