# Soapandsyntheticdetergent|Surfactants,oilsandfats,causticsoda,acids,etc.|Compoundingprocess|All sizes / /|肥皂及合成洗涤剂①|表面活性剂、油脂、烧碱、酸类等②|复配工艺|所有规模

Dataset: ILCD process, Partly terminated system
Geography: CN
Reference year: 2019
Classification: Materials production / Other mineralic materials
Generated by: The data was created by the Office of the Second National Pollution Source Census of the Ministry of Ecology and Environment, and the data was organized by the TianGong Plan team for ILCD format / 生态环境部第二次全国污染源普查工作办公室创建数据，天工计划团队常慧敏整理数据为ILCD格式
Amounts: no units in this file; such an amount is in the reference unit of its flow, which a separate flow dataset defines
copyright: false

## Technology and included processes
the Technical of end-of-pipe management technology for pollution Soap and Synthetic Detergentis/
污染物指标工业废水量的末端治理技术是/，末端治理设施实际运行率（k值）计算公式为/，①本系数适用于同时生产肥（香）皂、粉状洗涤剂、液体洗涤剂等多种产品的企业。当采用高塔喷粉工艺生产洗衣粉时，需按粉状洗涤剂的产污系数，另外统计废气污染物的产排量。②由于洗涤剂生产中使用的原料品种较多，系数表单中列举了几种常用原料，实际生产时并不局限于此。

## Reference product
- Soap and Synthetic Detergent: 1000; calculated
  原文件中描述污染物类别为Product，污染物指标为肥皂及合成洗涤剂①，此处对其进行了匹配工作，将其匹配到LCAflow库里面相最符合的流，污染物指标备注为工业废水量

## Outputs
All rows: calculated
- Waste water: 900
  原文件中描述污染物类别为废水，污染物指标为工业废水量，此处对其进行了匹配工作，将其匹配到LCAflow库里面相最符合的流，污染物指标备注为工业废水量
- chemical oxygen demand: 0.0857, 0.0857 (2 entries)
  原文件中描述污染物类别为废水，污染物指标为化学需氧量，此处对其进行了匹配工作，将其匹配到LCAflow库里面相最符合的流，污染物指标备注为化学需氧量
- Ammonia Nitrogen: 0.00192, 0.00054 (2 entries)
  原文件中描述污染物类别为废水，污染物指标为氨氮，此处对其进行了匹配工作，将其匹配到LCAflow库里面相最符合的流，污染物指标备注为氨氮
- Petroleum-related waste: 0.009, 0.003 (2 entries)
  原文件中描述污染物类别为废水，污染物指标为石油类，此处对其进行了匹配工作，将其匹配到LCAflow库里面相最符合的流，污染物指标备注为石油类
- Nitrogen, organic bound: 0.003, 0.0009 (2 entries)
  原文件中描述污染物类别为废水，污染物指标为总氮，此处对其进行了匹配工作，将其匹配到LCAflow库里面相最符合的流，污染物指标备注为总氮
- phosphorus, total: 7.8e-5, 6e-5 (2 entries)
  原文件中描述污染物类别为废水，污染物指标为总磷，此处对其进行了匹配工作，将其匹配到LCAflow库里面相最符合的流，污染物指标备注为总磷

## Data sources
- 第二次全国污染源普查产排污核算系数手册（试用版）,二级代码26,四级代码2681文件，在完整版文件中第3007页
