# 直接燃烧发电｜电力｜生物质锅炉（6MW）

Dataset: ILCD process, Unit process, single operation
Geography: CN
Reference year: 2010
Classification: Unit processes / Energy carriers and technologies / Electricity
Functional unit: 1 ton of straw as a functional unit (0% moisture content).
LCI method principle: Consequential
Generated by: 刘超硕, liucs22@mails.jlu.edu.cn
Owner: 天工LCI数据工作小组
Review: Dependent internal review by 天工LCI数据工作小组
Amounts: no units in this file; such an amount is in the reference unit of its flow, which a separate flow dataset defines
copyright: false
licenseType: Free of charge for all users and uses

## General comment
该过程产生的电力旨在供应电网或直接使用，适用于偏好可再生能源的场所。该过程涉及一个6MW的生物质锅炉，使用含水量为0%的干燥秸秆作为燃料。这种能源生产方法适用于秸秆从农业活动中大量可得的地区，适合目标为可持续或碳中和运营的设施。

## Reference product
- electricity from waste incineration: 3600; measured

## Inputs
- Crop straw: 1000; measured

## Outputs
All rows: measured
- sulfur dioxide: 1.38
- carbon monoxide,carbon monoxide (fossil): 0.025
- nitrous oxide: 5.27, 0.00083 (2 entries)
- hydrocarbons (unspecified): 0.65
- particles (> PM10),particles (> PM10): 1.84
- carbon dioxide (biogenic),carbon dioxide (biogenic): 1367.7
  原文未区分排放源为生物源或化石源，根据专家判断此处为生物源。
- carbon monoxide (biogenic): 1.316
  原文未区分排放源为生物源或化石源，根据专家判断此处为生物源。

## Use advice
使用此数据的用户在将过程数据应用到评估中时，应考虑该地区的地理和气候条件。应特别注意秸秆的可用性及其含水量，因为功能单位是基于含水量为0%的干燥秸秆。含水量的变化会影响生物质的热值，因此影响锅炉的效率。此外，应评估秸秆移除对土壤健康和农业实践可持续性的影响。

## Review details
清单： 内部审查通过几个迭代步骤完成，涉及原始数据验证、原始数据记录、代表性、完整性、与 ISO 14040 和 14044 有关的建模的一致性。

## Data sources
- Lu, W. & Zhang, T. Life-Cycle Implications of Using Crop Residues for Various Energy Demands in China. Environ. Sci. Technol. 44, 4026–4032 (2010).
