# 水泥生产;水泥, 硅酸盐水泥, 42.5MPa;湿法

Dataset: ILCD process, Unit process, black box
Geography: CN
Reference year: 2004
Classification: Materials production / Other mineralic materials
Generated by: 杨思琪, ysqsophia@gmail.com
Owner: 天工LCI数据工作小组
Review: Dependent internal review by 天工LCI数据工作小组
Amounts: no units in this file; such an amount is in the reference unit of its flow, which a separate flow dataset defines
copyright: false
licenseType: Free of charge for all users and uses

## General comment
典型水泥生产工艺。原料组分包括石灰石、石膏、粘土和铁粉等。能源消耗包括各生产工序的电耗和煤耗，污染物则包括颗粒物、SO2、NOx和CO2等。

## Technical purpose
通过湿法工艺制造的42.5MPa硅酸盐水泥主要用于需要中等到高强度混凝土的建筑应用。它适用于住宅和商业建筑、桥梁、路面和预制混凝土制品。

## Model description
研究以1kg42.5等级硅酸盐水泥作为评价的功能单位。评价范围界定为水泥产品的厂内生产过程及其周边环境。其中，厂内生产过程是指原料依次经过预处理、生料粉磨、煅烧、熟料磨和水泥均化等工序最终成为水泥产品的生产全过程。水泥生产过程的周边环境是指外部资源和能源的投人和污染物的排放等。

## Reference product
- cement, portland cement, 42.5MPa: 1000
  1kg42.5等级硅酸盐水泥

## Inputs
- limestone, crushed, for mill: 1224.1
  石灰石
- clay: 199
  粘土
- gypsum stone (CaSO4-dihydrate): 44.4
  石膏
- iron, powder: 26.3
  铁粉
- hard coal: 208.802
  标准煤。原始数据为0.1940kg标准煤，这里换算为硬煤，换算公式为1kg硬煤=0.929kg标准煤。
- electricity, medium voltage: 400.32
  电力

## Outputs
- particles (> PM10): 0.343
  颗粒物，未标明粒径，按PM>10处理。
- sulfur dioxide: 0.9033
  SO2
- Nitrogen oxides: 2.262
  NOx
- carbon dioxide: 1127
  CO2

## Use advice
在使用42.5MPa硅酸盐水泥的生命周期评估数据时，需考虑功能单位为1kg水泥。确保包括定义在厂内生产过程中的从原料预处理到水泥均化的所有流程。需要考虑工厂范围内电力和煤炭的能源消耗以及污染物排放（颗粒物、SO2、NOx、CO2等）。外部资源输入和污染物输出也应作为周边环境范围的一部分被包含。此数据集不适用于评估下游使用阶段或产品生命终结情形，且不包括潜在的回收活动。

## Review details
清单： 内部审查通过几个迭代步骤完成，涉及原始数据验证、原始数据记录、代表性、完整性、与 ISO 14040 和 14044 有关的建模的一致性。

## Data sources
- 朱天乐, 何炜, 曾小岚, 黄新, & 马保国. (2006). 中国水泥生产环境负荷研究. 环境科学, 10, 2135–2138.
