# 实验室和中试水平厌氧环境下靛蓝的生产

Dataset: ILCD process, Unit process, black box
Geography: SD-CN
Reference year: 2022
Classification: Unit processes / Materials production / Organic chemicals
Functional unit: the production of 1 ton indigo
Generated by: 玲俐, calinly@163.com
Owner: 天工LCI数据工作小组
Review: Dependent internal review by 天工LCI数据工作小组
Amounts: no units in this file; such an amount is in the reference unit of its flow, which a separate flow dataset defines
copyright: false
licenseType: Free of charge for all users and uses

## General comment
无流程图

## Geography
S. cusia 采自贵州省，由中国山东省山东云清生物科技有限公司提供。

## Time period
文献发表日期

## Technology and included processes
植物提取 ;球花

## Technical purpose
在厌氧环境中从球花Strobilanthes cusia提取的靛蓝，纯度为45.2%，适用于需要特定纯度靛蓝的染料领域。这包括纺织品制造，特别是在需要特定纯度靛蓝的织物着色中。该过程已在实验室和中试规模进行测试，以确保可行性和更大生产量的潜在可扩展性。靛蓝提取过程为配备有集中供氮装置的大型反应器以及后续沉淀、提取和干燥流程的生产设备而设计。

## Reference product
- indigo: 1000
  indigo，纯度45.2%

## Inputs
- Water for industrial use: 333000
  industrial water
- biomass; 14.7 MJ/kg: 333300
  biomass

## Data selection and combination
在 500 dm3 中试中，生产了约 5 kg 的靛蓝，纯度为 45.2%（表 2）。因此，每天生产0.5吨靛蓝需要10套5000dm 3 反应器，并配有集中供氮装置以及随后的沉淀、提取和干燥。

## Sampling procedure
红果花采自贵州省，由中国山东省山东云清生物科技有限公司提供。

## Use advice
在使用提供的靛蓝生产生命周期评估数据时，请注意，数据集包括基于500 dm3反应器中试规模的生产信息。用户应该意识到，扩大到商业生产水平可能需要额外的数据和对方法论的调整。由于数据集不包含能源、水、运输和原材料输入的信息，用户应从其他来源整合此类信息，以构建全面的生命周期评估。考虑到S. cusia的区域采购和厌氧过程的具体条件至关重要。始终参考出版日期以评估数据的时效性。

## Review details
清单： 内部审查通过几个迭代步骤完成，涉及原始数据验证、原始数据记录、代表性、完整性、与 ISO 14040 和 14044 有关的建模的一致性。

## Data sources
- Jin, Z. et al. Integrated process for the production of indigo and indirubin in an anaerobic environment at laboratory and pilot level. Journal of Cleaner Production 364, 132610 (2022).
