# 养猪生产 ; 盆周山地区农户散养 ; 饲料原料生产

Dataset: ILCD process, Unit process, single operation
Geography: SC-CN
Reference year: 2006
Classification: Unit processes / Materials production / Agricultural production means
Functional unit: In this study, the functional unit (FU) was defined as "1kg pig carcass", which included skin, bone and fat. Foreign studies generally only considered lean meat, but in China's consumption mode, skin and viscera were also fully utilized as edible foods. The concept of carcass was adopted in this study. Although the bone included in this study is an inedible part, it can play a certain compensative role because it does not contain internal organs. In addition, the current data can be easily converted into carcass weight, so it is more in line with the actual situation.
Generated by: 杨瑞, 1632707028@qq.com
Owner: 天工LCI数据工作小组
Review: Dependent internal review by 天工LCI数据工作小组
Amounts: no units in this file; such an amount is in the reference unit of its flow, which a separate flow dataset defines
copyright: false
licenseType: Free of charge for all users and uses

## General comment
在四川，农户散养提供了大约79.5%的商品猪，在四川养猪业中具有重要的地位。主要情景状态和参数设定为 ①饲料以自种玉米、蔬菜和其他农副产物为主，辅以少量浓缩饲料（豆粕70%、 菜籽粕10%），不足部分采集野草作为饲料补充。耕地面积假设为0.2067平方公顷/户。② 出栏猪数量平均3头/户，品种多数为土杂猪（地方母猪与外种猪杂交，少数为中国地方品种）屠宰率平均为70% ③饲养管理方式粗放，饲养期长，猪平均饲养240d左右,出栏重平均为100kg ④粪便处理和利用: 采用厌氧粪池存贮,80%还田,其 中48%在农忙季节直接还田,长期存贮量占32% (不定时还田)。20%粪水在粪池中或还田时渗漏,渗出水COD为50mg/L.

## Geography
由于本文按占用土地进行农资消耗分配，情景A中不再考虑具体的作物产量，各种情景下的浓缩饲料和全价饲料均按设定的两种情况按相应的全国或四川省内主要谷物平均产量折算成相当的土地面积。

## Time period
饲料原料生产的能量消耗和化肥、农药、地膜等使用量按《中国统计年鉴2006》计算四川平均水平。

## Technology and included processes
浓缩料中分析豆粕（70%）、菜籽粕（10%），其余成分没有考虑。全价饲料的成分主要是玉米为主的谷物（70%）和豆粕（25%），其余成分没有考虑。没有包括矿物质、消毒剂和各种小型设备设施。

## Technical purpose
本工艺描述的是中国四川盆周山地区的小规模散养养猪操作。养猪主要依赖自种玉米、蔬菜及其他农副产品，辅以豆粕和菜籽粕为主的浓缩饲料。这种养猪方式在四川养猪产业中占有重要地位，对当地食品供应链贡献显著。所养猪种是地方品种和外来品种的混合体，平均屠宰率为70%。猪粪通过厌氧存储管理，大部分返回到田地作为肥料。此种农业实践对于寻求实施可持续和地方化农业实践的地区具有相关性，有助于环境保护和农村经济发展。

## Reference product
- pig: 1; estimated
  作为参考定量，非实际输出

## Inputs
- nitrogen: 0.1074; measured
  情景A（农户散养）
- phosphorus: 0.0334; measured
  情景A（农户散养）
- polyvinylchloride resin (E-PVC): 0.0073; measured
  情景A（农户散养）
- hard coal: 1.57382; calculated
  情景A（农户散养）
- Gasoline (regular): 0.155037; calculated
  情景A（农户散养）
- Diesel: 1.24909; calculated
  情景A（农户散养）
- Electricity: 0.073269; calculated
  情景A（农户散养）

## Deviations from the LCI method approaches
本研究采用LCA方法学和情景分析法相结合的方式对四川三种典型的养猪生产 情景进行系统的环境影响评估，探索这种分析方法应用于当前养猪生产环境影响评估 时的具体算法，并揭示各种养猪生产系统中的环境友好和不利方面以及其不可更新能 源利用效率。研究结果有助于对养猪业环境影响态势的认识，并为养猪可持续发展模 式的建立提供参考。

## Data selection and combination
1）本研究中四川养猪业的基本情况和各种情景的设定，一方面征求了四川省多位养猪专家的意见，另一方面进行了实地调查。2）作物生产中的相关数据主要来自年年鉴中给出的2005年统计数据。四川的饲料原料生产数据和全国的平均数据用于区分原料来自省内和省外两种情况。

## Data treatment and extrapolations
四川的饲料原料生产数据和全国的平均数据用于区分原料来自省内和省外两种情况。农资消耗量按相应的原料消耗量和全国或四川省内主要谷物平均产量折算成相当的土地面积，再按面积求得。由于三种情景中所用的饲料配方差异大，故进行了主要原料消耗比例的假设，然后根据抽样调查资料进行了调整。

## Use advice
使用本养猪生产过程数据进行生命周期评估（LCA）时，用户应考虑原材料生产和粪便管理系统的地方性特点。特别注意，情景A中应依据占用土地而非具体作物产量分配农业资源消耗。在饲料生产中，应在LCA中反映自种农作物和农副产品与浓缩饲料相结合的假定比例。饲料的环境影响应来源于2005年作物生产统计数据、肥料、农药和地膜的使用量，以及四川省原材料生产的平均能耗。重要的是，功能单元的定义应为包括皮、骨和脂肪的1公斤猪胴体，符合中国的惯例，而不仅是瘦肉。任何使用这些数据的LCA都应相应地调整功能单元，并注意与该养殖系统特定以及其中所涉及的不可再生能源效率的环境优势或不利之处。

## Review details
清单： 内部审查通过几个迭代步骤完成，涉及原始数据验证、原始数据记录、代表性、完整性、与 ISO 14040 和 14044 有关的建模的一致性。

## Data sources
- 白林. 四川养猪业清洁生产系统LCA及猪粪资源化利用关键技术研究. (四川农业大学, 2007).
