# Breeding district broiler rearing | livestock and poultry rearing stage

Dataset: ILCD process, Unit process, single operation
Geography: SD-CN
Reference year: 2014
Classification: Materials production / Other mineralic materials
Functional unit: 1kg chicken
Generated by: Rui Yang, 1632707028@qq.com
Review: Dependent internal review by Tiangong LCI Data Working Group
Amounts: no units in this file; such an amount is in the reference unit of its flow, which a separate flow dataset defines
copyright: false

## General comment
The pollutant emission of livestock and poultry in the raising stage mainly comes from the pollutant emission of livestock and poultry gastrointestinal fermentation, and the pollutant emission generated by the energy consumption of livestock and poultry heating, lighting and equipment operation. Because of the different physiological structure of birds, the amount of CH4 produced in intestinal fermentation is very small, so it is ignored

## Geography
This study was conducted from 2014 to 2015, aiming at livestock and poultry feeding cycle, meat ratio, feed formula, feed consumption, coal and electricity consumption, etc. Has been to Shandong Gaomi Zhengda pig farm, Laixi City Zhishuang dairy farm, Jimo city Duan Bolan town Jiangjiapo village pig farm, Jimo City Liujiazhuang town livestock farm, Rizhao City Changling town Guanzhuang village, Juxian County Zhailihe town Dongxing Agriculture and animal husbandry company, Juxian Qiaoshan town east Chen dairy farm, Juxian Qiaoshan town Liu Jiayi water pig farm, Zhucheng Foreign Trade Co., LTD. Phoenix parents breeding duck farm, Xinjiang Fukang Hongfa Breeding professional cooperative, Jiuyun Street Town Xuhong laying Chicken cooperative, Jiuyun Street Town Liuyun Village self-contained breeding farm, China Australia Holding Group Co., LTD., Dezhou City Qingyun County Wayu Village, Shandong Province Qingyun County four Liu community beef cattle breeding base, Dezhou City Qingyun Qingnian chicken breeding base, Qingyun County Yongli Poultry layer breeding company, Qingyun County Xingchen youth chicken breeding Field research was carried out by professional breeding cooperatives, Qingyun Dongtai broiler breeding cooperatives, Hebei Yanshan Boyuan Feed Co., LTD., Yanshan Da Chinese Feed Co., LTD., Wudi Liuhe Feed Co., LTD., and China-Australia Oriental Hope Feed Co., LTD.

## Reference product
- chicken: 1

## Outputs
- carbon dioxide: 0.71078; measured
  Broiler chicken breeding community
- sulfur dioxide: 0.0068; measured
  Broiler chicken breeding community
- nitrogen, total (excluding N2): 0.00168; measured
  Broiler chicken breeding community
- carbon monoxide: 0.00058; measured
  Broiler chicken breeding community

## Data selection and combination
直接数据：畜禽饲养阶段数据皆来自实地调研，通过现场收集及企业可公开 数据获得。背景数据：化肥、电力、燃煤等数据来自相关统计年鉴及国家统计局、农业 部网站的公开数据。

## Review details
Inventory: The internal review was done by several iteration steps concerning raw data validation, raw data documentation, representativity, completeness and consistency of modelling with regard to ISO 14040 and 14044.; Documentation: The review of the documentation was performed by Ecobilan and is in compliance with ISO 14040 and 14044. The data set documentation is correct in view of the appropriateness of the information provided. It includes all relevant information in view of data quality and scope of application of the respective LCI result.

## Data sources
- 周景月. 基于生命周期评价的畜禽养殖环境影响分析. (青岛科技大学, 2017).
