# Site preparation stage-Wastewater sink construction

Dataset: ILCD process
Geography: SC-CN
Reference year: 2014
Valid until: 2016
Classification: Materials production / Other mineralic materials
Generated by: Pu Hong, 15695258655@163.com
Review: Dependent internal review by Tiangong LCI Data Working Group
Amounts: no units in this file; such an amount is in the reference unit of its flow, which a separate flow dataset defines

## Geography
China's shale gas extraction work is currently concentrated in the Sichuan and Chongqing areas, and the data from Sichuan and Chongqing are selected for LCA calculations.

## Time period
Raw data dates between 2014-2016

## Inputs
All rows: uniform; article inperiodical
- #325 cement: 164000; min 220000; max 110000
  Components of C30 concrete
- sand: 281000; min 377000; max 189000
  Components of C30 concrete
- gravel: 485000; min 651000; max 327000
  Components of C30 concrete
- freshwater: 77000; min 103000; max 52000
  Components of C30 concrete
- Diesel: 3791; min 5238; max 2382
  Used for material transportation, etc.
- Electricity: 1519.2; min 2037.6; max 1022.4
  Used for concrete mixing, etc.

## Review details
Inventory: The internal review was done by several iteration steps concerning raw data validation, raw data documentation, representativity, completeness and consistency of modelling with regard to ISO 14040 and 14044.

## Data sources
- Wang, J., Liu, M., McLellan, B. C., Tang, X. & Feng, L. Environmental impacts of shale gas development in China: A hybrid life cycle analysis. Resources, Conservation and Recycling 120, 38–45 (2017).
