# 白灰采烧;冶金白灰;白灰采烧（Z08）

Dataset: ILCD process, Unit process, single operation
Geography: CN
Reference year: 1998
Classification: Materials production / Metals and semimetals
Generated by: 付翔, 1162850692@qq.com
Owner: 天工LCI数据工作小组
Review: Dependent internal review by 天工LCI数据工作小组
Amounts: no units in this file; such an amount is in the reference unit of its flow, which a separate flow dataset defines
copyright: false
licenseType: Free of charge for all users and uses

## General comment
来自表 4-16 Z08 钢厂生产吨材环境负荷编目表

## Time period
论文提到钢铁企业环境总体数据为1998年的吨钢环境基础数据。

## Technical purpose
冶金白灰（又称白灰或石灰）主要用于钢铁行业，应用于pH值调节、作为助熔剂在冶炼过程中净化钢铁，以及在烟气脱硫中。

## Reference product
- Metallurgical ash: 57.2; measured
  冶金白灰

## Inputs
- Energy, geothermal, converted: 260.603; measured

## Outputs
- Dust (unspecified, from stack): 0.063; measured
- sulfur dioxide: 0.069; measured
- Suspended solids, unspecified: 0.020981; measured
- Spoil (deposited, hibernating in ground, non elementary flow): 2.345; measured

## Use advice
在使用这份生命周期评估数据集时，请确保它与生产年份（数据基于1998年钢铁生产的环境负荷）的技术水平对齐。鉴于从那时起技术的进步，当前环境影响评估可能需要进行调整。在进行钢铁行业特定冶炼过程的数据使用时，考虑是否包含随后的回收过程，并相应地调整数据。

## Review details
清单： 内部审查通过几个迭代步骤完成，涉及原始数据验证、原始数据记录、代表性、完整性、与 ISO 14040 和 14044 有关的建模的一致性。

## Data sources
- 周和敏. 钢铁材料生产过程环境协调性评价研究. (北京工业大学, 2001).
