# East China Rice-Winter Wheat Production | Agricultural Production (Rice)

Dataset: ILCD process, Unit process, single operation
Geography: NJ-JS-CN
Reference year: 2015
Valid until: 2015
Classification: Materials production / Other mineralic materials
Functional unit: 1 ton of rice and 1 ton of winter wheat
Generated by: Haoran Zhang, hrzhang@whu.edu.cn
Review: Dependent internal review by Tiangong LCI Data Working Group
Amounts: no units in this file; such an amount is in the reference unit of its flow, which a separate flow dataset defines
copyright: false

## Reference product
- rice: 9360; measured

## Inputs
All rows: measured
- Diesel: 27.8
  rice
- heavy fuel oil: 33.1
  rice
- nitrogen: 300
  rice
- phosphorus: 120
  rice
- potassium chloride: 120
  rice
- Bactericide: 2
  rice
- Rice Seeds: 3.9
  rice
- Insecticide: 0.1
  rice
- Electricity: 263.16
  rice

## Deviations from the LCI method approaches
The starting boundary of the life cycle of agricultural products is the extraction of energy raw materials related to the life cycle of rice and wheat. The terminal boundary is the output of agricultural crop products and the emission of waste gases after the planting and cultivation of crops.

## Data selection and combination
The research data mainly come from the sampling survey results of the input-output of 82 households in Jiangning District, Nanjing City, Jiangsu Province over the past two years. The fertilizers mainly include compound fertilizers and urea, insecticides include imidacloprid and chlorpyrifos, and herbicides include butachlor and haloxyfop, etc. All straw in the field is mechanically crushed and returned to the field.

## Data treatment and extrapolations
For the entire lifecycle of the product system, all input and output processes, as well as computational processes, generally include categorization and characterization, normalization, and weighted assessment

## Sampling procedure
The results of a two-year input-output sampling survey of 82 households in Jiangning District, Nanjing City, Jiangsu Province.

## Review details
Inventory: The internal review was done by several iteration steps concerning raw data validation, raw data documentation, representativity, completeness and consistency of modelling with regard to ISO 14040 and 14044.; Documentation: The review of the documentation was performed by Ecobilan and is in compliance with ISO 14040 and 14044. The data set documentation is correct in view of the appropriateness of the information provided. It includes all relevant information in view of data quality and scope of application of the respective LCI result.

## Data sources
- 胡乃娟,陈倩,朱利群.长江中下游稻-麦轮作系统生命周期环境影响评价——以江苏南京为例[J].长江流域资源与环境,2019,28(05):1111-1120.
