# 牛奶生产 ; 生产

Dataset: ILCD process, Unit process, single operation
Geography: CC-JL-CN
Reference year: 2006
Classification: Unit processes / Materials production / Food and renewable raw materials
Functional unit: 1t milk
Generated by: 杨瑞, 1632707028@qq.com
Owner: 天工LCI数据工作小组
Review: Dependent internal review by 天工LCI数据工作小组
Amounts: no units in this file; such an amount is in the reference unit of its flow, which a separate flow dataset defines
copyright: false
licenseType: Free of charge for all users and uses

## General comment
根据本文的研究范围, 将牛奶生产生命周期 分为如下两个子系统: 生产和包装。由于企业内部 生产车间相对集中, 物料运输所造成的环境影响 忽略不计。

## Geography
本文研究对象为长春地区某市销售的普通袋装牛奶

## Technology and included processes
本文只考虑与研究目的和功能单位直接相关 的过程, 不考虑工厂以外产生环境负荷的各阶段

## Technical purpose
长春地区的袋装牛奶旨在作为食品产品供消费者使用。在生命周期内，牛奶经历生产和包装阶段。该牛奶作为日常营养主食，在当地市场上分销销售。

## Reference product
- milk: 1000; measured
  牛奶

## Inputs
- milk: 887.9; measured
  原料乳raw milk
- Electricity: 168.12; measured
- water: 8099; measured
- process steam: 223.6; measured

## Outputs
All rows: measured
- carbon dioxide (fossil),carbon dioxide (fossil): 180
- carbon monoxide (fossil): 0.05
- sulfur dioxide: 1.46
- nitrogen, total (excluding N2): 0.7
  氮氧化物
- ammonia: 0.067
- particles (> PM10): 0.65
- municipal solid waste deposition: 2.5

## Deviations from the LCI method approaches
本文按照 ISO 的有关标准, 采用 LCA 方法分析牛奶生产各阶段的消耗和环境排放, 建立牛奶生产生命周期 基础数据库, 辨识牛奶各阶段对环境影响的相对 大小, 找出环境影响状况的主要因子, 从而为牛奶 企业实施清洁生产、改进牛奶生产环境性能提供 机会和途径。

## Use advice
使用袋装牛奶生产的LCA数据时，只需考虑与研究目的和功能单位直接相关的过程。不包括工厂外部环境负荷。利用此数据识别生产和包装阶段的环境影响关键因素，并按照LCA的ISO标准，应用于改进牛奶生产运营的环境性能。

## Review details
清单： 内部审查通过几个迭代步骤完成，涉及原始数据验证、原始数据记录、代表性、完整性、与 ISO 14040 和 14044 有关的建模的一致性。

## Data sources
- 秦凤贤. 生命周期评价在牛奶生产中的应用研究. 乳业科学与技术 224–226 (2006).
