# 农药制造 ; IDA法-亚氨基二乙腈碱解双甘 膦工艺+草甘膦合成

Dataset: ILCD process, Unit process, black box
Geography: CN
Reference year: 2021
Classification: Materials production / Organic chemicals
Functional unit: producing 1 ton glyphosate
Generated by: 玲俐, calinly@163.com
Owner: 天工LCI数据工作小组
Review: Dependent internal review by 天工LCI数据工作小组
Amounts: no units in this file; such an amount is in the reference unit of its flow, which a separate flow dataset defines
copyright: false
licenseType: Free of charge for all users and uses

## General comment
无流程图

## Technical purpose
采用IDA法合成的草甘膦用于生产除草剂。草甘膦是一种广泛使用的非选择性系统性除草剂，用于消除与农作物竞争的杂草和草类。这个特定的工业过程适合用于生产大批量的草甘膦，供农业使用。

## Reference product
- glyphosate: 1000; software or database
  草甘膦

## Outputs
All rows: software or database
- Exhaust gas: 9830
  废气
- waste water - untreated: 47550
  工业废水
- chemical oxygen demand: 23.8
  化学需氧量
- Ammonia Nitrogen: 1.19
  氨氮
- nitrogen, total (excluding N2): 1.92
  总氮
- phosphorus, total: 4.76
  总磷
- volatile organic compound: 102
  挥发性有机物
- hazardous waste (unspecified): 1000
  危险废物

## Use advice
使用此数据集的用户应注意，虽然它提供了使用IDA法生产1吨草甘膦的排放信息，但缺乏全面的生命周期数据。没有关于原材料、能源、用水和运输输入的信息。因此，在将此数据纳入生命周期评估时，需要单独考虑这些额外输入及其相关的环境影响。在假设这些输入的同时，额外注意确保假设尽可能准确，避免影响评估结果的准确性。

## Review details
清单： 内部审查通过几个迭代步骤完成，涉及原始数据验证、原始数据记录、代表性、完整性、与 ISO 14040 和 14044 有关的建模的一致性。

## Data sources
- 生态环境部. 263农药制造行业系数手册.pdf. (2021).
