# 砖生产 ; 混凝土路面砖 ; 挤压工艺

Dataset: ILCD process, Unit process, single operation
Geography: JNA-SD-CN
Reference year: 2018
Classification: Unit processes / Materials production / Other mineralic materials
Functional unit: The functional unit is the area of 1 m2 brick products.
Generated by: 王湘锦, r99rt4@163.com
Owner: 天工LCI数据工作小组
Review: Dependent internal review by 天工LCI数据工作小组
Amounts: no units in this file; such an amount is in the reference unit of its flow, which a separate flow dataset defines
copyright: false
licenseType: Free of charge for all users and uses

## General comment
混凝土路面砖块的非烧结工艺

## Technical purpose
通过挤压工艺生产的混凝土路面砖，主要用于道路、人行道和公共广场等耐用表面的建设。其应用主要在户外环境，需要具备高耐磨和耐候性。

## Reference product
- Clay Body: 102; measured
  粗坯

## Inputs
- brickbat aggregate: 102; measured
- brick dust: 14; measured
- Electricity: 1.75176; measured

## Outputs
- particles (PM10): 0.000152; measured

## Deviations from the LCI method approaches
本研究采用了 ReCiPe midpoint（H）模型。

## Data selection and combination
本研究从济南顺德水泥制品有限公司收集了混凝土路面砖和透水砖的生产能耗以及各种原材料、能源投入和废气排放的相关数据。济南顺德水泥制品有限公司 山东省。

## Sampling procedure
原材料、能源投入和废物排放的大部分数据都是从生产厂家的现场调查中收集的。减水剂，其化学成分是磺酸钠盐的甲醛缩合物

## Use advice
使用此生命周期评估数据的用户应仔细考虑数据的范围，该数据包括混凝土路面砖和透水砖生产的能耗、原材料和能源的投入以及由济南顺德水泥制品有限公司提供的废气排放相关数据。本研究包含的敏感性分析考虑了关键工序输入和输出的5%变化，应在将数据应用于其他场景时考虑。本研究中使用的ReCiPe中点（H）模型对于在集成这些数据至更广泛评估时的方法论一致性也是至关重要的一个方面。

## Review details
清单： 内部审查通过几个迭代步骤完成，涉及原始数据验证、原始数据记录、代表性、完整性、与 ISO 14040 和 14044 有关的建模的一致性。

## Data sources
- Yuan, X. et al. Environmental and economic impacts assessment of concrete pavement brick and permeable brick production process - A case study in China. Journal of Cleaner Production 171, 198–208 (2018).
