# 修复后土壤;固化稳定化;原地异位;开挖后混合再回填;3:1 纸灰

Dataset: ILCD process, Unit process, black box
Geography: SI
Reference year: 2018
Classification: Unit processes / Other Services / Repair and maintenance
Functional unit: The functional unit was the management of 1.0 m3 of contaminated soil at the Old Zinc-Works site. A time horizon of 100 years was assumed.
Generated by: 杨欣桐, yangxt@caep.org.cn
Owner: 天工LCI数据工作小组
Review: Dependent internal review by 天工LCI数据工作小组
Amounts: no units in this file; such an amount is in the reference unit of its flow, which a separate flow dataset defines
copyright: false
licenseType: Free of charge for all users and uses

## General comment
固化/稳定化是将污染土壤与能聚结成固体的黏结剂混合，从而将污染物捕获或固定在固体结构中的技术。

## Geography
本研究涉及在Celje镇（斯洛文尼亚东部）的旧锌厂现场进行的修复活动。

## Technology and included processes
用移动筛将挖出的土壤筛至小于16mm的级配。在现场用制备材料的水平层建造一个临时仓库。然后通过挖掘机将这些材料从仓库中移出，使其垂直于各层挖出制备好的材料。通过这种方式，获得了受污染土壤的最大可能均匀性。用作添加剂的纸灰。土壤和添加剂在移动式搅拌站中以3:1的干质量比混合在一起，然后加水以达到最佳含水量（22±2 wt%）。将生产的复合材料分层摊铺在开挖区域上，每层厚度为30cm。这些层通过重型压路机分别压实，压实密度高达参考干密度的98%。重复该程序，直到构建了填充物（平均厚度约3m），其中通过物理和化学机制固定污染物。最后，使用推土机将一层废石摊铺在填料顶部，厚度为0.9m，以确保复合材料对冻融条件具有足够的抵抗力。然后使用重型滚筒压实该层。

## Technical purpose
斯洛文尼亚Celje镇旧锌厂场地的修复过程采用土壤固化和稳定技术来处理现场污染土地。该技术涉及将污染土壤与纸灰作为粘结剂按3:1干质量比混合，并在现场对混合材料进行压实，以重新利用该地区进行未来用途。这种方法适用于需要就地处理污染土壤的工业场地的修复，或者非现场处理不可行的场合。

## Reference product
- Remediated soil: 1; measured

## Inputs
All rows: measured
- Paper Ash: 467.5
  Remediation process (production of the geotechnical composite)
- Tap Water: 0.1607
  Remediation process (production of the geotechnical composite)
- Waste rock: 0.3
  Covering material for thermal protection against freezing/thawing effects
- Diesel,Diesel: 0.00169
  Excavation of the contaminated soil
- Diesel,Diesel: 0.00066
  Pre-treatment of the soil and production of the geotechnical composite
- Diesel,Diesel: 0.00063
  Placing of the composite at the excavation site
- Diesel,Diesel: 0.00048
  Delivery of paper ash (70 km)
- Diesel,Diesel: 0.00022
  Delivery of covering material (waste rock) (35 km)
- Diesel,Diesel: 0.00017
  Spreading and compacting of the covering material (top layer)
- contaminated soil: 1
  Waste to be remediated

## Use advice
使用此数据集时，确保将其应用于执行现场土壤固化和稳定化的工业场地修复的相似情况。请确保与管理1.0 m3污染土壤并假设100年时间范围的功能单位对齐。该协议适用于挖掘/安装位置和修复过程之间距离可以忽略的情景。用户应考虑区域差异，例如影响稳定土壤冻融抵抗的气候条件，并相应调整材料和方法的使用。

## Review details
清单： 内部审查通过几个迭代步骤完成，涉及原始数据验证、原始数据记录、代表性、完整性、与 ISO 14040 和 14044 有关的建模的一致性。

## Data sources
- Pranjić M A ,Oprčkal P ,Mladenovič A , et al. Comparative Life Cycle Assessment of possible methods for the treatment of contaminated soil at an environmentally degraded site. Journal of Environmental Management, 2018, 218 497-508.
