# 土壤修复;原位修复;生物通风;污染土壤得到修复

Dataset: ILCD process, Unit process, single operation
Geography: CN
Reference year: 2022
Classification: Other Services / Repair and maintenance
Generated by: 王宁, wang_ning@caep.org.cn
Owner: 天工LCI数据工作小组
Review: Dependent internal review by 天工LCI数据工作小组
Amounts: no units in this file; such an amount is in the reference unit of its flow, which a separate flow dataset defines
copyright: false
licenseType: Free of charge for all users and uses

## General comment
空气注入和抽提系统运行，将空气通入土壤，并将废气抽出，是土壤得到修复

## Geography
案例焦化厂位于我国北方中纬度地带

## Technology and included processes
使用电力等使土壤通风系统运行，污染的土壤得到修复

## Technical purpose
所述土壤修复工艺用于原位生物通风修复。这包括将空气注入土壤并作为单一操作单元过程中抽取废气。一个案例示例是在中国北方中纬度地区的焦化厂中的应用。

## Reference product
- Remediated soil: 110067; measured
  得到修复的土壤

## Inputs
- contaminated soil: 110067; measured
  受污染的土壤
- Electricity: 1.728e6; measured
  生物通风系统运行所消耗的电力

## Use advice
使用此数据集时，请确保过程与项目现场的污染类型和土壤条件相兼容。应考虑操作的规模以及所使用的通风技术对特定类型的土壤和污染物的有效性。此外，评估提取的废气可能对环境产生的影响并包括对排放的必要控制措施也非常重要。

## Review details
清单： 内部审查通过几个迭代步骤完成，涉及原始数据验证、原始数据记录、代表性、完整性、与 ISO 14040 和 14044 有关的建模的一致性。

## Data sources
- 刘文晓,夏天翔,张丽娜等.基于修复效果的污染土壤修复工程环境足迹分析[J].环境科学研究,2022,35(10):2367-2377.DOI:10.13198/j.issn.1001-6929.2022.07.05.
