# 秸秆收集｜秸秆｜打捆｜无工艺流程参数

Dataset: ILCD process, Unit process, single operation
Geography: CN
Reference year: 2020
Classification: Unit processes / Materials production / Agricultural production means
Functional unit: Taking the production of 10,000KWh of electric energy as the functional unit (consumption of straw is 1.4kg/kwh)
LCI method principle: Consequential
Generated by: 刘超硕, liucs22@mails.jlu.edu.cn
Owner: 天工LCI数据工作小组
Review: Dependent internal review by 天工LCI数据工作小组
Amounts: no units in this file; such an amount is in the reference unit of its flow, which a separate flow dataset defines
copyright: false
licenseType: Free of charge for all users and uses

## General comment
所描述的工业过程涉及收集及打捆秸秆以发电。该过程是生物质能转换系统的一个组成部分，在该系统中，秸秆被用作原料来生产电能。该过程的电能生产功能单位为10000千瓦时，每生产1千瓦时电能需消耗1.4公斤秸秆。该过程通常用于生物质发电厂，并且可以作为并网系统中的可再生能源来源。

## Reference product
- Crop straw: 14000; measured

## Outputs
All rows: measured
- carbon dioxide (fossil): 58.8743
  原文未区分排放源为生物源或化石源，根据专家判断此处为化石源。
- carbon monoxide,carbon monoxide (fossil): 0.33739
  原文未区分排放源为生物源或化石源，根据专家判断此处为化石源。
- nitrous oxide: 0.78723, 0.00153 (2 entries)
- hydrocarbons (unspecified): 0.10346
- sulfur dioxide: 0.01323
- particles (> PM10),particles (> PM10): 0.16596
- methane (fossil): 0.00335
  原文未区分排放源为生物源或化石源，根据专家判断此处为化石源。

## Use advice
在使用该数据集进行生命周期评估（LCA）时，用户应确保数据能代表特定地理区域和用于秸秆收集及打捆的具体技术。核实功能单位与所研究系统的电能生产效率是相一致的，这一点至关重要。用户还应考虑边界条件，如是否包括秸秆打捆后的下游处理阶段，例如运输、储存和燃烧。应保持与生物质能评估指南的方法论一致性。特别注意，由于缺少工艺流程参数，这要求用户谨慎解释或需要补充数据来补偿潜在的环境影响。

## Review details
清单： 内部审查通过几个迭代步骤完成，涉及原始数据验证、原始数据记录、代表性、完整性、与 ISO 14040 和 14044 有关的建模的一致性。

## Data sources
- Wang, Z. et al. Sustainability assessment of straw direct combustion power generation in China: From the environmental and economic perspectives of straw substitute to coal. Journal of Cleaner Production 273, 122890 (2020).
