# 铝电解碳阳极生产 ; 碳阳极 ; 石油焦 ; 2017年

Dataset: ILCD process, Unit process, single operation
Geography: CN
Reference year: 2021
Classification: Unit processes / Materials production / Non-energetic raw materials
Generated by: 蔡梓萌, caizm6178@163.com
Owner: 天工LCI数据工作小组
Review: Dependent internal review by 天工LCI数据工作小组
Amounts: no units in this file; such an amount is in the reference unit of its flow, which a separate flow dataset defines
copyright: false
licenseType: Free of charge for all users and uses

## General comment
通过使用石油焦作为原料的电解过程生产的碳阳极，专门用于铝生产。在冶炼工业中，高温电解过程涉及从其氧化物中提取铝，在该过程中，碳阳极作为电池反应中的关键组成部分，至关重要。

## Time period
文献发表日期

## Reference product
- anode, for metal electrolysis: 1000; software or database
  anode

## Inputs
All rows: software or database
- electricity, high voltage, aluminium industry: 748.8
  electricty
- heavy fuel oil: 65
  fuel oil
- coal tar: 214
  coal tar pitch
- Petroleum Coke: 1089
  petroleum coak
- coal gas: 1277

## Data selection and combination
本研究的数据参考了PA、SA、电力等背景数据的LCA数据。PA数据来自统计数据源，SA数据主要来自文献。背景数据主要来自中国科学院生态环境研究中心CASRCEES 2018建立的中国本地化LCA数据库，涵盖能源、材料、交通、废物管理等LCA数据。

## Use advice
用户应注意，铝电解碳阳极生产的LCA数据集是基于2017年发布的统计和文献资料。产品分析（PA）数据来源于官方统计资料，而支撑活动（SA）信息来自学术研究。背景数据应与中国科学院生态环境研究中心提供的、为中国本土化的2018年CAS RCEES LCA数据库进行交叉参考。在LCA模型中应用数据时，注意数据的技术特性，如适用，考虑潜在的更新或区域变异。

## Review details
清单： 内部审查通过几个迭代步骤完成，涉及原始数据验证、原始数据记录、代表性、完整性、与 ISO 14040 和 14044 有关的建模的一致性。

## Data sources
- Ding, N., Liu, N., Lu, B. & Yang, J. Life cycle greenhouse gas emissions of aluminum based on regional industrial transfer in China. J. Ind. Ecol. 25, 1657–1672 (2021).
