# 铝电解碳阳极生产 ; 铝电解碳阳极 ; 铝合金轮毂制造工艺 ; 冶金用氧化铝

Dataset: ILCD process, Unit process, single operation
Geography: CN
Reference year: 2018
Classification: Unit processes / Materials production / Metals and semimetals
Generated by: 傅晨玲, fu-chenling@tsinghua.edu.cn
Owner: 天工LCI数据工作小组
Review: Dependent internal review by 天工LCI数据工作小组
Amounts: no units in this file; such an amount is in the reference unit of its flow, which a separate flow dataset defines
copyright: false
licenseType: Free of charge for all users and uses

## General comment
氧化铝生产 ; 铝合金轮毂制造工艺

## Time period
文献发表日期

## Technical purpose
该数据表示铝电解碳阳极的生产过程，这些阳极用于原铝生产的电解阶段，以及铝合金轮毂的制造过程。提到的氧化铝专用于冶金应用，表明它用于冶炼过程中生产铝。

## Reference product
- anode, for metal electrolysis: 52.95

## Inputs
All rows: missing unimportant
- electricity, high voltage, aluminium industry: 47.7
- Petroleum Coke: 60.42
- pitch: 11.66
- heavy fuel oil: 3.33
- Gas, mine, off-gas, process, coal mining: 68.37

## Outputs
All rows: missing unimportant
- carbon dioxide (fossil),carbon dioxide (fossil): 59.89
- carbon monoxide (fossil),carbon monoxide (fossil): 47.49
- sulfur dioxide: 0.21
- Nitrogen oxides: 0.15
- methane (fossil): 0.03
- hydrogen fluoride: 0.002
  HF
- Polycyclic Aromatic Hydrocarbon (PAH): 0.006
  PAHs
- particles, unspecified: 0.04

## Use advice
用户应确保在铝产品的生命周期库存评估中包含此数据，其中电解碳阳极是主要输入。在模拟使用阶段行为时应注意准确性，考虑阳极和轮毂的效率和寿命。此外，应审查数据的技术适用性，确保它与被评估产品的具体制造技术和方法匹配。

## Review details
清单： 内部审查通过几个迭代步骤完成，涉及原始数据验证、原始数据记录、代表性、完整性、与 ISO 14040 和 14044 有关的建模的一致性。

## Data sources
- Yi Qiu-ping & Tang Chang-ping. Environmental impact assessment of magnesium alloy automobile hub based on life cycle assessment. JOURNAL OF CENTRAL SOUTH UNIVERSITY 25, 1870–1878 (2018).
