# 机舱生产 ; 24个1.25 MW 的风轮机机舱生产

Dataset: ILCD process, Unit process, single operation
Geography: YL-GX-CN
Reference year: 2012
Classification: Unit processes / Systems / Other machines
Functional unit: The generation of 1 kW h (kW h) of electricity is adapted as the functional unit in this study, and the corresponding amounts of CO2 emissions and air pollutants (SO2,NOX and PM10)perkWh of electricity are chosen as the indicators for environmental performances, and the monetary value (US$) of per kW h of electricity is chosen as the indicator for cost-effectiveness evaluation.
LCI method principle: Attributional
LCI method approaches: Allocation
Generated by: 赵云志, ll10088@163.com
Owner: 天工LCI数据工作小组
Review: Dependent internal review by 天工LCI数据工作小组
Amounts: no units in this file; such an amount is in the reference unit of its flow, which a separate flow dataset defines
copyright: false
licenseType: Free of charge for all users and uses

## General comment
本工艺生产的风轮机机舱用于1.25 MW的风力发电机组，在中国广西壮族自治区玉林市的典型风电系统中使用。这些风力发电机组预计有20年的生命周期，并安装在一座由24台单元组成的风电场内。此过程是风力发电系统的生产、运行和维护阶段中至关重要的部分，并通过为风力发电提供关键组件，支持可再生能源产业。

## Geography
本研究选取中国广西壮族自治区玉林市的典型风电场系统作为案例研究地点。开发商即中国华电股份有限公司，是一家国有企业，通过提供风力发电设备及相关服务，致力于在中国发展风力发电[ 37 ]。

## Reference product
- Wind turbine nacelle cover: 24; measured

## Inputs
All rows: measured
- iron: 480000
- Resin: 1300
- copper: 91000
- Steel,Steel: 560000
- Multi-Si ingot: 9600
- Fiber glass: 900

## Deviations from the LCI method approaches
根据引入的生命周期评价方法[ 34、35 ]，首先确定了风能和火力发电的系统边界。然后，提出了评价环境和经济效益的方法，以量化共同利益，并从共同利益的角度介绍了环境和经济影响评价的方法。

## Data selection and combination
该风电场装有24台风电机组，每台机组的生产能力为1.25 MW，预计每台机组的运行寿命为20年。风电系统的生命周期可分为5个阶段： (1)生产制造、 (2)运输和安装、 (3)发电、 (4)维护和 (5)报废回收和处置。不可再生能源的投入在各个阶段都有所体现。在这项研究中，原材料、化石燃料的消耗和相应的排放都考虑了一个生命周期过程。同时，考虑风电场的成本效益，因为成本在风电场运营中扮演着非常重要的角色[38]。考虑到数据的可靠性和可获得性，该风电场的成本数据主要取自辽宁省康平县某风电场(设计容量为49.5 MW)的可行性报告[39]

## Use advice
在使用此数据进行风力发电系统生命周期评估（LCA）时，用户必须考虑包括生产、运输和安装、发电、维护以及报废回收和处置在内的整个生命周期。该数据来源于特定案例研究，因此在应用于不同情境时应谨慎使用。环境绩效根据每千瓦时所生成电力的CO2排放量和空气污染物来量化，成本效益则使用每千瓦时电力的货币价值进行评估。用户应确保所应用的系统边界和评估方法与参考研究中使用的一致，以保持数据的完整性和相关性。

## Review details
清单： 内部审查通过几个迭代步骤完成，涉及原始数据验证、原始数据记录、代表性、完整性、与 ISO 14040 和 14044 有关的建模的一致性。
