# cement production|cement, portland-composite cement|new dry process, cement kiln co-processing of industrial solid waste|mixed solid wastes

Dataset: ILCD process, Unit process, black box
Geography: CN
Reference year: 2012
Classification: Materials production / Other mineralic materials
Generated by: Siqi Yang
Amounts: no units in this file; such an amount is in the reference unit of its flow, which a separate flow dataset defines
copyright: false

## General comment
The company is equipped with a 4500t/d new dry process cement clinker production line. The case study focuses on the cement production system that has adopted the cement kiln co-processing technology for industrial solid waste treatment.

## Geography
A cement factory in Northeast

## Model description
The system boundary is the cement production system of the cement plant.

## Reference product
- cement, portland-composite cement: 1000
  Cement products

## Inputs
All rows: measured
- limestone, crushed, for mill: 1128.05
  Limestone
- shale: 1.23171
  Shale
- silica stone: 17.8049
  Silica
- iron, powder: 27.3171
  Iron powder
- gypsum (desulphurized): 52.2561
  Gupsum
- ash: 124.39
  Fly ash
- blast furnace slag: 204.268
  Blast furnace slag
- waste clay: 1.04878
  Scrap white soil
- Coating slag: 0.160366
  Coating residue
- refinery sludge: 5.26829
  Scrap override
- Catalyst waste: 2.11585
  Abolition catalyst
- soil, contaminated: 5.26829
  Pollution soil
- digester sludge: 15.7927
  Digestive sludge
- hard coal, run-of-mine: 98.4146
  Coal. Annual coal consumption energy = (1.614E+8) kg x (2.149E+7) J/kg (average low heating value) = (3.7E+15) J.
- diesel: 4.18659
  Diesel. Diesel = (6.866E+6) kg x (46.04) MJ/kg (combustion value) = (3.16E+8) MJ.
- electricity, medium voltage: 338.488
  Total electricity consumption. Annual electricity consumption energy = (1.542E+8) kWh x (3.60E+6) J/kWh = (5.55E+14) J.
- tap water: 251.22
  The original text is "total water amount", which refers to tap water.

## Outputs
- carbon dioxide: 884.146; measured
  CO2
- sulfur dioxide: 0.328659; measured
  SO2
- Nitrogen oxides: 1.11585; measured
  NOx
- particles (> PM10): 0.853659; measured
  Dust, with an unspecified particle size, is treated as PM > 10 micrometers in diameter.

## Data sources
- 邵帅. (2016). 基于Emergy和Em-LCA的水泥企业可持续发展水平评价 [硕士, 大连理工大学].
