# 育肥猪生产 ; 粪便处理

Dataset: ILCD process, Unit process, single operation
Geography: LN-CN
Reference year: 2010
Classification: Unit processes / Materials production / Agricultural production means
Functional unit: The evaluation unit was 1000 fattening pigs
Generated by: 杨瑞, 1632707028@qq.com
Owner: 天工LCI数据工作小组
Review: Dependent internal review by 天工LCI数据工作小组
Amounts: no units in this file; such an amount is in the reference unit of its flow, which a separate flow dataset defines
copyright: false
licenseType: Free of charge for all users and uses

## General comment
猪粪便处理过程中主要排放的气体为 CH4、NH3 和 N2O，主要来自猪粪尿的挥发。

## Geography
辽宁省 2010 年玉米、大豆和小麦每公顷产量分 别为 ···

## Time period
辽宁省2010年玉米、大豆和小麦每公顷产量分别为······

## Technology and included processes
评价内容是：粪便处理过程中粪便挥发及流失产生的污染物 排放。

## Technical purpose
该数据集提供了与育肥猪生产过程相关的环境影响信息，重点关注粪便处理过程中产生的CH4、NH3和N2O排放。它旨在评估大型化学育肥猪场对全球变暖、酸化和富营养化的贡献。这套LCA数据适用于参与优化畜牧过程和减轻环境影响的研究人员、环境分析师和农业规划者。

## Reference product
- pig: 1000; input; measured
  1000头育肥猪

## Outputs
All rows: measured
- methane (biogenic): 3.78
- ammonia: 1020.8
- nitrous oxide: 61.71
  一氧化二氮
- nitrogen, total (excluding N2): 10032
- phosphorus, total: 4320

## Deviations from the LCI method approaches
本研究以辽宁省规模化育肥猪养殖场为对象，应 用 LCA 方法对育肥猪生产的环境影响进行评估

## Data selection and combination
本文数据来自辽宁省36家规模化育肥猪养殖场调查；并参照《辽宁统计年鉴》提供的相关数据计算出育 肥猪生产过程中全球变暖、环境酸化和富营养化的影 响潜力。

## Data treatment and extrapolations
参考 《IPCC2006》

## Use advice
使用这个数据集的用户应当注意到数据的特定地区背景（2010年辽宁省）及规模（36家大型育肥猪养殖场）信息。应在提供的参考年份和地点范围内解释环境影响。使用数据时，需要适当处理关于粪便挥发和流失排放的方法论一致性。考虑与处理猪粪过程技术适应性相关的因素，并在使用排放因子时仔细参考IPCC2006指南。使用1000头育肥猪作为评价单位，作为比较和量化结果的基础。

## Review details
清单： 内部审查通过几个迭代步骤完成，涉及原始数据验证、原始数据记录、代表性、完整性、与 ISO 14040 和 14044 有关的建模的一致性。

## Data sources
- 刘鸣达, 赵妍, 刘显军, & 王耀晶. 辽宁省育肥猪生产环境影响的生命周期评价. 农业环境科学学报 31, 1250–1255 (2012).
