# Basalt continuous fiber production | CN

Dataset: ILCD process
Geography: CN
Classification: Materials production / Other mineralic materials
Generated by: Jiaqi Lu, wilsherelu@foxmail.com
Review: Dependent internal review by Tiangong LCI Data Working Group
Amounts: no units in this file; such an amount is in the reference unit of its flow, which a separate flow dataset defines
copyright: false

## Reference product
- Basalt Fiber: 1000; missing unimportant
  玄武岩连续纤维产品

## Inputs
All rows: missing unimportant
- basalt: 1060
  玄武岩矿石
- water: 7.65e7
  自来水
- electricity mix: 1969.52
  电耗
- natural gas: 497.8
  天然气
- cartonboard boxes; mixed technology; production mix, a plant, 46% primary fibre, 54% recovered fibre: 0.00989
  纸箱（包装）

## Outputs
All rows: missing unimportant
- Nitrogenous Matter (unspecified, as N): 0.17
  氨氮[排放到水体（未指定类型）
- nitrous oxide: 0.76
  氮氧化物[排放到大气（未指定类型）]
- sulfur dioxide: 0.27
  二氧化硫[排放到大气（未指定类型）]
- chemical oxygen demand: 5.77
  化学需氧量[排放到水体（未指定类型）]
- Particles (PM0.2 - PM2.5): 0.26
  总颗粒物[排放到大气（未指定类型）
- volatile organic compound: 0.13
  volatile organic compound[排放到大气（未指定类型）]
- Sludge (from processing): 3.11

## Review details
Inventory: The internal review was done by several iteration steps concerning raw data validation, raw data documentation, representativity, completeness and consistency of modelling with regard to ISO 14040 and 14044.; Documentation: The review of the documentation was performed by Ecobilan and is in compliance with ISO 14040 and 14044. The data set documentation is correct in view of the appropriateness of the information provided. It includes all relevant information in view of data quality and scope of application of the respective LCI result.

## Data sources
- 玄武岩连续纤维生产项目环评报告公示
