# 铝土矿开采｜铝土矿 ; 摇篮

Dataset: ILCD process, Unit process, single operation
Geography: CN
Reference year: 2020
Classification: Unit processes / Materials production / Non-energetic raw materials
Generated by: 熊若熙, xiongrx0126@163.com
Owner: 天工LCI数据工作小组
Review: Dependent internal review by 天工LCI数据工作小组
Amounts: no units in this file; such an amount is in the reference unit of its flow, which a separate flow dataset defines
copyright: false
licenseType: Free of charge for all users and uses

## General comment
铝土矿开采｜耐火废料生产

## Time period
文献发表日期

## Technical purpose
该数据集描述了适应中国条件的铝土矿开采过程。通过这一过程提取的铝土矿主要用作生产氧化铝的原料，氧化铝随后可以精炼成铝金属。这种铝在汽车、建筑、电子、包装和航空航天等多个行业中得到应用。特别是在中国，此数据集考虑了提取阶段主要使用的地区能源组合和燃料类型。

## Reference product
- bauxite: 1; log-normal; software or database

## Inputs
All rows: software or database
- mine infrastructure, bauxite: 5e-11; log-normal
  Capital equipment
- Occupation, mineral extraction site: 0.000419; log-normal
- electricity, high voltage, aluminium industry: 0.003312; log-normal
- aluminium: 0.2126; log-normal
- Gangue, Bauxite: 2.26; log-normal
  备注呢？？？？？
- blasting: 0.000195; log-normal
  Explosives
- Coal, brown, in ground: 0.0178
  Coal fuel
- Water, salt, ocean: 0.00066; log-normal
- Water, unspecified natural origin: 0.0005; log-normal
- Transformation, from annual crop: 0.000134; log-normal
- Transformation, from cropland fallow (non-use): 4.26e-5; log-normal
- Transformation, from forest, extensive: 3.34e-5; log-normal
- Transformation, to mineral extraction site: 0.00021; log-normal
- recultivation, bauxite mine: 0.0002; log-normal
  Mine restoration

## Outputs
- particles (PM2.5): 8.36e-6; log-normal; software or database
- particles (> PM10): 8.64e-5; log-normal; software or database
- particles (PM2.5 - PM10): 7.52e-5; log-normal; software or database
- inert waste: 6.2e-5; log-normal; software or database
  Solid waste

## Data selection and combination
该活动在ecoinvent数据库中的库存构成了一个全球平均数据集，基于国际铝业研究所（IAI 2013）的一项调查。我们通过将全球平均电力结构替换为中国国家结构，并将柴油和重质燃料油输入替换为煤炭来适应中国的情况，因为后者是中国铝土矿开采中使用的主要燃料类型

## Use advice
在使用此数据集进行生命周期评估（LCA）时，注意准确反映中国铝土矿开采操作中的能源消费模式——即使用煤炭作为主要能源来源而非柴油或重油，并使用中国国家电力组合而非全球平均值。这将确保生命周期评估结果具有更好的地域特异性。同时，在将数据应用于其他情境之前，考虑技术适用性以及参考全球数据与中国条件之间的任何系统差异。

## Review details
清单： 内部审查通过几个迭代步骤完成，涉及原始数据验证、原始数据记录、代表性、完整性、与 ISO 14040 和 14044 有关的建模的一致性。

## Data sources
- Muñoz, I., Soto, A., Maza, D. & Bayón, F. Life cycle assessment of refractory waste management in a Spanish steel works. Waste Manage. 111, 1–9 (2020).
