# Granite Slabs production | 1.8*0.6*0.2 m2, CN

Dataset: ILCD process
Geography: CN
Classification: Materials production / Other mineralic materials
Generated by: Jiaqi Lu, wilsherelu@foxmail.com
Review: Dependent internal review by Tiangong LCI Data Working Group
Amounts: no units in this file; such an amount is in the reference unit of its flow, which a separate flow dataset defines
copyright: false

## Reference product
- Granite slab product: 1; missing unimportant
  花岗岩板材产品

## Inputs
- granite: 3543.75; missing unimportant
  花岗岩毛坯
- water: 4984.46; missing unimportant
- electricity mix: 1.5984e6; missing unimportant

## Outputs
- Nitrogenous Matter (unspecified, as N): 2.15; missing unimportant
  氨氮[排放到水体（未指定类型）
- chemical oxygen demand: 20; missing unimportant
  化学需氧量[排放到水体（未指定类型）]
- Particles (PM0.2 - PM2.5): 940; missing unimportant
  总颗粒物[排放到大气（未指定类型）]
- Sludge (from processing): 576880; missing unimportant

## Review details
Inventory: The internal review was done by several iteration steps concerning raw data validation, raw data documentation, representativity, completeness and consistency of modelling with regard to ISO 14040 and 14044.; Documentation: The review of the documentation was performed by Ecobilan and is in compliance with ISO 14040 and 14044. The data set documentation is correct in view of the appropriateness of the information provided. It includes all relevant information in view of data quality and scope of application of the respective LCI result.

## Data sources
- 年加工30万m2花岗岩板材项目环评报告
