# 氧化铝生产; 冶金用氧化铝 ; 铝土矿 ; 2014年

Dataset: ILCD process, Unit process, single operation
Geography: CN
Reference year: 2021
Classification: Unit processes / Materials production / Non-energetic raw materials
Generated by: 封羽真, fyz22
Owner: 天工LCI数据工作小组
Review: Dependent internal review by 天工LCI数据工作小组
Amounts: no units in this file; such an amount is in the reference unit of its flow, which a separate flow dataset defines
copyright: false
licenseType: Free of charge for all users and uses

## General comment
所描述的工业过程涉及冶金级氧化铝的生产，通常用于铝行业的金属铝生产。这种高纯度的氧化铝是从铝土矿中生产的，是铝金属制造的基本原材料，尤其是在大规模冶炼操作中。

## Time period
文献发表日期

## Reference product
- aluminium oxide, metallurgical: 1000; software or database
  alumina

## Inputs
All rows: software or database
- soda ash, dense: 158.22
  soda ash
- Petroleum Coke: 972.085
  Energy sources proportion of energy consumption is coal: fuel oil: coke: natural gas: coke even gas=46.0%: 11.0%: 7.1%: 14.1%: 21.7%
- coal gas: 2971.02
  (same comment as for Petroleum Coke)
- natural gas, high pressure: 1930.48
  (same comment as for Petroleum Coke)
- fuel oil, unspecified: 1506.05
  (same comment as for Petroleum Coke)
- hard coal: 6298.02
  (same comment as for Petroleum Coke)
- Water, unspecified natural origin: 2.22
  water consumption

## Data selection and combination
本研究的数据参考了PA、SA、电力等背景数据的LCA数据。PA数据来自统计数据源，SA数据主要来自文献。背景数据主要来自中国科学院生态环境研究中心CASRCEES 2018建立的中国本地化LCA数据库，涵盖能源、材料、交通、废物管理等LCA数据。

## Use advice
本LCA数据集的用户应注意，PA（过程归属）数据来自统计数据，而SA（现场归属）数据主要来自文献。背景数据主要来自中国科学院生态环境研究中心建立的2018年CAS RCEES中国本土化LCA数据库。在将这些数据纳入LCA研究时，应特别注意数据的来源和质量、数据对所研究过程的代表性以及与LCA模型中所做的方法论选择的一致性。技术范围应反映生产年份（2014年）和当时的具体技术工艺，以确保时间准确性。

## Review details
清单： 内部审查通过几个迭代步骤完成，涉及原始数据验证、原始数据记录、代表性、完整性、与 ISO 14040 和 14044 有关的建模的一致性。

## Data sources
- Ding, N., Liu, N., Lu, B. & Yang, J. Life cycle greenhouse gas emissions of aluminum based on regional industrial transfer in China. J. Ind. Ecol. 25, 1657–1672 (2021).
