# Production stage | Drilling fluid | Low permeability gas field | Waste drilling fluid drilling

Dataset: ILCD process, Unit process, single operation
Geography: EEDS-NMG-CN
Reference year: 2014
Classification: Materials production / Other mineralic materials
LCI method principle: Attributional
LCI method approaches: Consequential
Generated by: zimeng li, 1577978537@qq.com
Review: Dependent internal review by Tiangong LCI Data Working Group
Amounts: no units in this file; such an amount is in the reference unit of its flow, which a separate flow dataset defines
copyright: false

## General comment
No solid phase and liquid phase falling to the ground during the whole well drilling. The technology of drilling fluid not falling to the ground reduces the workload of the Mud Pit, realizes zero discharge of the waste drilling fluid in the drilling process, reduces the environmental damage caused by the waste drilling fluid, and the ground is completely restored to the pre-drilling state after the completion of drilling The reuse of waste drilling fluid can also greatly reduce the cost of drilling

## Geography
Daniu gas field is located in the border area of Shaanxi and Mongolia, belonging to the Ordos Basin. It is one of the development areas of the north China branch of the Sinopec. During the period of “Fifteen” in Daniu gas field, 723 horizontal wells are planned to be deployed, with a new gas production capacity of 66.5 × 108 m3 and a gas production capacity of 214 × 108 m3. In 2012, the DANIU gas field produced 30 × 108 m3 of natural gas per year, completed 119 horizontal wells, with an average depth of 3992.21 m and an average length of 1131.13 m, it is the first low permeability gas field to realize horizontal well scale development in China.

## Inputs
- LPG - liquefied petroleum gas: 1000; uniform; article inperiodical
  大牛地气田水平井钻井液化学处理剂的平均用量为200 t/井，配制钻井液为1 000 m3/井.该井完钻后集中处理废弃钻井液超过800 m3，运至下一口井重复利用。

## Review details
Inventory: The internal review was done by several iteration steps concerning raw data validation, raw data documentation, representativity, completeness and consistency of modelling with regard to ISO 14040 and 14044.; Documentation: The review of the documentation was performed by Ecobilan and is in compliance with ISO 14040 and 14044. The data set documentation is correct in view of the appropriateness of the information provided. It includes all relevant information in view of data quality and scope of application of the respective LCI result.

## Data sources
- 钻井液不落地技术在大牛地气田的应用 - 中国知网.
