# Ethylene production | Ethylene | Coal-based methanol to ethylene route | Coal-based methanol

Dataset: ILCD process, Unit process, black box
Geography: EEDS-NMG-CN
Reference year: 2021
Classification: Materials production / Other mineralic materials
Functional unit: Define 1t of industrial grade ethylene product as a functional unit
LCI method principle: Attributional
LCI method approaches: Allocation - mass
Generated by: Yanan Ren, renyn15@tsinghua.org.cn
Review: Dependent internal review by Tiangong LCI Data Working Group
Amounts: no units in this file; such an amount is in the reference unit of its flow, which a separate flow dataset defines
copyright: false

## General comment
CPI and Total coal-to-polyolefin project, 800,000 tons/year olefin, methanol-to-olefin technology

## Geography
Ordos City Industrial Park, Inner Mongolia Autonomous Region

## Time period
Not mentioned, replaced by the publication time of the document

## Technology and included processes
In the model of coal-based methanol route to ethylene, coal gasification synthesis gas is used to generate methanol, and then the process of producing ethylene through MTO is adopted. Qualified pulverized coal is prepared from the raw coal through the pulverized coal preparation device. In the coal gasification unit, the pulverized coal and the oxygen from the air separation unit are subjected to a pressurized gasification process of dry pulverized coal to generate crude gas. Most of the crude gas is sent to the carbon monoxide shifting device, and part of the CO in the raw gas is converted into H2 by using the shifting process, and the shifted gas is sent to the acid gas removal device, and the CO2 and H2S in the shifted gas are removed by the low-temperature methanol washing process Such as acid gas, the purified gas is sent to the methanol synthesis unit; the remaining part of the crude gas is directly sent to the acid gas removal unit, and after H2S is removed, it is sent to the thermal power station for power generation. The removed H2S is sent to the sulfur recovery unit for recovery, and part of the CO2 is returned to the coal gasification unit. The purification gas demethanol synthesis unit produces crude methanol, the synthesis gas dehydrogenation recovery unit recovers H2, and other parts circulate in the system or go to the fuel gas pipeline network of the whole plant. MTO grade methanol is obtained after the crude methanol passes through the methanol rectification unit. MTO-grade methanol enters the methanol-to-olefins unit to synthesize olefins, producing by-products such as ethylene, propylene, and C5.

## Reference product
- ethene (ethylene): 1000; measured
  乙烯

## Inputs
All rows: measured
- Methanol: 2690
  MTO级甲醇
- Hydrogen: 0.74
  氢气
- sodium hydroxide: 18.16
  氢氧化钠溶液
- Dimethyl disulfide: 0.07
  二甲基二硫
- Aluminum oxide (alumina): 0.000639
  催化剂Al2O3
- palladium: 4.08e-5
  催化剂Pd
- process steam: 3500
  蒸汽
- Water (desalinated; deionized): 1710
  中压锅炉给水
- Water for industrial use: 50
  生产水
- electricity mix: 862.092
  电

## Outputs
All rows: measured
- carbon dioxide: 60
  CO2
- nitrous oxide: 1e-5
  NOx
- non-methane volatile organic compounds: 1.54e-11
  NMVOC
- methane: 23.9
  CH4
- chemical oxygen demand: 0.23
  COD
- biological oxygen demand: 0.08
  BOD5
- Sodium hydroxide: 0.08
  NaOH
- waste water - untreated: 166.54
  MTO工艺废水
- Water (groundwater from technosphere, waste water): 1410.82
  汽提净化水
- waste water - untreated: 21.9
  含碱废水
- Waste Alumina Catalyst: 0.000639
  废Al2O3催化剂

## Deviations from the LCI method approaches
MTO grade methanol enters the methanol-to-olefins unit to synthesize olefins, and by-products such as ethylene, propylene, and C5 are produced. This study chooses mass distribution

## Data selection and combination
The inventory data comes from China Power Investment’s ethylene project with an annual output of 800,000 tons of polyolefins

## Review details
Inventory: The internal review was done by several iteration steps concerning raw data validation, raw data documentation, representativity, completeness and consistency of modelling with regard to ISO 14040 and 14044.; Documentation: The review of the documentation was performed by Ecobilan and is in compliance with ISO 14040 and 14044. The data set documentation is correct in view of the appropriateness of the information provided. It includes all relevant information in view of data quality and scope of application of the respective LCI result.

## Data sources
- 赵悦如. 基于生命周期方法的乙烯生产环境影响分析. (大连理工大学, 2021).
