# 退役锰酸锂电池湿法回收

Dataset: ILCD process, Unit process, single operation
Geography: GZ-CN
Reference year: 2022
Classification: End-of-life treatment / Material recycling
Functional unit: LMO battery 4×12V, 12Ah
Generated by: 陈利鹏, lpchen07@163.com
Owner: 天工LCI数据工作小组
Review: Dependent internal review by 天工LCI数据工作小组
Amounts: no units in this file; such an amount is in the reference unit of its flow, which a separate flow dataset defines
copyright: false
licenseType: Free of charge for all users and uses

## General comment
废旧的锂锰酸盐（LMO）电池经高温还原、水解浸取和结晶转化处理，生产工业级碳酸锂，同时产生氧化锰和硫酸钠。

## Technical purpose
这种湿法回收工艺主要用于回收废旧锂锰酸盐（LMO）电池中的有价成分。所回收的工业级碳酸锂通常用于多个行业，包括锂离子电池生产、玻璃和陶瓷制造，以及作为铝冶炼中的助溶剂。产生的氧化锰可以用于电子软磁铁氧体的制造、化工产业或作为砖和陶瓷的着色剂。硫酸钠用于洗涤剂和纺织工业，以及在造纸和玻璃制造中的应用。

## Reference product
- EoL LMO battery: 1; input; measured
  退役锰酸锂电池(4×12V，12Ah)

## Inputs
All rows: measured
- Sulfuric acid(98%): 5.634
- Sodium hydroxide（30%）: 3.024
- sodium carbonate: 1.962
- Liquid ammonia: 0.708
- hydrogen peroxide: 2.142
- Water (river water from technosphere, cooling water): 5.88
- Electricity: 29.16
- Water (evapotranspiration): 21.24
  纯净水

## Outputs
All rows: measured
- Lithium carbonate: 0.3144
- sodium sulfate: 0.606
- aluminium: 0.1956
- Manganese dioxide: 1.2729
- Ammonia Nitrogen: 0.000252
- carbon dioxide: 2.82e-7
- sulfur dioxide: 2.496e-6
- nitrous oxide: 9.24e-6
- chemical oxygen demand: 1.68e-5
- phosphorus, total: 6.12e-6

## Use advice
在使用该数据集进行生命周期评估时，确保回收过程的边界条件与预期的应用场景匹配。考虑与高温还原、水解浸取和结晶阶段相关的能耗和排放，评估环境影响时要注意。请注意，此数据集表示48V，12Ah退役LMO电池的单一单元过程。用户必须根据待回收LMO电池的数量和状态调整可扩展性和技术适用性。特别注意遵守法规和潜在废物管理策略的影响。

## Review details
清单： 内部审查通过几个迭代步骤完成，涉及原始数据验证、原始数据记录、代表性、完整性、与 ISO 14040 和 14044 有关的建模的一致性。

## Data sources
- Liu, M. et al. Life cycle environmental and economic assessment of electric bicycles with different batteries in China. Journal of Cleaner Production 385, 135715 (2023).
