# 页岩气生产;场地准备阶段;火炬坑建设

Dataset: ILCD process, Unit process, black box
Geography: SC-CN
Reference year: 2014
Valid until: 2016
Classification: Unit processes / Energy carriers and technologies / Natural gas based fuels
Generated by: Pu Hong, 15695258655@163.com
Owner: 天工LCI数据工作小组
Review: Dependent internal review by 天工LCI数据工作小组
Amounts: no units in this file; such an amount is in the reference unit of its flow, which a separate flow dataset defines
copyright: false
licenseType: Free of charge for all users and uses

## General comment
该数据集代表页岩气生产中火炬坑建设阶段，对于安全和可控地燃烧多余气体至关重要。这一过程适用于中国四川和重庆地区页岩气提取现场的建设和运营阶段。它为专注于页岩气项目场地准备阶段的安全和环境标准的行业专业人士量身定制。

## Geography
我国页岩气开采工作目前集中在四川及重庆地区，选取四川及重庆的数据进行LCA计算。

## Time period
原始数据时间介于2014-2016之间

## Reference product
- Retention pond: 200; min 400; max 50; uniform; measured
  场地准备阶段--火炬坑体积

## Inputs
All rows: uniform; measured
- #325 cement: 23000; min 10000; max 36000
  场地准备阶段--火炬坑建设消耗的水泥
- sand: 40000; min 16000; max 62000
  场地准备阶段--火炬坑建设消耗的沙子
- gravel: 69000; min 28000; max 108000
  场地准备阶段--火炬坑建设消耗的碎石
- freshwater: 11000; min 4000; max 17000
  场地准备阶段--火炬坑建设消耗的清水
- Diesel: 469; min 173; max 789
  场地准备阶段--火炬坑建设过程中材料运输消耗的汽油
- Electricity: 216; min 90; max 338.4
  场地准备阶段--火炬坑建设混凝土搅拌消耗的电能

## Use advice
本LCA数据集的用户应注意，它仅反映2014-2016年间四川和重庆地区火炬坑建设的技术实践和环境影响。为了准确地反映数据，应将数据放在这些时间和地理边界内进行考量。如果将这些数据应用于所述地点和时间范围之外的项目，用户必须考虑技术进步和区域差异。在与其他地区或时期的数据集进行比较时，应特别注意方法论的一致性。

## Review details
清单： 内部审查通过几个迭代步骤完成，涉及原始数据验证、原始数据记录、代表性、完整性、与 ISO 14040 和 14044 有关的建模的一致性。

## Data sources
- Wang, J., Liu, M., McLellan, B. C., Tang, X. & Feng, L. Environmental impacts of shale gas development in China: A hybrid life cycle analysis. Resources, Conservation and Recycling 120, 38–45 (2017).
