# Soil and groundwater remediation;Ex-situ;groundwater pump and treat; Remediated groundwater

Dataset: ILCD process, Unit process, single operation
Geography: DK
Reference year: 2021
Classification: Other Services / Engineering and consulting
Generated by: Wang Ning, wang_ning@caep.org.cn
Owner: Tiangong LCI Data Working Group
Review: Dependent internal review by Tiangong LCI Data Working Group
Amounts: no units in this file; such an amount is in the reference unit of its flow, which a separate flow dataset defines
copyright: false
licenseType: Free of charge for all users and uses

## General comment
Operation of groundwater extraction treatment systems

## Technology and included processes
Groundwater remediation through the use of electricity to operate groundwater extraction and treatment systems

## Technical purpose
This dataset describes the ex-situ groundwater pump and treat remediation process. It is applied in environmental engineering to extract contaminated groundwater, treat it aboveground using electricity-powered systems, and then output the remediated groundwater. This process is typically used in sites where groundwater has been contaminated by industrial activities, chemical spills, or other pollutants and is in need of restoration to meet environmental standards.

## Reference product
- Remediated groundwater: 1; estimated

## Inputs
- Electricity: 35000; estimated
- contaminated groundwater: 1; estimated

## Use advice
When utilizing this dataset for Life Cycle Assessment, special attention should be given to the boundary conditions of the process such as the electricity mix used to power the treatment systems, since this can significantly affect the environmental profile. Additionally, the efficiency of the contamination removal and the management of the extracted contaminants should be considered. If comparing to other remediation methods, ensure consistent system boundaries are applied. The data set does not account for the emissions and impacts from the production of the equipment used in the process; thus, this should be included in the LCA if relevant.

## Review details
Inventory: The internal review was done by several iteration steps concerning raw data validation, raw data documentation, representativity, completeness and consistency of modelling with regard to ISO 14040 and 14044.

## Data sources
- Sustainable remediation assessment of a chlorinated ethene plume: method evelopment, application, and assessment
