# Rare earth Crushing and milling|dysprosium|B/M|REE containing ore

Dataset: ILCD process, Unit process, single operation
Geography: CN
Reference year: 2010
Valid until: 2019
Classification: Materials production / Other mineralic materials
Functional unit: The goal of this investigation is to compare environmental impacts related to the production of 1 kg Dy (functional unit) from IAC (Southern China), from B/M ore (Bayan Obo), and from an eudialyte deposit (Norra Kärr) using the LCA method
LCI method principle: Attributional
LCI method approaches: Allocation - mass
Generated by: Tao Wang, twang@iue.ac.cn
Review: Dependent internal review by Tiangong LCI Data Working Group
Amounts: no units in this file; such an amount is in the reference unit of its flow, which a separate flow dataset defines
copyright: false

## Geography
Southern China and Bayan Obo

## Technology and included processes
The goal of this investigation is to compare environmental impacts related to the production of 1 kg Dy (functional unit) from IAC (Southern China), from B/M ore (Bayan Obo), and from an eudialyte deposit (Norra Kärr) using the LCA method

## Reference product
- Ore pulp: 183.12; software or database
  Ore pulp. Milling: 150 km for the crushed ore
- Ore pulp: 2770; article inperiodical
  Ore pulp. Magnetic separation: input for next process: Flotation

## Inputs
- Electricity: 7.632; software or database
  Crushing: value per crushing step estimated by experts from RWTH Aachen University 1.0 kWh/t ore (carbonatite)
- Steel: 0.043; software or database
  Steel. Crushing: low-alloyed, 0.035 kg/t ore estimated by experts from RWTH Aachen University
- transport in t*km,transport in t*km: 0.00084; software or database
  Crushing: transport, freight, lorry >32 metric ton, EURO3. 20 km assumed
- Electricity: 55.188; article inperiodical
  Milling: own calculation with Bond index formula
- Electricity: 0.72; software or database
  Magnetic separation: calculation is based on a Selection Guide for Process Equipment, electricity mix 2014

## Outputs
- Dust: 3.777; article inperiodical
  Dust. Crushing: dust (PM10), (PM2.5 - PM10), (PM2.5) Particles to air. Calculation is based on Western Regional Air Partnership (WRAPAIR, 2006), distribution of dust analog Althaus et al. (2007a)
- Radioactive dust, waste: 5.46; article inperiodical
  Radioactive dust, waste. Crushing: Uranium (U238) [Radioactive emissions to air]. based on Th232 and U238 activity in the ore.
- Steel: 1.37; article inperiodical
  Steel. Milling: calculation is based on Abrasion index
- water: 1335; article inperiodical
  Milling: production of ore pulp with 40 % milled ore
- transport in t*km,transport in t*km: 0.0273; software or database
  Milling: 20 km
- Iron oxide: 612; article inperiodical
  Iron oxide. Magnetic separation: Iron oxide (II-oxide) [Inorganic intermediate products], calculation is based on ore concentration and yield
- Niobium oxide: 1.77; article inperiodical
  Niobium oxide. Magnetic separation: Niobium oxide, calculation is based on ore concentration and yield
- tailings (unspecified): 365; software or database
  Magnetic separation: mass estimated by experts from RWTH Aachen University (Stark, 05.08.2015)

## Deviations from the LCI method approaches
In this study, an allocation method based on the mass of produced REEs combined with their market prices (based on an international metals market analysis and pricing index company ) are considered, as usual for metals with strongly different prices. As the ores have different compositions, the allocation factor has to be assessed individually for each site.

## Review details
Inventory: The internal review was done by several iteration steps concerning raw data validation, raw data documentation, representativity, completeness and consistency of modelling with regard to ISO 14040 and 14044.; Documentation: The review of the documentation was performed by Ecobilan and is in compliance with ISO 14040 and 14044. The data set documentation is correct in view of the appropriateness of the information provided. It includes all relevant information in view of data quality and scope of application of the respective LCI result.

## Data sources
- Zapp, P., Marx, J., Schreiber, A., Friedrich, B. & Voßenkaul, D. Comparison of dysprosium production from different resources by life cycle assessment. Resources, Conservation and Recycling 130, 248–259 (2018).
