# Basaltfiber|Basalt,dolomite,ironslag,coke|Spinning into fibers|All sizes / 玄武岩纤维|玄武岩、白云石、铁渣、焦炭|甩丝成纤|所有规模

Dataset: ILCD process, Unit process, single operation
Geography: CN
Reference year: 2019
Classification: Materials production / Other mineralic materials
Generated by: The data was created by the Office of the Second National Pollution Source Census of the Ministry of Ecology and Environment, and the data was organized by the TianGong Plan team for ILCD format / 生态环境部第二次全国污染源普查工作办公室创建数据，天工计划团队常慧敏整理数据为ILCD格式
Owner: Tiangong LCI Data Working Group / 天工LCI数据工作小组
Amounts: no units in this file; such an amount is in the reference unit of its flow, which a separate flow dataset defines
copyright: false
licenseType: Free of charge for all users and uses

## Technology and included processes
the Technical of end-of-pipe management technology for pollution Nitrogen oxidesis/，Its Technical efficiency of end-of-pipe management0

## Reference product
- Basalt fiber: 1000; calculated
  源文件中描述为为玄武岩纤维，此处对其进行了匹配工作，将其匹配到LCAflow库里面相最符合的流，污染物指标备注为工业废水量

## Outputs
All rows: calculated
- Waste water: 210
  污染物指标工业废水量的末端治理技术是/，其效率为0。原文件中描述污染物类别为废水，污染物指标为工业废水量，此处对其进行了匹配工作，将其匹配到LCAflow库里面相最符合的流，污染物指标备注为工业废水量
- chemical oxygen demand: 0.00966
  污染物指标化学需氧量的末端治理技术是厌氧生物法，其效率为70，末端治理设施实际运行率（k值）计算公式为k=治理设施运行时间（小时/正常生产时间（小时）。原文件中描述污染物类别为废水，污染物指标为化学需氧量，此处对其进行了匹配工作，将其匹配到LCAflow库里面相最符合的流，污染物指标备注为化学需氧量
- Ammonia Nitrogen: 0.000744
  污染物指标氨氮的末端治理技术是厌氧生物法，其效率为70，末端治理设施实际运行率（k值）计算公式为k=治理设施运行时间（小时/正常生产时间（小时）。原文件中描述污染物类别为废水，污染物指标为氨氮，此处对其进行了匹配工作，将其匹配到LCAflow库里面相最符合的流，污染物指标备注为氨氮
- phosphorus, total: 0.000624
  污染物指标总磷的末端治理技术是厌氧生物法，其效率为70，末端治理设施实际运行率（k值）计算公式为k=治理设施运行时间（小时/正常生产时间（小时）。原文件中描述污染物类别为废水，污染物指标为总磷，此处对其进行了匹配工作，将其匹配到LCAflow库里面相最符合的流，污染物指标备注为总磷
- Exhaust gas: 49400
  污染物指标工业废气量的末端治理技术是/，其效率为0。原文件中描述污染物类别为废气，污染物指标为工业废气量，此处对其进行了匹配工作，将其匹配到LCAflow库里面相最符合的流，污染物指标备注为工业废气量
- particles (PM2.5 - PM10): 0.77
  污染物指标颗粒物的末端治理技术是布袋除尘，其效率为95，末端治理设施实际运行率（k值）计算公式为k=设备耗电量（千瓦时）/（设备额定功率（千瓦）*设备运行时间（小时））。原文件中描述污染物类别为废气，污染物指标为颗粒物，此处对其进行了匹配工作，将其匹配到LCAflow库里面相最符合的流，污染物指标备注为颗粒物
- particles (PM2.5 - PM10): 1.694
  污染物指标颗粒物的末端治理技术是过滤+湿电除尘，其效率为89，末端治理设施实际运行率（k值）计算公式为k=设备耗电量（千瓦时）/（设备额定功率（千瓦）*设备运行时间（小时））。原文件中描述污染物类别为废气，污染物指标为颗粒物，此处对其进行了匹配工作，将其匹配到LCAflow库里面相最符合的流，污染物指标备注为颗粒物
- particles (PM2.5 - PM10): 0.77
  污染物指标颗粒物的末端治理技术是干式过滤，其效率为95，末端治理设施实际运行率（k值）计算公式为k=设备耗电量（千瓦时）/（设备额定功率（千瓦）*设备运行时间（小时））。原文件中描述污染物类别为废气，污染物指标为颗粒物，此处对其进行了匹配工作，将其匹配到LCAflow库里面相最符合的流，污染物指标备注为颗粒物
- particles (PM2.5 - PM10): 0.77
  污染物指标颗粒物的末端治理技术是旋风+布袋除尘，其效率为95，末端治理设施实际运行率（k值）计算公式为k=设备耗电量（千瓦时）/（设备额定功率（千瓦）*设备运行时间（小时））。原文件中描述污染物类别为废气，污染物指标为颗粒物，此处对其进行了匹配工作，将其匹配到LCAflow库里面相最符合的流，污染物指标备注为颗粒物
- sulfur dioxide: 0.946
  污染物指标二氧化硫的末端治理技术是碳酸氢钠干式脱硫，其效率为80，末端治理设施实际运行率（k值）计算公式为k=设备耗电量（千瓦时）/（设备额定功率（千瓦）*设备运行时间（小时））。原文件中描述污染物类别为废气，污染物指标为二氧化硫，此处对其进行了匹配工作，将其匹配到LCAflow库里面相最符合的流，污染物指标备注为二氧化硫
- sulfur dioxide: 0.7095
  污染物指标二氧化硫的末端治理技术是单碱法，其效率为85，末端治理设施实际运行率（k值）计算公式为k=设备耗电量（千瓦时）/（设备额定功率（千瓦）*设备运行时间（小时））。原文件中描述污染物类别为废气，污染物指标为二氧化硫，此处对其进行了匹配工作，将其匹配到LCAflow库里面相最符合的流，污染物指标备注为二氧化硫
- sulfur dioxide: 0.946
  污染物指标二氧化硫的末端治理技术是双碱法，其效率为80，末端治理设施实际运行率（k值）计算公式为k=设备耗电量（千瓦时）/（设备额定功率（千瓦）*设备运行时间（小时））。原文件中描述污染物类别为废气，污染物指标为二氧化硫，此处对其进行了匹配工作，将其匹配到LCAflow库里面相最符合的流，污染物指标备注为二氧化硫
- Nitrogen oxides: 0.157
  污染物指标氮氧化物的末端治理技术是/，其效率为0。原文件中描述污染物类别为废气，污染物指标为氮氧化物，此处对其进行了匹配工作，将其匹配到LCAflow库里面相最符合的流，污染物指标备注为氮氧化物

## Data sources
- 第二次全国污染源普查产排污核算系数手册（试用版）,二级代码26,四级代码2659文件，在完整版文件中第4111页
