# cement production|cement, ordinary portland cement, 42.5MPa|incineration of waste

Dataset: ILCD process, Unit process, black box
Geography: BJ-CN
Classification: Materials production / Other mineralic materials
Generated by: Siqi Yang
Amounts: no units in this file; such an amount is in the reference unit of its flow, which a separate flow dataset defines
copyright: false

## General comment
Environmental loading of cement production in the case of waste incineration.

## Model description
Functional unit definition: The functional unit is defined as the performance of 1 ton of Ordinary Portland Cement (OPC) with a strength grade of 42.5. The system boundary includes the processes from raw material intake, raw material pre-processing, raw meal grinding, clinker calcination, clinker grinding, to cement homogenization and storage, i.e., the direct production processes in the entire cement plant, excluding raw material extraction, processing, and transportation processes. The geographical scope of the study is limited to the Beijing region.

## Reference product
- cement, ordinary portland cement, 42.5MPa: 1000
  42.5 Ordinary silicate cement

## Inputs
All rows: measured
- limestone, crushed, for mill: 1318.5
  Limestone
- clay: 94.5
  Clay-based raw materials
- iron, powder: 27
  Iron correction raw material
- gypsum (desulphurized): 60
  The proportion of gypsum is 5.5%
- mixed materials, mineral: 200
  Mixed material
- Waste, from industry: 12.5; min 10; max 15; uniform
  Industrial waste
- hard coal, run-of-mine: 120
  Coal consumption kg
- electricity, medium voltage: 363.6
  Power consumption

## Outputs
- Nitrogen oxides: 1.43; measured
  NOx
- sulfur dioxide: 0.003; measured
  SO2
- particles (> PM10): 9.8; measured
  Dust, with an unspecified particle size, is treated as PM > 10 micrometers in diameter.
- carbon dioxide: 772; calculated
  CO2. Since the volume of CO2 is generally not detected, the emissions are calculated according to the following formulas. CO2 generates the combustion of fossil energy such as fuel, coal-fired and other fossils, as well as limestone decomposition in cement production raw materials. (1) CO2 emissions of fossil energy combustion are calculated as follows: e = 3.67fqka. E is the emissions of CO2, KG; F is the consumption of fuel, kg; Q is fuel thermal mass, mj/kg; K is the carbon emissions coefficient of fuel; A is the carbon oxidation rate of fuel. (2) During the production of cement, the chemical reactions of raw materials limestone generate a large number of CO2 chemical reactions: CACO3 → Cao+CO2 ↑. The percentage of 1kg of limestone CAO is calculated at 48%. In the end, the estimated formula for CO2 emissions is: CO2 emissions = limestone consumption*0.38+e = 271kg+501kg = 772kg.

## Data sources
- 崔素萍, 吴红, 聂祚仁, & 王志宏. (2006). 水泥窑处理固体废弃物环境影响评价. 中国水泥, 7, 50–52.
