# 铝电解与铸锭 ; 原生铝锭 ; 电解 60kA自焙槽工艺 ; 冶金用氧化铝

Dataset: ILCD process, Unit process, black box
Geography: CN
Reference year: 2005
Classification: Unit processes / Materials production / Metals and semimetals
Generated by: 蔡梓萌, caizm6178@163.com
Owner: 天工LCI数据工作小组
Review: Dependent internal review by 天工LCI数据工作小组
Amounts: no units in this file; such an amount is in the reference unit of its flow, which a separate flow dataset defines
copyright: false
licenseType: Free of charge for all users and uses

## General comment
无流程图

## Time period
文献发表日期

## Technical purpose
通过60kA自焙槽电解工艺生产的原生铝锭，适用于需要高纯度铝材的应用领域。这包括汽车、航空航天、电力和建筑行业。铝锭作为原料，用于制造发动机缸体、飞机结构、电缆和窗框等组件。

## Reference product
- aluminium, primary, ingot: 1000; missing unimportant

## Inputs
All rows: missing unimportant
- hard coal: 8785
  煤
- anode, for metal electrolysis: 550
  碳阳极
- aluminium oxide, metallurgical: 2000
  氧化铝
- Fluoride: 50
  氟化物
- Oils, unspecified: 720
  油

## Outputs
- Sulfur dioxide: 67.225; missing unimportant
  SO2
- Fluorine: 15; missing unimportant
  氟化物（以氟计）
- PAH, polycyclic aromatic hydrocarbons: 30; missing unimportant
  PAH
- carbon dioxide (fossil),carbon dioxide (fossil): 18898; missing unimportant
  CO2

## Data selection and combination
数据主要来源于相关文献，也有一些数据得自 于铝行业的内部报告。数据斟酌、参考了大量的文献，因此比较接近实际，具有一定代表性。

## Use advice
在使用60kA自焙槽电解与铸锭工艺的数据集时，应注意所提供数据的技术范围。数据主要来源于相关文献和铝行业内部报告，因此能确保数据贴近实际操作，并具有代表性和可靠性。建议用户考虑自发布日期以来可能发生的技术更新或操作实践差异，并考虑不同地理区域或制造设施可能存在的差异。

## Review details
清单： 内部审查通过几个迭代步骤完成，涉及原始数据验证、原始数据记录、代表性、完整性、与 ISO 14040 和 14044 有关的建模的一致性。

## Data sources
- 王小伍 & 华贲. 中国电解铝工业的多因素综合生命周期评价. 轻金属 3–6 (2005).
