# 市政污泥处理与处置;湿污泥 含水率80%;350℃热解

Dataset: ILCD process, Unit process, single operation
Geography: CN
Classification: Unit processes / End-of-life treatment / Wastewater treatment
Functional unit: 1 t of sludge is selected as the functional unit, the moisture content of wet sludge is 80%.
Generated by: 金思甜, 2331276@tongji.edu.cn
Owner: 天工LCI数据工作小组
Review: Dependent internal review by 天工LCI数据工作小组
Amounts: no units in this file; such an amount is in the reference unit of its flow, which a separate flow dataset defines
copyright: ['opt4ROkqig']
licenseType: Free of charge for all users and uses

## General comment
通过实验对不同工况下的污泥热解处理工艺进行相关数据的收集和分配工作，对每一个过程的物质、能量的输入和输出，对环境污染物排放等进行量化。

## Technology and included processes
热解环节管式炉额定功率 4 kW，空载功率 1.4 kW，反应前通入 2~3 分钟氮气以保证无氧环境，氮气流量为 30 ml/min，管式炉升温速率 80 ℃/min，热解终温保持10min。

## Technical purpose
该数据集代表了市政污泥处理与处置过程，通过在350℃下进行热解，专注于处理含水率为80%的湿污泥。此热解工艺适用于将1吨高含水量的污泥转化为更稳定的形式进行处置，或生成生物炭、合成气和生物油等副产品，这些副产品可用于土壤改良、可再生能源或化工生产原料等各种应用。

## Reference product
- Sludge: 1000; input; estimated
  1t湿污泥含水率 80%

## Inputs
- Electricity: 1080; calculated
- nitrogen: 5.63; calculated

## Outputs
- carbon monoxide (biogenic): 12.07; calculated
  原文未区分biogenic和fossil，根据专家判断此处为biogenic。
- carbon dioxide (biogenic): 6.15; calculated
  原文未区分biogenic和fossil，根据专家判断此处为biogenic。
- Heat treatment oil: 79.18; calculated
- Semi-coke: 100.32; calculated

## Use advice
请确保按照给定的湿污泥含水率80%的1吨污泥功能单位使用市政污泥热解过程数据集。在评估生命周期影响时，应考虑潜在的能源回收和副产品利用。用户必须考虑可能影响过程在不同情景下适用性和影响的当地法规和环境因素。

## Review details
清单： 内部审查通过几个迭代步骤完成，涉及原始数据验证、原始数据记录、代表性、完整性、与 ISO 14040 和 14044 有关的建模的一致性。

## Data sources
- 王久兵. 污泥热解反应机制及其能源化工艺的全生命周期评价研究[D].浙江工业大学,2017.
