# 东北水稻种植 ; 化肥、农药生产

Dataset: ILCD process, Unit process, single operation
Geography: SY-LN-CN
Reference year: 2016
Valid until: 2017
Classification: Unit processes / Materials production / Agricultural production means
Functional unit: 1t
LCI method principle: Attributional
LCI method approaches: Consequential
Generated by: Haoran Zhang, hrzhang@whu.edu.cn
Owner: 天工LCI数据工作小组
Review: Dependent internal review by 天工LCI数据工作小组
Amounts: no units in this file; such an amount is in the reference unit of its flow, which a separate flow dataset defines
copyright: false
licenseType: Free of charge for all users and uses

## General comment
化肥、农药的生产与运输的资源消耗和污染排放

## Technology and included processes
以生产 1 t 稻谷为功能单位，规定起始边界为生 产化肥农药的矿石和化石能源开采，终止边界为水稻 种植阶段的污染物排放

## Technical purpose
该数据集代表中国东北地区的水稻生产过程，重点关注农业投入。该数据可用于评估水稻种植实践的环境影响，特别是集中在化学肥料和农药的使用、农业机械的燃料消耗、生产的电力消耗和灌溉的水量。它适用于环境研究、农业过程建模和优化水稻生产以减少环境影响。

## Reference product
- rice: 1000; measured

## Inputs
All rows: measured
- Hard coal, at consumer EU-27: 106.82
- Heavy fuel oil (1.0 wt.% S): 0.67
- Diesel: 2.25
- Natural gas, at consumer EU-27: 12.38
- Electricity: 239.256
- water: 29.3

## Outputs
All rows: measured
- carbon monoxide (fossil): 0.31
- carbon dioxide (fossil),carbon dioxide (fossil): 155.95
- nitrous oxide: 3.4
- sulfur dioxide: 0.63
- Nitrogen oxides: 0.41
- ammonium: 0.02
- methane (fossil),methane (fossil): 0.31
- phosphorus, total: 0.18
- chemical oxygen demand: 2.54
- ammonia: 0.5
- lead: 0.0001
- arsenic: 0.0001

## Deviations from the LCI method approaches
规定起始边界为生产化肥农药的矿石和化石能源开采，终止边界为水稻种植阶段的污染物排放

## Data selection and combination
共调查农户62户，调查内容包括化肥种类及用量、农药种类及用量、机械耗油、生产耗电、灌溉水量等相关信息

## Data treatment and extrapolations
采用当量系数法将同类污染物转化为参照物的环境影响潜力[22]，评价水稻生产的环境影响。

## Use advice
在使用该数据集进行水稻生产的生命周期评估（LCA）时，用户应考虑研究中设置的方法论边界。范围从用于生产农业投入（如肥料和农药）的矿物和化石能源的开采开始，到与水稻种植阶段相关的排放结束。在建模时，考虑此处引用的等效系数方法评估环境影响的有效性，并适当应用以获取一致和可比的结果。注意调查的具体因素，如消耗的材料和能源的种类和数量，并根据您的特定用例必要时更新数据。

## Review details
清单： 内部审查通过几个迭代步骤完成，涉及原始数据验证、原始数据记录、代表性、完整性、与 ISO 14040 和 14044 有关的建模的一致性。

## Data sources
- 常俊彦,宋明阳,于晓曼等.沈阳地区水稻生产的生态环境影响研究[J].农业环境科学学报,2018,37(08):1793-1801.
