# Cationicandamphotericsurfactants|Fattyammonia,hydrogenperoxide,chloromethane,etc.①|Chemicalsynthesis(quaternization)|All sizes / /|阳离子与两性表面活性剂|脂肪氨、双氧水、氯甲烷等①|化学合成（季铵化）|所有规模

Dataset: ILCD process, Partly terminated system
Geography: CN
Reference year: 2019
Classification: Materials production / Other mineralic materials
Generated by: The data was created by the Office of the Second National Pollution Source Census of the Ministry of Ecology and Environment, and the data was organized by the TianGong Plan team for ILCD format / 生态环境部第二次全国污染源普查工作办公室创建数据，天工计划团队常慧敏整理数据为ILCD格式
Amounts: no units in this file; such an amount is in the reference unit of its flow, which a separate flow dataset defines
copyright: false

## Technology and included processes
the Technical of end-of-pipe management technology for pollution Cationics and Amphoteric Surfactantsis/，The formula for calculating the actual operation rate (k-value) of the end-of-pipe treatment facility is k = opreating time of treatment facilities (hours/year) / normal production time (hours/year)
污染物指标工业废水量的末端治理技术是/，末端治理设施实际运行率（k值）计算公式为/，①由于表面活性剂生产中使用的原料品种较多，系数表单中列举了几种常用原料，实际生产时并不局限于此。

## Reference product
- Cationics and Amphoteric Surfactants: 1000; calculated
  原文件中描述污染物类别为Product，污染物指标为阳离子与两性表面活性剂，此处对其进行了匹配工作，将其匹配到LCAflow库里面相最符合的流，污染物指标备注为工业废水量

## Outputs
All rows: calculated
- Waste water: 1000
  原文件中描述污染物类别为废水，污染物指标为工业废水量，此处对其进行了匹配工作，将其匹配到LCAflow库里面相最符合的流，污染物指标备注为工业废水量
- chemical oxygen demand: 0.115
  原文件中描述污染物类别为废水，污染物指标为化学需氧量，此处对其进行了匹配工作，将其匹配到LCAflow库里面相最符合的流，污染物指标备注为化学需氧量
- Ammonia Nitrogen: 0.0095
  原文件中描述污染物类别为废水，污染物指标为氨氮，此处对其进行了匹配工作，将其匹配到LCAflow库里面相最符合的流，污染物指标备注为氨氮
- Petroleum-related waste: 0.00351
  原文件中描述污染物类别为废水，污染物指标为石油类，此处对其进行了匹配工作，将其匹配到LCAflow库里面相最符合的流，污染物指标备注为石油类
- Nitrogen, organic bound: 0.0096
  原文件中描述污染物类别为废水，污染物指标为总氮，此处对其进行了匹配工作，将其匹配到LCAflow库里面相最符合的流，污染物指标备注为总氮
- phosphorus, total: 5e-5
  原文件中描述污染物类别为废水，污染物指标为总磷，此处对其进行了匹配工作，将其匹配到LCAflow库里面相最符合的流，污染物指标备注为总磷
- volatile organic compound: 0.02816, 0.02112 (2 entries)
  原文件中描述污染物类别为废气，污染物指标为挥发性有机物，此处对其进行了匹配工作，将其匹配到LCAflow库里面相最符合的流，污染物指标备注为挥发性有机物

## Data sources
- 第二次全国污染源普查产排污核算系数手册（试用版）,二级代码26,四级代码2681文件，在完整版文件中第3009页
