# 铝电解电容器生产 ; 装配前的元件 ; 浸泡法 ; 浸泡前的元件

Dataset: ILCD process, Unit process, single operation
Geography: JS-CN
Reference year: 2020
Classification: Unit processes / Materials production / Metals and semimetals
Generated by: 常慧敏, huiminchang@tsinghua.edu.cn
Owner: 天工LCI数据工作小组
Review: Dependent internal review by 天工LCI数据工作小组
Amounts: no units in this file; such an amount is in the reference unit of its flow, which a separate flow dataset defines
copyright: false
licenseType: Free of charge for all users and uses

## General comment
浸泡法生产铝电解电容器（AEC） ; 420V 680uf

## Time period
The investigated manufacturer produced about 1.183 billion AECs of all kinds in 2020.

## Technical purpose
采用浸泡法生产的铝电解电容器（AEC）通常用于电子设备中的过滤、耦合和解耦信号以及能量存储。这种具有420V 680uF规格的电容器通常用于电源、逆变器和其他高压电子应用中。

## Reference product
- elements before assembly (from soak): 3755; measured
  Elements(before assembly) [pcs]

## Inputs
- electricity, high voltage, aluminium industry: 20.25; measured
  Electricity [kWh]
- ethylene glycol: 78.986; measured
  Electrolyte [kg]
- elements before soak (from winding): 3755; measured
  Elements (before soak) [pcs]

## Data selection and combination
电容器生产的库存数据来自 AEC 位于中国江苏省的生产工厂。每道工序的 LCI 数据收集的截止标准是至少覆盖输入流和输出流 95% 的质量和能量。阳极箔生产和阴极箔生产的库存数据是根据生产工艺和相应工艺参数分析获得的。上游数据（即铝锭、分选纸、运输、电力和水）来自 Gabi 软件（版本：10.6.1.35）。具体而言，《中国电力年鉴》中的中国电网概况以 2016 年为基准年。铝锭生产的基准年为 2015 年。无法获取的柠檬酸铵、五硼酸铵、NH4H2PO4 和 HBO3 数据是根据 Gabi 软件中现有材料（反应物）的化学方程式估算的。使用和报废阶段的库存数据是通过分析和计算获得的。

## Use advice
在使用铝电解电容器生产的清单数据进行生命周期评估时，确保包括所有相关的质量和能量输入与输出。LCI数据收集的截止标准是至少要覆盖95%。在必要时应用适当的分配程序。中国电网和铝锭的输入数据参考年分别为2016年和2015年。在使用估计数据（如柠檬酸铵和硼酸铵）时应该格外注意，确保它与Gabi软件中的方法论指导相符。此外，应根据AEC的特定使用阶段行为和末端生命期预想场景，补充这些数据集，遵循输入/输出数据分析和计算。

## Review details
清单： 内部审查通过几个迭代步骤完成，涉及原始数据验证、原始数据记录、代表性、完整性、与 ISO 14040 和 14044 有关的建模的一致性。

## Data sources
- Zhang, C., Jing, J., Yun, L., Zheng, Y. & Huang, H. A cradle-to-grave life cycle assessment of high-voltage aluminum electrolytic capacitors in China. J. Clean. Prod. 370, (2022).
