# 修复后土壤;土壤原位修复;生物通风

Dataset: ILCD process, Unit process, black box
Geography: CN
Reference year: 2022
Classification: Unit processes / Other Services / Repair and maintenance
Functional unit: Low concentration VOCs polluted soil 110067 m3
Generated by: 杨欣桐, yangxt@caep.org.cn
Owner: 天工LCI数据工作小组
Review: Dependent internal review by 天工LCI数据工作小组
Amounts: no units in this file; such an amount is in the reference unit of its flow, which a separate flow dataset defines
copyright: false
licenseType: Free of charge for all users and uses

## General comment
包含通风井管制作安装、通风设备安装运行，即空气注入与抽提工作

## Time period
文章投稿时间

## Technical purpose
此工业过程用于原位修复受低浓度挥发性有机化合物（VOCs）污染的土壤。该过程包括通风井管的制作与安装，以及通风设备的设置与操作，这些设备用于生物通风，即注入与抽提空气以促进土壤中污染物的生物降解。

## Reference product
- Remediated soil: 110067; measured

## Inputs
- Electricity: 1.728e6; measured
- Barrier layer: 1; measured
- contaminated soil: 110067; measured
- injection well: 1; measured

## Outputs
- Exhaust gas: 1; measured
  文中没有给出具体的废气产生量，因此使用项目为计量单位

## Use advice
在使用该数据集进行生命周期评估时，用户应注意，该数据集反映了一个用于低浓度VOCs污染土壤的原位生物通风过程。必须确保应用性仅限于类似条件，并小心评估数据转移到其他污染条件或不同土壤处理方法的可行性。应详细考虑数据的技术细节和地理相关性，以及需要模型化修复活动的潜在影响，包括能源消耗、排放物以及土壤性质的变化。还应考虑有关潜在副产品处理的附加方法指导，以及将此过程与其他土壤净化和土地使用实践整合的方法。

## Review details
清单： 内部审查通过几个迭代步骤完成，涉及原始数据验证、原始数据记录、代表性、完整性、与 ISO 14040 和 14044 有关的建模的一致性。

## Data sources
- 刘文晓等.基于修复效果的污染土壤修复工程环境足迹分析[J].环境科学研究 35,2367-2377（2022）.
