# 大黄鱼成鱼;大黄鱼成鱼;网箱养殖;仅鲜杂鱼饲养

Dataset: ILCD process, Unit process, black box
Geography: ND-FJ-CN
Reference year: 2017
Valid until: 2018
Classification: Unit processes / Materials production / Food and renewable raw materials
Functional unit: 1 live-weight ton of large yellow croaker
LCI method principle: Attributional
LCI method approaches: Allocation - mass
Generated by: 吴康妮, wukangni@xmu.stu.edu.cn
Owner: 天工LCI数据工作小组
Review: Dependent internal review by 天工LCI数据工作小组
Amounts: no units in this file; such an amount is in the reference unit of its flow, which a separate flow dataset defines
copyright: false
licenseType: Free of charge for all users and uses

## General comment
该系统包括能源生产（红色）、饲料生产（绿色）、水产养殖生产主链（蓝色）和其他投入品的生产（紫色）。

## Geography
宁德市地级市由若干区县组成，其中福定市(a)、霞浦县(B)、福安市(C)、交城区(D)临海，纳入了我们的评估范围。2017年8月和2018年1月，我们在该地区随机抽取了321户家庭，分析了2016年期间从事海水养殖生产的292户家庭的数据。

## Time period
文献未具体说明采样时间，研究者于 2017 年 8月份和2018年1月份在宁德市沿海进行入户访谈

## Technology and included processes
大黄鱼商品鱼养成技术，单个网箱面积60 m2以上，网深6 m～10 m，低潮时网箱底部距海底2 m以上。网衣网目为15 mm～50 mm。鱼种投放 选择在小潮期间放养。规格50 g/尾的鱼种放养密度100 尾/m3为宜，随着鱼种规格增大降低放养密 度，至规格500 g/尾时放养密度20 尾/m3为宜。饲料使用鲜饵料。

## Technical purpose
该数据集代表了网箱养殖成年大黄鱼的过程数据，其中专门采用杂鱼作为饲料。它适用于养殖业内海水养殖实践的评估，尤其关注中国渔业中的重要物种—笼养大黄鱼。该数据集与研究大规模水产养殖操作及其对基于鱼类的饲料依赖的环境影响相关。

## Model description
文献参考了ecoinvent数据库（v.3.5）。为了解释所研究系统的可变性，在R软件（v.3.3.2）进行了蒙特卡罗模拟，使用copula函数对 LCA 中单位过程变量之间的相关性进行建模，解决了过程变量之间的相关性。在R软件中使用蒙特卡洛模拟，每个单元过程由一组输入参数、地理位置和成长阶段的相关矩阵表征，在模拟中使用了2000次迭代，并考虑了由于固有的不确定性、分散性和不代表性而导致的单元过程的可变性。通过假设变异系数为5 %来包括固有的不确定性，价差由主要和次要数据计算，并使用谱系方法解决不代表性。通过在每次迭代中使用依赖抽样来包括过程链之间的相关性，以及过程之间的相关性

## Reference product
- Large Yellow Croaker: 1000; measured
  数据来源于实际调研18户数据的平均值

## Inputs
- Big juveniles of Large Yellow Croake: 3.5; measured
  数据来源于实际调研18户数据的平均值
- Fuel: 33.6; measured
  数据来源于实际调研18户数据的平均值
- trash fish: 4197.9; measured
  数据来源于实际调研18户数据的平均值
- Chemicals (unspecified): 0.4; measured
  数据来源于实际调研18户数据的平均值

## Deviations from the LCI method approaches
整个数据分析过程中采用质量分配，遵循英国标准学会推荐的指南

## Data selection and combination
数据来源于实际调研数据的平均值

## Data treatment and extrapolations
文献研究者从调查数据和科学文献两方面构建了海水养殖生产的生命周期清单。通过收集生长阶段的主要数据和辅助数据，以模拟苗种和幼体生产等其他过程。

## Sampling procedure
在中国福建省宁德市入户调研大黄鱼养殖115户，其中18户用于此条数据的模型计算

## Use advice
利用此数据集进行环境影响评估或生命周期评估时，确保研究范围包括数据收集的具体地理区域（特别是宁德市的福定市、霞浦县、福安市和交城区）。特别注意系统边界，包括能源生产、饲料生产、水产养殖主链以及其他投入品的生产，在数据集内以颜色编码进行组织。方法论考虑还应包括基于2016年特定时期收集的家庭数据的黑箱单元过程方法。

## Review details
清单： 内部审查通过几个迭代步骤完成，涉及原始数据验证、原始数据记录、代表性、完整性、与 ISO 14040 和 14044 有关的建模的一致性。

## Data sources
- Marín, T. et al. Resource Use in Mariculture: A Case Study in Southeastern China. Sustainability 11, (2019).
