# Electricity production ; Electricity ; Thermal power (81.0%) + hydropower (1.3%) + wind power (10.9%) + solar power (6.7%)

Dataset: ILCD process, Partly terminated system
Geography: NX-CN
Reference year: 2019
Classification: Energy carriers and technologies / Electricity
LCI method principle: Other
Generated by: Ruoxi Xiong, xiongrx0126@163.com
Owner: Tiangong LCI Data Working Group
Review: Dependent internal review by Tiangong LCI Data Working Group
Amounts: no units in this file; such an amount is in the reference unit of its flow, which a separate flow dataset defines
copyright: false
licenseType: Free of charge for all users and uses

## General comment
Forms of electricity generation include thermal power, hydropower, wind power and solar power

## Time period
Calculated based on data from the 2019 Energy Statistics Yearbook

## Technical purpose
This dataset represents the mix of electricity generation in a given region, predominantly comprised of thermal power generation (81.0%) with contributions from hydropower (1.3%), wind power (10.9%), and solar power (6.7%). The electricity produced by this mix can be used for residential, commercial, industrial, and transportation purposes where electrical energy is required. Specifically, the electrical output can power machinery, lighting, electronics, heating systems, and other applications that require electricity, regardless of scale.

## Reference product
- Electricity: 3.6; calculated

## Outputs
- carbon dioxide: 0.777; calculated
- sulfur dioxide: 0.000134; calculated
- Nitrogen oxides: 0.000212225; calculated
- Dust (unspecified, from stack): 2.5817e-5; calculated

## Data treatment and extrapolations
For the accounting method, please refer to the "Enterprise Greenhouse Gas Emissions Accounting Methods and Reporting Guidelines for Power Generation Facilities". Different forms of power generation and fuel consumption come from Chapter 3 (Energy Production) and Chapter 6 (Regional Energy Balance Sheet) in the "China Energy Statistical Yearbook 2020". The fuel parameters such as low calorific value and carbon content per unit calorific value used to calculate the carbon dioxide emission factor come from the "2019 China Regional Power Grid Carbon Dioxide Baseline Emission Factor Calculation Instructions OM" and the "Enterprise Greenhouse Gas Emission Accounting Method and Reporting Guide for Power Generation Facilities" 》

## Use advice
Data users should take into account the specific proportions of different electricity sources when applying this dataset to environmental impact assessments or carbon footprint calculations. It is crucial to consider the regional mix of electricity generation as it affects the overall emission factor of the electricity consumed. The carbon emission factor has been calculated using the methodology advised by the 'Enterprise Greenhouse Gas Emissions Accounting Methods and Reporting Guidelines for Power Generation Facilities', taking into account low calorific value and carbon content per unit of energy from the references provided. Users must ensure the methodological consistency of this data with other LCA datasets and confirm that the regional energy mix reflects their scope of study.

## Review details
Inventory: The internal review was done by several iteration steps concerning raw data validation, raw data documentation, representativity, completeness and consistency of modelling with regard to ISO 14040 and 14044.

## Data sources
- 熊若熙. 中国电力生产和消费二氧化碳与污染物排放因子核算. (清华大学, 2023).
