# AAO+MBR处理工艺（地下）

Dataset: ILCD process, Unit process, single operation
Geography: GZ-GD-CN
Classification: Materials production / Other mineralic materials
Generated by: HUANG Runyao, runyaoh@163.com
Review: Dependent internal review by Tiangong LCI Data Working Group
Amounts: no units in this file; such an amount is in the reference unit of its flow, which a separate flow dataset defines

## Geography
广州市白云区沙太北路以东、犀牛南路以北地段

## Reference product
- Wastewater: 0.1, 0.1 (2 entries); input; article inperiodical
- Wastewater: 0.1; article inperiodical

## Inputs
All rows: article inperiodical
- Secondary Steel Making Slag: 3.888e6
- aerated concrete block: 44110
- (unnamed flow): 5693
- Electricity: 2.9592e7
- chemical oxygen demand: 0.00027

## Outputs
- Sludge: 56260; article inperiodical

## Review details
Inventory: The internal review was done by several iteration steps concerning raw data validation, raw data documentation, representativity, completeness and consistency of modelling with regard to ISO 14040 and 14044.; Documentation: The review of the documentation was performed by Ecobilan and is in compliance with ISO 14040 and 14044. The data set documentation is correct in view of the appropriateness of the information provided. It includes all relevant information in view of data quality and scope of application of the respective LCI result.

## Data sources
- 地下式污水处理厂全生命周期综合效益评价
