# 湿蒸法棉布染整加工;印染棉布;预缩

Dataset: ILCD process, Unit process, single operation
Geography: SZ-JS-CN
Reference year: 2012
Classification: Unit processes / Energy carriers and technologies / Heat and steam
Generated by: 段颖凡, 1300925579@qq.com
Owner: 天工LCI数据工作小组
Review: Dependent internal review by 天工LCI数据工作小组
Amounts: no units in this file; such an amount is in the reference unit of its flow, which a separate flow dataset defines
copyright: false
licenseType: Free of charge for all users and uses

## General comment
预缩是一种在布料制备过程中进行的处理，其目的是在正式制成衣物之前使织物进行预先收缩。这有助于减少在后续的洗涤过程中织物的尺寸变化，确保最终产品保持所设计的尺寸。预缩通常包括在加工过程中使用热力或其他手段引起织物的短时收缩，以模拟洗涤过程中可能发生的尺寸变化。

## Geography
本研究选取江苏省某印染企业为重点调研对象，该企业位于长三角经济圈中的常熟。

## Technical purpose
所描述的工艺过程涉及使用湿蒸法进行棉布染整以及预缩处理。这一工业过程通常应用于纺织行业，特别是用于生产需要特殊处理以确保颜色牢度和在制成最终消费品如服装、家用纺织品及其他棉基产品之前减少缩水的印染棉布。

## Reference product
- Cotton Fabric: 167; measured

## Inputs
- Electricity: 47.6; measured
- Crude coal: 15.6; calculated
- Cleaned coal: 38.5; calculated
- Fuel Oil: 0.332; calculated
- heavy fuel oil: 0.1; calculated
- Diesel oil: 0.457; calculated
- Coke Oven Gas: 0.609; calculated
- natural gas: 0.0078; calculated
- freshwater: 0.742; measured

## Outputs
- carbon dioxide (fossil): 16.3; calculated
- carbon monoxide (fossil): 0.0393; calculated
- sulfur dioxide: 0.0137; calculated
- methane (fossil): 2.39e-5; calculated
- Nitrogen oxides: 0.0809; calculated
- nitrous oxide: 2.23e-5; measured
- particles (> PM10): 0.13; calculated
- ammonia: 8.6e-6; measured
- non-methane volatile organic compounds: 0.00097; measured
- chemical oxygen demand: 0.000411; calculated
- Suspended solids, unspecified,Suspended solids, unspecified: 0.00261; calculated
- lead: 1.22e-6; calculated
- mercury: 2.57e-8; calculated
- fluorine: 2.31e-7; calculated
- cadmium: 4.53e-8; calculated
- arsenic: 1.05e-6; calculated

## Use advice
当使用此数据集进行生命周期评估时，用户应注意它特别代表位于江苏省长三角经济圈中的常熟某纺织企业的湿蒸法棉布染整及预缩工艺。在将此数据应用于其他场景时，考虑地理和技术背景是重要的。必须考虑规模、技术水平和地区实践的限制。如果为其他地区建模，用户应调整数据以反映当地的能源消耗模式、水使用量、化学投入和环境法规。

## Review details
清单： 内部审查通过几个迭代步骤完成，涉及原始数据验证、原始数据记录、代表性、完整性、与 ISO 14040 和 14044 有关的建模的一致性。

## Data sources
- 朱亚楠. 棉布连续轧染工艺生命周期环境影响评价. (南京大学, 2012).
