# 氧化铝再生 ; 再生铝 ; 碱提取法 ; 二次铝渣

Dataset: ILCD process, Unit process, single operation
Geography: CN
Reference year: 2021
Classification: Unit processes / Materials production / Metals and semimetals
Generated by: 谢金良, jinliang.research@gmail.com
Owner: 天工LCI数据工作小组
Review: Dependent internal review by 天工LCI数据工作小组
Amounts: no units in this file; such an amount is in the reference unit of its flow, which a separate flow dataset defines
copyright: false
licenseType: Free of charge for all users and uses

## General comment
The parameters such as temperature and yield of these three processes were based on experimental results. Life cycle inventory data were from the average data of aluminum industries in China and calculation based on material balance. The electricity type in this study was coal based, which is in line with the actual situation of China’s aluminum industry. The metal aluminum in secondary aluminum dross (SAD) can be recovered until 1 wt % is left through grinding and sieving. Chlorides in the solution were recovered through concentration and crystallization. Calcium chloride was used to remove fluoride. Ammonia was absorbed by sulfuric acid and used to produce ammonium sulfate. Sodium hydroxide was used for the deactivation of active aluminum components and the dissolution of alumina at high temperature (using steam). After filtration and dilution, clear sodium aluminate solution is obtained. According to the characteristics of sodium aluminate, the solution can be diluted and induced to precipitate aluminum hydroxide. The remaining alkaline solution was recycled after salt recovery. After calcination, aluminum hydroxide was converted to alumina. The residue from filtration was landfilled. In this scenario, the active aluminum component was completely deactivated. The recovery rate of alumina was around 90%.

## Time period
文献发表于2021年9月

## Technical purpose
所述工艺涉及使用碱提取法从二次铝渣(SAD)中回收氧化铝。这种回收的氧化铝用于多种应用，例如作为铝冶炼工业的原料。再生工艺旨在最大限度地减少废物并从铝渣中回收有价值的材料，这些材料可用于新铝产品的生产。

## Reference product
- Secondary Aluminum Dross: 1000; input; measured
  secondary aluminum dross

## Inputs
All rows: measured
- electricity, high voltage, aluminium industry: 681.516
- sodium hydroxide, without water, in 50% solution state: 54.36
- sulfuric acid: 237.67
- calcium chloride: 43.82
- Water, unspecified natural origin: 772.23
  water
- steam, in chemical industry: 1230

## Outputs
All rows: measured
- Residue from Filtration: 245.81
  residue from filtration
- Ammonia: 0.41
- basic oxygen furnace dust: 0.01
  dust
- aluminium: 45.9
  recycled aluminium
- ammonium sulfate: 320.2
- aluminium oxide, metallurgical: 629.65
  alumina
- carbon dioxide (fossil),carbon dioxide (fossil): 43.11
- sodium chloride, powder: 81.73
  sodium chloride
- potassium chloride: 22.49
- fluorspar: 30.82
  calcium fluoride

## Use advice
在利用数据集进行生命周期评估(LCA)时，用户必须注意所提供的方法论建议。数据集应在考虑边界设置的情况下使用，这些边界设置仅包括铝生命周期中SAD回收的影响。用户在核算物质流时应应用截止规则，并以从摇篮到坟墓的角度整合数据。排除LCA中的运输影响至关重要，因为这在系统边界内没有考虑。数据集最适合评估氧化铝回收过程的有效性，应在清楚了解中国铝工业依赖煤电的情况下使用。

## Review details
清单： 内部审查通过几个迭代步骤完成，涉及原始数据验证、原始数据记录、代表性、完整性、与 ISO 14040 和 14044 有关的建模的一致性。

## Data sources
- Zhu, X. & Jin, Q. Comparison of Three Emerging Dross Recovery Processes in China’s Aluminum Industry from the Perspective of Life Cycle Assessment. ACS Sustainable Chem. Eng. 9, 6776–6787 (2021).
