# 污泥处理与处置|焚烧

Dataset: ILCD process, Unit process, single operation
Geography: HAZ-ZJ-CN
Classification: Materials production / Other mineralic materials
Generated by: Jin Sitian, JSTian0302@163.com
Review: Dependent internal review by Tiangong LCI Data Working Group
Amounts: no units in this file; such an amount is in the reference unit of its flow, which a separate flow dataset defines

## Reference product
- Sludge: 1000; input; estimated
  湿污泥( 含水率为 80% )

## Inputs
- Diesel: 24.6; measured
  燃油
- Electricity: 50.4; measured

## Outputs
- carbon dioxide: 227; measured
- 2,3,7,8-tetrachlorodibenzo-p-dioxin: 1.87e-12; article inperiodical
- copper: 0.01004; article inperiodical
- lead: 0.00188; article inperiodical
- zinc: 0.03362; article inperiodical
- chromium: 0.00189; article inperiodical
- nickel: 0.00072; article inperiodical

## Review details
Inventory: The internal review was done by several iteration steps concerning raw data validation, raw data documentation, representativity, completeness and consistency of modelling with regard to ISO 14040 and 14044.; Documentation: The review of the documentation was performed by Ecobilan and is in compliance with ISO 14040 and 14044. The data set documentation is correct in view of the appropriateness of the information provided. It includes all relevant information in view of data quality and scope of application of the respective LCI result.

## Data sources
- 城镇污水处理厂污泥处理处置工艺生命周期评价
