# 市政污泥处理与处置;干污泥;好氧堆肥

Dataset: ILCD process, Unit process, single operation
Geography: CN
Classification: Unit processes / End-of-life treatment / Waste water treatment
Functional unit: The functional unit used for GHGs in this LCA is one dry ton (DT) of sludge.
Generated by: 金思甜, 2331276@tongji.edu.cn
Owner: 天工LCI数据工作小组
Review: Dependent internal review by 天工LCI数据工作小组
Amounts: no units in this file; such an amount is in the reference unit of its flow, which a separate flow dataset defines
copyright: ['opt4ROkqig']
licenseType: Free of charge for all users and uses

## General comment
本文研究的主要数据来源如下:1)能源消耗和物质投入来源于对太湖流域的调查;2)能源利用排放因子来源于我们自己的计算、IPCC和文献。3)填埋过程中的CH4排放由文献获得，填埋、焚烧和堆肥过程中的无组织排放主要由文献研究中给出的模型和IPCC因子(2006)决定。4)理论计算数据(焚烧部分)。

## Geography
太湖流域

## Technology and included processes
脱水后的污泥首先在当地政府购买的有机化肥厂进行堆肥，然后作为肥料和土壤改良剂用于城市绿地。

## Technical purpose
该数据集描述了太湖流域地区市政污泥处理与处置中的好氧堆肥过程。它特别适用于将干污泥处理成可用于农业应用的堆肥，以改善土壤质量和肥力的场景。

## Reference product
- Sludge: 1000; input; estimated
  一干吨 （DT） 污泥

## Inputs
- Electricity: 432; measured
- Diesel: 0.02975; measured

## Use advice
使用此数据集时，应特别注意其在太湖流域应用的背景。单元过程的好氧堆肥表示为每一干吨（DT）污泥。这个功能单位应用于在类似的生命周期评估中一致计算温室气体排放。为了准确评估影响，还应考虑当地气候、污泥成分和堆肥实践等因素。

## Review details
清单： 内部审查通过几个迭代步骤完成，涉及原始数据验证、原始数据记录、代表性、完整性、与 ISO 14040 和 14044 有关的建模的一致性。

## Data sources
- Liu, B., Wei, Q., Zhang, B. & Bi, J. Life cycle GHG emissions of sewage sludge treatment and disposal options in Tai Lake Watershed, China. Science of The Total Environment 447, 361–369 (2013).
