# cement production|cement, ordinary portland cement, 42.5MPa|dry process|mixed solid wastes

Dataset: ILCD process, Unit process, black box
Geography: CN
Reference year: 2004
Classification: Materials production / Other mineralic materials
Generated by: Siqi Yang
Amounts: no units in this file; such an amount is in the reference unit of its flow, which a separate flow dataset defines
copyright: false

## General comment
Typical cement production process. Slag and fly ash replace clay for cement production.

## Model description
The study uses 1 kg of 42.5 grade portland cement as the functional unit for assessment, the assessment goal is to determine the environmental load of cement of different process production units. Based on the life cycle theory, the scope of assessment is defined as the in-plant production process and its surrounding environment. Among them, the in-plant production process refers to the whole production process in which raw materials go through pre-treatment, raw meal grinding, forging, clinker grinding and cement homogenization in turn to finally become cement products. The surrounding environment of the cement production process refers to the emissions of external resources and energy and the emissions of pollutants.
According to the characteristics of cement production procrss and pollutant emission, the raw material components considered include limestone, gypsum, clay and iron powder. Energy consumption includes electricity and coal consumption of each production process, while pollutants include particulate matter, SO2, NOX and CO2.

## Reference product
- cement, ordinary portland cement, 42.5MPa: 1000
  1kg42.5 MPa Portland cement

## Inputs
All rows: measured
- limestone, crushed, for mill: 1073.7
  Limestone
- gypsum (desulphurized): 51.1
  Gupsum
- iron, powder: 28.5
  Iron powder
- ash: 98
  Fly ash
- blast furnace slag: 137.6
  Blast furnace slag
- hard coal: 100.957
  Standard coal. The original data is 0.0938kg standard coal, here converted to hard coal, the conversion formula is 1kg hard coal = 0.929kg standard coal.
- electricity, medium voltage: 347.76
  Electricity

## Outputs
- particles (> PM10): 0.255; measured
  Particulates, with an unspecified particle size, is treated as PM > 10 micrometers in diameter.
- sulfur dioxide: 0.3501; measured
  SO2
- Nitrogen oxides: 1.419; measured
  NOx
- carbon dioxide: 807.3; measured
  CO2

## Data sources
- 朱天乐, 何炜, 曾小岚, 黄新, & 马保国. (2006). 中国水泥生产环境负荷研究. 环境科学, 10, 2135–2138.
