# 二甲苯生产 ; 二甲苯 ; 石脑油路线 ; 石脑油

Dataset: ILCD process, Unit process, black box
Geography: CN
Reference year: 2006
Classification: Unit processes / Materials production / Organic chemicals
Functional unit: A functional unit is defined as 1 ton of xylene product
LCI method principle: Attributional
LCI method approaches: Allocation - mass
Generated by: 任亚楠, renyn15@tsinghua.org.cn
Owner: 天工LCI数据工作小组
Review: Dependent internal review by 天工LCI数据工作小组
Amounts: no units in this file; such an amount is in the reference unit of its flow, which a separate flow dataset defines
copyright: false
licenseType: Free of charge for all users and uses

## General comment
芳烃联合装置，阿罗沙文法工艺

## Geography
对二甲苯生产工艺的运行状况和环境负荷等进行了实地调研和数据采集

## Time period
未提及，以文献发表时间代替

## Technical purpose
该数据集代表了通过石脑油路线在芳烃联合装置内生产对二甲苯的工艺。具体技术被称为阿罗沙文法工艺。生产的对二甲苯是一种高纯度化学品，主要用于生产聚对苯二甲酸乙二醇酯（PET），此材料通常用于服装纤维、液体和食品容器以及热成型应用。它也用于生产对苯二甲酸和间苯二甲酸，这些是PET和其他重要工业聚合物的前体。

## Reference product
- xylene: 1; measured
  二甲苯

## Inputs
- naphtha: 0.68; measured
  石脑油
- light fuel oil: 0.27; measured
  燃料油
- Electricity: 0.072; measured
  电力

## Outputs
All rows: measured
- waste water - untreated: 0.11
  废水总量
- Oils, unspecified: 1e-5
  石油类
- chemical oxygen demand: 0.00124
  COD
- sulfur dioxide: 0.0018
  SO2
- nitrous oxide: 0.00413
  NOx
- carbon monoxide (fossil): 0.00363
  CO
- carbon dioxide (fossil): 0.74
  CO2
- particles (> PM10): 0.00189
  烟尘

## Deviations from the LCI method approaches
研究采用产品质量作为清单数据的分配原则

## Data treatment and extrapolations
采用质量分配法量化产品和副产品之间的环境负荷

## Use advice
使用此数据集的用户应注意，环境负荷计算基于质量分配方法，该方法量化了对二甲苯产品与任何副产品之间的环境负担。如果与其他数据集比较，必须始终一致地应用质量分配方法。分配原则基于产品质量，因此环境负荷根据生产的对二甲苯的质量和纯度进行归属。当在生命周期评估框架内应用此数据时，建议数据用户为了透明度包括工艺描述，并考虑质量分配方法对其研究范围的影响。定义的功能单元是1吨对二甲苯产品，应作为比较评估中数据缩放的参考点。

## Review details
清单： 内部审查通过几个迭代步骤完成，涉及原始数据验证、原始数据记录、代表性、完整性、与 ISO 14040 和 14044 有关的建模的一致性。

## Data sources
- 马骕. 涤纶纺织品的生命周期评价. (东华大学, 2007).
