# 预处理阶段｜小麦秸秆｜粉碎（无参数）

Dataset: ILCD process, Unit process, single operation
Geography: CN
Reference year: 2020
Classification: Unit processes / Energy carriers and technologies / Mechanical energy
Functional unit: taking 1 ton of wheat straw as the functional unit
LCI method principle: Consequential
Generated by: 刘超硕, liucs22@mails.jlu.edu.cn
Owner: 天工LCI数据工作小组
Review: Dependent internal review by 天工LCI数据工作小组
Amounts: no units in this file; such an amount is in the reference unit of its flow, which a separate flow dataset defines
copyright: false
licenseType: Free of charge for all users and uses

## General comment
所描述的预处理阶段包括对小麦秸秆的粉碎，以便为后续处理步骤做准备。此材料通常用于生物燃料、生物塑料的生产，以及作为造纸工业或生物质能源生产的原料。

## Reference product
- Crop straw: 1000; measured

## Inputs
- Diesel: 0.835; measured

## Outputs
All rows: measured
- nitrous oxide: 1.1e-5
- nitrogen dioxide: 0.028
- hydrocarbons (unspecified): 0.004
- carbon dioxide (fossil): 2.705
  原文未区分排放源为生物源或化石源，根据专家判断此处为化石源。
- carbon monoxide,carbon monoxide (fossil): 0.016
  原文未区分排放源为生物源或化石源，根据专家判断此处为化石源。

## Use advice
在使用小麦秸秆预处理的数据集时，请确保在评估过程中一致地应用 1 吨的功能单位。该数据集未提供粉碎过程的参数，这表示可能需要使用假设或平均值。关注系统边界；除非评估旨在评估完整的生命周期，否则排除所有下游处理过程。如果粉碎后的秸秆的后续利用涉及回收或能源回收，这些阶段应该使用各自的数据集明确建模。

## Review details
清单： 内部审查通过几个迭代步骤完成，涉及原始数据验证、原始数据记录、代表性、完整性、与 ISO 14040 和 14044 有关的建模的一致性。

## Data sources
- Cheng, G., Zhao, Y., Pan, S., Wang, X. & Dong, C. A comparative life cycle analysis of wheat straw utilization modes in China. Energy 194, 116914 (2020).
