# 农田镉污染土壤;植物修复;伴矿景天;幼苗运输和移植;植株幼苗

Dataset: ILCD process, Unit process, black box
Geography: CN
Reference year: 2021
Classification: Unit processes / Other Services / Repair and maintenance
Generated by: 桑春晖, sangch@mail.bnu.edu.cn
Owner: 天工LCI数据工作小组
Review: Dependent internal review by 天工LCI数据工作小组
Amounts: no units in this file; such an amount is in the reference unit of its flow, which a separate flow dataset defines
copyright: false
licenseType: Free of charge for all users and uses

## General comment
使用车辆将用于植物修复的景田幼苗运输到镉污染农田。

## Geography
文献中仅明确指出，污染农田位于中国南方，没有具体给出省市

## Time period
文献中没有明确数据收集的开始时间，以文献发表时间为有效期的开始时间

## Technology and included processes
共5公顷污染土壤，每公顷需要景天种子50kg，施加一定肥料，共收获景天幼苗2475 kg，运输1050 km到达污染农田

## Technical purpose
所描述的植物修复过程适用于中国南方镉污染的农业土壤的修复。用于修复的特定植物是伴矿景天，一种众所周知能够从土壤中吸收和富集重金属的物种。该过程涉及培育伴矿景天幼苗，然后运输并移植它们到污染现场进行植物修复目的。

## Reference product
- Plant seedlings: 2475
  该处实际填写的是植物的幼苗，即从种子培育得到的幼苗，用于下一步的幼苗移栽

## Inputs
- Sedum plumbizincicola seed: 250
- Diesel oil,diesel oil: 492; measured
- Compound Fertilizer,Compound Fertilizer: 450
- fluazifop-p-butyl: 6.165
- Electricity: 5207.15; measured
- Road Transport,Road Transport: 2598.75; measured

## Outputs
- fluazifop-p-butyl: 0.99

## Data selection and combination
初级数据清单是根据ISO 14040关于LCA.35的规定获得的。基本数据来自特定场地的盆栽实验、中试和供应商处获取，这些数据代表了中国南方的情况。二级数据来自Ecoinvent数据库v2.3，从中选择了地理来源和技术因素最相似的过程。

## Use advice
在使用该数据集进行生命周期评估时，用户应考虑应用区域的具体位置，即中国南方。重要的是，初级数据是通过与现场条件可能不完全相符的特定场地的盆栽实验和中试获取的。二级数据源自Ecoinvent数据库v2.3；用户应确保选择的过程与其研究的地理和技术背景相匹配。数据有效性的开始时间应与文献发表日期一致，且所模拟的应用规模应反映所提供数据的真实5公顷研究区域的剂量和运输距离。

## Review details
清单： 内部审查通过几个迭代步骤完成，涉及原始数据验证、原始数据记录、代表性、完整性、与 ISO 14040 和 14044 有关的建模的一致性。

## Data sources
- Jin, Y. et al. Integrated Life Cycle Assessment for Sustainable Remediation of Contaminated Agricultural Soil in China. Environ. Sci. Technol. 55, 12032–12042 (2021).
