# 电力生产 ; 混合电力 ; 浙江

Dataset: ILCD process, Unit process, single operation
Geography: ZJ-CN
Reference year: 2019
Classification: Unit processes / Energy carriers and technologies / Electricity
Generated by: 熊若熙, xiongrx0126@163.com
Owner: 天工LCI数据工作小组
Review: Dependent internal review by 天工LCI数据工作小组
Amounts: no units in this file; such an amount is in the reference unit of its flow, which a separate flow dataset defines
copyright: false
licenseType: Free of charge for all users and uses

## General comment
混合电力产生形式包括火力发电、水力发电、风力发电、核能发电和太阳能发电

## Technical purpose
该数据集代表浙江省混合电力生产，包括火力发电、水力发电、风力发电、核电发电和太阳能发电等多种来源。它适用于评估该地区电力消耗的环境影响，并可用于从住宅电力消费到工业用电等广泛应用，其中区域电力组合对评估具有相关性。

## Reference product
- Electricity: 3.6; missing unimportant
  [{'text': '3.6', 'type': 'text'}]

## Inputs
All rows: missing unimportant
- electricity for thermal power: 2.54409
  [{'text': '3.6', 'type': 'text'}]
- electricity from hydroelectric power plant: 0.261432
  [{'text': '3.6', 'type': 'text'}]
- electricity for nuclear power: 0.63985
  [{'text': '3.6', 'type': 'text'}]
- electricity from wind power: 0.03357
  [{'text': '3.6', 'type': 'text'}]
- electricity for solar power: 0.121054
  [{'text': '3.6', 'type': 'text'}]

## Use advice
在使用该数据集进行生命周期评估时，要考虑电力组合的区域特征，并确保它反映了所分析系统的实际消费模式。在考虑能源投入时，排除任何与浙江省生产组合不一致的电力来源。如果评估是特定时间的，请考虑电力组合的季节性变化。为了获得详细结果，请参考当地规定和能源生产数据的更新。

## Review details
清单： 内部审查通过几个迭代步骤完成，涉及原始数据验证、原始数据记录、代表性、完整性、与 ISO 14040 和 14044 有关的建模的一致性。

## Data sources
- 能源统计年鉴2020
