# 磷酸铁锂电池回收

Dataset: ILCD process, Unit process, single operation
Geography: CN
Reference year: 2020
Classification: Unit processes / End-of-life treatment / Material recycling
Functional unit: Inventory data for the recycling of 1 kWh waste LFP battery.
Generated by: 胡志康, hzk2503593129@163.com
Owner: 天工LCI数据工作小组
Review: Dependent internal review by 天工LCI数据工作小组
Amounts: no units in this file; such an amount is in the reference unit of its flow, which a separate flow dataset defines
copyright: false
licenseType: Free of charge for all users and uses

## General comment
作者实验室级别的回收，有多个步骤的投入和产出记录，但是没有特定回收工艺名称。上汽生产的荣威550插电式混合动力汽车中使用的一种LiFePO4牵引电池组

## Technology and included processes
总的来说，作者对电池组和模块的拆解采取了人工拆解的方式。关于电池的处理，作者采用了放电、破碎和热解的方法。作者对拆解结果(没有细胞的内部物质)进行了分类，并采用了不同的处置方式，如对电池内部材料进行回收或焚烧处理。经过拆解和粉碎阶段后，将电池内部材料粉碎至5 ~ 10 mm大小，为热解阶段做准备。关于电池内部材料的安全处理，作者在(额定功率: 2.5 k W)炉中进行热解处理，电池废料在400℃下进行热处理，每个电池处理0.5 h。然后，排放气体( HF、POF3、PF5)被石灰水中和，热解固体残渣被运送至填埋场填埋。相关的关键化学反应方程式如下所示。最后，对没有太多回收价值的热解固体残渣进行填埋处理。

## Technical purpose
该工艺用于回收和再利用磷酸铁锂（LFP）电池。这些回收过程对于可持续管理废旧LFP电池至关重要，常见于电动汽车、固定式储能应用和电子设备中。数据代表了实验室级别的程序，可以为开发LFP电池的工业规模回收系统提供基线。

## Reference product
- Battery: 150; input
  废电池组

## Inputs
- Calcium oxide: 6.22; calculated
  氧化钙
- Electricity: 828
  电
- nitrogen: 0.18055; calculated
  氮气

## Outputs
- iron: 26.4
  铁
- aluminium: 12.53
  铝
- copper: 10.59
  铜
- Printed Wire Board: 0.71
  印制线路板 (PWB)
- Plastic (unspecified),Plastic (unspecified): 26.6
  塑料
- Dimethyl Carbonate,Dimethyl Carbonate: 5.52; calculated
  碳酸二甲酯 (DC)
- Ethyl methyl carbonate: 4.6; calculated
  碳酸甲乙酯 (EMC)
- Ethylene carbonate: 5.52; calculated
  碳酸亚乙酯 (EC)
- Calcium phosphate: 3.78; calculated
  Ca3(PO4)2（磷酸钙）
- Calcium Fluoride: 5.81; calculated
  氟化钙
- Other Solid Waste: 51.3
  固体垃圾

## Data selection and combination
数据由作者记录和通过公式计算。

## Use advice
数据用户应注意，记录的过程是在实验室规模内进行的，并可能不直接代表工业规模的应用。在使用这些数据进行建模或放大时，可能需要进行调整以解释工业效率和实验室级别未捕获的额外步骤。用户还应考虑技术适用性，并确保对特定工业环境下的过程进行的任何调整都有科学依据，并且记录透明。

## Review details
清单： 内部审查通过几个迭代步骤完成，涉及原始数据验证、原始数据记录、代表性、完整性、与 ISO 14040 和 14044 有关的建模的一致性。

## Data sources
- Zhu,L. & Chen, M. Research on Spent LiFePO4 Electric Vehicle Battery Disposaland Its Life Cycle Inventory Collection in China. INTERNATIONAL JOURNAL OFENVIRONMENTAL RESEARCH AND PUBLIC HEALTH 17, (2020).
