# 稀土氧化物焙烧;稀土氧化物;稀土氧化物工艺;白云鄂博

Dataset: ILCD process, Unit process, single operation
Geography: NMG-CN
Reference year: 2014
Classification: Unit processes / Materials production / Inorganic chemicals
Functional unit: The scope of the LCA is cradle-to-gate and the functional unit was chosen as 1 kg of REO.
LCI method principle: Attributional
LCI method approaches: Allocation - market value; Allocation - exergetic content
Generated by: 汪涛, twang@iue.ac.cn
Owner: 天工LCI数据工作小组
Review: Dependent internal review by 天工LCI数据工作小组
Amounts: no units in this file; such an amount is in the reference unit of its flow, which a separate flow dataset defines
copyright: false
licenseType: Free of charge for all users and uses

## General comment
该数据集描述了稀土氧化物（REO）生产的过程链，目的是获取用于各种高科技行业的各种REO。这些行业可能包括电子行业，在那里REO有助于制造智能手机、计算机、高强度磁铁、电池和先进光学设备等设备。在白云鄂博矿加工的REO用于制造过程，其中独居石和氟碳铈矿是提炼稀土元素的关键材料。

## Geography
Bayan Obo (China)

## Technology and included processes
REO 生产的工艺链包括采矿，然后是选矿、煅烧、提取和焙烧阶段，见图 2。REO 生产的第一步是采矿，其中原矿石被爆破并运输以进一步精炼。从白云鄂博矿开采的原矿石由独居石和氟碳铈矿组成。

## Reference product
- Rare Earth Oxides: 1; calculated

## Inputs
- heat: 43.35; software or database
  Coal
- oxalic acid: 19.89; calculated
  Coke
- oxalic acid: 1.235; calculated
  H2SO4
- oxalic acid: 43.35; calculated
  NaOH

## Deviations from the LCI method approaches
Life cycle data was obtained from the Ecoinvent database, and mass-based-allocation was performed to partition the environmental impacts among crude ore and REO, as well as allocate the environmental impact among light, medium, heavy, and neodymium REOs. Two alternative allocations schemes, (I) market-based and (II) exegetic-based allocation, were considered as a means to partition the environmental impacts among REOs. The results for market- as well as exergetic-based allocation are provided in the Supporting Information. It is important to note that allocation based on market-value is the preferred method of the metals industry.23 When possible, Chinese-specificlifecycledatawas considered in the analysis; otherwise, European life cycle inventory (LCI) databases were used. The LCA results for REO production presented in this study provide a conservative benchmark for the environmental profile of REE. Furthermore, the LCI and LCA results can be extended/applied to evaluate the production of individual REE and REE-based technologies and products.

## Use advice
在使用此数据进行生命周期评估（LCA）时，请注意按照金属行业的惯常做法，采用市场价值为基础的配置方法，对不同类型的REOs的环境影响进行划分。报告的结果应在可用时仔细考虑中国特定的生命周期数据，以更准确地表征影响。在缺乏本地数据的情况下，请参考欧洲生命周期清单（LCI）数据库。生命周期范围是摇篮到大门，功能单位设定为1千克REO。市场和基于出热的分配的结果都是可用的，应根据评估的具体情况进行咨询。

## Review details
清单： 内部审查通过几个迭代步骤完成，涉及原始数据验证、原始数据记录、代表性、完整性、与 ISO 14040 和 14044 有关的建模的一致性。

## Data sources
- Zaimes, G. G., Hubler, B. J., Wang, S. & Khanna, V. Environmental Life Cycle Perspective on Rare Earth Oxide Production. ACS Sustainable Chem. Eng. 3, 237–244 (2015).
