# 土壤修复;异位修复;生物堆;微生物培养;微生物

Dataset: ILCD process, Unit process, single operation
Geography: IT
Reference year: 2018
Classification: Unit processes / Other Services / Repair and maintenance
Generated by: 王宁, wang_ning@caep.org.cn
Owner: 天工LCI数据工作小组
Review: Dependent internal review by 天工LCI数据工作小组
Amounts: no units in this file; such an amount is in the reference unit of its flow, which a separate flow dataset defines
copyright: false
licenseType: Free of charge for all users and uses

## General comment
在实验室中培养用于生物堆修复土壤的微生物

## Technical purpose
所述过程用于在实验室环境中培养专门的微生物，这些微生物用于生物堆土壤修复。生物堆土壤修复是一种利用特定微生物的独特代谢性质来解毒污染土壤的生物技术过程。

## Reference product
- Microorganism: 0.001; measured

## Inputs
- methane,methane: 2; measured
- Electricity: 777.6; measured

## Use advice
使用此数据时，必须确保方法论边界包括所有相关的输入和输出，例如微生物培养过程中的原材料和能耗。建议用户验证数据是否代表了应用将要发生的地理和技术背景。应注意确保培养的微生物适合它们将要应用的特定类型的土壤和污染物。在土壤修复过程中处理和应用这些培养的微生物时，必须遵守适当的安全和环境规定。

## Review details
清单： 内部审查通过几个迭代步骤完成，涉及原始数据验证、原始数据记录、代表性、完整性、与 ISO 14040 和 14044 有关的建模的一致性。

## Data sources
- D’Imporzano, G. et al. OPTIMIZING BIOREMEDIATION OF HYDROCARBON POLLUTED SOIL BY LIFE CYCLE ASSESSMENT (LCA) APPROACH. Environmental Engineering and Management Journal (2019).
