# 鼻锥的制造 ; 1.5 MW 风轮机的鼻锥

Dataset: ILCD process, Unit process, single operation
Geography: NMG-CN
Reference year: 2017
Classification: Unit processes / Materials production / Other materials
Functional unit: The functional unit is 1.5 MW wind turbine
LCI method principle: Attributional
LCI method approaches: Allocation
Generated by: 赵云志, ll10088@163.com
Owner: 天工LCI数据工作小组
Review: Dependent internal review by 天工LCI数据工作小组
Amounts: no units in this file; such an amount is in the reference unit of its flow, which a separate flow dataset defines
copyright: false
licenseType: Free of charge for all users and uses

## General comment
本工艺制造的鼻锥专为1.5兆瓦风力涡轮设计。该部件有助于提高涡轮的空气动力学性能，并保护内部组件。这些风力涡轮通常用于大型风力发电场以产生可再生能源，例如位于内蒙古东北部的、由33台国产1.5兆瓦风力涡轮组成的风力发电场。

## Geography
风电功率参数的数据来自Wang ( 2012 )。以装有33台国产1.5兆瓦( MW )风电机组的风电场为案例，分析其环境影响及其替代效应。该风电场位于我国风电装机最多的省份- -内蒙古东北部。

## Reference product
- Nacelle nose-cone of wind turbine: 1; estimated

## Inputs
- iron: 3000; calculated
  Steel and iron

## Deviations from the LCI method approaches
风电的生命周期清单如下所示。生产制造阶段包括风电机组、变电站、电缆的生产，这些设备消耗大量能源，排放污染物( Xue et al . , 2015)。

## Use advice
在使用1.5兆瓦风力涡轮鼻锥制造过程的LCA数据集时，确保所有来自基础研究的假设和参数与评估范围一致至关重要。请注意，环境影响特定于内蒙古的生产条件，并且考虑到了区域能源组合和技术实践。如果在不同的环境中应用数据，可能需要调整以反映当地条件。应关注技术实践和排放因子随时间变化，这可能影响数据集的相关性。

## Review details
清单： 内部审查通过几个迭代步骤完成，涉及原始数据验证、原始数据记录、代表性、完整性、与 ISO 14040 和 14044 有关的建模的一致性。

## Data sources
- Li, H., Jiang, H.-D., Dong, K.-Y., Wei, Y.-M. & Liao, H. A comparative analysis of the life cycle environmental emissions from wind and coal power: Evidence from China. Journal of Cleaner Production 248, 119192 (2020).
