# 运输 ; 基础（27×3.6MW+1×5MW）; 公路运输可忽略不计，但使用更为复杂的船队，包括抛锚船、挖泥船、混凝土搅拌船、起重船、电缆敷设船等, 接近25英里。

Dataset: ILCD process, Unit process, single operation
Geography: SH-CN
Reference year: 2009
Classification: Unit processes / Transport services / Water
Functional unit: The functional unit is 1 kWh on-grid electricity provision.
LCI method principle: Consequential
LCI method approaches: Allocation
Generated by: 赵云志, ll10088@163.com
Owner: 天工LCI数据工作小组
Review: Dependent internal review by 天工LCI数据工作小组
Amounts: no units in this file; such an amount is in the reference unit of its flow, which a separate flow dataset defines
copyright: false
licenseType: Free of charge for all users and uses

## General comment
此数据集详述了中国上海附近东海大桥海上风电场（DBOWF）运输和安装阶段的情况。它概述了包括抛锚船、挖泥船、混凝土搅拌船、起重船和电缆敷设船在内的复杂船队作业，用于运输风力涡轮机、基础和电缆。该数据还包括各种建筑材料和组件的详细能源和排放因子。此数据适用于类似DBOWF这样的海上风电场的生命周期评估，尤其是在规模、位置和运营特性方面。

## Geography
所研究的风电场- -东海大桥海上风电场( DBOWF )是中国在上海管辖范围内的第一个海上风电场，也是欧洲以外的第一个海上风电场。工程分两期施工，分别位于东海大桥两侧(图1 )。

## Reference product
- Wind tower foundation: 28; measured
  27 3.6-MW wind turbines and one 5-MW prototype wind turbine.

## Inputs
- Diesel: 989000; calculated
- Energy, geothermal, converted: 6.6e7; calculated

## Outputs
- carbon dioxide: 4.46e6; calculated
- particles (PM2.5): 4700; calculated
- sulfur dioxide: 6900; calculated
- nitrous oxide: 49600; calculated

## Deviations from the LCI method approaches
本研究采用PLCA建模方法计算了中国某典型海上风电场的能源和环境排放。从摇篮到坟墓的过程包括材料和设备制造、运输和安装、操作和维护、拆解和回收4个阶段(图2 )。

## Data selection and combination
风机、基础和电缆的技术参数从DBOWF的设计文件中获得(表2)。能源和排放因子(即单位材料和构件生产的能源消耗和环境排放)来源于Ecoinvent 2.2数据集(生态发明中心, 2009)，优先参考中国实践的系数。对于关键材料和设备，其海上运输能量由运输负荷和海运能量强度计算得到。根据施工方案，对设施安装能耗和排放进行了估算。风电场的运行和维护数据，如维护的频率和工作时间，是通过与工程技术人员的现场调查获得的。与模型参数和输入数据相关的不确定性在本文的敏感性分析部分进行了说明。

## Use advice
使用此数据集进行生命周期评估（LCA）的用户应确保按照描述中的能源和排放因子进行整合，以准确反映中国海上风电领域的情况。注意，公路运输被认为可以忽略不计；重点关注海上运输的能源和排放。必须根据中国实践对数据集进行情境化处理，因为这些系数在评估中被优先考虑。确保与DBOWF的具体实践相一致的运营实践参数，比如维护的频率和工作时间。在评估影响时，考虑包括制造、安装、运营、维护和回收在内的整个从摇篮到坟墓的生命周期。注意研究的敏感性分析中讨论的模型参数和输入数据的不确定性。

## Review details
清单： 内部审查通过几个迭代步骤完成，涉及原始数据验证、原始数据记录、代表性、完整性、与 ISO 14040 和 14044 有关的建模的一致性。

## Data sources
- Yang, J. et al. The life-cycle energy and environmental emissions of a typical offshore wind farm in China. Journal of Cleaner Production 180, 316–324 (2018).
