# 砖生产 ; 混凝土路面砖 ; 切割工艺

Dataset: ILCD process, Unit process, single operation
Geography: JNA-SD-CN
Reference year: 2018
Classification: Materials production / Other mineralic materials
Functional unit: The functional unit is the area of 1 m2 brick products.
Generated by: 王湘锦, r99rt4@163.com
Owner: 天工LCI数据工作小组
Review: Dependent internal review by 天工LCI数据工作小组
Amounts: no units in this file; such an amount is in the reference unit of its flow, which a separate flow dataset defines
licenseType: Free of charge for all users and uses

## General comment
该数据集涉及用于建筑人行道、公共广场、私家车道以及其他需要混凝土铺设的应用的混凝土路面砖的生产。生产包括一个切割工艺，使得可以精确尺寸制造路面砖。该特定数据集可被生产商和研究人员利用，参与城市基础设施的设计和建造，以改进生产方法和提高环境可持续性。

## Reference product
- green brick: 90; measured
  细坯

## Inputs
- Clay Body: 102; measured
- electricity mix: 0.4392; measured

## Outputs
- particles (PM10): 0.000333; measured

## Deviations from the LCI method approaches
本研究采用了 ReCiPe midpoint（H）模型。

## Data selection and combination
In this study, the production energy consumption of concrete pavement brick and permeable brick as well as the relevant data of all kinds of raw materials and energy input and exhaust emissions are collected from Jinan Shunde Cement Products Co. Ltd. Shandong Province.

## Sampling procedure
原材料、能源投入和废物排放的大部分数据都是从生产厂家的现场调查中收集的。减水剂，其化学成分是磺酸钠盐的甲醛缩合物

## Use advice
使用该数据集的用户应注意功能单位表示每平方米砖产品的生产能耗和材料投入的精度。建议在使用该数据集进行比较或改进目的时，考虑当地生产特性进行个性化评估。在评估不同关键工序的数据可靠性时，应考虑基于输入和输出5%变化的敏感性分析。另外，当在生命周期评价中使用这些数据时，还应包括对区域环境影响和制造商特定实践的考虑。

## Review details
清单： 内部审查通过几个迭代步骤完成，涉及原始数据验证、原始数据记录、代表性、完整性、与 ISO 14040 和 14044 有关的建模的一致性。

## Data sources
- Yuan, X. et al. Environmental and economic impacts assessment of concrete pavement brick and permeable brick production process - A case study in China. Journal of Cleaner Production 171, 198–208 (2018).
