# Grain|Generalbituminouscoal|Drying|All sizes / 粮食|一般烟煤|烘干|所有规模

Dataset: ILCD process, Unit process, single operation
Geography: CN
Reference year: 2019
Classification: Energy carriers and technologies / Hard coal based fuels
Generated by: The data was created by the Office of the Second National Pollution Source Census of the Ministry of Ecology and Environment, and the data was organized by the TianGong Plan team for ILCD format / 生态环境部第二次全国污染源普查工作办公室创建数据，天工计划团队常慧敏整理数据为ILCD格式
Owner: Tiangong LCI Data Working Group / 天工LCI数据工作小组
Review: Dependent internal review by Tiangong LCI Data Working Group / 天工LCI数据工作小组
Amounts: no units in this file; such an amount is in the reference unit of its flow, which a separate flow dataset defines
copyright: false
licenseType: Free of charge for all users and uses

## General comment
the Technical of end-of-pipe management technology for pollution Nitrogen oxidesis/，Its Technical efficiency of end-of-pipe management0

## Reference product
- Bituminous coal: 1000; input; calculated
  源文件中描述为为一般烟煤，此处对其进行了匹配工作，将其匹配到LCAflow库里面相最符合的流，污染物指标备注为工业废气量

## Outputs
All rows: calculated
- Exhaust gas: 19100
  污染物指标工业废气量的末端治理技术是/，其效率为0。原文件中描述污染物类别为废气，污染物指标为工业废气量，此处对其进行了匹配工作，将其匹配到LCAflow库里面相最符合的流，污染物指标备注为工业废气量
- Flue dust: nan
  污染物指标烟尘的末端治理技术是/，其效率为0。原文件中描述污染物类别为废气，污染物指标为烟尘，此处对其进行了匹配工作，将其匹配到LCAflow库里面相最符合的流，污染物指标备注为烟尘，产污系数备注为烟尘的产污系数以含灰量(A%)形式表示，其中含灰量(A%)是指燃煤收到基灰分含量，以质量百分数表示。例如燃料中灰分含量为15%，则A＝15
- Flue dust: nan
  污染物指标烟尘的末端治理技术是袋式除尘，其效率为99.6，末端治理设施实际运行率（k值）计算公式为k=除尘设施年运行小时数/热风炉年运行小时数。原文件中描述污染物类别为废气，污染物指标为烟尘，此处对其进行了匹配工作，将其匹配到LCAflow库里面相最符合的流，污染物指标备注为烟尘，产污系数备注为烟尘的产污系数以含灰量(A%)形式表示，其中含灰量(A%)是指燃煤收到基灰分含量，以质量百分数表示。例如燃料中灰分含量为15%，则A＝15
- Flue dust: nan
  污染物指标烟尘的末端治理技术是单筒（多筒并联除尘），其效率为70，末端治理设施实际运行率（k值）计算公式为k=除尘设施年运行小时数/热风炉年运行小时数。原文件中描述污染物类别为废气，污染物指标为烟尘，此处对其进行了匹配工作，将其匹配到LCAflow库里面相最符合的流，污染物指标备注为烟尘，产污系数备注为烟尘的产污系数以含灰量(A%)形式表示，其中含灰量(A%)是指燃煤收到基灰分含量，以质量百分数表示。例如燃料中灰分含量为15%，则A＝15
- Flue dust: nan
  污染物指标烟尘的末端治理技术是电袋组合，其效率为99.8，末端治理设施实际运行率（k值）计算公式为k=除尘设施年运行小时数/热风炉年运行小时数。原文件中描述污染物类别为废气，污染物指标为烟尘，此处对其进行了匹配工作，将其匹配到LCAflow库里面相最符合的流，污染物指标备注为烟尘，产污系数备注为烟尘的产污系数以含灰量(A%)形式表示，其中含灰量(A%)是指燃煤收到基灰分含量，以质量百分数表示。例如燃料中灰分含量为15%，则A＝15
- Flue dust: nan
  污染物指标烟尘的末端治理技术是文丘里，其效率为87，末端治理设施实际运行率（k值）计算公式为k=除尘设施年运行小时数/热风炉年运行小时数。原文件中描述污染物类别为废气，污染物指标为烟尘，此处对其进行了匹配工作，将其匹配到LCAflow库里面相最符合的流，污染物指标备注为烟尘，产污系数备注为烟尘的产污系数以含灰量(A%)形式表示，其中含灰量(A%)是指燃煤收到基灰分含量，以质量百分数表示。例如燃料中灰分含量为15%，则A＝15
- Flue dust: nan
  污染物指标烟尘的末端治理技术是湿式喷雾，其效率为87，末端治理设施实际运行率（k值）计算公式为k=除尘设施年运行小时数/热风炉年运行小时数。原文件中描述污染物类别为废气，污染物指标为烟尘，此处对其进行了匹配工作，将其匹配到LCAflow库里面相最符合的流，污染物指标备注为烟尘，产污系数备注为烟尘的产污系数以含灰量(A%)形式表示，其中含灰量(A%)是指燃煤收到基灰分含量，以质量百分数表示。例如燃料中灰分含量为15%，则A＝15
- Flue dust: nan
  污染物指标烟尘的末端治理技术是离心水膜，其效率为87，末端治理设施实际运行率（k值）计算公式为k=除尘设施年运行小时数/热风炉年运行小时数。原文件中描述污染物类别为废气，污染物指标为烟尘，此处对其进行了匹配工作，将其匹配到LCAflow库里面相最符合的流，污染物指标备注为烟尘，产污系数备注为烟尘的产污系数以含灰量(A%)形式表示，其中含灰量(A%)是指燃煤收到基灰分含量，以质量百分数表示。例如燃料中灰分含量为15%，则A＝15
- Flue dust: nan
  污染物指标烟尘的末端治理技术是喷淋塔/冲击水浴，其效率为87，末端治理设施实际运行率（k值）计算公式为k=除尘设施年运行小时数/热风炉年运行小时数。原文件中描述污染物类别为废气，污染物指标为烟尘，此处对其进行了匹配工作，将其匹配到LCAflow库里面相最符合的流，污染物指标备注为烟尘，产污系数备注为烟尘的产污系数以含灰量(A%)形式表示，其中含灰量(A%)是指燃煤收到基灰分含量，以质量百分数表示。例如燃料中灰分含量为15%，则A＝15
- Flue dust: nan
  污染物指标烟尘的末端治理技术是静电除尘，其效率为97，末端治理设施实际运行率（k值）计算公式为k=除尘设施年运行小时数/热风炉年运行小时数。原文件中描述污染物类别为废气，污染物指标为烟尘，此处对其进行了匹配工作，将其匹配到LCAflow库里面相最符合的流，污染物指标备注为烟尘，产污系数备注为烟尘的产污系数以含灰量(A%)形式表示，其中含灰量(A%)是指燃煤收到基灰分含量，以质量百分数表示。例如燃料中灰分含量为15%，则A＝15
- Flue dust: nan
  污染物指标烟尘的末端治理技术是多管旋风，其效率为70，末端治理设施实际运行率（k值）计算公式为k=除尘设施年运行小时数/热风炉年运行小时数。原文件中描述污染物类别为废气，污染物指标为烟尘，此处对其进行了匹配工作，将其匹配到LCAflow库里面相最符合的流，污染物指标备注为烟尘，产污系数备注为烟尘的产污系数以含灰量(A%)形式表示，其中含灰量(A%)是指燃煤收到基灰分含量，以质量百分数表示。例如燃料中灰分含量为15%，则A＝15
- sulfur dioxide: nan
  污染物指标二氧化硫的末端治理技术是/，其效率为0。原文件中描述污染物类别为废气，污染物指标为二氧化硫，此处对其进行了匹配工作，将其匹配到LCAflow库里面相最符合的流，污染物指标备注为二氧化硫，产污系数备注为二氧化硫产污系数以含硫量(S%)形式表示，其中含硫量(S%)是指燃料硫分含量，以质量百分数表示。例如燃料中含硫量(S%)为3%，则S=3
- sulfur dioxide: nan
  污染物指标二氧化硫的末端治理技术是S12其他（钠碱法），其效率为92.5，末端治理设施实际运行率（k值）计算公式为k=脱硫设施年运行小时数/热风炉年运行小时数。原文件中描述污染物类别为废气，污染物指标为二氧化硫，此处对其进行了匹配工作，将其匹配到LCAflow库里面相最符合的流，污染物指标备注为二氧化硫，产污系数备注为二氧化硫产污系数以含硫量(S%)形式表示，其中含硫量(S%)是指燃料硫分含量，以质量百分数表示。例如燃料中含硫量(S%)为3%，则S=3
- sulfur dioxide: nan
  污染物指标二氧化硫的末端治理技术是氨法，其效率为92.5，末端治理设施实际运行率（k值）计算公式为k=脱硫设施年运行小时数/热风炉年运行小时数。原文件中描述污染物类别为废气，污染物指标为二氧化硫，此处对其进行了匹配工作，将其匹配到LCAflow库里面相最符合的流，污染物指标备注为二氧化硫，产污系数备注为二氧化硫产污系数以含硫量(S%)形式表示，其中含硫量(S%)是指燃料硫分含量，以质量百分数表示。例如燃料中含硫量(S%)为3%，则S=3
- sulfur dioxide: nan
  污染物指标二氧化硫的末端治理技术是烟气循环流化床法，其效率为85，末端治理设施实际运行率（k值）计算公式为k=脱硫设施年运行小时数/热风炉年运行小时数。原文件中描述污染物类别为废气，污染物指标为二氧化硫，此处对其进行了匹配工作，将其匹配到LCAflow库里面相最符合的流，污染物指标备注为二氧化硫，产污系数备注为二氧化硫产污系数以含硫量(S%)形式表示，其中含硫量(S%)是指燃料硫分含量，以质量百分数表示。例如燃料中含硫量(S%)为3%，则S=3
- sulfur dioxide: nan
  污染物指标二氧化硫的末端治理技术是石灰石/石膏法，其效率为92.5，末端治理设施实际运行率（k值）计算公式为k=脱硫设施年运行小时数/热风炉年运行小时数。原文件中描述污染物类别为废气，污染物指标为二氧化硫，此处对其进行了匹配工作，将其匹配到LCAflow库里面相最符合的流，污染物指标备注为二氧化硫，产污系数备注为二氧化硫产污系数以含硫量(S%)形式表示，其中含硫量(S%)是指燃料硫分含量，以质量百分数表示。例如燃料中含硫量(S%)为3%，则S=3
- sulfur dioxide: nan
  污染物指标二氧化硫的末端治理技术是氧化镁法，其效率为92.5，末端治理设施实际运行率（k值）计算公式为k=脱硫设施年运行小时数/热风炉年运行小时数。原文件中描述污染物类别为废气，污染物指标为二氧化硫，此处对其进行了匹配工作，将其匹配到LCAflow库里面相最符合的流，污染物指标备注为二氧化硫，产污系数备注为二氧化硫产污系数以含硫量(S%)形式表示，其中含硫量(S%)是指燃料硫分含量，以质量百分数表示。例如燃料中含硫量(S%)为3%，则S=3
- sulfur dioxide: nan
  污染物指标二氧化硫的末端治理技术是旋转喷雾干燥法，其效率为70，末端治理设施实际运行率（k值）计算公式为k=脱硫设施年运行小时数/热风炉年运行小时数。原文件中描述污染物类别为废气，污染物指标为二氧化硫，此处对其进行了匹配工作，将其匹配到LCAflow库里面相最符合的流，污染物指标备注为二氧化硫，产污系数备注为二氧化硫产污系数以含硫量(S%)形式表示，其中含硫量(S%)是指燃料硫分含量，以质量百分数表示。例如燃料中含硫量(S%)为3%，则S=3
- sulfur dioxide: nan
  污染物指标二氧化硫的末端治理技术是双碱法，其效率为92.5，末端治理设施实际运行率（k值）计算公式为k=脱硫设施年运行小时数/热风炉年运行小时数。原文件中描述污染物类别为废气，污染物指标为二氧化硫，此处对其进行了匹配工作，将其匹配到LCAflow库里面相最符合的流，污染物指标备注为二氧化硫，产污系数备注为二氧化硫产污系数以含硫量(S%)形式表示，其中含硫量(S%)是指燃料硫分含量，以质量百分数表示。例如燃料中含硫量(S%)为3%，则S=3
- Nitrogen oxides: 2.94
  污染物指标氮氧化物的末端治理技术是/，其效率为0。原文件中描述污染物类别为废气，污染物指标为氮氧化物，此处对其进行了匹配工作，将其匹配到LCAflow库里面相最符合的流，污染物指标备注为氮氧化物

## Use advice
This dataset is derived from the Pollution Source Census Report and contains information on pollution emissions and related products. However, it does not include data on energy or chemical consumption, nor does it provide information on waste or co-product generation. When utilizing this dataset, please supplement the missing data based on actual conditions before use
该数据集来源于污染源普查报告，包含污染物排放及相关产品信息，但不包含能源或化学品消耗数据，也不提供废弃物或共生产物产生信息。在使用该数据集时，请根据实际情况补充缺失数据后再使用。

## Review details
Inventory: The internal review was done by several iteration steps concerning raw data validation, raw data documentation, representativity, completeness and consistency of modelling with regard to ISO 14040 and 14044.
清单： 内部审查通过几个迭代步骤完成，涉及原始数据验证、原始数据记录、代表性、完整性、与 ISO 14040 和 14044 有关的建模的一致性。

## Data sources
- 第二次全国污染源普查产排污核算系数手册（试用版）,二级代码05,四级代码0514文件，在完整版文件中第3413页
