# 层压件甲苯浸泡;层压件;甲苯浸泡

Dataset: ILCD process, Unit process, single operation
Geography: CN
Classification: Unit processes / Materials production / Organic chemicals
Generated by: 王楠, 1209824595@qq.com
Owner: 天工LCI数据工作小组
Review: Dependent internal review by 天工LCI数据工作小组
Amounts: no units in this file; such an amount is in the reference unit of its flow, which a separate flow dataset defines
copyright: false
licenseType: Free of charge for all users and uses

## General comment
提供的数据集涉及甲苯浸泡层压件的制造过程。该工业过程适用于生产用甲苯浸泡的材料，以增强层压件的某些性能（如粘附性、耐性），或为进一步的加工步骤准备材料。这些材料可能在电子到汽车等行业中使用，这些行业需要高性能和高精度的材料。

## Reference product
- Laminate,Laminate: 745.833; input; software or database
  层压件

## Inputs
- toluene: 63.14; software or database
- water: 173.2; software or database
- Electricity: 204.48; software or database

## Outputs
All rows: software or database
- Glass for recovery (shards): 635
- Backsheet: 33.9
  backsheet背板back panel
- Multi-Si solar cell,Multi-Si solar cell,Multi-Si solar cell: 24.97
- Medium and low radioactive liquid waste: 236.34
  液体废弃物
- Sludge: 18.3
- Electricity: 148.181
- municipal solid waste deposition: 38.92
  solid waste
- Nitrogen oxides: 2
- 1,2-dichloroethane: 30.82
- carbon dioxide: 32.25
- methane: 50.69
- Total Phosphorus (TP): 0.32
  total phosphorous
- Total Nitrogen: 6.6
  total nitrogen

## Use advice
该数据集的用户应考虑甲苯使用的环境影响，并确保其生命周期评估考虑了浸泡过程中产生的任何排放。考虑层压件的使用寿命末期也是至关重要的，包括对回收、废物处理和材料回收潜力的影响。在特定应用背景中，应采取适当措施对层压件的使用阶段行为进行建模，并包括可能影响总体环境足迹的任何维护或操作考虑因素。

## Review details
清单： 内部审查通过几个迭代步骤完成，涉及原始数据验证、原始数据记录、代表性、完整性、与 ISO 14040 和 14044 有关的建模的一致性。

## Data sources
- Li, J. et al. Life cycle analysis of the economic costs and environmental benefits of photovoltaic module waste recycling in China. (2023).
