# Brick production | Non sintered bricks | Raw materials processing (crushing, mixing)

Dataset: ILCD process, Unit process, single operation
Geography: MY-SC-CN
Reference year: 2020
Classification: Materials production / Other mineralic materials
Functional unit: 1t WDC were chosen as the functional unit
Generated by: Wang xiangjin, r99rt4@163.com
Review: Dependent internal review by Tiangong LCI Data Working Group
Amounts: no units in this file; such an amount is in the reference unit of its flow, which a separate flow dataset defines
copyright: false

## Technology and included processes
Involves the preparation of non-fired bricks by adding an appropriate amount of aggregate (i.e., manufactured sand) after the WDC crushing pretreatment. The entire production process includes mixing (time of 2 min), pressing (pressure of 3 MPa; dimension of 240 × 115 × 53 mm), and maintenance steps

## Reference product
- clay: 1000; input; measured

## Inputs
All rows: measured
- sand: 2310
- Fly ash: 12
- portland cement: 530
- Water (fresh water): 300
- electricity mix: 342

## Outputs
- brickbat aggregate: 4152; measured
  砖块粗原料
- particles (> PM10): 0.12357; measured

## Deviations from the LCI method approaches
The eFootprint online analysis platform developed by IKE Environmental Technology Co. was used to perform quantitative analysis of the full life cycle process, as part of the LCA

## Data selection and combination
Information on the raw materials, energy inputs and pollutant emission data were obtained from Mianyang Building Materials Manufacturing Co., Ltd.

## Sampling procedure
Besides, 1t WDC were chosen as the functional unit and all the input parameters of raw materials, auxiliary materials, energy consumption, transportation, and direct emissions were calculated in accordance with the functional unit.

## Review details
Inventory: The internal review was done by several iteration steps concerning raw data validation, raw data documentation, representativity, completeness and consistency of modelling with regard to ISO 14040 and 14044.; Documentation: The review of the documentation was performed by Ecobilan and is in compliance with ISO 14040 and 14044. The data set documentation is correct in view of the appropriateness of the information provided. It includes all relevant information in view of data quality and scope of application of the respective LCI result.

## Data sources
- Liu, W. et al. Comparative life cycle assessment of cement, sintered bricks and non-sintered bricks manufacturing using water-based drilling cuttings from shale gas production in the Sichuan Basin, China. J. Environ. Manage. 314, 115135 (2022).
