# copper-based mixed waste recycling|Black copper|smelting process|Copper-based mixed waste

Dataset: ILCD process, Unit process, single operation
Geography: JX-CN
Reference year: 2020
Classification: Materials production / Other mineralic materials
Functional unit: We consider the functional unit of the recycling of copper-based mixed waste to be 1000 kg electrolytic copper.
LCI method principle: Attributional
LCI method approaches: Allocation - market value
Generated by: Peng Wang, 2867919560@qq.com
Review: Dependent internal review by Tiangong LCI Data Working Group
Amounts: no units in this file; such an amount is in the reference unit of its flow, which a separate flow dataset defines
copyright: false

## Geography
The typical case is a metal recycling enterprise located in Jiangxi Province, China,

## Technology and included processes
Copper-based mixed waste is the main raw material, and other auxiliary materials, including coal, electric power, high-grade copper scrap, quartz sand, limestone, and lime, as well as other production processes, generate intermediate products and waste slag, such as secondary slag, sponge copper, and anode copper mud residue.

## Reference product
- Black copper（90% Cu）: 1350; measured
  Black copper needs to be replenished

## Inputs
All rows: measured
- Anode sludge: 3.4
  Copper byproduct/Self-produced needs to be supplemented
- copper: 464.4
  Copper slag concentrate/Self-produced
- particles (PM2.5 - PM10): 1.4
  Dust needs to be replenished
- Hard coal, at consumer EU-27: 710.1
  Hard coal
- Quicklime: 162
  Quicklime needs to be supplemented
- Limestone: 162
  limestone
- oxygen: 137.5
  Oxygen (gaseous)
- quartz sand: 135
  Quartz sand
- Copper-based mixed waste: 3240
  Copper-based mixed waste needs to be supplemented
- copper scrap: 8.1
  Copper scrap needs to be supplemented
- Scrap: 483.9
  Scrap needs to be supplemented
- Slag and ash: 125763
  Slag and ash need to be supplemented
- transport in t*km,transport in t*km: 0.2751
  Transport
- Electricity: 699.84

## Outputs
- mineral waste (ash): 94.5; measured
  Ash 1|To zinc recovery
- Copper-containing slag: 2932.7; measured
  Copper-containing slag needs to be supplemented
- mineral waste (ash): 0.4; measured
  Ash 2|To smelting
- carbon dioxide: 977.4; measured
  Carbon dioxide|Emission into the air

## Deviations from the LCI method approaches
Using the LCA-ReCiPe 2016 (Heijungs et al., 2017) characterization and normalization method (the midpoint and endpoint method), the life cycle inventory is converted into impact scores in multiple fields.

## Data selection and combination
foreground data and background data.

## Data treatment and extrapolations
GaBi 9.0 software is adopted to calculate the inventory, resource consumption, and waste emissions of the various copper-based mixed-waste recovery processes per unit mass.

## Review details
Inventory: The internal review was done by several iteration steps concerning raw data validation, raw data documentation, representativity, completeness and consistency of modelling with regard to ISO 14040 and 14044.

## Data sources
- Zhang, W. et al. Analyzing the environmental impact of copper-based mixed waste recycling-a LCA case study in China. Journal of Cleaner Production 284, 125256 (2021).
