# Soil remediation ; ex-situ remediation ; thermal desorption remediation ; engineering implementation ; soil excavation

Dataset: ILCD process, Unit process, single operation
Geography: SH-CN
Classification: Other Services / Repair and maintenance
Generated by: Wang Feng, wangfeng@caep.org.cn
Owner: Tiangong LCI Data Working Group
Review: Dependent internal review by Tiangong LCI Data Working Group
Amounts: no units in this file; such an amount is in the reference unit of its flow, which a separate flow dataset defines
copyright: false
licenseType: Free of charge for all users and uses

## General comment
Remediation of 1 cubic metre of contaminated soil by ectopic thermal desorption. Contaminated soil was removed from the contaminated area by a digger for transport to a treatment greenhouse.

## Geography
我国华东区域5 个污染土壤异位热脱附修复工程案例

## Technology and included processes
Contaminated soil is dug out of contaminated areas with a digger for transport to treatment sheds

## Technical purpose
The ex-situ thermal desorption process is targeted for soil remediation, specifically designed to treat 1 cubic meter of contaminated soil per operation. Excavators are used to extract the contaminated soil from the polluted sites and transport it to a treatment shed unit process. This method is exemplified by five case studies of soil remediation projects using ex-situ thermal desorption in the East China region.

## Reference product
- Excavated soil: 1; measured

## Inputs
- Oils, unspecified: 0.00011; measured

## Use advice
Users of this data should note that the described process is specifically for ex-situ thermal desorption soil remediation and may not be directly applicable to other types of remediation techniques. It's essential to ensure that the data set reflects the technological applicability and processing capabilities unique to the regional context of East China. Any extrapolation of this data to other regions or different soil conditions must be done cautiously, considering local environmental compliance regulations and soil characteristics.

## Review details
Inventory: The internal review was done by several iteration steps concerning raw data validation, raw data documentation, representativity, completeness and consistency of modelling with regard to ISO 14040 and 14044.

## Data sources
- 刘爽,陈盼,宋慧敏等.我国华东地区污染土壤异位热脱附修复碳排放及减排策略[J].环境工程学报,2022,16(08):2663-2671.
