# 废聚苯乙烯（PS）再利用;焦炭、焦油和煤气;共焦化;废聚苯乙烯（PS）

Dataset: ILCD process, Unit process, black box
Geography: CN
Reference year: 2010
Classification: Unit processes / End-of-life treatment / Material recycling
Functional unit: one ton of waste polystyrene
Generated by: 程晓宇, xiaoyucheng@email.ncu.edu.cn
Owner: 天工LCI数据工作小组
Review: Dependent internal review by 天工LCI数据工作小组
Amounts: no units in this file; such an amount is in the reference unit of its flow, which a separate flow dataset defines
copyright: false
licenseType: Free of charge for all users and uses

## General comment
研究范围包括废塑料原料进厂后的预处理、混合颗粒制备与炼焦阶段在内的3个环节。

## Time period
文献发表时间

## Technology and included processes
利用焦化工艺处理废塑料技术是一种可以大规模处理混合废塑料的工业实用型技术。该技术基于现有炼焦炉的高温干馏技术，将废塑料转化为焦炭、焦油和煤气。

## Technical purpose
共焦化工艺是一种用于大规模处理混合废聚苯乙烯塑料的工业应用技术。该技术利用现有炼焦炉的高温干馏能力，将废聚苯乙烯转化为有价值的副产品：焦炭、焦油和合成气。此过程支持塑料工业的废物管理和物料回收。

## Reference product
- Polystyrene wastes: 1000; input; measured

## Inputs
- Coal: 49000; measured
- Water for industrial use: 1.7361e6; measured
- Electricity: 8169.12; measured

## Outputs
All rows: measured
- carbon dioxide (fossil): 3507.2
  原文未区分bio和fossil，根据专家判断此处为fossil
- carbon monoxide (fossil): 0.70145
  原文未区分bio和fossil，根据专家判断此处为fossil
- nitrous oxide: 0.2265
- sulfur dioxide: 28.184
- Nitrogen oxides: 12.1381
- hydrogen sulfide: 0.27
- methane (fossil): 9.59795
  原文未区分bio和fossil，根据专家判断此处为fossil
- hydrocarbons (unspecified): 0.24815
- Flue dust: 16.7631
- chemical oxygen demand: 0.70115
- Suspended solids, unspecified,Suspended solids, unspecified: 0.7228
- phenol: 0.00136
- cyanide: 0.00068
- ammonia: 0.136
- Ammonia Nitrogen: 0.00023873
- Waste Residue: 423.183
- waste water - untreated: 4.55

## Use advice
使用此数据集的用户应注意，信息涉及使用共焦化工艺处理废聚苯乙烯。研究范围包括预处理、混合颗粒的准备和炼焦阶段。在模拟环境影响或物料流时，要考虑与现有的炼焦炉技术相关的效率和排放特性。方法学考虑，例如系统边界、能耗和与预处理阶段相关的排放必须纳入生命周期评估。该数据集适用于废聚苯乙烯管理或增值作为工业过程的一部分。

## Review details
清单： 内部审查通过几个迭代步骤完成，涉及原始数据验证、原始数据记录、代表性、完整性、与 ISO 14040 和 14044 有关的建模的一致性。

## Data sources
- 王震, 孙德智 & 高明. 废聚苯乙烯塑料共焦化过程的生命周期评价. 环境工程 102–106 (2010) doi:
