# Polyester and cotton production|Polyester and cotton|Textile

Dataset: ILCD process, Unit process, single operation
Geography: CN
Reference year: 2018
Classification: Materials production / Other mineralic materials
Generated by: Yingfan Duan, 1300925579@qq.com
Review: Dependent internal review by Tiangong LCI Data Working Group
Amounts: no units in this file; such an amount is in the reference unit of its flow, which a separate flow dataset defines
copyright: false

## General comment
假设所有的产品都是用同样的纱线生产的，不考虑密度影响。

## Inputs
- Yarn: 101000; measured
- Water (fresh water): 24200; measured
- Electricity: 20253.6; software or database
- Crude coal: 10200; software or database

## Outputs
- Dust (unspecified, from stack): 2040; measured
- carbon dioxide: 26724; measured
- sulfur dioxide: 86.7; measured
- Nitrogen oxides: 75.5; measured

## Review details
Inventory: The internal review was done by several iteration steps concerning raw data validation, raw data documentation, representativity, completeness and consistency of modelling with regard to ISO 14040 and 14044.

## Data sources
- 康宏. 基于LCA的棉印染生产过程改进设计研究. (大连理工大学, 2018).
