# 主轴的制造 ; 一个1.5 MW 风轮机主轴

Dataset: ILCD process, Unit process, single operation
Geography: NMG-CN
Reference year: 2017
Classification: Unit processes / Materials production / Metals and semimetals
Functional unit: The functional unit is 1.5 MW wind turbine
LCI method principle: Attributional
LCI method approaches: Allocation
Generated by: 赵云志, ll10088@163.com
Owner: 天工LCI数据工作小组
Review: Dependent internal review by 天工LCI数据工作小组
Amounts: no units in this file; such an amount is in the reference unit of its flow, which a separate flow dataset defines
copyright: false
licenseType: Free of charge for all users and uses

## General comment
该数据集代表了1.5兆瓦风轮机主轴的制造过程，该主轴旨在风电场中用于生成可再生能源。这个风轮机的特定部件对于转子的运作至关重要，转子将风能转换为机械能。概述的制造过程适用于大规模风力发电项目，特别是位于中国内蒙古东北部等具有显著风能潜力的地区。

## Geography
风电功率参数的数据来自Wang ( 2012 )。以装有33台国产1.5兆瓦( MW )风电机组的风电场为案例，分析其环境影响及其替代效应。该风电场位于我国风电装机最多的省份- -内蒙古东北部。

## Reference product
- Wind turbine main shaft: 1; estimated

## Inputs
- iron: 14000; calculated
  Steel and iron

## Deviations from the LCI method approaches
风电的生命周期清单如下所示。生产制造阶段包括风电机组、变电站、电缆的生产，这些设备消耗大量能源，排放污染物( Xue et al . , 2015)。

## Use advice
在使用此数据集进行生命周期评估(LCA)时，重要的是要考虑到风轮机主轴制造过程的具体生产和制造阶段。分析师应确保他们将此数据与描述风力发电整个生命周期的其他相关LCA数据集结合使用，包括原材料提取、运输、安装、运营、维护和终生阶段。此外，这些数据基于具有特定地理和气候条件的风电场案例，当将数据外推到其他情况时，应考虑这些条件。此外，用于准确的LCA结果，必须考虑数据集建议的替代效应、环境影响评估和任何具体的技术适用性。

## Review details
清单： 内部审查通过几个迭代步骤完成，涉及原始数据验证、原始数据记录、代表性、完整性、与 ISO 14040 和 14044 有关的建模的一致性。

## Data sources
- Li, H., Jiang, H.-D., Dong, K.-Y., Wei, Y.-M. & Liao, H. A comparative analysis of the life cycle environmental emissions from wind and coal power: Evidence from China. Journal of Cleaner Production 248, 119192 (2020).
