# 变压器生产 ; 一台35 kW 的箱式变压器

Dataset: ILCD process, Unit process, single operation
Geography: YL-GX-CN
Reference year: 2012
Classification: Systems / Electrics and electronics
Functional unit: The generation of 1 kW h (kW h) of electricity is adapted as the functional unit in this study, and the corresponding amounts of CO2 emissions and air pollutants (SO2,NOX and PM10)perkWh of electricity are chosen as the indicators for environmental performances, and the monetary value (US$) of per kW h of electricity is chosen as the indicator for cost-effectiveness evaluation.
LCI method principle: Attributional
LCI method approaches: Allocation
Generated by: 赵云志, ll10088@163.com
Owner: 天工LCI数据工作小组
Review: Dependent internal review by 天工LCI数据工作小组
Amounts: no units in this file; such an amount is in the reference unit of its flow, which a separate flow dataset defines
copyright: false
licenseType: Free of charge for all users and uses

## General comment
该数据集涉及风力发电系统的生命周期，包括风电场箱式变压器的生产过程。该过程适用于风能基础设施项目，特别是风力涡轮机的生产、安装、操作、维护和退役阶段，并着重于环境和经济绩效的评估。数据对开发商如中国华电股份有限公司评估风电系统的生命周期影响和成本效益至关重要。

## Geography
本研究选取中国广西壮族自治区玉林市的典型风电场系统作为案例研究地点。开发商即中国华电股份有限公司，是一家国有企业，通过提供风力发电设备及相关服务，致力于在中国发展风力发电[ 37 ]。

## Reference product
- Transformer: 24; article inperiodical

## Inputs
- Steel: 11000; article inperiodical
- silicon,silicon: 600; article inperiodical
- copper: 4800; article inperiodical

## Deviations from the LCI method approaches
根据引入的生命周期评价方法[ 34、35 ]，首先确定了风能和火力发电的系统边界。然后，提出了评价环境和经济效益的方法，以量化共同利益，并从共同利益的角度介绍了环境和经济影响评价的方法。

## Data selection and combination
该风电场装有24台风电机组，每台机组的生产能力为1.25 MW，预计每台机组的运行寿命为20年。风电系统的生命周期可分为5个阶段： (1)生产制造、 (2)运输和安装、 (3)发电、 (4)维护和 (5)报废回收和处置。不可再生能源的投入在各个阶段都有所体现。在这项研究中，原材料、化石燃料的消耗和相应的排放都考虑了一个生命周期过程。同时，考虑风电场的成本效益，因为成本在风电场运营中扮演着非常重要的角色[38]。考虑到数据的可靠性和可获得性，该风电场的成本数据主要取自辽宁省康平县某风电场(设计容量为49.5 MW)的可行性报告[39]

## Use advice
在使用该数据集进行生命周期评估（LCA）时，确保将其应用于风力涡轮机生命周期的相关阶段，如所述：生产、运输/安装、发电、维护和生命周期末期措施。重要的是在整个生命周期内包括原材料、化石燃料的消耗及其对应的排放量。此外，需要考虑风电场运营的经济方面，因为提供的成本数据是针对具有可比特征的风电场的。使用电力生成的功能单位，以及既定的环境和经济指标，评估风能系统的总体可持续性和性能。

## Review details
清单： 内部审查通过几个迭代步骤完成，涉及原始数据验证、原始数据记录、代表性、完整性、与 ISO 14040 和 14044 有关的建模的一致性。
