# 废铝提取 ; 废铝 ; 废聚乙烯与废铝混合物

Dataset: ILCD process, Unit process, single operation
Geography: ZJ-CN
Reference year: 2012
Classification: Unit processes / Materials production / Metals and semimetals
Generated by: 熊若熙, xiongrx0126@163.com
Owner: 天工LCI数据工作小组
Review: Dependent internal review by 天工LCI数据工作小组
Amounts: no units in this file; such an amount is in the reference unit of its flow, which a separate flow dataset defines
copyright: false
licenseType: Free of charge for all users and uses

## General comment
所述过程用于从混合废料中分离聚乙烯和铝。它用于回收废铝和从废聚乙烯与废铝混合物中回收聚乙烯。这种回收的铝可以随后用于包装、建筑和汽车等多个行业。回收的聚乙烯可以重新加工成新的塑料产品。

## Time period
文献发表日期

## Reference product
- aluminium scrap, post-consumer: 36; measured
  aluminium

## Inputs
- transport, freight, lorry 7.5-16 metric ton, unregulated: 3.47; measured
  transportation by diesel truck (10 mt)
- electricity, high voltage, aluminium industry: 612; measured
- Diesel oil: 3.43; measured
- formic acid: 39.3; measured

## Outputs
- waste polyethylene, for recycling, unsorted: 196; measured
  polyethylene

## Data selection and combination
从残留物中提取的聚乙烯和铝分离相关的消耗和排放数据来自于杭州富伦生态科技有限公司在中国浙江省运营的聚乙烯和铝分离示范项目的现场调查。

## Use advice
使用此数据集时，重要的是确保它代表了与您的研究相关的特定技术和地区，在这种情况下是中国浙江省。用户应当注意任何可能影响消耗和排放因子的分离技术的潜在变化。建议在为未来情景外推数据时考虑分离过程中技术的进步。此外，有关类别中的回收利用应与生命周期评估研究的目标和范围保持一致。

## Review details
清单： 内部审查通过几个迭代步骤完成，涉及原始数据验证、原始数据记录、代表性、完整性、与 ISO 14040 和 14044 有关的建模的一致性。

## Data sources
- Xie, M., Qiao, Q., Sun, Q. & Zhang, L. Life cycle assessment of composite packaging waste management - A Chinese case study on aseptic packaging. Int. J. Life Cycle Assess. 18, 626–635 (2013).
