# Farmland remediation ; In-situ remediation ; Solidification/stabilization ; Engineering implementation ; Chemical application, mixing, and blending

Dataset: ILCD process, Unit process, single operation
Geography: NJ-YN-CN
Classification: Other Services / Repair and maintenance
Generated by: Xiao Meng, xiaomeng@mail
Owner: Tiangong LCI Data Working Group
Review: Dependent internal review by Tiangong LCI Data Working Group
Amounts: no units in this file; such an amount is in the reference unit of its flow, which a separate flow dataset defines
licenseType: Free of charge for all users and uses

## General comment
The described industrial process is used for the remediation of heavy metal-contaminated farmland to reduce the bioavailable fractions of cadmium (Cd) and lead (Pb) in the soil by over 70%. This ensures that the concentration levels of Cd and Pb in crops are within acceptable standards, making the land suitable for agricultural use again. The process involves the application of stabilizing agents, specifically zeolite and quicklime, to the polluted site. The stabilizers are spread manually and then mixed into the soil using a wheel rotary tiller (TH554). This in-situ solidification/stabilization technique is specifically designed for an area measuring 16 hectares within Nujiang Prefecture in Yunnan Province, affected by lead-zinc mine pollution.

## Geography
云南省怒江州受铅锌矿污染某耕地土壤 污染修复工程

## Reference product
- contaminated soil: 9.06e6; input; measured
  受污染的农田土壤

## Inputs
- Diesel: 67354.2; measured
- natural pumice: 172000; measured
  海泡石（pumice）
- quicklime: 68000; measured
  生石灰（quicklime）

## Outputs
- Soil passivation by sepiolite and quicklime: 9.06e6; measured
  使用海泡石、生石灰钝化后的农田土壤

## Use advice
When using this data set for Life Cycle Assessment, ensure that the scope of your study includes the specific conditions related to agricultural lands afflicted by heavy metal pollution due to historical mining activities. The data set is applicable for agricultural remediation projects that entail in-situ soil stabilization, particularly for lands that have comparable heavy metal contamination as the subject area in Yunnan Province. It is necessary to account for the manual application of agents and subsequent mechanical blending as part of the process. The effectiveness and environmental impact are heavily dependent on the correct application rate and thoroughness of soil mixing. For complete accuracy, users must also consider the soil type, climate conditions, and long-term stability of the remediation technique.

## Review details
Inventory: The internal review was done by several iteration steps concerning raw data validation, raw data documentation, representativity, completeness and consistency of modelling with regard to ISO 14040 and 14044.

## Data sources
- 肖萌 et al. 农田污染钝化修复环境影响定量评估方法与案例分析. 中国环境科学 43, 3571–3581 (2023).
