# Cigarettemanufacturing|CigaretteRolling|Bituminousleaves,tobaccostalks,aromaticsugarmaterials,flakes|Filament, coiling package, molding process|All sizes / 卷烟制造|卷烟|烟叶、烟梗、香糖料、薄片|制丝、卷接包、成型工艺|所有规模

Dataset: ILCD process, Unit process, single operation
Geography: CN
Reference year: 2019
Classification: Materials production / Other materials
Generated by: The data was created by the Office of the Second National Pollution Source Census of the Ministry of Ecology and Environment, and the data was organized by the TianGong Plan team for ILCD format / 生态环境部第二次全国污染源普查工作办公室创建数据，天工计划团队常慧敏整理数据为ILCD格式
Owner: Tiangong LCI Data Working Group / 天工LCI数据工作小组
Amounts: no units in this file; such an amount is in the reference unit of its flow, which a separate flow dataset defines
copyright: false
licenseType: Free of charge for all users and uses

## Technology and included processes
the Technical of end-of-pipe management technology for pollution CigaretteisAbsorption + diversion，Its Technical efficiency of end-of-pipe management71.1，The formula for calculating the actual operation rate (k-value) of the end-of-pipe treatment facility is k = actual operating hours of environmental protection facilities (hours) / hours that environmental protection facilities should operate (hours)

## Reference product
- Cigarette: 10000; calculated
  源文件中描述为为卷烟，此处对其进行了匹配工作，将其匹配到LCAflow库里面相最符合的流

## Outputs
- volatile organic compound: 0.00208658; calculated
  污染物指标挥发性有机物的末端治理技术是吸收+分流，其效率为71.1，末端治理设施实际运行率（k值）计算公式为k=治理设施实际运行时间（小时/年）/正常生产时间（小时/年）。原文件中描述污染物类别为废气，污染物指标为挥发性有机物，此处对其进行了匹配工作，将其匹配到LCAflow库里面相最符合的流
- volatile organic compound: 0.00251978; calculated
  污染物指标挥发性有机物的末端治理技术是低温等离子体，其效率为65.1，末端治理设施实际运行率（k值）计算公式为k=治理设施实际运行时间（小时/年）/正常生产时间（小时/年）。原文件中描述污染物类别为废气，污染物指标为挥发性有机物，此处对其进行了匹配工作，将其匹配到LCAflow库里面相最符合的流

## Data sources
- 第二次全国污染源普查产排污核算系数手册（试用版）,二级代码16,三级代码162.0,四级代码1620文件，在完整版文件中第149页
