# 高铝飞灰利用 ; 莫来石陶瓷（主要产品）和高白氢氧化铝（HWAH）（副产品）和烟气二氧化硅（副产品）; 高铝飞灰

Dataset: ILCD process, Unit process, single operation
Geography: NMG-CN
Reference year: 2017
Classification: Unit processes / Materials production / Other mineralic materials
Generated by: 徐常青, xcq@bit.edu.cn
Owner: 天工LCI数据工作小组
Review: Dependent internal review by 天工LCI数据工作小组
Amounts: no units in this file; such an amount is in the reference unit of its flow, which a separate flow dataset defines
copyright: false
licenseType: Free of charge for all users and uses

## General comment
高铝粉煤灰应用-情景3，主要产品Mullite ceramics，副产品HWAH和fume silica

## Time period
文献发表年

## Technical purpose
高铝飞灰被应用于生产莫来石陶瓷，该产品主要用于高温结构应用，如炉衬、窑具和电绝缘体，因其具有高熔点、低导热性和良好的化学稳定性。作为副产品生产的高白氢氧化铝（HWAH）通常用作塑料和橡胶中的阻燃填料，在铝化学品的生产中作为原料，以及在制造陶瓷中作为氧化铝的前体。作为副产品的烟气二氧化硅通常用于特种玻璃的制造、硅化学品，或作为水泥和混凝土产品中的火山灰材料。

## Reference product
- ash: 1000; input; measured
  功能单位是应用1000kg高铝粉煤灰

## Inputs
- electricity, high voltage, aluminium industry: 737.82; software or database
- carbon dioxide, in chemical industry: 0; measured
- quicklime, in pieces, loose: 308.48; measured
  CaO,生石灰
- freshwater: 4770.32; measured
  fresh water
- hard coal: 684.81; software or database
- Sodium hydroxide: 126.15; measured
- hydrogen chloride: 265.02; measured

## Outputs
All rows: measured
- sanitary ceramics: 353.36
  主要产品Mullite ceramics
- Calcium silicate: 247.35
  副产品硅酸钙CaSiO3，无条目
- silica fume, densified: 0
  副产品fume silica
- aluminium hydroxide: 353.36
  副产品high-white aluminum hydroxide (HWAH)
- chemical oxygen demand: 0.0375
- carbon dioxide (fossil),carbon dioxide (fossil): 1566.78
- sulfur dioxide: 0.15
- Nitrogen oxides: 0.16
- municipal solid waste: 758.3

## Use advice
在使用此数据集进行生命周期评估时，重要的是要考虑环境影响在主产品（莫来石陶瓷）和副产品（HWAH 和烟气二氧化硅）之间的分配，特别是如果这些副产品也是商业化的。这可能涉及到按照ISO 14044标准进行经济分摊或其他方法。用户还应考虑在库存分析阶段添加数据时，原材料和产品的运输、能源消耗和特定于工业过程的排放生成。任何副产品的回收或利用都应计入以避免重复计算。

## Review details
清单： 内部审查通过几个迭代步骤完成，涉及原始数据验证、原始数据记录、代表性、完整性、与 ISO 14040 和 14044 有关的建模的一致性。

## Data sources
- Yang, S. et al. Assessment and comparison of three high-aluminum fly ash utilization scenarios in Inner Mongolia, China using an eco-efficiency indicator. Waste Manag. Res. 35, 515–524 (2017).
