# 修复后土壤;PCE污染土壤;原位化学氧化（ISCO）与土壤蒸汽萃取（SVE）相结合

Dataset: ILCD process, Unit process, black box
Geography: BE
Reference year: 2019
Classification: Unit processes / Other Services / Repair and maintenance
Functional unit: The functional unit was defined for this study as all the relevant products and processes needed for the remediation of a site contaminated with volatile hydrocarbons with a pollution load of 3300 kg PCE, to eliminate the potential human risk.
Generated by: 杨欣桐, yangxt@caep.org.cn
Owner: 天工LCI数据工作小组
Review: Dependent internal review by 天工LCI数据工作小组
Amounts: no units in this file; such an amount is in the reference unit of its flow, which a separate flow dataset defines
copyright: false
licenseType: Free of charge for all users and uses

## General comment
原位化学氧化（ISCO）与土壤蒸汽萃取（SVE）相结合是降低污染负荷的主要技术。由于下水道系统的城市布局和现场附近房屋下方的地窖，ISCO使用臭氧发生器可能会导致附近居民家中臭氧的蒸发。这种蒸汽如果过于集中，可能会对当地居民的健康产生影响。在开始修复工作时，将进行PID（光电检测器）测量，以测试附近居民房屋中蒸发的臭氧浓度是否无害。如果臭氧对附近居民有潜在影响，将实施另一种补救方案。

## Geography
该场地涉及对佛兰德斯人口密度较高的的市中心一个前干洗场所（面积505m2）的修复。

## Time period
文献发表时间

## Technical purpose
该工艺用途专门针对四氯化碳（PCE）污染土壤的修复，特别是结合使用原位化学氧化（ISCO）和土壤蒸汽萃取（SVE）的方法。此方法适用于城市密集人口区域的前干洗店等场所，其中PCE是常见的污染物。用以降低污染载量并减轻与土壤中PCE存在相关的潜在人类健康风险。该工艺特别设计适用于地下基础设施复杂的密集城市中心，如下水道系统和地窖，以佛兰德斯一个面积为505平方米的区域为例。

## Reference product
- Remedied site: 505; measured

## Inputs
All rows: measured
- Electricity: 576000
  Electricity use throughout project
- Tap Water: 2400
  Water use throughout project
- Hydrogen peroxide,Hydrogen peroxide: 168
  Hydrogen peroxide use
- Tap Water: 312
  throughout project
- Digger: 1533
  Excavation
- transport in t*km: 79736
  Transport excavated soil
- Diesel,Diesel: 105
  Cleaning excavated soil
- Electricity: 41040
  Cleaning excavated soil
- Polyethylene,Polyethylene: 663
  Foil to cover after excavation
- Plastic Film: 663
  Foil to cover after excavation
- Digger: 875
  Pipe work
- Activated Carbon: 2000
  Pump and Treat
- Activated Carbon: 4000
  Soil vapor extraction
- Diesel,Diesel: 28785.6
  Coil drilling throughout the project
- Tap Water: 3000
  Coil drilling throughout the project
- Maltose Syrup: 6000
  Stimulated biological degradation
- Road Transport,Road Transport: 1.701e7, 6.66e6 (2 entries)
  Transport of workers during project
- Contaminated Site: 505

## Use advice
在使用此LCA数据集对所述工艺进行评估时，用户应考虑场地特定条件，如城市布局和住宅邻近性，这些因素可能影响所选修复技术的适用性和环境影响。必须将定期进行的PID测量整合到评估中，确保住宅区内蒸发的臭氧浓度保持在无害水平。如果确定臭氧对当地居民有潜在影响，用户还应准备调整修复策略。此数据集与情境相关，仅适用于与本案例文献的相似特征场景，尤其考虑人口密度、污染程度和当地法规。

## Review details
清单： 内部审查通过几个迭代步骤完成，涉及原始数据验证、原始数据记录、代表性、完整性、与 ISO 14040 和 14044 有关的建模的一致性。

## Data sources
- Huysegoms L ,Rousseau S ,Cappuyns V . Chemical or Natural? Including LCA in Social CBA to Compare Remediation Alternatives for a Dry-Cleaning Facility [J]. Sustainability, 2019, 11 (7): 1975-1975.
