# Refining|Anodizedcopper|Coarsecopper|Anode furnace refining|All sizes / 精炼|阳极铜|粗铜|阳极炉精炼|所有规模

Dataset: ILCD process, Unit process, single operation
Geography: CN
Reference year: 2019
Classification: Materials production / Metals and semimetals
Generated by: The data was created by the Office of the Second National Pollution Source Census of the Ministry of Ecology and Environment, and the data was organized by the TianGong Plan team for ILCD format / 生态环境部第二次全国污染源普查工作办公室创建数据，天工计划团队常慧敏整理数据为ILCD格式
Owner: Tiangong LCI Data Working Group / 天工LCI数据工作小组
Amounts: no units in this file; such an amount is in the reference unit of its flow, which a separate flow dataset defines
copyright: false
licenseType: Free of charge for all users and uses

## Technology and included processes
the Technical of end-of-pipe management technology for pollution cadmiumisElectric-bag composite precipitator，Its Technical efficiency of end-of-pipe management95

## Reference product
- Anode Copper: 1000; calculated
  源文件中描述为为阳极铜，此处对其进行了匹配工作，将其匹配到LCAflow库里面相最符合的流，污染物指标备注为废气量

## Outputs
All rows: calculated
- Exhaust gas: 1150
  污染物指标废气量的末端治理技术是/，其效率为0。原文件中描述污染物类别为废气，污染物指标为废气量，此处对其进行了匹配工作，将其匹配到LCAflow库里面相最符合的流，污染物指标备注为废气量
- particles (PM2.5 - PM10): 0.0007
  污染物指标颗粒物的末端治理技术是电袋组合，其效率为99，末端治理设施实际运行率（k值）计算公式为k=废气治理设施年运行时间（小时）/企业年正常生产时间（小时）。原文件中描述污染物类别为废气，污染物指标为颗粒物，此处对其进行了匹配工作，将其匹配到LCAflow库里面相最符合的流，污染物指标备注为颗粒物
- particles (PM2.5 - PM10): 0.0014
  污染物指标颗粒物的末端治理技术是湿式除雾，其效率为98，末端治理设施实际运行率（k值）计算公式为k=废气治理设施年运行时间（小时）/企业年正常生产时间（小时）。原文件中描述污染物类别为废气，污染物指标为颗粒物，此处对其进行了匹配工作，将其匹配到LCAflow库里面相最符合的流，污染物指标备注为颗粒物
- sulfur dioxide: 0.056
  污染物指标二氧化硫的末端治理技术是石灰/石膏法，其效率为90，末端治理设施实际运行率（k值）计算公式为k=废气治理设施年运行时间（小时）/企业年正常生产时间（小时）。原文件中描述污染物类别为废气，污染物指标为二氧化硫，此处对其进行了匹配工作，将其匹配到LCAflow库里面相最符合的流，污染物指标备注为二氧化硫
- sulfur dioxide: 0.056
  污染物指标二氧化硫的末端治理技术是氨法，其效率为90，末端治理设施实际运行率（k值）计算公式为k=废气治理设施年运行时间（小时）/企业年正常生产时间（小时）。原文件中描述污染物类别为废气，污染物指标为二氧化硫，此处对其进行了匹配工作，将其匹配到LCAflow库里面相最符合的流，污染物指标备注为二氧化硫
- sulfur dioxide: 0.056
  污染物指标二氧化硫的末端治理技术是双氧水脱硫，其效率为90，末端治理设施实际运行率（k值）计算公式为k=废气治理设施年运行时间（小时）/企业年正常生产时间（小时）。原文件中描述污染物类别为废气，污染物指标为二氧化硫，此处对其进行了匹配工作，将其匹配到LCAflow库里面相最符合的流，污染物指标备注为二氧化硫
- sulfur dioxide: 0.056
  污染物指标二氧化硫的末端治理技术是双碱法，其效率为90，末端治理设施实际运行率（k值）计算公式为k=废气治理设施年运行时间（小时）/企业年正常生产时间（小时）。原文件中描述污染物类别为废气，污染物指标为二氧化硫，此处对其进行了匹配工作，将其匹配到LCAflow库里面相最符合的流，污染物指标备注为二氧化硫
- Nitrogen oxides: 0.21
  污染物指标氮氧化物的末端治理技术是/，其效率为0，末端治理设施实际运行率（k值）计算公式为k=废气治理设施年运行时间（小时）/企业年正常生产时间（小时）。原文件中描述污染物类别为废气，污染物指标为氮氧化物，此处对其进行了匹配工作，将其匹配到LCAflow库里面相最符合的流，污染物指标备注为氮氧化物
- lead: 1.2e-5
  污染物指标铅的末端治理技术是电袋组合，其效率为95，末端治理设施实际运行率（k值）计算公式为k=废气治理设施年运行时间（小时）/企业年正常生产时间（小时）。原文件中描述污染物类别为废气，污染物指标为铅，此处对其进行了匹配工作，将其匹配到LCAflow库里面相最符合的流，污染物指标备注为铅
- arsenic: 2.5e-6
  污染物指标砷的末端治理技术是电袋组合，其效率为95，末端治理设施实际运行率（k值）计算公式为k=废气治理设施年运行时间（小时）/企业年正常生产时间（小时）。原文件中描述污染物类别为废气，污染物指标为砷，此处对其进行了匹配工作，将其匹配到LCAflow库里面相最符合的流，污染物指标备注为砷
- mercury: 1.5e-7
  污染物指标汞的末端治理技术是电袋组合，其效率为95，末端治理设施实际运行率（k值）计算公式为k=废气治理设施年运行时间（小时）/企业年正常生产时间（小时）。原文件中描述污染物类别为废气，污染物指标为汞，此处对其进行了匹配工作，将其匹配到LCAflow库里面相最符合的流，污染物指标备注为汞
- cadmium: 4e-6
  污染物指标镉的末端治理技术是电袋组合，其效率为95，末端治理设施实际运行率（k值）计算公式为k=废气治理设施年运行时间（小时）/企业年正常生产时间（小时）。原文件中描述污染物类别为废气，污染物指标为镉，此处对其进行了匹配工作，将其匹配到LCAflow库里面相最符合的流，污染物指标备注为镉

## Data sources
- 第二次全国污染源普查产排污核算系数手册（试用版）,四级代码3211文件，在完整版文件中第4861页
