# Electrolytic Nickel Production | Battery Grade Primary Nickel (99.9% Ni) | Grind and Flotation Electrolytic | Nickel-Copper-Cobalt Ore in Xinjiang Province

Dataset: ILCD process, Unit process, single operation
Geography: GS-CN
Reference year: 2018
Classification: Materials production / Other mineralic materials
Generated by: Sun Xin, x.i.n.s@foxmail.com
Review: Dependent internal review by Tiangong LCI Data Working Group
Amounts: no units in this file; such an amount is in the reference unit of its flow, which a separate flow dataset defines

## Reference product
- Nickel metal (＞99.9% Ni): 1000

## Inputs
- water: 19250
- Nickel concentrate (8.6% Ni): 150
- Land Occupation: 0.0408
- Nickel matte: 1750
- Barium carbonate: 3.62
- sodium carbonate: 480
- Sulfuric acid: 170
- hydrogen chloride: 0.07
- chlorine: 140
- Boric acid: 8
- sodium hydroxide: 20
- Nitrogenous Fertilizer: 0.33
- Chemicals (unspecified): 0.00138
- transport in t*km: 185.62
- Electricity: 17213.9
- Hard coal, at consumer EU-27: 520
- process steam: 2990

## Outputs
- sulphuric acid: 0.04815
- hydrogen sulfide: 0.04277
- chlorine: 0.07265
- particles (PM2.5 - PM10): 0.49
- chemical oxygen demand: 0.42
- Suspended solids, unspecified: 0.0476
- ammonia: 0.00773
- sulfide: 5.574e-5
- decane: 0.00079
- fluoride: 0.00238
- phosphorus, total: 0.00087
- nitrogen, total (excluding N2): 0.05164
- copper: 0.00159
- nickel: 0.00167
- lead: 0.00095
- cadmium: 0.00024
- waste water - untreated: 10500
- municipal solid waste deposition: 4.17
- Hazardous waste (deposited, hibernating in ground, non elementary flow): 57.26

## Review details
Inventory: The internal review was done by several iteration steps concerning raw data validation, raw data documentation, representativity, completeness and consistency of modelling with regard to ISO 14040 and 14044.; Documentation: The review of the documentation was performed by Ecobilan and is in compliance with ISO 14040 and 14044. The data set documentation is correct in view of the appropriateness of the information provided. It includes all relevant information in view of data quality and scope of application of the respective LCI result.

## Data sources
- Bai, Y. et al. Strategies for improving the environmental performance of nickel production in China: Insight into a life cycle assessment. Journal of Environmental Management 312, 114949 (2022).
