# 砖块生产 ;页岩空心砖生产 ;切坯工艺

Dataset: ILCD process, Unit process, single operation
Geography: GZ-JX-CN
Reference year: 2020
Classification: Unit processes / Materials production / Other mineralic materials
Generated by: 王湘锦, r99rt4@163.com
Owner: 天工LCI数据工作小组
Review: Dependent internal review by 天工LCI数据工作小组
Amounts: no units in this file; such an amount is in the reference unit of its flow, which a separate flow dataset defines
copyright: false
licenseType: Free of charge for all users and uses

## General comment
传统页岩空心砖生产工艺

## Technical purpose
通过切坯工艺生产的页岩空心砖主要用于建筑目的。它们适用于构建承重墙、隔断墙和隔热应用，因其空心结构提供热能和音响效果上的优势。这些砖块被广泛用于住宅、商业和工业建设项目中。

## Reference product
- green brick: 1510; measured
  砖坯

## Inputs
- Clay Body: 1520; measured
- Electricity: 2.232; measured

## Deviations from the LCI method approaches
环境影响评估报告基于砖的年产量（8000万块砖），出于统计目的，数据已根据其中所述的尺寸规格进行转换，即每吨生产的砖

## Data selection and combination
采用根据《第一次全国污染源普查工业污染源产排污系数手册 第七分册》中 3131 烧结类砖瓦及建筑砌块制造业产排污系数表的相关数据。

## Sampling procedure
该环评报告的数据来源于工厂的实时数据

## Use advice
在使用该数据集进行页岩空心砖的生命周期评估时，确保明确考虑与切坯工艺相关的环境影响。数据应仅适用于类似规模的生产并严格符合手册中3131产排污系数表所描绘的技术范围。应考虑砖块在生命周期末端阶段的回收潜力，并且如果相关到评估范围，应建模其特定使用阶段行为（热能和音响绝缘性能）。基于尺寸规格和年度生产量提供的转换因子应谨慎应用以确保计算的准确性。

## Review details
清单： 内部审查通过几个迭代步骤完成，涉及原始数据验证、原始数据记录、代表性、完整性、与 ISO 14040 和 14044 有关的建模的一致性。

## Data sources
- 年产 8000 万块页岩标砖项目环评报告公示
