# Soil and groundwater remediation;Ex-situ;groundwater pump and treat;construction; Treatment facilities

Dataset: ILCD process, Unit process, single operation
Geography: JS-CN
Reference year: 2022
Classification: Other Services / Repair and maintenance
Generated by: Wang Ning, wang_ning@caep.org.cn
Owner: Tiangong LCI Data Working Group
Review: Dependent internal review by Tiangong LCI Data Working Group
Amounts: no units in this file; such an amount is in the reference unit of its flow, which a separate flow dataset defines
copyright: false
licenseType: Free of charge for all users and uses

## General comment
Construction of water treatment facilities using PVC pipes, concrete, steel, etc.

## Geography
a closed pesticide manufacturing plant located in Jiangsu Province, China.

## Technical purpose
This data set represents the construction phase for water treatment facilities intended for soil and groundwater remediation. The facilities are specifically designed for the ex-situ groundwater pump and treat method, to address contamination from a closed pesticide manufacturing plant located in Jiangsu Province, China. The construction uses materials such as PVC pipes, concrete, and steel.

## Reference product
- Treatment facilities: 1; measured

## Inputs
- Polyvinyl chloride: 400; measured
- Concrete: 60500; measured
- Steel sections: 2250; measured

## Use advice
When utilizing this data for life cycle assessment (LCA), ensure accurate representation of the construction phase by including all relevant inputs and outputs locked to the scale of the operation. Consider the geographical specificity and technological relevance of the dataset, particularly the local environmental impacts of constructing such a facility. This data should be applied to LCA studies for similar remediation projects and scenarios in the chemical industry, especially those involving ex-situ groundwater treatment. The data set is not intended for dissimilar remediation methods or different industrial sectors without appropriate modifications.

## Review details
Inventory: The internal review was done by several iteration steps concerning raw data validation, raw data documentation, representativity, completeness and consistency of modelling with regard to ISO 14040 and 14044.

## Data sources
- Ding, D. et al. Assessing the environmental impacts and costs of biochar and monitored natural attenuation for groundwater heavily contaminated with volatile organic compounds. Science of The Total Environment 846, 157316 (2022).
