# Life cycle inventory for average rare earth oxide;REE;Sichuan;REE containing ore

Dataset: ILCD process, Unit process, single operation
Geography: SC-CN
Reference year: 2012
Valid until: 2014
Classification: Materials production / Non-energetic raw materials
Functional unit: 1 kg REO at 100% purity
LCI method principle: Attributional
LCI method approaches: Allocation - mass
Generated by: Tao Wang, twang@iue.ac.cn
Owner: Tiangong LCI Data Working Group
Review: Dependent internal review by Tiangong LCI Data Working Group
Amounts: no units in this file; such an amount is in the reference unit of its flow, which a separate flow dataset defines
copyright: false
licenseType: Free of charge for all users and uses

## General comment
The average rare earth oxide (REE) described in this data set is intended for various applications requiring high-purity REE materials, such as manufacturing of advanced electronics, magnets for wind turbines, and in catalysts for the petrochemical industry. It represents the life cycle inventory for 1 kg of REE (at 100% purity) originating from Sichuan mines, addressing the environmental impacts from ore extraction to REO production.

## Technology and included processes
The LCA model was constructed using eBalance Professional 4.7 (IT & Knowledge for Environment, Sichuan, China). We chose to construct an attributional model because it aligned more with the aims of our research, although we adopted a contributional approach to the scenarios sensitivity analysis. Life cycle environmental impacts were assessed using the CML2002 method (CML 2015). Eleven mid-point impact categories were selected based on suggested LCA practice (Hauschild et al. 2013) and previously identified environmental harms in the industry.

## Reference product
- REO: 1; article inperiodical
  LANGUAGE

## Inputs
- Iron ore: 26.24; calculated
  Iron ore, open-pit mining substituted for bastn ̈ asite-containing ores (5% REO)
- sulphuric acid: 0.047; article inperiodical
- Sodium silicate: 0.039; article inperiodical
- process steam: 3.68; measured
- Hydrochloric acid: 3.23; article inperiodical
- Sodium hydroxide: 1.75; article inperiodical
- calcium chloride: 0.05; article inperiodical
- phosphoric acid: 0.002; article inperiodical
- ammonia: 0.32; article inperiodical
- Kerosene: 0.01; article inperiodical
- Ammonium bicarbonate: 0.89; article inperiodical
- Sodium sulfide: 0.05; article inperiodical
- Sodium carbonate: 0.19; article inperiodical
- Charcoal: 0.02; measured
- Electricity: 1723.57; article inperiodical
- hard coal: 82.88; article inperiodical
- water: 229.8; article inperiodical

## Outputs
- fluorspar: 0.032; article inperiodical
  Calcium fluoride
- Spray mold: 0.295; calculated
  Ammonium chloride
- fluoride: 0.002; article inperiodical
- ammonia: 0.029; article inperiodical
- thorium-230: 0.079; article inperiodical
  Thorium (air, unspecified)
- carbon dioxide: 1.283; calculated

## Deviations from the LCI method approaches
The LCI is first described individually for the three REO production chains, followed by a section on metal refining. Aggregated modeling data are also included for the industry average REO production in tabular form (Tables 1, 2, and 3). A more in-depth description of the processes, LCI, and modeling data used for the entire study (including metal refining) is available in section 1 in supporting information S1 on the Web.

## Use advice
Users of this LCA data set should apply it within the context of high-purity REE applications only. It is essential to adopt the attributional model provided for accurate impact assessment, but consider the contributional approach when analyzing scenario sensitivity. Data users must refer to Tables 1, 2, and 3 for industry-average REO production values and use the CML2002 impact assessment method according to Hauschild et al. (2013) standards. Metal refining processes are also critical and should be included in the relevant LCA framework. An in-depth understanding of the LCI and modeling data can be obtained from the supporting information S1 on the Web, with a detailed breakdown provided in section 1.

## Review details
Inventory: The internal review was done by several iteration steps concerning raw data validation, raw data documentation, representativity, completeness and consistency of modelling with regard to ISO 14040 and 14044.

## Data sources
- Lee, J. C. K. & Wen, Z. Rare Earths from Mines to Metals: Comparing Environmental Impacts from China’s Main Production Pathways: Environmental Impacts of Rare Earths in China. Journal of Industrial Ecology 21, 1277–1290 (2017).
