# 铝锭铸造｜原生铝锭 ; 液态原铝

Dataset: ILCD process, Unit process, single operation
Geography: HEN-CN
Reference year: 2018
Classification: Unit processes / Materials production / Metals and semimetals
Generated by: 徐常青, xcq@bit.edu.cn
Owner: 天工LCI数据工作小组
Review: Dependent internal review by 天工LCI数据工作小组
Amounts: no units in this file; such an amount is in the reference unit of its flow, which a separate flow dataset defines
copyright: false
licenseType: Free of charge for all users and uses

## General comment
无流程图

## Time period
论文发表年

## Technical purpose
原生铝锭铸造过程专用于从熔融金属生产固态铝形状。所得到的铝锭通常用作各种铝制品制造的原料，包括用于汽车、航空航天、建筑和包装工业的零件。

## Reference product
- aluminium, primary, ingot: 1000; missing unimportant

## Inputs
All rows: missing unimportant
- electricity, high voltage, aluminium industry: 1328.4
- hard coal: 77.8
  原煤
- light fuel oil: 38.9
- solvent, organic: 4
  溶剂
- coal gas: 311
- natural gas, high pressure: 41.8
- aluminium, primary, liquid: 1000
  电解铝液-无条目

## Outputs
All rows: missing unimportant
- carbon dioxide (fossil),carbon dioxide (fossil): 884
- carbon monoxide (fossil),carbon monoxide (fossil): 0.71
- sulfur dioxide: 0.93
- Nitrogen oxides: 1.69
- methane (fossil): 0.88
- particles (> PM10): 0.27
- particles (PM2.5): 0.16

## Use advice
使用该特定过程的数据时，确保它适用于所研究设施的区域技术水平和生产实践。排除任何潜在的上游或下游过程影响，例如与铝矿的开采和铝的回收相关的影响，除非研究范围特别要求。参考论文发表年份，以确定数据的时间相关性。

## Review details
清单： 内部审查通过几个迭代步骤完成，涉及原始数据验证、原始数据记录、代表性、完整性、与 ISO 14040 和 14044 有关的建模的一致性。

## Data sources
- 王姗姗, 刘赛男, 王灿, & 张瑞芹. 基于生命周期评价的河南省原铝生产环境影响分析. 轻金属 1-7+16 (2018)
