# 生物乙醇 ; 蒸汽爆破处理 ; 收集与运输

Dataset: ILCD process
Geography: GLO
Classification: Unit processes / Energy carriers and technologies / Renewable fuels
Generated by: Jiayi Yuan, jiayi_y@mail.bnu.edu.cn
Owner: 天工LCI数据工作小组
Review: Dependent internal review by 天工LCI数据工作小组
Amounts: no units in this file; such an amount is in the reference unit of its flow, which a separate flow dataset defines
copyright: false
licenseType: Free of charge for all users and uses

## General comment
该生物乙醇生产数据集代表了收集和运输生物质的过程，随后通过蒸汽爆破进行预处理。该生物乙醇适合用作汽车应用中的生物燃料，特别是用于设计运行在乙醇或乙醇混合燃料上的车辆的燃烧。

## Technology and included processes
通过数据质量评估，从474篇已发表论文的561个数据集中选择了141个具有高完整性和一致性的数据集，并将其分类为由预处理技术确定的8种技术配置。预处理后的技术步骤都是相同的，尽管实际流量和参数值在文献中观察到不同

## Inputs
- Diesel: 0.0006
  L/kg

## Data selection and combination
在可能的情况下使用了全球数据集，因为该研究不适用于任何特定地区。一种名为“汽车中生物乙醇燃烧”的外部过程的LCI数据来自GREET数据库

## Data treatment and extrapolations
我们通过不确定性传播（蒙特卡罗）、可辨别性分析、全局敏感性分析和场景变化评估了建模结果的鲁棒性。

## Use advice
使用此数据集进行生命周期评估(LCA)时，请确保您的研究范围与数据的全球适用性一致，因为它不是特定于任何区域的。为了进行全面分析，在LCA中纳入从GREET数据库获得的“汽车燃烧生物乙醇”的生命周期库存(LCI)数据。仔细考虑所呈现的技术配置，并根据文献中观察到的变化调整实际流量和参数值。适当地应用不确定性传播，如蒙特卡罗模拟、辨识性分析、全球敏感性分析和情景变化，以评估建模结果的稳健性。

## Review details
清单： 内部审查通过几个迭代步骤完成，涉及原始数据验证、原始数据记录、代表性、完整性、与 ISO 14040 和 14044 有关的建模的一致性。
