# Technical and economic evaluation of deep natural gas | Volcanic reservoir | Optimization of TOPSIS method

Dataset: ILCD process, Unit process, single operation
Geography: HLJ-CN
Reference year: 2009
Classification: Materials production / Other mineralic materials
LCI method principle: Attributional
LCI method approaches: Consequential
Generated by: Shikang Kang, 908798159@qq.com
Review: Dependent internal review by Tiangong LCI Data Working Group
Amounts: no units in this file; such an amount is in the reference unit of its flow, which a separate flow dataset defines
copyright: false

## General comment
According to the principle and program of gas field development scheme design, the paper puts forward the key consideration problems in selecting development mode, dividing development series and determining development well pattern when designing the development scheme of Xingcheng volcanic reservoir, and optimizes the development scheme by using the improved TOPSIS method.

## Geography
Xingcheng gas field in Songliao basin

## Time period
Publication time of literature

## Technology and included processes
The so-called gas field development is based on the detailed exploration results and necessary productive development tests, on the basis of comprehensive research, according to the national requirements for natural gas production, and starting from the actual situation and production law of the gas field, a reasonable development scheme is worked out, and the gas field is constructed and put into production

## Reference product
- Natural gas, at consumer EU-27: 14229.6; input; normal; article inperiodical
  估价模式,数据为分布，量中填写的数据为取平均（取中值）的结果

## Data selection and combination
The natural gas in Xushen well area mainly contains methane 71.81%-80.23%, and there is no retrograde condensation phenomenon. Hydrogen sulfide corrosion will not occur. Formation pressure is as high as left and right elastic energy. Scorpion mining is more economical and simple than any other development methods

## Data treatment and extrapolations
A gas field development plan should reflect technology, economy, quality, benefit and performance, etc. For a gas field that is in line with international standards, health, safety, environmental protection and other factors should be considered. The indexes designed by the scheme should conform to the national and industry standards and norms. The selection of indicators requires wide coverage and relative independence among indicators

## Review details
Inventory: The internal review was done by several iteration steps concerning raw data validation, raw data documentation, representativity, completeness and consistency of modelling with regard to ISO 14040 and 14044.; Documentation: The review of the documentation was performed by Ecobilan and is in compliance with ISO 14040 and 14044. The data set documentation is correct in view of the appropriateness of the information provided. It includes all relevant information in view of data quality and scope of application of the respective LCI result.

## Data sources
- 巩艳芬. 松辽盆地兴城气田火山岩储层天然气开发技术经济评价. (2009).
