# 页岩气生产;钻井、压裂和完井阶段;钻井、固井、清洁、射孔和压裂以及生产测试过程

Dataset: ILCD process, Unit process, black box
Geography: SC-CN
Reference year: 2014
Valid until: 2016
Classification: Unit processes / Energy carriers and technologies / Natural gas based fuels
Generated by: Pu Hong, 15695258655@163.com
Owner: 天工LCI数据工作小组
Review: Dependent internal review by 天工LCI数据工作小组
Amounts: no units in this file; such an amount is in the reference unit of its flow, which a separate flow dataset defines
copyright: false
licenseType: Free of charge for all users and uses

## General comment
该数据集描述页岩气生产阶段包括钻井、固井、清洁、射孔、压裂和生产测试过程。它用于页岩气提取过程的生命周期评估（LCA），主要用于环境影响研究和提取流程的优化。

## Geography
我国页岩气开采工作目前集中在四川及重庆地区，选取四川及重庆的数据进行LCA计算。

## Time period
原始数据时间介于2014-2016之间

## Reference product
- Shale gas well: 1; measured
  页岩气井的数目

## Inputs
- freshwater: 627000; min 330000; max 849000; uniform; measured
  钻井阶段--钻井流程所用水基、油基钻井液主要组成部分
- Diesel: 330; min 267; max 432; uniform; measured
  钻井阶段--钻井流程所用油基钻井液主要组成部分
- bentonite: 21000; min 12000; max 30000; uniform; measured
  钻井阶段--钻井流程所用油基钻井液主要组成部分
- Limestone: 42000; min 34000; max 54000; uniform; measured
  钻井阶段--钻井流程所用油基钻井液主要组成部分
- calcium chloride: 61000; min 50000; max 80000; uniform; measured
  钻井阶段--钻井流程所用油基钻井液主要组成部分
- Diesel: 395000; min 220000; max 522000; uniform; measured
  钻井阶段--钻井流程驱动钻井设备消耗的汽油
- Diesel: 2596; min 1453; max 3642; uniform; measured
  钻井阶段--钻井流程中物料运输消耗的汽油
- casing: 607000; min 353000; max 760000; uniform; measured
  钻井阶段-固井流程消耗的套管
- freshwater: 293000; min 72000; max 419000; uniform; measured
  钻井阶段-固井流程使用G级水泥消耗的清水
- G class cement: 405000; min 235000; max 499000; uniform; measured
  钻井阶段-固井流程消耗的G级水泥
- Diesel: 4682; min 2709; max 5806; uniform; measured
  钻井阶段-固井流程运输物料及驱动设备消耗的汽油
- freshwater: 104000; measured
  压裂和完井阶段-洗井流程清洗井消耗的清水
- Diesel: 451000; measured
  压裂和完井阶段-洗井流程清水及废水运输消耗的汽油
- freshwater: 2.6071e7; min 1.0253e7; max 4.0237e7; uniform; measured
  压裂和完井阶段 - 射孔和压裂流程所用压裂液的组成部分
- sand: 1.253e6; min 304000; max 1.91e6; uniform; measured
  压裂和完井阶段 - 射孔和压裂流程所用压裂液的组成部分
- Diesel: 6470; min 2025; max 9920; uniform; measured
  压裂和完井阶段 - 射孔和压裂流程物料、水及废水运输消耗的汽油
- Diesel: 209794; min 82508; max 323791; uniform; measured
  压裂和完井阶段 - 射孔和压裂流程现场设备消耗的汽油
- freshwater: 295000; min 174000; max 432000; uniform; estimated
  工程期间工人生活用水消耗
- Diesel: 25; min 14; max 36; uniform; estimated
  工程期间生活用水运输消耗的汽油
- Road: 2200; min 22; max 7664; uniform; measured
  场地准备阶段--道路维修及新建道路的长度
- Well pad: 8100; min 7350; max 9600; uniform; measured
  场地准备阶段--建成井场的面积
- Retention pond: 13300; min 18600; max 6450; uniform; measured
  场地准备阶段--累计蓄水池，固废池等体积

## Outputs
- waste water - untreated: 100000; measured
  压裂和完井阶段-洗井流程产生的废水
- waste water - untreated: 209000; min 82000; max 322000; uniform; measured
  压裂和完井阶段 - 射孔和压裂流程产生的废水
- methane (fossil): 1679.72; calculated
  压裂和完井阶段--生产测试流程甲烷排放（依据火炬燃烧效率确定）
- carbon dioxide (fossil): 226343; calculated
  压裂和完井阶段--生产测试流程甲烷燃烧生成的CO2

## Use advice
此数据集应用于中国四川和重庆地区页岩气提取的生命周期评估研究，反映了方法论中的地区特异性。数据是历史的，涉及2014年至2016年的时期；用户应当意识到此后技术变化可能已影响过程效率和环境产出。与其他数据集进行比较时，要确保时间、地理和技术的一致性。

## Review details
清单： 内部审查通过几个迭代步骤完成，涉及原始数据验证、原始数据记录、代表性、完整性、与 ISO 14040 和 14044 有关的建模的一致性。

## Data sources
- Wang, J., Liu, M., McLellan, B. C., Tang, X. & Feng, L. Environmental impacts of shale gas development in China: A hybrid life cycle analysis. Resources, Conservation and Recycling 120, 38–45 (2017).
