# Corn-based ethylene production | Ethylene | Ethanol dehydration | Corn

Dataset: ILCD process, Unit process, single operation
Geography: AH-CN
Classification: Materials production / Other mineralic materials
Functional unit: The functional unit is 1 tonne of ethylene production.
LCI method principle: Attributional
LCI method approaches: Allocation - mass
Generated by: Zirui Tang, tangzirui123@gmail.com
Review: Dependent internal review by Tiangong LCI Data Working Group
Amounts: no units in this file; such an amount is in the reference unit of its flow, which a separate flow dataset defines
copyright: false

## General comment
Two alternative ethanol production scenarios, corn-based and cassava-based, were tested for ethylene production.

## Geography
Data related to the operation process (e.g., electricity, steam, water, chemicals, raw material consumption, and direct emissions) from the cassava-based ethanol and corn-based ethylene production plants in the Guangxi and Anhui Provinces in China were used [20], [21].

## Technology and included processes
Processes included in present study are summarized as follows:
1) Corn production at farm;
2) Ethanol and ethylene production;
3) Machinery drying;
4) Road transport;
5) Waste treatment;
6) Material and coal based energy production;
7) Energy recovery on site.

## Reference product
- ethene (ethylene): 1000; article inperiodical

## Inputs
All rows: article inperiodical
- Ethanol: 1700
- water: 800
- electricity: 1332
- process steam: 1800
- light fuel oil: 85

## Deviations from the LCI method approaches
Co-product allocation based on product mass was performed.

## Data selection and combination
1. Data related to the operation process (e.g., electricity, steam, water, chemicals, raw material consumption, and direct emissions) from the cassava-based ethanol and corn-based ethylene production plants in the Guangxi and Anhui Provinces in China were used.
2. The data related to corn and cassava production at farms, coal-based electricity generation, and road transport processes were taken from the references.
3. Moreover, data on chemical production and relevant background data from Europe were used [26] because of the lack of information for China.

## Review details
Inventory: The internal review was done by several iteration steps concerning raw data validation, raw data documentation, representativity, completeness and consistency of modelling with regard to ISO 14040 and 14044.; Documentation: The review of the documentation was performed by Ecobilan and is in compliance with ISO 14040 and 14044. The data set documentation is correct in view of the appropriateness of the information provided. It includes all relevant information in view of data quality and scope of application of the respective LCI result.

## Data sources
- Hong, J., Zhang, Y., Xu, X. & Li, X. Life cycle assessment of corn- and cassava-based ethylene production. Biomass and Bioenergy 67, 304–311 (2014).
