# 修复后土壤;土壤异位修复;化学氧化;氰化物

Dataset: ILCD process, Unit process, black box
Geography: ZB-SD-CN
Reference year: 2024
Classification: Unit processes / Other Services / Repair and maintenance
Functional unit: 59922m3 polluted soil, with an average cyanide content of 13.77 mg/kg
Generated by: 杨欣桐, yangxt@caep.org.cn
Owner: 天工LCI数据工作小组
Review: Dependent internal review by 天工LCI数据工作小组
Amounts: no units in this file; such an amount is in the reference unit of its flow, which a separate flow dataset defines
copyright: false
licenseType: Free of charge for all users and uses

## General comment
污染土壤清挖运输至密闭大棚后经破碎筛分、pH及含水率调节等预处理后，添加5‰~8‰的过硫酸钠进行化学氧化

## Geography
污染场地位于山东省淄博市，占地总面积约8.78万 m2。

## Technology and included processes
经异位化学氧化修复后，3~10 m污染土壤氰化物含量平均值由13.77 mg/kg降至0.02 mg/kg，污染物去除率为99.85%

## Technical purpose
该工业流程设计用于山东省淄博市特定场地的氰化物污染土壤修复。通过挖掘作业后，土壤经过破碎筛选、pH值调整和含水率调节等预处理程序，再以5‰至8‰过硫酸钠进行化学氧化过程，分解氰化物。该流程特别适用于异位土壤修复，在原位置之外的受控环境中（如密闭大棚）进行处理，以达成高污染物去除率。

## Reference product
- Remediated soil: 59922; measured

## Inputs
All rows: measured
- Diesel,Diesel: 29.8793
  使用挖掘机搭载ALLU斗进行土壤的预处理和药剂混合工作，该过程的柴油消耗量
- Diesel,Diesel: 0.26858
  运输环节柴油消耗，主要为设备及材料入场环节的运输过程
- Tap Water: 2150
- quicklime: 466540
  氧化钙消耗量
- sodium hydroxide: 40000
  氢氧化钠消耗量
- Sodium persulfate: 275750
  过硫酸钠消耗量
- contaminated soil: 59922
  开挖出的污染土壤，暂存于密闭负压大棚内，待进行氧化处置

## Outputs
- Soil Sample: 198; measured
  修复后土壤自检，按每500m3一个样品进行土壤样品的取样以及氰化物含量的检测
- Exhaust gas: 1; measured
  没有单独计算棚内土壤修复过程中废气产生量，仅计算了用于尾气处置的材料消耗量，因此采用项为计量单位

## Use advice
生命周期评估数据的用户需注意，该数据集特定于使用过硫酸钠进行氰化物污染土壤异位化学氧化修复过程。该信息涉及山东省淄博市污染场地的土壤处理。因此，其适用性可能限于类似的氰化物污染土壤修复情景。数据集包括运营带ALLU斗的挖掘机械的柴油消耗量、氧化剂的生产和运输过程以及调节土壤含水率和准备化学溶液时的自来水消耗量。当在LCA软件中建模此过程时，用户应确保计入这些输入，并在数据用于更广泛或不同情景时调整边界。报告的高污染物去除效率在替代应用中应被审查，因为它可能会随着土壤成分和污染水平的不同而变化。

## Review details
清单： 内部审查通过几个迭代步骤完成，涉及原始数据验证、原始数据记录、代表性、完整性、与 ISO 14040 和 14044 有关的建模的一致性。

## Data sources
- 桑春晖,杨欣桐,张红振等. 氰化物污染土壤修复工程环境足迹评估方法和案例研究 [J/OL]. 中国环境科学, 1-11[2024-02-11].
