# 土壤修复;异位修复;生物堆;挖掘;挖掘出的土壤

Dataset: ILCD process, Unit process, single operation
Geography: IT
Reference year: 2018
Classification: Unit processes / Other Services / Repair and maintenance
Generated by: 王宁, wang_ning@caep.org.cn
Owner: 天工LCI数据工作小组
Review: Dependent internal review by 天工LCI数据工作小组
Amounts: no units in this file; such an amount is in the reference unit of its flow, which a separate flow dataset defines
copyright: false
licenseType: Free of charge for all users and uses

## General comment
消耗柴油挖掘污染土壤

## Technical purpose
该数据集代表了土壤修复过程中，具体为生物堆异位治疗时的污染土壤挖掘工作。该过程涉及使用柴油动力机械挖掘受污染的土壤，以便后续在受控的堆肥环境中进行生物处理。

## Reference product
- Excavated soil,Excavated soil: 600000; measured

## Inputs
- Diesel,Diesel: 0.5; measured

## Use advice
在使用此数据集时，需确保生命周期评估的范围适当反映了土壤修复过程中挖掘作业所使用的柴油。用户应包括柴油提供过程中的所有相关上游过程以及挖掘机械的直接排放。如果适用，还应特别考虑系统边界的定义，以包括挖掘出的土壤的运输过程。

## Review details
清单： 内部审查通过几个迭代步骤完成，涉及原始数据验证、原始数据记录、代表性、完整性、与 ISO 14040 和 14044 有关的建模的一致性。

## Data sources
- D’Imporzano, G. et al. OPTIMIZING BIOREMEDIATION OF HYDROCARBON POLLUTED SOIL BY LIFE CYCLE ASSESSMENT (LCA) APPROACH. Environmental Engineering and Management Journal (2019).
