# 牡蛎养殖;牡蛎成体;延绳养殖;单细胞藻类饲养

Dataset: ILCD process, Unit process, black box
Geography: FJ-CN
Reference year: 2021
Valid until: 2021
Classification: Unit processes / Materials production / Food and renewable raw materials
Functional unit: 1 tonne of fresh oyster
LCI method principle: Attributional
LCI method approaches: Allocation
Generated by: 吴康妮, wukangni@xmu.stu.edu.cn
Owner: 天工LCI数据工作小组
Review: Dependent internal review by 天工LCI数据工作小组
Amounts: no units in this file; such an amount is in the reference unit of its flow, which a separate flow dataset defines
copyright: false
licenseType: Free of charge for all users and uses

## General comment
这一碳足迹的范围是从“摇篮到大门”，包括太平洋牡蛎直到被运输到市场进行分销的所有生命周期阶段，详细养殖阶段如图1所示。 资本建设和生产的排放本研究不考虑船舶、工厂、机械等设备及其维护。材料投入除以服务时间，得到每轮耕作的平均值。

## Geography
研究位于福建省，数据采集时间为2021年5月至8月，采集时间为福建省6株苗木和各省3-10名农户。收集之后，将数据传输到单个数据库，以便对其进行解释。

## Time period
文献数据来自2021年5-8月的福建省育苗数据调研和每个省的养殖户调研

## Technology and included processes
牡蛎海区延绳养殖技术。延绳式养殖适用于大潮最低潮时水深 4m 以上近海养殖区；风浪、潮流适中。 延绳式浮筏由聚乙烯绳索组成，80 m×4 m为一养殖单体，纵向每隔1.5 m～1.7 m挂一根吊苗绳, 每筏47根～53根。每两根吊苗绳间平挂采苗器7串～9串（采苗器长2.5 m，每串贝壳18片～20片），每个养殖单体挂苗400串。也可沿吊苗绳直接垂挂（采苗器长1.2 m，每串贝壳8片～10片）。每公顷水面可养10个～15个养殖单体，投喂单细胞藻类。

## Technical purpose
该数据集描述了太平洋牡蛎的生命周期，特别是使用绳养殖方法和单细胞藻类喂养进行养殖的牡蛎，供人类食用。牡蛎被养殖到成年，然后运输到市场进行分销。这是一种适合海产品行业的可持续水产养殖过程，特别适用于需要新鲜成年太平洋牡蛎的市场。

## Model description
未见具体说明

## Reference product
- Oyster: 1000; measured

## Inputs
All rows: measured
- Electricity: 5.148, 22.32 (2 entries)
- Glass (formed & finished): 0.0004
- polymethyl methacrylate (PMMA) beads: 0.008
  丙烯酸桶
- polyethylene terephthalate fibres (PET): 0.01, 4 (2 entries)
- Sodium hypochlorite: 0.04, 0.07 (2 entries)
- sodium nitrate: 0.03
- sodium silicate: 0.0072
- ferric citrate: 0.0014
- sodium dihydrogen phosphate: 0.0016
- Coke: 1.56
  coke
- Diesel: 3.35, 0.33 (2 entries)
- nylon 66 GF 30 compound (PA 66 GF 30): 2.4
  Nylon rope
- polypropylene fibres (PP): 1.67

## Data selection and combination
数据来源于实地调研，收集后到的数据被传输到一个单一的数据库，以便对其进行解释

## Sampling procedure
数据包括来自烟道使用、电力使用和原材料投入的一手数据，以及2021年5-8月的福建省育苗数据调研和每个省的养殖户调研

## Use advice
在使用该数据集进行生命周期评估（LCA）时，用户必须注意，它涵盖了太平洋牡蛎养殖的摇篮到大门阶段，不包括市场分销以外的任何过程。诸如船舶、工厂和机械以及它们的维护等资本投资已从研究中省略。使用此数据时，根据服务时间分配每轮养殖的物料输入，以实现更准确的影响评估。该数据特定于福建省，反映了该地区的实践；在将数据外推到不同的地理区域或情境时应谨慎。

## Review details
清单： 内部审查通过几个迭代步骤完成，涉及原始数据验证、原始数据记录、代表性、完整性、与 ISO 14040 和 14044 有关的建模的一致性。

## Data sources
- Sun, L., Feng, J.-C. & Zhang, S. The Carbon Footprint of Pacific Oyster Farming in China. 19, (2021).
