# 牛奶生产 ; 饲料运输阶段

Dataset: ILCD process, Unit process, single operation
Geography: HLJ-CN
Reference year: 2012
Classification: Unit processes / Transport services / Other transport
Functional unit: In this study, the functional unit was set to 1 ton FPCM (fat-protein corrected milk).
Generated by: 杨瑞, 1632707028@qq.com
Owner: 天工LCI数据工作小组
Review: Dependent internal review by 天工LCI数据工作小组
Amounts: no units in this file; such an amount is in the reference unit of its flow, which a separate flow dataset defines
copyright: false
licenseType: Free of charge for all users and uses

## General comment
在奶牛场生产过程中，假设词料、词料原料和化肥主要是省内公路集中运输

## Geography
本文采用LCA方法对黑龙江省奶牛场生产系统进行环境影响评估。

## Technology and included processes
在公路运 输过程中， 环境污染主要来自于车辆尾气的排放， 由于使用现成的公路运输系统， 与公路运 输有关的道路建设造成的环境影响在此不考虑， 因公路建设而造成地表土壤和植被破坏的影 响也不予考虑， 只考虑公路运输过程中的污染排放。 运输词料80%釆用汽油机， 其余20%采用柴油机。

## Technical purpose
该工业过程数据涉及黑龙江省奶牛场生产，重点关注牛奶运输阶段的环境影响。此数据与评估省内道路运输系统在乳品行业中的使用相关，考虑的是只对运输过程中的污染排放感兴趣的特定情景。它可应用于计算牛奶分销的环境足迹，尤其适用于考虑混合使用汽油（80%）和柴油发动机（20%）车辆的奶牛场。

## Reference product
- feed: 1; estimated
  假设运输过程中没有饲料的损耗

## Inputs
- feed: 1; measured
- Gasoline (regular): 0.01701; measured

## Outputs
- carbon monoxide (fossil): 0.0005156; measured
- nitrogen, total (excluding N2): 3.63e-5; measured
  1氮氧化物
- sulfur dioxide: 3.63e-5; measured
- carbon dioxide (fossil),carbon dioxide (fossil): 0.04754; measured

## Use advice
使用者在使用此奶牛场生产的LCA数据处理运输阶段时，应专注于车辆尾气排放带来的影响，而不考虑基础设施建设等其他潜在影响。在建模环境影响时，使用者应仅将数据应用于涉及牛奶相关材料的公路运输情景，并确保正确配置汽油和柴油发动机车辆的比例。由于功能单位是1吨FPCM，计算和比较应以此单位为标准。关注任何可能影响排放特征的区域运输政策或燃料类型的更新。

## Review details
清单： 内部审查通过几个迭代步骤完成，涉及原始数据验证、原始数据记录、代表性、完整性、与 ISO 14040 和 14044 有关的建模的一致性。

## Data sources
- 曹正纲. 黑龙江省奶牛场生命周期评价. (东北农业大学, 2012).
