# 铝再生 ; 再生铝锭 ; 废铝 ; 2017年

Dataset: ILCD process, Unit process, single operation
Geography: CN
Reference year: 2021
Classification: Unit processes / Materials production / Metals and semimetals
Generated by: 蔡梓萌, caizm6178@163.com
Owner: 天工LCI数据工作小组
Review: Dependent internal review by 天工LCI数据工作小组
Amounts: no units in this file; such an amount is in the reference unit of its flow, which a separate flow dataset defines
copyright: false
licenseType: Free of charge for all users and uses

## General comment
本工业流程生产的再生铝锭适用于多个需要使用铝材的领域。这些铝锭可以用于汽车部件、建筑材料、包装以及消费电子产品的制造。高纯度的再生铝适合对金属杂质要求较少的应用，而技术质量的再生铝可能用于大规模生产中对金属杂质要求不那么严格的应用。

## Time period
文献发表日期

## Reference product
- secondary aluminium ingot: 1000; missing unimportant
  ingot

## Inputs
- electricity, high voltage, aluminium industry: 1148.4; missing unimportant
  electricity
- aluminium scrap, unspecified: 1180; missing unimportant
  aluminum scrap

## Data selection and combination
本研究的数据参考了PA、SA、电力等背景数据的LCA数据。PA数据来自统计数据源，SA数据主要来自文献。背景数据主要来自中国科学院生态环境研究中心CASRCEES 2018建立的中国本地化LCA数据库，涵盖能源、材料、交通、废物管理等LCA数据。

## Use advice
在使用再生铝锭的LCA数据时，必须考虑刊物发表的年份和数据的地域背景。该LCA数据应专门应用于与中国市场相关的过程和产品，因为它来源于CAS RCEES 2018数据库。用户必须考虑技术适用性的限制，例如废铝输入的类型和回收过程的效率。此外，用户应该了解方法学假设，例如附属材料回收的包含或排除，以及过程中固有的副产品或废物管理策略可能带来的任何积分。

## Review details
清单： 内部审查通过几个迭代步骤完成，涉及原始数据验证、原始数据记录、代表性、完整性、与 ISO 14040 和 14044 有关的建模的一致性。

## Data sources
- Ding, N., Liu, N., Lu, B. & Yang, J. Life cycle greenhouse gas emissions of aluminum based on regional industrial transfer in China. J. Ind. Ecol. 25, 1657–1672 (2021).
