# Excavated soil ; Soil ex-situ remediation ; Excavation and landfill

Dataset: ILCD process, Unit process, single operation
Geography: IT
Reference year: 2021
Classification: Unit processes / Other Services / Repair and maintenance
Generated by: Xiao Meng, xiaomeng@mail
Owner: Tiangong LCI Data Working Group
Review: Dependent internal review by Tiangong LCI Data Working Group
Amounts: no units in this file; such an amount is in the reference unit of its flow, which a separate flow dataset defines
copyright: false
licenseType: Free of charge for all users and uses

## General comment
The contaminated soil is collected, transported, and disposed of in a landfill. This process excavating the contaminated soil on the site.

## Geography
The site taken as a reference for the remediation is an area of 712 m2 located in a disused industrial district of Tuscany (Italy), in the past subjected to various productive activities that led to contamination with various metals, some of which potentially toxic such as lead (Pb), arsenic (As) and thallium (Tl). As it is a “site of national interest”, its exact location is considered confidential and cannot be disclosed.

## Technical purpose
The described industrial process is applied to the environmental remediation of contaminated soils, particularly within disused industrial areas. The methodology includes excavation of contaminated soil, transportation to a landfill, and subsequent disposal. This process is specifically used for soil remediation projects where ex-situ treatment is necessary and is applicable to sites containing hazardous materials such as heavy metals.

## Reference product
- Excavated soil,Excavated soil: 1; measured

## Inputs
- Diesel,Diesel: 0.136; measured
  0.136 kg Diesel per m3 of soil excavated

## Use advice
When utilizing this data set, users must ensure the relevancy of the remediation process to the specific site characteristics, the types of contaminants, and their concentrations. It is advised to confirm the feasibility of landfill disposal based on local regulations, as heavy metal contamination requires specific landfill classification. In addition, confidentiality concerning the precise location of the site must be maintained due to its designation as a site of national interest.

## Review details
Inventory: The internal review was done by several iteration steps concerning raw data validation, raw data documentation, representativity, completeness and consistency of modelling with regard to ISO 14040 and 14044.

## Data sources
- Vocciante, M., De Folly D’Auris, A., Franchi, E., Petruzzelli, G. & Ferro, S. CO2 footprint analysis of consolidated and innovative technologies in remediation activities. J Clean Prod 297, 126723 (2021).
