# 电力生产 ; 混合电力 ; 湖南

Dataset: ILCD process, Unit process, single operation
Geography: HUN-CN
Reference year: 2019
Classification: Unit processes / Energy carriers and technologies / Electricity
Generated by: 熊若熙, xiongrx0126@163.com
Owner: 天工LCI数据工作小组
Review: Dependent internal review by 天工LCI数据工作小组
Amounts: no units in this file; such an amount is in the reference unit of its flow, which a separate flow dataset defines
copyright: false
licenseType: Free of charge for all users and uses

## General comment
混合电力产生形式包括火力发电、水力发电、风力发电、核能发电和太阳能发电

## Technical purpose
该数据集代表湖南省使用的混合电力，包括来自热能（煤炭、天然气等）、水电、风能、核能和太阳能发电厂的电力。用于评估产品生命周期、基础设施项目和其他消耗混合电源电力的服务。

## Reference product
- Electricity: 3.6; missing unimportant
  [{'text': '3.6', 'type': 'text'}]

## Inputs
All rows: missing unimportant
- electricity for thermal power: 2.11116
  [{'text': '3.6', 'type': 'text'}]
- electricity from hydroelectric power plant: 1.25571
  [{'text': '3.6', 'type': 'text'}]
- electricity for nuclear power: 0
  [{'text': '3.6', 'type': 'text'}]
- electricity from wind power: 0.17312
  [{'text': '3.6', 'type': 'text'}]
- electricity for solar power: 0.0600156
  [{'text': '3.6', 'type': 'text'}]

## Use advice
在使用此数据集进行生命周期评估时，重要的是要准确地将电力混合分配给特定的应用场景。考虑随时间变化的发电混合比例。特别注意每种发电类型在混合中的比例假设，因为这可能会影响整体环境影响评估。确保数据的时间和地理相关性与正在评估的系统一致。如果发电混合出现重大变化，请更新数据集。

## Review details
清单： 内部审查通过几个迭代步骤完成，涉及原始数据验证、原始数据记录、代表性、完整性、与 ISO 14040 和 14044 有关的建模的一致性。

## Data sources
- 能源统计年鉴2020
