# 锂精矿生产 ; 锂辉石精矿（氧化锂含量2.9%） ; 粉碎 ; 加拿大锂辉石矿（氧化锂含量0.7%）

Dataset: ILCD process, Unit process, single operation
Geography: CA
Reference year: 2013
Classification: Unit processes / Materials production / Non-energetic raw materials
Generated by: 孙鑫, xs389@cornell.edu
Owner: 天工LCI数据工作小组
Review: Dependent internal review by 天工LCI数据工作小组
Amounts: no units in this file; such an amount is in the reference unit of its flow, which a separate flow dataset defines
licenseType: Free of charge for all users and uses

## General comment
本研究审查的未来供应路线是基于从几家锂矿开采和加工公司（Lithium Americas Corp.、Minera Salar Blanco、Nemaska Lithium Inc.和Keliber Oy）的技术报告和环境影响评估报告中收集的数据，这些公司的锂资产正处于不同的开发阶段。这些锂资产正处于不同的开发阶段。预计在 5-10 年内投入运营。这些以卤水为基础的来源的锂浓度较低，也反映了当前供应路线中卤水的未来锂品位。

## Technology and included processes
加拿大 Whabouchi 矿区和芬兰中部 Ostrobothnia 地区的运营技术报告中描述了未来的闪锌矿供应路线。虽然加拿大和芬兰都不是锂储量最大的国家（美国地质调查局，2021 年），但它们代表了新锂供应的范例，可能会随着锂需求的增加而被开采。Whabouchi矿区的钠长石中平均锂浓度约为0.7%，而在中奥斯特罗布特尼亚地区则为0.6%。在这些未来的供应路线中，浓缩的磷灰石会直接转化为 LiOH⋅H2O，而不会产生 Li2CO3 作为中间产物。代表加拿大和芬兰采矿作业的数据集分别基于为内玛斯卡锂业公司（Golder Associates，2013 年；Laferri´ere 等人，2012 年；内玛斯卡锂业公司，2013 年；SENES 咨询有限公司，2013 年）和 Keliber Oy（Keliber Oy，2020a，b；Sweco，2016 年）编写的技术报告。在内玛斯卡锂业公司的报告中，没有关于锂OH⋅H2O 生产单元工艺（来自浓缩锂辉石）的化学品投入的具体数据。因此，在比较不同的锂供应时，Keliber Oy 报告中的化学品用量被用作替代数据。

## Technical purpose
本数据集代表从加拿大Whabouchi矿区采集的锂辉石原矿（含0.7%氧化锂）生产含6%氧化锂的锂辉石精矿的工业过程。该过程包含一个粉碎步骤以产生精矿。此精矿主要作为生产锂化合物的原材料，这些化合物对于制造锂离子电池、陶瓷、玻璃和润滑脂等多种应用至关重要。

## Reference product
- Spodumene concentrate (7.6% Li2O): 1000; measured

## Inputs
All rows: measured
- Spodumene（0.8% Li2O）: 4790
- sodium carbonate: 0.474, 0.474 (2 entries)
- freshwater,freshwater: 5.88
- Diesel: 247
- Electricity: 1656
- sodium hydroxide: 2.07
- Sulfuric acid: 0.337
- Isopropyl Ethyl Thionocarbamate: 1.31
- Polyacrylamide,Polyacrylamide: 0.0464

## Use advice
使用此数据集的用户应注意，它特别排除了原材料生产过程及其相关能源流量（贡献少于1%），因此可能未能代表原材料提取和加工的全部环境影响。为确保正确进行生命周期评估，如果它们属于LCA研究范围，用户应补充有关辅助过程和少量能源流的额外信息。此外，用户应确保其评估的边界条件与此数据集所规定的系统边界和排除事项一致。

## Review details
清单： 内部审查通过几个迭代步骤完成，涉及原始数据验证、原始数据记录、代表性、完整性、与 ISO 14040 和 14044 有关的建模的一致性。

## Data sources
- Chordia, M., Wickerts, S., Nordelöf, A. & Arvidsson, R. Life cycle environmental impacts of current and future battery-grade lithium supply from brine and spodumene. Resources, Conservation and Recycling 187, 106634 (2022).
