# Welding|Weldedparts|Structuralsteelelectrodes(JXXX),molybdenumandchromium-molybdenumheat-resistantsteelelectrodes(RXXX),stainlesssteelelectrodes(G/AXXX),overlayweldingelectrodes(DXXX),low-temperaturesteelelectrodes(WXXX),castironelectrodes(ZXXX),nickelandnickelalloyelectrodes(NiXXX),copperandcopperalloyelectrodes(TXXX),aluminumandaluminumalloyelectrodes(LXXX),special-purposeelectrodes(TSXXX)|Manual arc welding|All sizes / 焊接|焊接件|结构钢焊条（JXXX）、钼和铬钼耐热钢焊条（RXXX）、不锈钢焊条（G/AXXX）、堆焊焊条（DXXX）、低温钢焊条（WXXX）、铸铁焊条（ZXXX）、镍和镍合金焊条（NiXXX）、铜和铜合金焊条（TXXX）、铝和铝合金焊条（LXXX）、特殊用途焊条（TSXXX）|手工电弧焊|所有规模

Dataset: ILCD process, Partly terminated system
Geography: CN
Reference year: 2019
Classification: Materials production / Other mineralic materials
Generated by: The data was created by the Office of the Second National Pollution Source Census of the Ministry of Ecology and Environment, and the data was organized by the TianGong Plan team for ILCD format / 生态环境部第二次全国污染源普查工作办公室创建数据，天工计划团队常慧敏整理数据为ILCD格式
Amounts: no units in this file; such an amount is in the reference unit of its flow, which a separate flow dataset defines
copyright: false

## Technology and included processes
the treatment technology for the pollution of Graphite Electrodedidn't offered，The formula for calculating the actual operation rate (k-value) of the end-of-pipe treatment facility is k = power consumption of wastewater treatment facilities (kWh/year) / operating time of wastewater treatment facilities (hours/year) / total power of wastewater treatment facilities (kW)
污染物指标工业废气量的末端治理技术未说明

## Reference product
- Graphite Electrode: 1000; input; calculated
  原文件中描述污染物类别为Product，污染物指标为结构钢焊条（JXXX）、钼和铬钼耐热钢焊条（RXXX）、不锈钢焊条（G/AXXX）、堆焊焊条（DXXX）、低温钢焊条（WXXX）、铸铁焊条（ZXXX）、镍和镍合金焊条（NiXXX）、铜和铜合金焊条（TXXX）、铝和铝合金焊条（LXXX）、特殊用途焊条（TSXXX），此处对其进行了匹配工作，将其匹配到LCAflow库里面相最符合的流

## Outputs
- Exhaust gas: 2.13019e6; calculated
  原文件中描述污染物类别为废气，污染物指标为工业废气量，此处对其进行了匹配工作，将其匹配到LCAflow库里面相最符合的流
- particles (PM2.5 - PM10): 6.06, 1.01, 1.01, 20.2, 3.03, 1.01, 8.08, 1.01 (8 entries); calculated
  原文件中描述污染物类别为废气，污染物指标为颗粒物，此处对其进行了匹配工作，将其匹配到LCAflow库里面相最符合的流

## Data sources
- 第二次全国污染源普查产排污核算系数手册（试用版）,二级代码33-37文件，在完整版文件中第980页
