# 畜禽养殖 ; 屠宰阶段 ; 肉牛

Dataset: ILCD process, Unit process, single operation
Geography: SD-CN
Reference year: 2014
Classification: Unit processes / Materials production / Agricultural production means
Functional unit: 1kg beef
Generated by: 杨瑞, 1632707028@qq.com
Owner: 天工LCI数据工作小组
Review: Dependent internal review by 天工LCI数据工作小组
Amounts: no units in this file; such an amount is in the reference unit of its flow, which a separate flow dataset defines
copyright: false
licenseType: Free of charge for all users and uses

## General comment
屠宰阶段一般消耗的能源为电力，猪肉、牛肉、禽肉、牛奶和禽蛋的屠宰加 工耗能系数分别为 3.76 KJ·kg-1、4.37 KJ·kg-1、2.59 KJ·kg-1、1.12 KJ·kg-1、8.16 KJ·kg-1[61]。

## Geography
本研究于 2014~2015 年，针对畜禽饲养周期、肉料比、饲料配方、饲料消耗 量、煤和电的消耗量等，先后对山东省高密正大种猪场、莱西市知双奶牛场、即 墨市段泊岚镇姜家坡村养猪场、即墨市刘家庄镇畜禽养殖场、日照市莒县长岭镇 上官庄村、莒县寨里河镇东兴农牧公司、莒县峤山镇东辰奶牛场、莒县峤山镇刘 家义水养猪场、诸城市外贸有限责任公司凤凰父母代种鸭场，新疆阜康宏发养殖 专业合作社、九运街镇旭鸿蛋鸡合作社、九运街镇六运村自成养殖场、中澳控股 集团有限公司、德州市庆云县洼于村、山东省庆云县四柳社区肉牛养殖基地、德 州市庆云青年鸡养殖基地、庆云县永利禽业蛋鸡育成公司、庆云县兴晨青年鸡养 殖专业合作社、庆云县东泰肉鸡养殖专业合作社、河北省盐山县博远饲料有限公 司、盐山县大华人饲料有限公司、无棣县六和饲料有限公司、中澳东方希望饲料 公司等地进行了实地调研。

## Technology and included processes
本文将畜禽养殖生命周期 分为饲料作物种植、饲料加工、畜禽饲养、粪便处理、屠宰、运输等 6 个阶段。 畜禽养殖的生命周期具体流程如图 2-1 所示。由于部分数据的缺乏和基础条件的 限制，未对农药、地膜、饲料添加剂等生产、运输、使用进行分析，其他相关的 基础设施建设、运输工具生产、人力成本所引起的环境影响也不再考虑的范畴内。

## Technical purpose
此数据集表示畜禽养殖屠宰阶段的能源消耗，包括猪肉、牛肉、禽肉、牛奶和禽蛋等的屠宰加工过程，用于生命周期评估。它提供了与各种肉类产品相关的能源使用信息，允许比较不同肉类加工设施和系统的能源效率和环境影响。

## Reference product
- beef: 1; measured

## Inputs
- Electricity: 0.00437; estimated
  屠宰阶段一般消耗的能源为电力

## Outputs
- carbon dioxide (fossil),carbon dioxide (fossil): 0.00131; measured
  肉牛
- sulfur dioxide: 3.5e-5; measured
  肉牛
- nitrogen, total (excluding N2): 4.3e-6; measured
  肉牛

## Use advice
使用此数据集的用户应注意，所提供的能源消耗系数仅针对屠宰阶段，可能不包括全生命周期的能源需求。在生命周期评估模型中使用此数据时，确保与系统边界保持一致，并纳入上游和下游过程（如饲料生产、动物饲养、废物管理和运输）的准确数据至关重要。在应用这些系数时要注意仅将其应用于适当的质量单位（以产品每公斤千焦耳表示），并核实过程阶段和条件是否反映了预期生命周期评估的范围。

## Review details
清单： 内部审查通过几个迭代步骤完成，涉及原始数据验证、原始数据记录、代表性、完整性、与 ISO 14040 和 14044 有关的建模的一致性。

## Data sources
- 周景月. 基于生命周期评价的畜禽养殖环境影响分析. (青岛科技大学, 2017).
