# 锂电池生产 ; 三元锂电池 1GWh ; 锂电池生产组装

Dataset: ILCD process, Unit process, black box
Geography: YB-SC-CN
Reference year: 2022
Classification: Energy carriers and technologies / Electricity
Functional unit: 1 GWh Ternary Lithium-ion Battery
LCI method principle: Attributional
LCI method approaches: Allocation - mass
Generated by: 张冰倩, zhangbq22@mails.tsinghua.edu.cn
Owner: 天工LCI数据工作小组
Review: Dependent internal review by 天工LCI数据工作小组
Amounts: no units in this file; such an amount is in the reference unit of its flow, which a separate flow dataset defines
copyright: false
licenseType: Free of charge for all users and uses

## General comment
使用传统锂电池工艺

## Time period
2022年四川宜宾江安工业园区锂电池生产数据

## Technical purpose
该数据集反映了使用传统锂离子电池技术组装1GWh三元锂离子电池所涉及的材料和过程，适用于需要此类容量电池组的电池生产设施或能源储存公司。

## Reference product
- Battery: 3.6e6; normal; measured

## Inputs
All rows: normal; measured
- Graphite Anode: 1.5e6
- Lithium Hydroxide: 396000
- Butane-1,4-diol: 1.67e6
- Methylamine: 1.36e6
- POLYACRYLATE-2: 8100
- Carboxymethyl cellulose: 1260
- N,N-Dimethylacetamide: 387
- Polyvinylidene fluoride: 6960
- Alumina: 78300
- Tributyl phosphate: 329
- Propane: 260
- Polyvinyl pyrrolidone: 360
- Vinylene Carbonate: 13500
- Ethyl methyl carbonate: 203000
- Dimethyl carbonate: 225000
- 1,3-Propane sultone: 18100
- Propyl acetate: 45000
- ethyl acetate: 82000
- Diethyl carbonate: 2520
- Propylene carbonate: 35100
- Ethylene carbonate: 181000
- Acetyl chloride: 26700
- 2,2-Difluoroethanol: 27800
- Lithium fluoride: 21700
- Coating: 17600
- Anhydrous Hydrogen Fluoride: 84400
- Hydrochloric Acid: 5910
- Sulfuric acid(98%): 1.236e6
- Ammonium hydroxide: 10600
- Manganese(II) sulfate: 661000
- Cobalt Sulfate: 956000
- Nickel Sulfate: 2.95e6
- Sodium carbonate: 818000
- sodium hydroxide: 5.42e6, 167000 (2 entries)
- sulfur: 304000
- process water: 4.31e7
- nitrogen: 41900
- compressed air: 5.43e8
- lithium: 2.86e6
- calcium carbonate: 244000
- carbon dioxide: 104000
- oxygen: 12300
- freshwater: 2e7
- hydrated lime dry slaked: 172000
- phosphorus trichloride: 114000
- chlorine: 58900
- polyethylene low density granulate (PE-LD): 163000
- process steam: 1.84e7
- electricity mix: 3.3336e7
- natural gas; 44.1 MJ/kg: 852000

## Outputs
All rows: normal; measured
- Total Nitrogen: 315000
- Ammonia Nitrogen: 63100
- Chemical Oxygen Demand: 19700
- ammonia: 6700
- dichloromethane: 329
- sulfur dioxide: 259
- nitrous oxide: 3060
- nickel: 9210
- cobalt: 5280
- manganese: 5440
- hydrogen chloride: 1.67e6, 37.2 (2 entries)

## Deviations from the LCI method approaches
通过工业园区物质流分析计算得到单元过程数据

## Data selection and combination
数据为四川宜宾江安工业园区锂电池生产物质流数据

## Data treatment and extrapolations
数据均采用平均值

## Sampling procedure
实景数据来自于四川宜宾江安锂电池生产

## Use advice
该数据集的用户应考虑到这些信息是基于2022年四川宜宾江安工业园区生产过程的平均值。它代表一个黑匣子单元过程，只包括生产阶段数据。在将数据应用于其他情景时，确保其技术适用性和相关性，考虑这一背景非常重要。

## Review details
清单： 内部审查通过几个迭代步骤完成，涉及原始数据验证、原始数据记录、代表性、完整性、与 ISO 14040 和 14044 有关的建模的一致性。

## Data sources
- 四川宜宾项目数据
