# Treatment process of construction waste |Recycling after treatment,CN

Dataset: ILCD process
Geography: SH-CN
Classification: Materials production / Other mineralic materials
Generated by: Jiaqi Lu, wilsherelu@foxmail.com
Review: Dependent internal review by Tiangong LCI Data Working Group
Amounts: no units in this file; such an amount is in the reference unit of its flow, which a separate flow dataset defines
copyright: true

## Reference product
- Construction Waste Disposal: 1000; input; measured
  处理1t建筑垃圾

## Inputs
All rows: measured
- electricity mix: 99.828
  电力
- Diesel: 0.69
  柴油
- natural gas: 0.0058
  天然气
- Recycle Metals: 4.6
  回收金属
- Recycle Bricks: 21010
  回收砖块
- Recycled Aggregate: 1400
  回收骨料

## Review details
Inventory: The internal review was done by several iteration steps concerning raw data validation, raw data documentation, representativity, completeness and consistency of modelling with regard to ISO 14040 and 14044.; Documentation: The review of the documentation was performed by Ecobilan and is in compliance with ISO 14040 and 14044. The data set documentation is correct in view of the appropriateness of the information provided. It includes all relevant information in view of data quality and scope of application of the respective LCI result.

## Data sources
- 上海市市政固废调研结果
