# 畜禽养殖 ; 屠宰阶段 ; 肉鸡

Dataset: ILCD process, Unit process, single operation
Geography: SD-CN
Reference year: 2014
Classification: Unit processes / Materials production / Agricultural production means
Functional unit: 1 kg eggs
Generated by: 杨瑞, 1632707028@qq.com
Owner: 天工LCI数据工作小组
Review: Dependent internal review by 天工LCI数据工作小组
Amounts: no units in this file; such an amount is in the reference unit of its flow, which a separate flow dataset defines
copyright: false
licenseType: Free of charge for all users and uses

## General comment
屠宰阶段一般消耗的能源为电力，猪肉、牛肉、禽肉、牛奶和禽蛋的屠宰加 工耗能系数分别为 3.76 KJ·kg-1、4.37 KJ·kg-1、2.59 KJ·kg-1、1.12 KJ·kg-1、8.16 KJ·kg-1[61]。

## Geography
本研究于 2014~2015 年，针对畜禽饲养周期、肉料比、饲料配方、饲料消耗 量、煤和电的消耗量等，先后对山东省高密正大种猪场、莱西市知双奶牛场、即 墨市段泊岚镇姜家坡村养猪场、即墨市刘家庄镇畜禽养殖场、日照市莒县长岭镇 上官庄村、莒县寨里河镇东兴农牧公司、莒县峤山镇东辰奶牛场、莒县峤山镇刘 家义水养猪场、诸城市外贸有限责任公司凤凰父母代种鸭场，新疆阜康宏发养殖 专业合作社、九运街镇旭鸿蛋鸡合作社、九运街镇六运村自成养殖场、中澳控股 集团有限公司、德州市庆云县洼于村、山东省庆云县四柳社区肉牛养殖基地、德 州市庆云青年鸡养殖基地、庆云县永利禽业蛋鸡育成公司、庆云县兴晨青年鸡养 殖专业合作社、庆云县东泰肉鸡养殖专业合作社、河北省盐山县博远饲料有限公 司、盐山县大华人饲料有限公司、无棣县六和饲料有限公司、中澳东方希望饲料 公司等地进行了实地调研。

## Technology and included processes
本文将畜禽养殖生命周期 分为饲料作物种植、饲料加工、畜禽饲养、粪便处理、屠宰、运输等 6 个阶段。 畜禽养殖的生命周期具体流程如图 2-1 所示。由于部分数据的缺乏和基础条件的 限制，未对农药、地膜、饲料添加剂等生产、运输、使用进行分析，其他相关的 基础设施建设、运输工具生产、人力成本所引起的环境影响也不再考虑的范畴内。

## Technical purpose
该工艺数据涉及畜禽养殖，特别是肉鸡屠宰阶段。屠宰阶段主要能耗为电力，针对不同动物产品包括猪肉、牛肉、禽肉、牛奶和禽蛋的能耗系数已给出。该数据多用于农业与食品工业的环境影响评估，尤其是了解动物产品屠宰加工阶段的能源需求。

## Reference product
- chicken: 1; measured

## Inputs
- Electricity: 0.00259; estimated
  屠宰阶段一般消耗的能源为电力

## Outputs
- carbon dioxide (fossil),carbon dioxide (fossil): 0.00077; measured
  肉鸡
- sulfur dioxide: 2.1e-5; measured
  肉鸡
- nitrogen, total (excluding N2): 2.6e-6; measured
  肉鸡

## Use advice
在生命周期评估（LCA）中使用此数据集时，从业者必须考虑畜禽屠宰阶段能耗的具体上下文。用户应确保能耗系数适用于被评估的动物产品类型。需要注意，这些系数来源于2014-2015年的实地研究；因此，应考虑研究时间的时效性以及自研究以来技术或实践可能发生的变化。此外，对数据进行超出禽畜加工范围的外推时应谨慎，考虑区域差异并确保与当前LCA标准的方法论一致性。

## Review details
清单： 内部审查通过几个迭代步骤完成，涉及原始数据验证、原始数据记录、代表性、完整性、与 ISO 14040 和 14044 有关的建模的一致性。

## Data sources
- 周景月. 基于生命周期评价的畜禽养殖环境影响分析. (青岛科技大学, 2017).
