# Rare Earth solvent extraction and precipitation|Rare Earth|In-situ leaching|neodymium iron boron (NdFeB) magnet

Dataset: ILCD process, Unit process, single operation
Geography: NMG-CN
Reference year: 2014
Classification: Materials production / Other mineralic materials
Functional unit: The functional unit is a 1 kg NdFeB magnet
LCI method principle: Attributional
LCI method approaches: Allocation - market value; Allocation - mass
Generated by: Tao Wang, twang@iue.ac.cn
Review: Dependent internal review by Tiangong LCI Data Working Group
Amounts: no units in this file; such an amount is in the reference unit of its flow, which a separate flow dataset defines
copyright: false

## Geography
Bayan Obo (China)

## Technology and included processes
The basic process for Nd and Pr production is the same at all three deposits. It is identical for Nd and Pr except for the last solvent extraction step (SX5) where both are separated.

## Reference product
- Neodymium oxalate: 2.49; article inperiodical
  Neodymium oxalate. Bayan Obo: input for next process, Calcination

## Inputs
- Chemicals, inorganic: 0.13; article inperiodical
  Chemicals, inorganic. Bayan Obo: annual demand of an industrial process is basis for the calculation
- Chemicals, organic: 1.63; article inperiodical
  Chemicals, organic. Bayan Obo: annual demand of an industrial process is basis for the calculation
- Kerosene: 0.25; article inperiodical
  Bayan Obo: annual demand of an industrial process is basis for the calculation
- hydrogen chloride: 22.02; article inperiodical
  Bayan Obo: annual demand of an industrial process is basis for the calculation
- hexane: 0.045; article inperiodical
  Bayan Obo: annual demand of an industrial process is basis for the calculation
- Magnesium oxide: 0.23; article inperiodical
  Magnesium oxide. Bayan Obo: annual demand of an industrial process is basis for the calculation
- Sodium hydroxide: 6.16; article inperiodical
  Bayan Obo: annual demand of an industrial process is basis for the calculation
- sodium sulfate: 0.016; article inperiodical
  Bayan Obo: annual demand of an industrial process is basis for the calculation
- phosphoric acid: 0.045; article inperiodical
  Bayan Obo: annual demand of an industrial process is basis for the calculation
- Sodium carbonate: 2.95; article inperiodical
  Sodium carbonate. Bayan Obo: annual demand of an industrial process is basis for the calculation
- transport in t*km,transport in t*km: 2.59; measured
  Bayan Obo: 20 km, 803 km for extraction and precipitation chemicals, lorry EURO3
- transport in t*km,transport in t*km: 0.26; measured
  Bayan Obo: 1046 km (Tianjin-Baotou), only for kerosene
- Electricity: 3.924; article inperiodical
  Bayan Obo: estimation based on 200 solvent extraction cells and an energy consumption of 3 kW for each pump an 5 kW for each motor
- Water: 50.88
  Bayan Obo: predominantly calculated on base of molar dilution of the chemicals
- hydrated lime dry slaked: 10.18; article inperiodical
  Bayan Obo: for wastewater treatment

## Outputs
- waste water - treated: 211; article inperiodical
  Bayan Obo: calculation is based on water and chemicals input

## Deviations from the LCI method approaches
In this study, an allocation method based on the market prices of REOs28 is considered. To estimate uncertainties that refer to the allocation method, a mass-based allocation is undertaken as a sensitivity analysis

## Review details
Inventory: The internal review was done by several iteration steps concerning raw data validation, raw data documentation, representativity, completeness and consistency of modelling with regard to ISO 14040 and 14044.; Documentation: The review of the documentation was performed by Ecobilan and is in compliance with ISO 14040 and 14044. The data set documentation is correct in view of the appropriateness of the information provided. It includes all relevant information in view of data quality and scope of application of the respective LCI result.

## Data sources
- Marx, J., Schreiber, A., Zapp, P. & Walachowicz, F. Comparative Life Cycle Assessment of NdFeB Permanent Magnet Production from Different Rare Earth Deposits. ACS Sustainable Chem. Eng. 6, 5858–5867 (2018).
