# 碳酸乙烯酯（碳酸亚乙酯）生产;碳酸乙烯酯;环氧乙烷和二氧化碳环加成法;环氧乙烷、二氧化碳

Dataset: ILCD process, Unit process, single operation
Geography: BJ-CN
Classification: Materials production / Organic chemicals
Functional unit: Produce 1kg of ethylene carbonate
LCI method principle: Attributional
Generated by: 陈鑫, xinchen@mail.nankai.edu.cn
Owner: 天工LCI数据工作小组
Review: Dependent internal review by 天工LCI数据工作小组
Amounts: no units in this file; such an amount is in the reference unit of its flow, which a separate flow dataset defines
copyright: false
licenseType: Free of charge for all users and uses

## General comment
环氧乙烷和二氧化碳是主要的生产原料，该工艺不仅会生成碳酸乙烯酯，还会发生两个副反应，产 生大量的水

## Geography
北京坤源碳酸酯化学有限公司

## Technology and included processes
环氧乙烷和二氧化碳环加成法

## Technical purpose
碳酸乙烯酯是生产锂电池、电解质中的关键中间体，也在各种工业应用中作为溶剂和增塑剂。它还用作合成其他化学品的中间体。

## Reference product
- Ethylene carbonate: 1
  数据来源于北京坤源碳酸酯化学有限公司环境影响评价

## Inputs
- carbon dioxide: 0.562
  理论上应为product flow，本条flow需要修改//数据来源于北京坤源碳酸酯化学有限公司环境影响评价
- Ethylene Oxide: 0.51
  数据来源于北京坤源碳酸酯化学有限公司环境影响评价报告
- Electricity: 0.07884
  数据来源于北京坤源碳酸酯化学有限公司环境影响评价报告
- process steam: 2.69
  数据来源于北京坤源碳酸酯化学有限公司环境影响评价报告

## Outputs
- non-methane volatile organic compounds: 2.93e-6
  数据来源于北京坤源碳酸酯化学有限公司环境影响评价

## Data selection and combination
数据全部来源于北京坤源碳酸酯化学有限公司环境影响评价报告

## Data treatment and extrapolations
可能对数据进行了简单的乘除处理

## Use advice
使用该数据集时，请确保完全计入与碳酸乙烯酯生产相关的能源和材料投入以及排放。考虑大量副产品水的产生及其在生命周期评估中的处理。用户应确认数据已适当地缩放到其具体情境，尤其是如果数据经过了简单的乘除处理。鉴于数据来源于环境影响评价报告，应持续监视生产过程的后续发展或变化，以便进行潜在的更新。

## Review details
清单： 内部审查通过几个迭代步骤完成，涉及原始数据验证、原始数据记录、代表性、完整性、与 ISO 14040 和 14044 有关的建模的一致性。

## Data sources
- Yin, R., Hu, S. & Yang, Y. Life cycle inventories of the commonly used materials for lithium-ion batteries in China. Journal of Cleaner Production227, 960–971 (2019).
