# 蔬菜生产 ; 农资生产（塑料大棚）

Dataset: ILCD process, Unit process, single operation
Geography: XA-SAX-CN
Reference year: 2012
Valid until: 2013
Classification: Materials production / Agricultural production means
Functional unit: 1000 kg tomatoes
Generated by: 张浩然, hrzhang@whu.edu.cn
Owner: 天工LCI数据工作小组
Review: Dependent internal review by 天工LCI数据工作小组
Amounts: no units in this file; such an amount is in the reference unit of its flow, which a separate flow dataset defines
copyright: false
licenseType: Free of charge for all users and uses

## General comment
研究区为陕西省西安市郊区，该区域常年太阳 辐射总量为 4．81 MJ·m－2，年日照时数为 2163．8 h， 年平均气温为 12．9°C ，平均降水量为 630 mm，平均 蒸发量为 884 mm，无霜期为 221 d．该区日光温室属 于土墙钢架 结 构，种植蔬菜以番茄为主，多 数 采 用 一年种植两茬番茄的耕作方式． 塑料大棚属于钢架 结构，一般早春茬种植瓜类，秋延茬种植番茄． 本研 究选择了 10 个日光温室( 面积均为 6 m × 90 m) 和 5 个塑料大棚( 面积均为 9 m×110 m) 为研究对象， 调查了日光温室和塑料大棚建设及日常运行的物 资消耗，并全程详尽记录了 2012 年 7 月到 2013 年 6 月番茄、西瓜生产的投入和产出． 期间，10 个日光温 室均种植了两茬番茄，2012 年 7 月捂棚，8 月中旬定 植，11 月中旬开始采收，2013 年 1 月中、下旬拉秧， 2 月上旬定植第 2 茬番茄，4 月上、中旬开始采收， 6 月中下旬终收． 5 个塑料大棚 3 月中下旬定植西 瓜，5 月中下旬采收，6 月中下旬拉秧，7 月中旬定植 番茄，9 月中下旬采收，11 月下旬拉秧． 定植前进行 土壤消毒 和 翻 耕，有机肥与磷肥定植前全部施入， 追肥随灌溉水冲施，灌溉水为深井水．

## Technology and included processes
数据分别取10个日光温室和5个塑料大棚的平均值.根据建材的一般使用年限, 建设日光温室和塑料大棚消耗的建材和能源按使用寿命15年、PVC输水管按使用寿命5年棚膜按使用寿命1年 (塑料大棚按3年) 、防寒膜 (塑料大棚的裙膜) 按使用寿命3年分别折算为1年的用量.塑料大棚1年的建材消耗量平均分配给番茄和西瓜,

## Technical purpose
此数据集描述了使用日光温室和塑料大棚进行蔬菜（主要是番茄）生产的过程。它概述了建设和维护温室所需的材料和能源平均消耗量，特别适用于农业应用。包括PVC输水管、棚膜和防寒膜等材料的使用寿命以提供对番茄和西瓜生产中年度材料分摊的真实表示。此外，系统边界涵盖了从育苗到收获的整个番茄种植过程，不包括农场门外的阶段，例如机械生产、市场运输和消费者阶段。

## Reference product
- tomato: 1000; measured
  塑料大棚

## Inputs
- water: 0.159; measured
  塑料大棚
- Electricity: 600.13; measured
  塑料大棚

## Outputs
All rows: measured
- carbon dioxide (fossil): 41.953
  塑料大棚
- carbon monoxide: 0.03
  塑料大棚
- non-methane volatile organic compounds: 0.004
  塑料大棚
- acetylene: 0.002
  塑料大棚
- sulfur dioxide: 195
  塑料大棚
- Nitrogen oxides: 0.231
  塑料大棚
- Ammonia (NH4+, NH3, as N): 0.005
  塑料大棚
- ammonia: 0.032
  塑料大棚

## Deviations from the LCI method approaches
本研究定义的系统边界包括设施构筑物建设和日常运行 (下文简称为设施构筑物) 所需材料 (水泥、钢材、砖和棚膜等) 的生产，农资 (化肥、地膜、杀菌剂和杀虫剂) 生产、番茄种植 (育苗、翻地、定植、覆膜、施肥、喷药、灌溉、收获) 及各过程使用能源的生产和消耗,不包括农用机械的生产、番茄运输到市场销售和消费者消费的过程.

## Data selection and combination
能源生产和使用过程的环境影响数据取自文献 (Di et al., 2007;胡志远等, 2006) ;生产钢材、水泥、砖、棚膜、防寒膜、地膜、PVC输水管和化肥的资源、能源和环境排放数据分别取自文献以及《磷肥行业清洁生产指标体系》《氮肥行业清洁生产指标体系》由于缺乏详尽的研究数据, 杀虫剂和杀菌剂生产过程只考虑能耗和CO2排放量, 以有效成分质量表示, 数据采用West等 (2002) 的研究结果.

## Sampling procedure
本研究选择了10个日光温室 (面积均为6 m×90 m) 和5个塑料大棚 (面积均为9 m×110 m) 为研究对象, 调查了日光温室和塑料大棚建设及日常运行的物资消耗

## Use advice
使用此数据集的用户应考虑温室建设中使用的不同材料的具体使用寿命，以便进行准确的生命周期评估。确保建筑材料消耗的分配正确适配于预定的作物生产。在应用这些数据模拟蔬菜生产的环境影响时，至关重要的是将其纳入定义的系统边界内，并且不包括收获后如机械生产、运输和消费者消费等研究范围之外的过程。注意方法论做法的更新，如果分析杀虫剂和杀菌剂的生产，由于可用数据有限，仅考虑能源和CO2排放。

## Review details
清单： 内部审查通过几个迭代步骤完成，涉及原始数据验证、原始数据记录、代表性、完整性、与 ISO 14040 和 14044 有关的建模的一致性。

## Data sources
- 王效琴,吴庆强,周建斌,陈妍,吴发启.设施番茄生产系统的环境影响生命周期评价[J].环境科学学报,2014,34(11):2940-2947.
