# 铝电解碳阳极生产 ; 碳阳极 ; 石油焦

Dataset: ILCD process, Unit process, single operation
Geography: HEN-CN
Reference year: 2018
Classification: Unit processes / Materials production / Non-energetic raw materials
Generated by: 徐常青, xcq@bit.edu.cn
Owner: 天工LCI数据工作小组
Review: Dependent internal review by 天工LCI数据工作小组
Amounts: no units in this file; such an amount is in the reference unit of its flow, which a separate flow dataset defines
copyright: false
licenseType: Free of charge for all users and uses

## General comment
无流程图

## Time period
论文发表年

## Technical purpose
通过此工艺生产的碳阳极主要用于铝电解行业。它们是生产原铝必不可少的组成部分，在氧化铝的电解还原过程中起到导电的作用，并且是铝熔炼过程不可或缺的环节。

## Reference product
- anode, for metal electrolysis: 1000; missing unimportant

## Inputs
All rows: missing unimportant
- electricity, high voltage, aluminium industry: 759.6
- light fuel oil: 69
- pitch: 220
  煤沥青
- Petroleum Coke: 1140
- coal gas: 1.29e6

## Outputs
All rows: missing unimportant
- carbon dioxide (fossil),carbon dioxide (fossil): 1053
- carbon monoxide (fossil),carbon monoxide (fossil): 400
- sulfur dioxide: 3.03
- Nitrogen oxides: 2.04
- methane (fossil): 0.49
- particles (> PM10): 0.16
- particles (PM2.5): 0.1
- hydrogen fluoride: 0.046
- polycyclic aromatic hydrocarbons: 0.027

## Use advice
使用这组数据时，用户应确保它适用于所讨论的特定类型的铝电解过程。数据很可能不包括碳阳极的潜在回收，并且不包括石油焦的生产（碳阳极生产的前体）。应特别注意发表年份，因为自报告数据以来技术和环境标准可能已经发展。可能需要调整以反映当前过程。

## Review details
清单： 内部审查通过几个迭代步骤完成，涉及原始数据验证、原始数据记录、代表性、完整性、与 ISO 14040 和 14044 有关的建模的一致性。

## Data sources
- 王姗姗, 刘赛男, 王灿, & 张瑞芹. 基于生命周期评价的河南省原铝生产环境影响分析. 轻金属 1-7+16 (2018)
