# 聚氯乙烯（PVC）生产及废弃;PVC材料

Dataset: ILCD process, Unit process, black box
Geography: CN
Reference year: 1995
Classification: Unit processes / Materials production / Plastics
Generated by: 郭慧娟, GHJ@email.ncu.edu.cn
Owner: 天工LCI数据工作小组
Review: Dependent internal review by 天工LCI数据工作小组
Amounts: no units in this file; such an amount is in the reference unit of its flow, which a separate flow dataset defines
copyright: false
licenseType: Free of charge for all users and uses

## General comment
本文研究的起止点放在原油的开采、原油的运输、原油的提炼、聚合体的生产、废物处置方面，而材料的使用阶段不在本文考虑之列， 废物处置则选择了有关文献中认为环境影响较大的填埋方式，而这种填埋方式也是在我国城市固体废弃物处置中被普遍采用的．能源生产中所带来的环境排放按照各阶段的能耗比计入其 中

## Geography
我国的国情出发

## Technical purpose
本工业过程产生的PVC材料设计用于包括建筑材料、家用物品、医疗设备和汽车零件等多种应用。该聚合体具备与这些用途相关的特性，如耐久性、化学品抵抗力和灵活性。然而，具体数据集并未考虑材料的使用阶段。

## Reference product
- polyvinylchloride resin (B-PVC): 1000; measured
  聚氯乙烯

## Inputs
- crude oil; 42.3 MJ/kg: 0.73; measured
  原油
- Energy,unspecified: 55943; measured
  能耗
- sodium chloride: 0.56; measured
  原盐

## Outputs
All rows: measured
- carbon dioxide (fossil): 8688.59
  原文未区分bio和fossil，根据专家判断此处为fossil
- sulfur dioxide: 74.18
- Nitrogen oxides: 0.172
  NOx
- methane (fossil): 13
  原文未区分bio和fossil，根据专家判断此处为fossil
- chlorine: 7.6e-5
  Cl2
- 1,2-dichloroethane: 4.93
  EDC
- carbon monoxide (fossil): 1.03
  原文未区分bio和fossil，根据专家判断此处为fossil
- vinyl chloride: 0.34
  VCM(排入大气)
- polyvinylchloride resin (B-PVC): 0.01
  PVC
- waste water - untreated: 37123
  废水
- Waste (unspecified): 1183.35
  废渣

## Data selection and combination
本文评价中所使用的数据来源有：企业内部实际生产数据、工艺改进的设计数据、国家环 境保护部门数据；我国相关的统计年鉴、文献等公开出版

## Data treatment and extrapolations
由于本文所研究的材料涉及到多产品系统，我们将各产品系统的输入和输出数据按照质量比例进行了分配

## Use advice
使用此生命周期评估（LCA）数据集时，务必注意它不包括PVC材料的使用阶段，因此对于研究PVC产品整个生命周期的研究不太合适。对于废物处置，假定填埋为主要方法，评估环境影响时应予以考虑。用户在应用数据时应确保与其研究的目标和范围一致，包括基于每个生产阶段能耗的排放数据。多产品系统的输入和输出是基于质量比例进行分配的，如果数据集用于具有不同处理选项或特定产品重点的上下文中，则应考虑这一点。本评价的功能单元是1000kg PVC。

## Review details
清单： 内部审查通过几个迭代步骤完成，涉及原始数据验证、原始数据记录、代表性、完整性、与 ISO 14040 和 14044 有关的建模的一致性。

## Data sources
- 陈红, 郝维昌, 石凤 & 王天民. 几种典型高分子材料的生命周期评价. 环境科学学报 24, 545–549 (2004).
