# Sinteringaccountinglink|Sinteredore|Ironore,limecokepowder,coalpowder,etc.|Beltsinteringmachine(head)|greater than or equal to360 m2 / 烧结核算环节|烧结矿|铁矿、石灰焦粉、煤粉等|带式烧结机（机头）|大于等于360平方米

Dataset: ILCD process, Unit process, single operation
Geography: CN
Reference year: 2019
Classification: Materials production / Metals and semimetals
Generated by: The data was created by the Office of the Second National Pollution Source Census of the Ministry of Ecology and Environment, and the data was organized by the TianGong Plan team for ILCD format / 生态环境部第二次全国污染源普查工作办公室创建数据，天工计划团队常慧敏整理数据为ILCD格式
Owner: Tiangong LCI Data Working Group / 天工LCI数据工作小组
Review: Dependent internal review by Tiangong LCI Data Working Group / 天工LCI数据工作小组
Amounts: no units in this file; such an amount is in the reference unit of its flow, which a separate flow dataset defines
copyright: false
licenseType: Free of charge for all users and uses

## General comment
the Technical of end-of-pipe management technology for pollution Nitrogen oxidesisNO8 Others

## Reference product
- Sintering: 1000; calculated
  源文件中描述为为烧结矿，此处对其进行了匹配工作，将其匹配到LCAflow库里面相最符合的流，污染物指标备注为工业废气量

## Outputs
All rows: calculated
- Exhaust gas: 2500
  污染物指标工业废气量的末端治理技术是/，其效率为0。原文件中描述污染物类别为废气，污染物指标为工业废气量，此处对其进行了匹配工作，将其匹配到LCAflow库里面相最符合的流，污染物指标备注为工业废气量
- particles (PM2.5 - PM10): 0.0576
  污染物指标颗粒物的末端治理技术是静电除尘，其效率为99，末端治理设施实际运行率（k值）计算公式为k=除尘设备年正常运行小时数（小时）/生产系统年生产运行小时数（小时）。原文件中描述污染物类别为废气，污染物指标为颗粒物，此处对其进行了匹配工作，将其匹配到LCAflow库里面相最符合的流，污染物指标备注为颗粒物
- particles (PM2.5 - PM10): 0.02592
  污染物指标颗粒物的末端治理技术是布袋除尘，其效率为99.55，末端治理设施实际运行率（k值）计算公式为k=除尘设备年正常运行小时数（小时）/生产系统年生产运行小时数（小时）。原文件中描述污染物类别为废气，污染物指标为颗粒物，此处对其进行了匹配工作，将其匹配到LCAflow库里面相最符合的流，污染物指标备注为颗粒物
- particles (PM2.5 - PM10): 0.02304
  污染物指标颗粒物的末端治理技术是电袋复合式除尘，其效率为99.6，末端治理设施实际运行率（k值）计算公式为k=除尘设备年正常运行小时数（小时）/生产系统年生产运行小时数（小时）。原文件中描述污染物类别为废气，污染物指标为颗粒物，此处对其进行了匹配工作，将其匹配到LCAflow库里面相最符合的流，污染物指标备注为颗粒物
- particles (PM2.5 - PM10): 5.76
  污染物指标颗粒物的末端治理技术是P15其他，末端治理设施实际运行率（k值）计算公式为k=除尘设备年正常运行小时数（小时）/生产系统年生产运行小时数（小时）。原文件中描述污染物类别为废气，污染物指标为颗粒物，此处对其进行了匹配工作，将其匹配到LCAflow库里面相最符合的流，污染物指标备注为颗粒物
- sulfur dioxide: nan
  污染物指标二氧化硫的末端治理技术是半干法脱硫，其效率为85，末端治理设施实际运行率（k值）计算公式为k=脱硫设备年正常运行小时数（小时）/生产系统年生产运行小时数（小时）。原文件中描述污染物类别为废气，污染物指标为二氧化硫，此处对其进行了匹配工作，将其匹配到LCAflow库里面相最符合的流，污染物指标备注为二氧化硫，产污系数备注为式中，M含铁料、M固燃分别为单位合格产品的含铁料及固态燃料消耗量，单位为“千克/吨-烧结矿”；S含铁料、S固燃分别为原料及固态燃料的平均含硫率；S烧结矿为合格烧结矿的平均含硫率。详细参见本手册2.4节
- sulfur dioxide: nan
  污染物指标二氧化硫的末端治理技术是石灰石/石灰-石膏法，其效率为97，末端治理设施实际运行率（k值）计算公式为k=脱硫设备年正常运行小时数（小时）/生产系统年生产运行小时数（小时）。原文件中描述污染物类别为废气，污染物指标为二氧化硫，此处对其进行了匹配工作，将其匹配到LCAflow库里面相最符合的流，污染物指标备注为二氧化硫，产污系数备注为式中，M含铁料、M固燃分别为单位合格产品的含铁料及固态燃料消耗量，单位为“千克/吨-烧结矿”；S含铁料、S固燃分别为原料及固态燃料的平均含硫率；S烧结矿为合格烧结矿的平均含硫率。详细参见本手册2.4节
- sulfur dioxide: nan
  污染物指标二氧化硫的末端治理技术是氨法，其效率为98，末端治理设施实际运行率（k值）计算公式为k=脱硫设备年正常运行小时数（小时）/生产系统年生产运行小时数（小时）。原文件中描述污染物类别为废气，污染物指标为二氧化硫，此处对其进行了匹配工作，将其匹配到LCAflow库里面相最符合的流，污染物指标备注为二氧化硫，产污系数备注为式中，M含铁料、M固燃分别为单位合格产品的含铁料及固态燃料消耗量，单位为“千克/吨-烧结矿”；S含铁料、S固燃分别为原料及固态燃料的平均含硫率；S烧结矿为合格烧结矿的平均含硫率。详细参见本手册2.4节
- sulfur dioxide: nan
  污染物指标二氧化硫的末端治理技术是活性炭（焦）法，其效率为90，末端治理设施实际运行率（k值）计算公式为k=脱硫设备年正常运行小时数（小时）/生产系统年生产运行小时数（小时）。原文件中描述污染物类别为废气，污染物指标为二氧化硫，此处对其进行了匹配工作，将其匹配到LCAflow库里面相最符合的流，污染物指标备注为二氧化硫，产污系数备注为式中，M含铁料、M固燃分别为单位合格产品的含铁料及固态燃料消耗量，单位为“千克/吨-烧结矿”；S含铁料、S固燃分别为原料及固态燃料的平均含硫率；S烧结矿为合格烧结矿的平均含硫率。详细参见本手册2.4节
- sulfur dioxide: nan
  污染物指标二氧化硫的末端治理技术是S12其他，末端治理设施实际运行率（k值）计算公式为k=脱硫设备年正常运行小时数（小时）/生产系统年生产运行小时数（小时）。原文件中描述污染物类别为废气，污染物指标为二氧化硫，此处对其进行了匹配工作，将其匹配到LCAflow库里面相最符合的流，污染物指标备注为二氧化硫，产污系数备注为式中，M含铁料、M固燃分别为单位合格产品的含铁料及固态燃料消耗量，单位为“千克/吨-烧结矿”；S含铁料、S固燃分别为原料及固态燃料的平均含硫率；S烧结矿为合格烧结矿的平均含硫率。详细参见本手册2.4节
- Nitrogen oxides: 0.41905
  污染物指标氮氧化物的末端治理技术是烟气循环技术，其效率为15，末端治理设施实际运行率（k值）计算公式为k=脱硝设备年正常运行小时数（小时）/生产系统年生产运行小时数（小时）。原文件中描述污染物类别为废气，污染物指标为氮氧化物，此处对其进行了匹配工作，将其匹配到LCAflow库里面相最符合的流，污染物指标备注为氮氧化物
- Nitrogen oxides: 0.27115
  污染物指标氮氧化物的末端治理技术是活性炭（焦）法，其效率为45，末端治理设施实际运行率（k值）计算公式为k=脱硝设备年正常运行小时数（小时）/生产系统年生产运行小时数（小时）。原文件中描述污染物类别为废气，污染物指标为氮氧化物，此处对其进行了匹配工作，将其匹配到LCAflow库里面相最符合的流，污染物指标备注为氮氧化物
- Nitrogen oxides: 0.07395
  污染物指标氮氧化物的末端治理技术是SCR，其效率为85，末端治理设施实际运行率（k值）计算公式为k=脱硝设备年正常运行小时数（小时）/生产系统年生产运行小时数（小时）。原文件中描述污染物类别为废气，污染物指标为氮氧化物，此处对其进行了匹配工作，将其匹配到LCAflow库里面相最符合的流，污染物指标备注为氮氧化物
- Nitrogen oxides: 0.493
  污染物指标氮氧化物的末端治理技术是N08其他，末端治理设施实际运行率（k值）计算公式为k=脱硝设备年正常运行小时数（小时）/生产系统年生产运行小时数（小时）。原文件中描述污染物类别为废气，污染物指标为氮氧化物，此处对其进行了匹配工作，将其匹配到LCAflow库里面相最符合的流，污染物指标备注为氮氧化物

## Use advice
This dataset is derived from the Pollution Source Census Report and contains information on pollution emissions and related products. However, it does not include data on energy or chemical consumption, nor does it provide information on waste or co-product generation. When utilizing this dataset, please supplement the missing data based on actual conditions before use
该数据集来源于污染源普查报告，包含污染物排放及相关产品信息，但不包含能源或化学品消耗数据，也不提供废弃物或共生产物产生信息。在使用该数据集时，请根据实际情况补充缺失数据后再使用。

## Review details
Inventory: The internal review was done by several iteration steps concerning raw data validation, raw data documentation, representativity, completeness and consistency of modelling with regard to ISO 14040 and 14044.
清单： 内部审查通过几个迭代步骤完成，涉及原始数据验证、原始数据记录、代表性、完整性、与 ISO 14040 和 14044 有关的建模的一致性。

## Data sources
- 第二次全国污染源普查产排污核算系数手册（试用版）,四级代码3110文件，在完整版文件中第4111页
