# recycling and utilizing nickel–cobalt saggars

Dataset: ILCD process, Unit process, black box
Geography: CN
Reference year: 2018
Classification: Materials production / Metals and semimetals
Functional unit: calculation basis is GEB2016 (12.0 × 1024 sej)
Generated by: Pengfei, pengfei24@email.ncu.edu.cn
Owner: Tiangong LCI Data Working Group
Review: Dependent internal review by Tiangong LCI Data Working Group
Amounts: no units in this file; such an amount is in the reference unit of its flow, which a separate flow dataset defines
copyright: false
licenseType: Free of charge for all users and uses

## General comment
Utilizing the recycled waste sagger, nickel, cobalt and manganese precursors are extracted, as well as lithium carbonate and other products, and by-products such as alum and potassium sulphate are produced through the processes of physical separation, reductive leaching, tandem separation, evaporation and crystallization, and purification.

## Technical purpose
The technology for recycling and utilizing nickel-cobalt saggars described refers to the extraction of valuable materials such as nickel, cobalt, and manganese precursors, as well as lithium carbonate from recycled waste sagger materials. This process is designed for the recovery of these critical materials from spent lithium battery casings. The secondary products produced, including alum and potassium sulphate, are typically utilized in various industrial applications, such as in the production of alum-based products and fertilizers.

## Reference product
- Ni-Co-containing saggars: 1000; input; measured

## Inputs
All rows: measured
- water,water: 149.2, 216, 85.6, 96.4 (4 entries)
- Electricity: 29.7, 17.82, 3.96, 59.4, 7.2 (5 entries)
- Sulfuric acid: 216
- waste water - untreated: 160
  Leaching residue washing water
- process steam: 10, 12, 10 (3 entries)
- potassium: 55.6
  Potassium hydroxide
- potassium: 59.6
  Potassium sulfate mother liquor
- potassium: 20
  Potassium sulfate
- Potassium carbonate: 66
- process steam: 198
  Steam
- Ni-Co-Mn precursor,Ni-Co-Mn precursor: 5.8
  Crude Ni-Co-Mn precursor
- Lithium carbonate: 35.2
  Crude lithium carbonate
- Sulfuric acid(98%): 10
  Sulfuric acid（98%）
- carbon dioxide: 11
- water,water: 16
  Pure water
- ammonium: 9
  25%Ammonia
- sodium hydroxide: 6
- Polishing Powder: 171.4
  Polishing powder with 30% water content
- Acidic Leaching Liquor: 647
  Acidic leaching liquor
- Concentrated Mother Liquor: 693.2
  Filter liquor

## Outputs
All rows: measured
- bauxite: 977.8
  Ceramic aggregate
- Polishing Powder: 171.4
  Polishing powder with 30% water content
- Acidic Leaching Liquor: 647
  Acidic leaching liquor
- Production residues (unspecified): 128.4
  Leaching residue
- Alum: 166.2
- Ni-Co-Mn precursor,Ni-Co-Mn precursor: 5.8, 5, 28.2 (3 entries)
  Ni-Co-Mn precursor
- Methanol: 693.2
  liquor
- Magnesium hydroxide: 1.4
- Aluminum hydroxide: 1.2
- sulfate: 104
  Potassium sulfate
- Concentrated Mother Liquor: 59.6
  Concentrated mother liquor
- Process water: 656.8
  Condensed water
- Lithium carbonate: 35.2
  Crude lithium carbonate
- Slag: 1.8
  Calcium Magnesium slag
- waste water - untreated: 58

## Data selection and combination
The data used in this article are mainly derived from the analysis data of the results of the pilot test conducted by the Institute of Process Engineering of the Chinese Academy of Sciences with a company in Hunan Province, China, including physical separation, reduction and leaching, cascade separation, crystallization, and purification. The emergy values of the various raw materials and emissions are from the Appendix of “Energy Analysis Theory and Practice” by Liu and Yang

## Use advice
Users of this data set should ensure that the data is applied specifically to scenarios involving the recycling and recovery of nickel, cobalt, and manganese from lithium battery casings. It is important to account for the use phase behavior of recycled materials and to apply the data accordingly when modeling life cycle assessments. The emergy values given in the provided data must be handled with care, incorporating Liu and Yang's 'Energy Analysis Theory and Practice' for methodology reference. This data set is based on the functional unit of 1 kWh energy equivalence, with the calculation basis being GEB2016 (12.0 × 1024 sej). Users should ensure that their methodologies align with this basis when interpreting and integrating the data.

## Review details
Inventory: The internal review was done by several iteration steps concerning raw data validation, raw data documentation, representativity, completeness and consistency of modelling with regard to ISO 14040 and 14044.

## Data sources
- Zhang, W. et al. Evaluation of the Ecological Benefits of Recycling Multiple Metals from Lithium Battery Saggars Based on Emergy Analysis. SUSTAINABILITY 13, (2021).
