# Electricity production ; Electricity ; Thermal power (77.3%) + hydropower (7.9%) + wind power (11.1%) + solar power (3.6%)

Dataset: ILCD process, Partly terminated system
Geography: XJ-CN
Reference year: 2019
Classification: Energy carriers and technologies / Electricity
LCI method principle: Other
Generated by: Ruoxi Xiong, xiongrx0126@163.com
Owner: Tiangong LCI Data Working Group
Review: Dependent internal review by Tiangong LCI Data Working Group
Amounts: no units in this file; such an amount is in the reference unit of its flow, which a separate flow dataset defines
copyright: false
licenseType: Free of charge for all users and uses

## General comment
Forms of electricity generation include thermal power, hydropower, wind power and solar power

## Time period
Calculated based on data from the 2019 Energy Statistics Yearbook

## Technical purpose
This dataset describes the mixed electricity generation comprising thermal, hydropower, wind, and solar power with respective proportions of 77.3%, 7.9%, 11.1%, and 3.6%. It is intended for assessing the environmental impact of electricity consumption in a grid with a similar energy mix. This data is applicable for sustainability analyses in various sectors where electricity from these sources is used.

## Reference product
- Electricity: 3.6; calculated

## Outputs
- carbon dioxide: 0.677; calculated
- sulfur dioxide: 0.000117; calculated
- Nitrogen oxides: 0.000184503; calculated
- Dust (unspecified, from stack): 2.2347e-5; calculated

## Data treatment and extrapolations
For the accounting method, please refer to the "Enterprise Greenhouse Gas Emissions Accounting Methods and Reporting Guidelines for Power Generation Facilities". Different forms of power generation and fuel consumption come from Chapter 3 (Energy Production) and Chapter 6 (Regional Energy Balance Sheet) in the "China Energy Statistical Yearbook 2020". The fuel parameters such as low calorific value and carbon content per unit calorific value used to calculate the carbon dioxide emission factor come from the "2019 China Regional Power Grid Carbon Dioxide Baseline Emission Factor Calculation Instructions OM" and the "Enterprise Greenhouse Gas Emission Accounting Method and Reporting Guide for Power Generation Facilities" 》

## Use advice
When using this data for Life Cycle Assessment or any environmental impact analysis, ensure to apply it in the context of regions that have similar electricity generation characteristics. Attention should be given to the base year of the data (2019), and the unique carbon emission factors of each generation type as per the specific guideline referenced. Users should adjust the data in accordance with any changes in the energy mix or technological advancements in energy production that have occurred since 2019.

## Review details
Inventory: The internal review was done by several iteration steps concerning raw data validation, raw data documentation, representativity, completeness and consistency of modelling with regard to ISO 14040 and 14044.

## Data sources
- 熊若熙. 中国电力生产和消费二氧化碳与污染物排放因子核算. (清华大学, 2023).
