# 污泥处理与处置|堆肥

Dataset: ILCD process, Unit process, single operation
Geography: XA-SAX-CN
Classification: Materials production / Other mineralic materials
Generated by: Jin Sitian, 2331276@tongji.edu.cn
Review: Dependent internal review by Tiangong LCI Data Working Group
Amounts: no units in this file; such an amount is in the reference unit of its flow, which a separate flow dataset defines

## Geography
西安第三污水处理厂

## Reference product
- Sludge: 1000; input; estimated
  1t含水率76.2%的剩余污泥

## Inputs
- Diesel: 0.00116; article inperiodical
- Electricity: 237.96; article inperiodical

## Outputs
All rows: calculated
- carbon dioxide: 166.27
- ammonia: 1.738
- Nitrogen oxides: 0.002316
- hydrogen sulfide: 0.03215
- sulfur dioxide: 0.00438

## Review details
Inventory: The internal review was done by several iteration steps concerning raw data validation, raw data documentation, representativity, completeness and consistency of modelling with regard to ISO 14040 and 14044.

## Data sources
- 基于生命周期评价的典型剩余污泥处理方法的环境影响比较研究
