# Electrodeionization module production | spiral-wound, CN

Dataset: ILCD process, Unit process, single operation
Geography: CN
Reference year: 2022
Classification: Materials production / Other mineralic materials
Functional unit: 1 item of EDI module
Generated by: Jiaqi Lu, wilsherelu@foxmail.com
Review: Dependent internal review by Tiangong LCI Data Working Group
Amounts: no units in this file; such an amount is in the reference unit of its flow, which a separate flow dataset defines
copyright: false

## Reference product
- Electrodeionization components: 1; article inperiodical
  1 EDI module

## Inputs
All rows: article inperiodical
- electricity mix: 684
  工厂耗电
- Titanium Ruthenium Electrode: 1.2
  钛涂钌电极Titanium-coated ruthenium anodes
- Steel hot rolled coil: 4.5
  Stainless steel cathode
- polyvinylchloride resin (E-PVC): 12.71
  PVC外壳
- acrylonitrile-butadiene-styrene granulate (ABS): 3.82
  ABS外壳
- Anion exchange resin: 3.35
  阴离子交换树脂
- Cation Exchange Resin: 2.75
  阳离子交换树脂
- polyethylene high density granulate (PE-HD): 1.55
  聚乙烯
- Anion exchange membrane: 3.36
  阴离子交换膜
- Ion Exchange Membranes: 4.38
  阳离子交换膜
- Epoxy resin: 0.71
  环氧树脂胶

## Outputs
- waste incineration of plastics (unspecified) fraction in municipal solid waste (MSW): 0.021; article inperiodical
  废弃阳离子交换膜
- waste incineration of plastics (unspecified) fraction in municipal solid waste (MSW): 0.018; article inperiodical
  废弃阴离子交换膜
- waste incineration of plastics (unspecified) fraction in municipal solid waste (MSW): 0.37; article inperiodical
  废弃阳离子交换树脂
- waste incineration of plastics (unspecified) fraction in municipal solid waste (MSW): 0.31; article inperiodical
  废弃阴离子交换树脂

## Review details
Inventory: The internal review was done by several iteration steps concerning raw data validation, raw data documentation, representativity, completeness and consistency of modelling with regard to ISO 14040 and 14044.; Documentation: The review of the documentation was performed by Ecobilan and is in compliance with ISO 14040 and 14044. The data set documentation is correct in view of the appropriateness of the information provided. It includes all relevant information in view of data quality and scope of application of the respective LCI result.

## Data sources
- Yuan, Y. et al. Deduction of carbon footprint for membrane desalination processes towards carbon neutrality: A case study on electrodeionization for ultrapure water preparation. Desalination 559, 116648 (2023).
