# 水泥生产|水泥, 替代成分 100%|新型干法窑|混合固废

Dataset: ILCD process, LCI结果
Geography: XJ-CN
Reference year: 2021
Classification: Materials production / Other mineralic materials
Generated by: 齐剑川
Amounts: no units in this file; such an amount is in the reference unit of its flow, which a separate flow dataset defines
copyright: false

## General comment
采用新型干法窑工艺，以电石渣为主要原料，结合其他工业固废生产水泥，实现了100%全固废原料制水泥生产的创新。

## Geography
天业集团

## Model description
系统边界以原料开采为起点，成品水泥输出为终点，系统中包含原料及废料运输过程、预处理过程、水泥制备过程，并根据实际生产情况细分为10个小流程。基本功能单位为1t产品水泥。

## Reference product
- cement, alternative constituents 100%: 1000
  全固废原料水泥

## Inputs
All rows: measured
- steel slag: 20.1
  钢渣
- copper scrap, sorted, pressed: 28.5
  铜渣
- blast furnace slag: 74.8
  炉渣
- ash: 197.1
  粉煤灰
- Carbide slag: 921
  电石渣
- Carbide slag, wet: 789
  湿电石渣
- Purified ash, from calcium carbide furnace off-gas: 249
  净化灰
- silica sand: 102
  硅砂
- gypsum (desulphurized): 18.6
  脱硫石膏
- citric acid residue: 10
  柠檬酸渣
- limestone, crushed, for mill: 5
  碎石灰石
- tap water: 219
  水
- transport, freight, lorry, unspecified: 362
  货车公路运输。公路运输采用世界通用货车公路运输生命周期模型清单。
- hard coal: 79.5
  煤炭。煤炭采用中国市售煤炭生命周期模型清单。
- electricity, medium voltage: 211.633
  电能。电力采用中国市售高压电生命周期模型清单。

## Outputs
- carbon dioxide: 146; calculated
  CO2。CO2排放量由原料中石灰石含量及燃煤量，结合成分分析结果中含碳量进行计算得到。
- sulfur dioxide: 0.01003; measured
  SO2
- Nitrogen oxides: 0.2313; measured
  NOX
- particles (> PM10): 0.01689; measured
  颗粒物，未标明粒径，按PM>10处理。
- ash: 0.715; measured
  氯灰。固体废弃物主要是收集到的可回收再利用的飞灰与不可回收的含氯残渣。

## Data selection and combination
收集了水泥生产工艺中各阶段的物料、能量输入输出数据。其中，物料、能量输入输出数据来源于企业生产记录，工业固废处理及直接排放污染物等其余数据来自Ecoinvent3.0、ELCD、USLCI等数据库中的数据。
1.全工业固废制水泥工艺中主要消耗的背景资源为电力、煤炭及公路运输过程中消耗的能源，为保证评价基础数据的统一及对本研究中案例具有可用性，背景资源的生命周期清单均采用Ecoinvent3.0数据库中数据。电力采用中国市售高压电生命周期模型清单，煤炭采用中国市售煤炭生命周期模型清单，公路运输采用世界通用货车公路运输生命周期模型清单。
2.工艺中消耗的原料可分为生料原料和拌和料原料，消耗的生料原料主要包括：电石渣、电石炉收尘灰、净化灰、粉煤灰、炉渣、硅砂、钢渣、铜渣。拌和料原料主要包括：脱硫石膏、粉煤灰、柠檬酸渣、碎石灰石。所有原料投加数值均来自企业实际生产数据。
3.工艺中主要产生的污染物包括废气、废水及固体废弃物。废气主要是生产过程中排放的CO2、SO2、NOx等。废水主要是生产过程中使用的冷却水和洗涤用水。固体废弃物主要是收集到的可回收再利用的飞灰与不可回收的含氯残渣。上述排放的污染物中，SO2、NOx及大气颗粒物排放量通过企业实时监测记录统计，CO2排放量由原料中石灰石含量及燃煤量，结合成分分析结果中含碳量进行计算得到。
4.工业固废原料来源于周围的发电厂、化工厂，运输方式为厂外货车公路运输及厂内履带运输，最长公路运输距离不超过200km。原料在厂内的移动依靠电动履带，不计入运输距离当中。

## Sampling procedure
天业集团采用新型干法窑工艺，以电石渣为主要原料，结合其他工业固废生产水泥，实现了100%全固废原料制水泥生产的创新。

## Data sources
- 宋晓玲, 梁智霖, 罗维, 黄东, 杨忠, 徐盼盼, 胡敬平, 侯慧杰, 刘冰川, & 杨家宽. (2021). 全工业固废原料制备水泥工艺的生命周期评价研究. 环境科学学报, 41(12), 5190–5199.
