# Wet sand Production|Sandstone sand making|Sand making machine sand making

Dataset: ILCD process, Unit process, single operation
Geography: CS-HUN-CN
Reference year: 2020
Classification: Materials production / Other mineralic materials
Generated by: Cui hang, Cuihang0716@163.com
Review: Dependent internal review by Tiangong LCI Data Working Group
Amounts: no units in this file; such an amount is in the reference unit of its flow, which a separate flow dataset defines
copyright: false

## General comment
The belt conveys the gravel with particle size less than 1cm to the sand making machine to produce 4~7mm coarse sand.

## Reference product
- sand: 133333
  生产的4~7mm的粗砂

## Inputs
- gravel: 133333; measured
  皮带将粒径小于1cm的碎石输送至制砂机内，生产4~7mm的粗砂
- electricity mix: 144; measured
  制砂机用电量

## Review details
Inventory: The internal review was done by several iteration steps concerning raw data validation, raw data documentation, representativity, completeness and consistency of modelling with regard to ISO 14040 and 14044.; Documentation: The review of the documentation was performed by Ecobilan and is in compliance with ISO 14040 and 14044. The data set documentation is correct in view of the appropriateness of the information provided. It includes all relevant information in view of data quality and scope of application of the respective LCI result.

## Data sources
- 年产 60 万吨机制砂建设项目环评报告
