# 湿蒸法棉布染整加工;印染棉布;烧毛

Dataset: ILCD process, Unit process, single operation
Geography: SZ-JS-CN
Reference year: 2012
Classification: Unit processes / Systems / Textiles, furnitures and other interiors
Generated by: 段颖凡, 1300925579@qq.com
Owner: 天工LCI数据工作小组
Review: Dependent internal review by 天工LCI数据工作小组
Amounts: no units in this file; such an amount is in the reference unit of its flow, which a separate flow dataset defines
copyright: false
licenseType: Free of charge for all users and uses

## General comment
烧毛是印染过程中的一项处理，其目的是通过使用火焰去除棉布表面的杂毛或短绒。这个过程通常涉及将棉布通过火焰或加热装置，使其表面的毛发或细长纤维被燃烧掉，从而提高织物的整体光洁度和质感。

## Geography
本研究选取江苏省某印染企业为重点调研对象，该企业位于长三角经济圈中的常熟。

## Technical purpose
湿蒸法棉布染整加工过程主要用于纺织行业对棉布进行处理。该工艺包括印刷、染色和烧毛操作。烧毛用于燃烧布料表面纤维以产生光滑的表面。煤炭被用于锅炉生成蒸汽和加热传热油，以达到烧毛和拉幅定型（拉伸和确定布料宽度）工艺所需的高操作温度。该特定用例针对的是位于江苏省常熟的长三角经济圈内的纺织企业。

## Reference product
- Cotton Fabric: 167; measured

## Inputs
- Electricity: 98.8; measured
- Standard coal: 231; measured
- Crude coal: 21.8; calculated
- Cleaned coal: 54; calculated
- Fuel Oil: 0.465; calculated
- heavy fuel oil: 0.14; calculated
- Diesel oil: 0.64; calculated
- Coke Oven Gas: 0.853; calculated
- natural gas: 0.0109; calculated
- Gasoline (regular): 1400; measured
- river water: 5960; measured
- freshwater: 541; measured

## Outputs
- carbon dioxide (fossil): 670; calculated
- carbon monoxide (fossil): 0.0714; calculated
- sulfur dioxide: 4.71; calculated
- methane (fossil): 3.2; calculated
- Nitrogen oxides: 0.144; calculated
- nitrous oxide: 0.133; measured
- particles (> PM10): 0.201; calculated
- ammonia: 8.6e-6; measured
- non-methane volatile organic compounds: 0.00174; measured
- waste water - untreated: 4460; measured
- chemical oxygen demand: 5.08; calculated
- Suspended solids, unspecified,Suspended solids, unspecified: 0.552; calculated
- volatile organic compound: 0.265; calculated
- lead: 1.71e-6; calculated
- mercury: 3.6e-8; calculated
- fluorine: 3.24e-7; calculated
- cadmium: 6.35e-8; calculated
- arsenic: 1.47e-6; calculated

## Use advice
生命周期评估数据使用者应仔细考虑蒸汽锅炉和导热油锅炉之间的煤炭消耗比例，根据调研企业的清洁生产报告，比例为17:1。假设烧毛和拉幅定型的煤炭消耗量相等。作为导热介质使用的汽油的生产和排放数据应平均分配到这两个过程中，因为它在系统中循环流动，损失很少，也不产生相关的污染物排放。应用此数据时，确保与过程中使用的能源源和数据的地理特定性（中国江苏省）保持方法论上的一致性。

## Review details
清单： 内部审查通过几个迭代步骤完成，涉及原始数据验证、原始数据记录、代表性、完整性、与 ISO 14040 和 14044 有关的建模的一致性。

## Data sources
- 朱亚楠. 棉布连续轧染工艺生命周期环境影响评价. (南京大学, 2012).
