# 修复后土壤;农田汞污染土壤修复;酸促低温热解析

Dataset: ILCD process, Unit process, black box
Geography: GZ-CN
Reference year: 2016
Classification: Unit processes / Other Services / Repair and maintenance
Functional unit: The functional unit in this study is the treatment of 1 tonne of mercury contaminated top soil in agricultural land to meet regulatory standards. The average initial mercury concentration is 134 mg/kg.
Generated by: 杨欣桐, yangxt@caep.org.cn
Owner: 天工LCI数据工作小组
Review: Dependent internal review by 天工LCI数据工作小组
Amounts: no units in this file; such an amount is in the reference unit of its flow, which a separate flow dataset defines
copyright: false
licenseType: Free of charge for all users and uses

## General comment
根据实验室规模的可行性研究，可以通过在700°C下加热30分钟或在400°C下添加柠檬酸加热60分钟来修复受汞污染的土壤

## Geography
研究地点位于中国南方贵州省，为受汞污染的农田。这一特殊案例代表了农业用地被附近的采矿和冶炼作业污染的典型规模和情景。

## Technology and included processes
受污染的土壤被挖掘并堆放在现场。对土壤进行粉碎和筛分，以去除包括塑料、橡胶、岩石等在内的大碎屑。首先，在土壤放入窑中之前，增加一个额外的酸混合步骤，在酸添加中使用15:1摩尔比的最佳剂量比。在400°C下加热60分钟以达到1.5 mg/kg的清理目标后，通过向土壤喷水来冷却土壤。冷却后，将土壤堆放在现场，然后运到附近的位置进行堆放（即非有益用途）。在热处理过程中，大气通过真空泵连续吸入窑中，蒸发的汞与废气一起进行。然后使用水冷系统并随后使用空气-空气热交换器来冷却排气。大多数汞化合物在两个分液罐中通过冷凝去除。然后，废气流经两个空气相、硫浸渍的活性炭容器，以满足中国新排放源12 mg/m3的空气排放阈值。冷凝水用金属清除剂、氢氧化钙和聚氯化铝凝结，污泥脱水。污泥被集装箱化并运输到永久储存设施进行长期汞处理。上清液由两个液相、硫浸渍的活性炭容器处理。低温加热不会显著改变土壤性质；因此，处理后的土壤被放回挖掘的农业用地区域，以便立即重新利用。

## Technical purpose
该数据集描述了一个土壤修复过程，其适用于因附近采矿和炼冶作业受汞污染的农田。细节上它展现了一种处理含汞土壤以达到适合农业使用的监管清洁目标的方法。修复技术涉及加热土壤以促进汞的解吸，并进行额外处理以满足中国的空气和水排放标准。该过程允许经过处理的土壤重新用于农业目的，维持了土地的生产力。

## Reference product
- Remediated soil: 1000; missing unimportant

## Inputs
All rows: missing unimportant
- coal-based powdered activated carbon: 1.1
- Plastic (unspecified): 0.25
- Steel: 1.6
- Concrete: 0.02
- Metal scavengers: 1.78
- hydrated lime dry slaked: 1.78
- Tap Water: 0.1
- transport in t*km: 13
- Electricity: 518.4
- Waste (solid): 3.6
  Mercury sludge for permanent storage
- Waste (solid): 1.1
  PAC with mercury residual for landilling
- contaminated soil: 1000

## Use advice
该数据集的用户应注意，所描述的过程特定于农业环境中受汞污染的土壤，特别是反映了中国南方贵州省的典型条件。当在生命周期评估或类似研究中应用这些数据时，请确保如地方法规、土壤性质和污染水平等背景因素是可比的。报告中强调的热解吸技术及其后续处理应针对目标地区进行技术适用性评估。此外，数据集中详细说明的输入输出流程以及能源消耗必须仔细核算，以确保准确的环境影响评估。

## Review details
清单： 内部审查通过几个迭代步骤完成，涉及原始数据验证、原始数据记录、代表性、完整性、与 ISO 14040 和 14044 有关的建模的一致性。

## Data sources
- Hou D ,Gu Q ,Ma F , et al. Life cycle assessment comparison of thermal desorption and stabilization/solidification of mercury contaminated soil on agricultural land [J]. Journal of Cleaner Production, 2016, 139 949-956.
