# 熟料生产|熟料

Dataset: ILCD process, LCI结果
Geography: CN
Reference year: 2022
Classification: Materials production / Other mineralic materials
LCI method principle: Other
Generated by: 杨思琪
Amounts: no units in this file; such an amount is in the reference unit of its flow, which a separate flow dataset defines
copyright: false

## General comment
生产水泥熟料。

## Geography
长江沿线的某水泥有限公司

## Model description
功能单位为1t P·I型硅酸盐水泥。水泥的全生命周期碳排放边界设定为从“摇篮”到“大门”，即从能源上游的开采、生产及运输阶段算起，到成品水泥运输至使用企业为止。

## Reference product
- clinker: 1000
  熟料

## Inputs
- limestone, crushed, for mill: 1382; measured
  石灰石
- sandstone: 47; measured
  砂岩
- iron ore: 19; measured
  铁矿石。缺少相关统计资料，按与粘土相同计算。

## Outputs
- carbon dioxide: 525.059; calculated
  CO2。不包括熟料煅烧时的碳排放。

## Cut-off and completeness
只关注水泥熟料生产的碳足迹。数据不完整，碳排放量未包含“熟料煅烧过程的碳排放”。

## Data treatment and extrapolations
碳排放值：各单元过程碳足迹数据累加。

## Data sources
- 甘万贵 & 赵青林. (2022). 钢渣烧制硅酸盐水泥熟料的减碳效果分析. 建材世界, 43(6), 121–125.
