# 氧化铝生产; 冶金用氧化铝 ; 铝土矿 ; 2016年

Dataset: ILCD process, Unit process, single operation
Geography: CN
Reference year: 2021
Classification: Unit processes / Materials production / Non-energetic raw materials
Generated by: 封羽真, fyz22
Owner: 天工LCI数据工作小组
Review: Dependent internal review by 天工LCI数据工作小组
Amounts: no units in this file; such an amount is in the reference unit of its flow, which a separate flow dataset defines
copyright: false
licenseType: Free of charge for all users and uses

## General comment
本工艺生产的氧化铝用于冶金应用。它通常用作铝生产工业中提取金属铝（通过霍尔-埃鲁法）的主要原料。此数据集代表了来源自铝土矿并在2016年精炼用于工业用途的氧化铝。

## Time period
文献发表日期

## Reference product
- aluminium oxide, metallurgical: 1000; software or database
  alumina

## Inputs
All rows: software or database
- soda ash, dense: 137.77
  soda ash
- Petroleum Coke: 845.986
  Energy sources proportion of energy consumption is coal: fuel oil: coke: natural gas: coke even gas=46.0%: 11.0%: 7.1%: 14.1%: 21.7%
- coal gas: 2585.62
  (same comment as for Petroleum Coke)
- natural gas, high pressure: 1680.06
  (same comment as for Petroleum Coke)
- fuel oil, unspecified: 1310.68
  (same comment as for Petroleum Coke)
- hard coal: 5481.04
  (same comment as for Petroleum Coke)
- Water, unspecified natural origin: 1.27
  water consumption

## Data selection and combination
本研究的数据参考了PA、SA、电力等背景数据的LCA数据。PA数据来自统计数据源，SA数据主要来自文献。背景数据主要来自中国科学院生态环境研究中心CASRCEES 2018建立的中国本地化LCA数据库，涵盖能源、材料、交通、废物管理等LCA数据。

## Use advice
本研究中的LCA数据应用于评估冶金用途氧化铝生产的环境绩效。应关注数据收集的年份（2016年），因为自那时以来，技术和环境法规可能已经发展变化。当使用此数据集时，用户应确保用可用的最新LCA数据更新数据集，并在应用数据集时考虑地理、时间和技术相关性。对于从摇篮到大门的评估，包括铝土矿的运输和原材料提取的影响。并将来自CAS RCEES或等效数据库的中国本地化数据更新纳入考虑。

## Review details
清单： 内部审查通过几个迭代步骤完成，涉及原始数据验证、原始数据记录、代表性、完整性、与 ISO 14040 和 14044 有关的建模的一致性。

## Data sources
- Ding, N., Liu, N., Lu, B. & Yang, J. Life cycle greenhouse gas emissions of aluminum based on regional industrial transfer in China. J. Ind. Ecol. 25, 1657–1672 (2021).
