# 秸秆运输｜小麦秸秆｜8吨卡车

Dataset: ILCD process, Unit process, single operation
Geography: CN
Reference year: 2020
Classification: Unit processes / Transport services / Road
Functional unit: taking 1 ton of wheat straw as the functional unit
LCI method principle: Consequential
Generated by: 刘超硕, liucs22@mails.jlu.edu.cn
Owner: 天工LCI数据工作小组
Review: Dependent internal review by 天工LCI数据工作小组
Amounts: no units in this file; such an amount is in the reference unit of its flow, which a separate flow dataset defines
copyright: false
licenseType: Free of charge for all users and uses

## General comment
该工艺数据涉及使用8吨卡车运输小麦秸秆。这种运输功能是农业产业或生物能源生产供应链中不可或缺的一部分，在那里小麦秸秆被用作原材料或原料。

## Reference product
- Wheat straw: 1000; measured

## Inputs
- Diesel: 2.685; measured

## Outputs
All rows: measured
- nitrogen dioxide: 0.09
- nitrous oxide: 0.000354
- hydrocarbons (unspecified): 0.014
- carbon dioxide (fossil): 8.698
  原文未区分排放源为生物源或化石源，根据专家判断此处为化石源。
- carbon monoxide,carbon monoxide (fossil): 0.052
  原文未区分排放源为生物源或化石源，根据专家判断此处为化石源。

## Use advice
在使用该数据集进行生命周期评估（LCA）时，请确保适当考虑运输距离、车辆燃油效率和载重系数。该数据集的功能单元是运输1吨小麦秸秆。如果运输条件（例如距离、车辆类型）与所述工艺不同，则应进行调整。排除任何上游过程，如小麦秸秆的生产或卡车的制造。该数据集应与其他数据集结合使用，以模拟产品的完整生命周期。

## Review details
清单： 内部审查通过几个迭代步骤完成，涉及原始数据验证、原始数据记录、代表性、完整性、与 ISO 14040 和 14044 有关的建模的一致性。

## Data sources
- Cheng, G., Zhao, Y., Pan, S., Wang, X. & Dong, C. A comparative life cycle analysis of wheat straw utilization modes in China. Energy 194, 116914 (2020).
