# Production stage | crude oil | logging, drilling and oil production engineering

Dataset: ILCD process, Unit process, single operation
Geography: DQ-HLJ-CN
Reference year: 2018
Classification: Materials production / Other mineralic materials
LCI method principle: Attributional
LCI method approaches: Consequential
Generated by: zimeng li, 1577978537@qq.com
Review: Dependent internal review by Tiangong LCI Data Working Group
Amounts: no units in this file; such an amount is in the reference unit of its flow, which a separate flow dataset defines
copyright: false

## General comment
Mining Link

## Geography
This enterprise is the largest Daqing crude oil processing base in China.

## Inputs
- LPG - liquefied petroleum gas: 5.837e9; uniform; article inperiodical
  输入端石油中碳输入总量。其中85%来源于大庆油田，占大庆油田
  2015 年石油产量的 14%。该企业是全国最大的大 庆原油加工基地。

## Review details
Inventory: The internal review was done by several iteration steps concerning raw data validation, raw data documentation, representativity, completeness and consistency of modelling with regard to ISO 14040 and 14044.; Documentation: The review of the documentation was performed by Ecobilan and is in compliance with ISO 14040 and 14044. The data set documentation is correct in view of the appropriateness of the information provided. It includes all relevant information in view of data quality and scope of application of the respective LCI result.

## Data sources
- 吴明 et al. 基于物质流和生命周期分析的石油行业碳排放. zykx 40, 1287–1296 (2018).
