# 市政污水处理; 污水 ; AAO+MBR处理工艺（地上）

Dataset: ILCD process, Unit process, single operation
Geography: GZ-GD-CN
Classification: Unit processes / End-of-life treatment / Wastewater treatment
Generated by: 黄润垚, runyaoh@163.com
Owner: 天工LCI数据工作小组
Review: Dependent internal review by 天工LCI数据工作小组
Amounts: no units in this file; such an amount is in the reference unit of its flow, which a separate flow dataset defines
copyright: ['opt4ROkqig']
licenseType: Free of charge for all users and uses

## General comment
市政污水处理中，采用地上的AAO+MBR处理工艺是一种先进的污水处理技术组合。该工艺首先利用AAO（厌氧-缺氧-好氧）将污水引入处理系统，在好氧区域进行有机物的氧化降解，然后进入好氧-好氧区域进一步去除氮磷等营养物质。随后，通过MBR（膜生物反应器）工艺，将水和微生物有效隔离，通过微孔滤膜实现固液分离，确保了处理水的高质量。地上的布置方式使得该工艺具有较小的场地要求，并且易于维护和操作。该工艺组合能够高效地去除污水中的有机物、氮磷等污染物，产出的水质稳定可靠，符合严格的排放标准。

## Geography
广州市白云区沙太北路以东、犀牛南路以北地段

## Technology and included processes
AAO+MBR处理工艺（地上）具有以下技术特性：膜生物反应器（MBR）： 该工艺采用膜生物反应器（MBR），其中使用微孔膜将生物反应器中的水和微生物有效地隔离开来。这种膜隔离技术能够实现高效的固液分离，提高处理水的水质。全自动好氧-好氧（AAO）处理工艺： AAO工艺结合了好氧和缺氧的处理区域，允许在一个系统中进行有机物和氮、磷等营养物质的去除。操作中需要控制好氧区域和缺氧区域的氧气供应、混合速率和气液比等参数，以维持最佳的微生物生长环境和反应效率。膜模块操作条件： 对于MBR膜模块的操作，需要注意维持适当的跨膜压差、通量和清洗周期，以保证膜模块的稳定运行和长期使用寿命。相关上游和下游过程： 该工艺的上游过程包括污水进水口的预处理，包括筛网过滤、格栅过滤和沉淀等步骤，以去除大颗粒物和沉淀物。下游过程则包括膜模块的清洗和维护，以及可能的进一步处理步骤，如高级氧化或消毒，以确保最终处理水达到排放标准。

## Technical purpose
AAO+MBR（缺氧-厌氧-好氧 + 膜生物反应器）处理工艺单元专为高级污水处理和循环回用设计。该工艺通常应用于市政或工业污水处理设施，用于水质净化和污染物减少。该工艺适用于需要高效空间利用和高质量出水的区域，比如位于广州市白云区沙太北路以东、犀牛南路以北的城市区域。

## Reference product
- Wastewater: 0.1; input; measured

## Inputs
All rows: measured
- Secondary Steel Making Slag: 3.151e6
- aerated concrete block: 24033, 5693 (2 entries)
- Compost: 846
- Electricity: 1.998e7, 7.56e6 (2 entries)
- chemical oxygen demand: 0.00027
- biological oxygen demand: 0.00016
- nitrogen, total (excluding N2): 3.5e-5
- ammonia: 3e-5
- Phosphorus: 4.5e-6
- Suspended solids, unspecified,Suspended solids, unspecified,Suspended solids, unspecified: 0.00022
- primary energy from geothermics: 2.124
- sodium hypochlorite: 41.7, 2320 (2 entries)
- Gasoline (regular): 218

## Outputs
All rows: measured
- zirconium: 2e-5
- nitrogen trifluoride: 5e-6
- nitrogen monoxide: 1.17e-5
- nitrogen, total (excluding N2): 3.2e-7
- phosphorus, total: 3e-7
- carbon dioxide (fossil),carbon dioxide (fossil): 5e-7
- Sludge: 56260
- municipal solid waste deposition: 2.985e7
- steel rebar: 1.197e6

## Use advice
评估AAO+MBR处理工艺时，需要考虑地理区域特定的上下文和法规要求。使用该数据集的用户应考虑进水污水特性的潜在变化，并相应调整工艺参数。在没有适当校准的情况下谨慎将数据应用于其他区域。生命周期清单和影响评估人员必须包括能源使用、化学品消耗和处理效率的考虑。如果适用，应明确声明排除回收流。此外，技术进步或法规变化可能会影响数据的相关性；因此，数据可能需要随时间更新。

## Review details
清单： 内部审查通过几个迭代步骤完成，涉及原始数据验证、原始数据记录、代表性、完整性、与 ISO 14040 和 14044 有关的建模的一致性。

## Data sources
- 郝晓地,于文波,王向阳等.地下式污水处理厂全生命周期综合效益评价[J].中国给水排水,2021,37(07):1-10.DOI:10.19853/j.zgjsps.1000-4602.2021.07.001.
