# Electricity production ; Electricity ; Thermal power (49.5%) + hydropower (29.7%) + wind power (13.7%) + solar power (7.1%)

Dataset: ILCD process, Partly terminated system
Geography: GS-CN
Reference year: 2019
Classification: Energy carriers and technologies / Electricity
LCI method principle: Other
Generated by: Ruoxi Xiong, xiongrx0126@163.com
Owner: Tiangong LCI Data Working Group
Review: Dependent internal review by Tiangong LCI Data Working Group
Amounts: no units in this file; such an amount is in the reference unit of its flow, which a separate flow dataset defines
copyright: false
licenseType: Free of charge for all users and uses

## General comment
Forms of electricity generation include thermal power, hydropower, wind power and solar power

## Time period
Calculated based on data from the 2019 Energy Statistics Yearbook

## Technical purpose
The industrial process described pertains to the production of electricity through a mix of energy sources: thermal power, hydropower, wind power, and solar power. This electricity is utilized for general consumer use, industrial consumption, and in the services sector. The breakdown of sources includes 49.5% from thermal power, 29.7% from hydropower, 13.7% from wind power, and 7.1% from solar power. This energy mix is used to meet the varying demand and reliability requirements of the electricity grid.

## Reference product
- Electricity: 3.6; calculated

## Outputs
- carbon dioxide: 0.413; calculated
- sulfur dioxide: 7.1e-5; calculated
- Nitrogen oxides: 0.000112248; calculated
- Dust (unspecified, from stack): 1.3671e-5; calculated

## Data treatment and extrapolations
For the accounting method, please refer to the "Enterprise Greenhouse Gas Emissions Accounting Methods and Reporting Guidelines for Power Generation Facilities". Different forms of power generation and fuel consumption come from Chapter 3 (Energy Production) and Chapter 6 (Regional Energy Balance Sheet) in the "China Energy Statistical Yearbook 2020". The fuel parameters such as low calorific value and carbon content per unit calorific value used to calculate the carbon dioxide emission factor come from the "2019 China Regional Power Grid Carbon Dioxide Baseline Emission Factor Calculation Instructions OM" and the "Enterprise Greenhouse Gas Emission Accounting Method and Reporting Guide for Power Generation Facilities" 》

## Use advice
When using this industrial process data for the purpose of Life Cycle Assessment (LCA), careful attention must be given to the data source and calculation methodology. The carbon emission factor is calculated based on the 2019 Energy Statistics Yearbook data, and the accounting method is outlined in the 'Enterprise Greenhouse Gas Emissions Accounting Methods and Reporting Guidelines for Power Generation Facilities.' Users should ensure that the calculations of carbon emissions from different forms of electricity generation, along with the consumption of fuels, reflect regional variations and specific characteristics in line with the data from 'China Energy Statistical Yearbook 2020' and '2019 China Regional Power Grid Carbon Dioxide Baseline Emission Factor Calculation Instructions OM.' It is also advised to regularly update the dataset as new statistics become available to maintain accuracy in LCA studies.

## Review details
Inventory: The internal review was done by several iteration steps concerning raw data validation, raw data documentation, representativity, completeness and consistency of modelling with regard to ISO 14040 and 14044.

## Data sources
- 熊若熙. 中国电力生产和消费二氧化碳与污染物排放因子核算. (清华大学, 2023).
