# 氧化铝生产 ; 冶金用氧化铝 ; 混联法 ; 铝土矿

Dataset: ILCD process, Unit process, single operation
Geography: CN
Reference year: 2011
Classification: Materials production / Non-energetic raw materials
Generated by: 谢金良, jinliang.research@gmail.com
Owner: 天工LCI数据工作小组
Review: Dependent internal review by 天工LCI数据工作小组
Amounts: no units in this file; such an amount is in the reference unit of its flow, which a separate flow dataset defines
copyright: false
licenseType: Free of charge for all users and uses

## General comment
我国氧化铝生产中拜耳法、烧结法、混联法三种工艺并行。因为我国铝土矿主要为品味较低的一水硬铝，单位资源与能源消耗较高。随着生产技术的进步，拜耳法生产的氧化铝在我国铝产量中的比例已经由2000年的11.4%提升到2010年的75.8%，而烧结法则由2000年的23.65%减至5.9%。混联法为烧结法与拜耳法的组合，其能耗随烧结法与拜耳法的比例而变。

## Time period
学位论文完成日期

## Technical purpose
混联法生产的氧化铝用于冶金工业，在主要的铝生产过程中作为前体物质，经过霍尔-埃鲁法生产金属铝。鉴于中国的铝土矿主要是资源与能源消耗较高的低品味一水硬铝石，该氧化铝对国内的铝生产至关重要。

## Reference product
- aluminium oxide, metallurgical: 1000; missing unimportant

## Inputs
All rows: missing unimportant
- electricity, high voltage, aluminium industry: 1152
- bauxite: 1910
- hard coal: 393.8
- petroleum coke: 33.1
- steam, in chemical industry: 3260
- heavy fuel oil: 83.9

## Outputs
All rows: missing unimportant
- chemical oxygen demand: 0.003
- carbon dioxide (fossil): 3572
- carbon monoxide: 4.004
- sulfur dioxide: 44.079
- methane: 4.807
- Nitrogen oxides: 17.601
- VOC, volatile organic compounds, unspecified origin: 0.545
- dinitrogen: 0.176
- Dust: 9.025
  粉尘
- Solid Waste: 921
  固体废物

## Use advice
该数据集涉及混联法生产的冶金级氧化铝，仅应用于从铝土矿到原铝生产的全生命周期评估(LCA)中。在使用中应考虑随时间变化的拜耳法和烧结法比例改变的技术进步。在评价系统中排除如石灰石、沥青等辅助材料的生产，因它们对环境影响被认为是次要的。建模时，重点关注制造过程中的资源和能源消耗以及废物排放，因为这些因素主要决定了环境影响，而运输、使用和回收阶段的影响相对较小。

## Review details
清单： 内部审查通过几个迭代步骤完成，涉及原始数据验证、原始数据记录、代表性、完整性、与 ISO 14040 和 14044 有关的建模的一致性。

## Data sources
- 李贵奇. 基于生命周期思想的环境评估模型及其在铝工业中的应用. (中南大学, 2011).
