# 稀土元素;稀土元素;基线;含稀土元素矿石的浸出

Dataset: ILCD process, Unit process, single operation
Geography: NMG-CN
Reference year: 2012
Classification: Unit processes / Materials production / Non-energetic raw materials
Functional unit: Not Mentationed
LCI method principle: Attributional
LCI method approaches: Allocation - market value
Generated by: 汪涛, twang@iue.ac.cn
Owner: 天工LCI数据工作小组
Review: Dependent internal review by 天工LCI数据工作小组
Amounts: no units in this file; such an amount is in the reference unit of its flow, which a separate flow dataset defines
copyright: false
licenseType: Free of charge for all users and uses

## General comment
所述工艺用于使用传统露天采矿技术（包括钻孔和爆破）提取稀土元素（REE），提取的矿石中稀土氧化物（REO）浓度为4.1%，作为生产各种稀土产品的原料，这些产品对高科技行业、电子、磁性材料（例如NdFeB磁体）和其他高级应用至关重要。基线工业过程具体涉及浸出阶段，这是矿石选矿和提取REE的关键步骤。

## Technology and included processes
使用传统的露天采矿技术（例如钻孔和爆破）从露天矿中回收矿石。该矿蕴藏矿石 7.5 亿吨，稀土品位 4.1%

## Reference product
- Rare Earth Oxides: 1; software or database
  REO

## Inputs
All rows: software or database
- Sodium carbonate: 1
  Soda ash
- transport in t*km,transport in t*km: 0.53
  lorry >16t
- transport in t*km,transport in t*km: 9.54
  freight, rail
- Hydrochloric acid: 1
- Rare Earth Oxides: 1.77
  REO

## Outputs
- water: 0.00756; software or database

## Deviations from the LCI method approaches
In this section, we discuss the life cycle inventory (LCI) in detail. Each subsection discusses one process of the LCA. Section 3.1 describes the conventional method of rare earths in China from mineral sources. Section 3.2 describes the production process used to transform neodymium oxide into an NdFeB magnet. Finally, section 3.3 describes two alternative recycling processes that could be used. Detailed information on the LCI, assumptions, and allocation choices can be found in the Supporting Information.

## Use advice
在使用该数据集进行生命周期评估时，必须考虑包括传统露天采矿技术在内的传统REE浸出过程的特定生命周期清单（LCI）。用户必须考虑第3.1节中陈述的技术边界和假设，以准确建模REE生产。如果将此数据应用于第3.2节中描述的NdFeB磁体的下游生产，或应用于替代回收过程，则必须在LCA中准确反映这些应用，并进行相应分配和影响。支持性信息文件提供了详细的方法论考虑，应审查以确保评估的完整性和有效性。

## Review details
清单： 内部审查通过几个迭代步骤完成，涉及原始数据验证、原始数据记录、代表性、完整性、与 ISO 14040 和 14044 有关的建模的一致性。

## Data sources
- Sprecher, B. et al. Life Cycle Inventory of the Production of Rare Earths and the Subsequent Production of NdFeB Rare Earth Permanent Magnets. Environ. Sci. Technol. 48, 3951–3958 (2014).
