# Soil and Groundwater Remediation;In Situ;Soil Bioventilation;Vapor Injection Well Construction

Dataset: ILCD process, Unit process, single operation
Geography: CN
Reference year: 2022
Classification: Other Services / Repair and maintenance
Generated by: Wang Ning, wang_ning@caep.org.cn
Owner: Tiangong LCI Data Working Group
Review: Dependent internal review by Tiangong LCI Data Working Group
Amounts: no units in this file; such an amount is in the reference unit of its flow, which a separate flow dataset defines
copyright: false
licenseType: Free of charge for all users and uses

## General comment
Construction of air injection well

## Geography
案例焦化厂位于我国北方中纬度地带

## Technology and included processes
Construction of air injection and extraction wells using materials such as steel, concrete, cement, PVC, etc.

## Technical purpose
This soil remediation process, specifically in-situ bioremediation using bioventing, involves the installation of air injection systems, extraction systems, and waste gas treatment facilities. The process described by this dataset is applied as a single operation unit in a case study of a coking plant located in the mid-latitude region of Northern China.

## Reference product
- injection well: 1; measured

## Inputs
- diesel: 0.506; measured
- Polyvinyl chloride: 1000; measured
- Water (fresh water): 785; measured

## Use advice
When utilizing this dataset, users should ensure that the scope of their environmental impact assessment accurately reflects the specific conditions of the in-situ bioventing process, such as the regional climatic conditions of Northern China. Attention should be paid to the operational parameters of the air injection and extraction systems, as well as the efficacy of the waste gas treatment facilities. Users should consider potential environmental impact transfers due to the change in contaminant form during bioventing and should verify the relevance of the data to the specific site being assessed.

## Review details
Inventory: The internal review was done by several iteration steps concerning raw data validation, raw data documentation, representativity, completeness and consistency of modelling with regard to ISO 14040 and 14044.

## Data sources
- 刘文晓,夏天翔,张丽娜等.基于修复效果的污染土壤修复工程环境足迹分析[J].环境科学研究,2022,35(10):2367-2377.DOI:10.13198/j.issn.1001-6929.2022.07.05.
