# 电池片生产 ; 扩散制结 ; 半导体工艺

Dataset: ILCD process, Unit process, single operation
Geography: CN
Reference year: 2014
Classification: Unit processes / Materials production / Other materials
Functional unit: The functional unit selected for this paper is a 1 kWp
LCI method principle: Attributional
LCI method approaches: Allocation
Generated by: 杨锦锋, yjfzfshn@163.com
Owner: 天工LCI数据工作小组
Review: Dependent internal review by 天工LCI数据工作小组
Amounts: no units in this file; such an amount is in the reference unit of its flow, which a separate flow dataset defines
copyright: false
licenseType: Free of charge for all users and uses

## General comment
多晶硅

## Geography
对中国生产的单晶硅和多晶硅光伏系统进行生命周期评价

## Time period
文章发表

## Technology and included processes
电池片的生产过程包括以下几个步骤: 制绒，扩散制结，边缘刻蚀，清洗，沉积减反射层，丝网印刷上下电极，共烧形成金属接触，电池片测试

## Technical purpose
所述工业过程涉及单晶硅和多晶硅光伏系统的PV电池片生产。这些光伏电池是太阳能电池板的关键组件，用于捕捉太阳能并将其转换为电力。该过程专门用于制造中国的光伏电池片，贡献于单晶硅和多晶硅太阳能系统的生命周期。最终产品应用范围广泛，从家庭和商业太阳能电池板安装到大规模太阳能农场。

## Reference product
- Multi-Si solar cell,Multi-Si solar cell,Multi-Si solar cell: 1; measured
  电池片

## Inputs
All rows: measured
- Multi-Si wafer,Multi-Si wafer,Multi-Si wafer: 1.06
  硅片
- silver: 0.02
  银
- aluminium: 0.12
  铝
- dinitrogen: 3.6
  氮气
- oxygen: 0.18
  氧气
- Sodium hydroxide: 0.28
  氢氧化钠
- Hydrochloric acid: 0.08
  盐酸
- Electricity: 187.2
  电耗

## Outputs
All rows: measured
- carbon dioxide (fossil): 57
  CO2
- carbon monoxide,carbon monoxide (fossil): 0.1
  一氧化碳
- methane (fossil): 0.1
  甲烷
- Nitrogen oxides: 0.3
  氮氧化物
- sulfur dioxide: 0.47
  二氧化硫
- particles (> PM10),particles (>PM10): 0.9
  粉尘
- biological oxygen demand: 0.02
  生物需氧量
- chemical oxygen demand: 0.05
  化学需氧量
- DOC, Dissolved Organic Carbon: 0.01
  DOC
- total organic carbon: 0.02
  TOC

## Deviations from the LCI method approaches
本文的研究目的是对中国生产的单晶硅和多晶硅光伏系统进行生命周期评价，分析废弃处理的方法和不同废弃处理方法对环境的影响

## Data selection and combination
输入输出物质参考胡润青、刁周玮和Scholten等人的文章

## Use advice
使用光伏电池片生产过程的LCA数据集时，请确保包括所有相关步骤，如制绒、扩散制结、边缘蚀刻、清洁、沉积减反射层、丝网印刷电极、共烧和电池片测试。通过引用胡润青、刁周玮和Scholten等人的方法论和结果，比较废弃过程中的环境影响。准确模拟该1 kWp功能单元的使用阶段行为至关重要，并考虑区域特定的废弃方法和生命周期评价的环境影响。

## Review details
清单： 内部审查通过几个迭代步骤完成，涉及原始数据验证、原始数据记录、代表性、完整性、与 ISO 14040 和 14044 有关的建模的一致性。

## Data sources
- 李鹞 & 于随然. 中国光伏系统的生命周期评价. 环境工程 32, 119–124 (2014).
