# 生物质航空燃油气化费托合成;分馏提质路线

Dataset: ILCD process, Unit process, black box
Geography: CN
Classification: Unit processes / Energy carriers and technologies / Renewable fuels
Functional unit: 1 MJ aviation fuel
LCI method principle: Attributional
LCI method approaches: Allocation - market value
Generated by: 张净晶, 22110740027@m.fudan.edu.cn
Owner: 天工LCI数据工作小组
Review: Dependent internal review by 天工LCI数据工作小组
Amounts: no units in this file; such an amount is in the reference unit of its flow, which a separate flow dataset defines
licenseType: Free of charge for all users and uses

## General comment
生物质经研磨干燥等预处理操作后进入气化器进行反应，通入气化剂，气化反应器为循环流化床炉。反应产物经过冷却后分离出废气和固体杂质，得到的合成气经净化调变后（主要是水煤气变换反应）达到费托合成反应所需的最优氢碳比（H2/CO=2）。在钴基催化剂的作用下发生费托合成反应，将反应产物按气、液、固三相进行分离。气相的低碳组分（C1-C4）进入叠合齐聚单元发生叠合烷基化反应和烯烃聚合反应，生成 C5+ 烃类组分送入加氢异构单元生产液相的烷烃组分，未反应的低碳烃类分离出甲烷，并和工艺中其它阶段生成的甲烷进行统一收集，收集的甲烷和净化调变过程中产生的二氧化碳一起进入甲烷二氧化碳重整单元进行制氢反应，生成的氢气进入提质单元供给加氢异构和加氢裂化反应，H2 和 CO 回流至费托合成反应器进行循环反应。C5-C16 的液相组分 经过加氢异构后和 C16+重质组分加氢裂化后生成的 C5-C16 液体烷烃混合，再通过精馏分离，C8-C16 产物作为航油组分输出，C5-C7 产物作为汽油组分输出；C16+重质组分在高温 环境下同氢气发生加氢裂化反应，产生 C5-C16 液体烷烃组分、C3-C4 液化石油气组分（LPG）和未反应的蜡相产物。提质单元的各环节均会产生部分可燃气体（低碳烃、H2、CO 等），分离出其中的 H2 和 CO 进入费托合成反应器进行再反应，部分甲烷进入重整单元制氢，剩余可燃气体进入锅炉燃烧，放出的热量部分供给进入反应器的物流进行加热，部分进入能量回收单元加热水产生水蒸气进行发电。

## Technical purpose
该生物质航空燃料生产过程通过气化、费托合成以及后续的分馏提质，将玉米秸秆（玉米种植的农业废弃副产品）转化为高价值的航空燃料和汽油组分。该过程使用循环流化床炉用于生物质的气化和钴基催化剂用于费托合成反应，以产生适合作为航空燃料和汽油使用的液体燃料。过程中产生的多余气体被用于能量回收和发电。

## Model description
运用 Aspen Plus 软件搭建工艺完整流程的仿真模型并进行模拟计算，在质量平衡的基础上获得各项工艺的质量流、能量流、热力学参数和反应器的功耗

## Reference product
- methane (biogenic): 0.017; calculated
  原文未区分bio和fossil，根据专家判断此处为bio

## Inputs
All rows: calculated
- oxygen: 0.07
- water: 0.0019
  灌溉用水
- Electricity: 0.02448
  种植消耗电力
- Electricity: 0.08352
  打包秸秆消耗电力
- Light fuel oil: 0.0073
- zinc oxide: 0.005
- Electricity: 1.476
- water: 6.5

## Outputs
- nitrous oxide: 0.001; calculated
- ammonia: 0.004; calculated
- carbon dioxide (biogenic): 2.55e-9; calculated
  原文未区分bio和fossil，根据专家判断此处为bio
- waste water - untreated: 0.175; calculated

## Deviations from the LCI method approaches
本文选用的玉米秸秆是玉米种植过程中产生的农业废弃物，因此种植过程中资源投入和污染物排放造成的环境影响需通过一定方式进行分配，本文中采用经济系数进行分配计算

## Use advice
在使用此数据集进行生命周期评估时，要确保基于经济系数正确地分配来自玉米种植阶段的环境影响。使用Aspen Plus软件构建的仿真模型应该进行仔细的评审，准确评估质量平衡和能量平衡，考虑热力学参数和功耗。必须准确模拟副产品利用、能量回收和发电阶段，以便全面应用生命周期评估。结果应与实际加工条件相匹配，考虑原料质量和工艺效率的潜在变化。

## Review details
清单： 内部审查通过几个迭代步骤完成，涉及原始数据验证、原始数据记录、代表性、完整性、与 ISO 14040 和 14044 有关的建模的一致性。

## Data sources
- 邓玥. 纤维素类生物质气化催化合成制备航空燃油系统的综合评价. (东南大学, 2021).
