# 湿蒸法棉布染整加工|印染棉布|煮练氧漂

Dataset: ILCD process, Unit process, single operation
Geography: SZ-JS-CN
Reference year: 2012
Classification: Materials production / Other mineralic materials
Generated by: Yingfan Duan, 1300925579@qq.com
Review: Dependent internal review by Tiangong LCI Data Working Group
Amounts: no units in this file; such an amount is in the reference unit of its flow, which a separate flow dataset defines
copyright: false

## General comment
煤被用于蒸汽和导热油锅炉中以分别产生蒸汽和较高的操作温度。根据所调研企业的清洁生产报告，两种类型锅炉煤消耗量比为17:1。其中，使用蒸汽的工序环节依次包括煮练氧漂、丝光、磨毛、平幅水洗、培烘和轧染。蒸汽用于对上述过程中坯布的烘干处理，除轧染需要两步烘干外，其余全为一步烘干，而煮练和氧漂有两个烘缸，其他过程只有一个烘缸。假设每步烘干过程中每个烘缸使用的蒸汽量相同，则上述过程使用蒸汽的比例为2:1:1:1:1:2。

## Geography
本研究选取江苏省某印染企业为重点调研对象，该企业位于长三角经济圈中的常熟。

## Inputs
- Electricity: 523; measured
- Crude coal: 293; calculated
- Fuel Oil: 6.25
- heavy fuel oil: 1.88
- diesel: 8.6
- Coke Oven Gas: 11.5
- natural gas: 0.147
- process steam: 6.3e7
- Cotton: 167; measured
- hydrogen peroxide: 25
  双氧水（输入
- Stabilizer: 26.7
- Penetrant: 40
- Chelating Agent: 20
- sodium hydroxide: 183
- river water: 34500
- Water (fresh water): 4600; measured

## Outputs
- carbon dioxide: 5520; calculated
- carbon monoxide: 0.279
- sulfur dioxide: 4.15; estimated
- methane: 27.2; calculated
- Nitrogen oxides: 0.585
- nitrous oxide: 0.0862; calculated
- Dust (unspecified, from stack): 0.867; estimated
- ammonia: 1.53e-5
- non-methane volatile organic compounds: 0.00825
- waste water - untreated: 31800
- chemical oxygen demand: 36.2; measured
- Suspended solids, unspecified: 3.93; measured
- lead: 6.39e-6
- mercury: 1.34e-7
- fluorine: 1.21e-6
- cadmium: 2.37e-7
- arsenic: 5.47e-6

## Review details
Inventory: The internal review was done by several iteration steps concerning raw data validation, raw data documentation, representativity, completeness and consistency of modelling with regard to ISO 14040 and 14044.; Documentation: The review of the documentation was performed by Ecobilan and is in compliance with ISO 14040 and 14044. The data set documentation is correct in view of the appropriateness of the information provided. It includes all relevant information in view of data quality and scope of application of the respective LCI result.

## Data sources
- 朱亚楠. 棉布连续轧染工艺生命周期环境影响评价. (南京大学, 2012).
