# 坝顶小水电站的发电量

Dataset: ILCD process, Unit process, single operation
Geography: ZY-GZ-CN
Reference year: 2012
Classification: Unit processes / Energy carriers and technologies / Electricity
Functional unit: the functional unit (FU) is defined to be1 MWh of net electricity produced by the plant
LCI method principle: Attributional
LCI method approaches: Consequential
Generated by: 庞明月, pangmingyue@cqu.edu.cn
Owner: 天工LCI数据工作小组
Review: Dependent internal review by 天工LCI数据工作小组
Amounts: no units in this file; such an amount is in the reference unit of its flow, which a separate flow dataset defines
copyright: false
licenseType: Free of charge for all users and uses

## General comment
观音岩小型水电站的作用是产生清洁可再生能源。该电站专门用于通过将流动水的动能转换为机械能，进而驱动电发电机，以生成电力。该基于坝趾的电站为当地能源基础设施产生的电力具有重要意义，因为它可以输送到当地电网，有潜力支持贵州省西北地区的居民、商业和工业活动。

## Geography
The Guanyinyan SHP plant is a typical dam-toe-based project,located on the main stream of the Xishui River (N28° 32′24.89″, E106° 06′ 39.81″) in Chishui City, northwest ofGuizhou Province in China

## Technology and included processes
The main purpose of this projectis to generate electricity. The dam impounds water and forms areservoir with a volume of 1.21E+06 m3 and an average waterhead of 11.75 m. Through a penstock, water descends to theturbines installed in the powerhouse with an average dischargeof 32.2 m3/s, through which the kinetic energy of the flowingwater is converted into mechanical energy to drive the electricgenerators. The plant is composed of two hydro-turbines, eachwith a generating capacity of 1.6 MW. The electricity produced is directed to a transmission line and then integratedinto the local grid after voltage transformation. Finally, theused water is returned to the main channel through a tailrace.Excluding the plant self-supply electricity use, the averageannual net electricity output of the plant to access grid is6.28 GWh, accounting for 57.3 % of the designed output.

## Reference product
- electricity from hydroelectric power plant: 2.2608e7; measured

## Inputs
- (unnamed flow): 5e6; measured
- Steel sections: 240000, 41000, 30000 (3 entries); measured
- Wood: 140; measured
- explosive: 15000; measured
- Diesel: 63000; measured
- Electricity: 1.332e6, 504000 (2 entries); measured
- Stainless steel: 1300; measured
- iron: 730; measured
- aluminium: 54; measured
- copper: 21000; measured
- Steel sections: 4700; measured
  Speed governor
- Steel sections: 480; measured
  Exciter
- Steel sections: 10000; measured
  King valve
- Steel sections: 13000; measured
  Crane
- Steel sections: 22000; measured
  Water gate and screen
- Steel sections: 65000; measured
  Penstock
- Transformer: 9600; measured
- transport in t*km: 590000; measured
- Lubricant oil: 6000; measured
- landfill of ferro metals: 180000, 710, 52, 1300, 21000 (5 entries); estimated

## Use advice
使用此生命周期评估（LCA）数据时，用户必须考虑观音岩小型水电站的特定特性，并将其放在评估的背景下进行考虑。关键是要考虑区域特殊性，比如可能影响水电发电环境影响的本地能源组合和地理考虑因素。此外，用户应注意此数据集定义的功能单元是植物产生的1兆瓦时净电力。这将确保在比较研究中准确和一致地应用。还必须考虑到排除电厂自用的电力供应，以避免重复计算。

## Review details
清单： 内部审查通过几个迭代步骤完成，涉及原始数据验证、原始数据记录、代表性、完整性、与 ISO 14040 和 14044 有关的建模的一致性。

## Data sources
- Pang M, Zhang L, Wang C, et al. Environmental life cycle assessment of a small hydropower plant in China[J]. The International Journal of Life Cycle Assessment, 2015, 20: 796-806.
