# Glyphosate Production | Glycine Diacetonitrile Method

Dataset: ILCD process, Unit process, black box
Geography: CN
Reference year: 2009
Classification: Materials production / Other mineralic materials
Functional unit: producing 10000 tons glyphosate
Generated by: Kailingli Liao, calinly@163.com
Review: Dependent internal review by Tiangong LCI Data Working Group
Amounts: no units in this file; such an amount is in the reference unit of its flow, which a separate flow dataset defines
copyright: false

## General comment
No flowchart

## Reference product
- glyphosate: 1e7; measured
  草甘膦

## Inputs
- Road Transport: 6.7e6
  汽车/船运（硫酸铵）
- Road Transport: 9.08e6
  汽车/船运（草甘膦）
- Road Transport: 1e7
  汽车（硫酸）
- Road Transport: 70000
  汽车（催化剂）
- Road Transport: 880000
  汽车（助剂）
- Road Transport: 2e6
  汽车（液氨）
- Road Transport: 2.6e6
  汽车（异丙胺）
- Pipeline transport: 1.64e7
  管道（三氯化磷）
- Pipeline transport: 3.87e7
  管道（液碱）
- Pipeline transport: 6.7e6
  管道（盐酸）
- Road Transport: 1.2e7
  汽车（甲醇）
- Road Transport: 1.06e7
  汽车/船运（亚氨基二乙腈）
- Auxiliary: 878000; measured
  助剂，规格0.45%
- catalyst: 67000; measured
  催化剂
- Iminodiacetonitrile: 1.0152e7; measured
  亚氨基二乙腈，规格93.5%
- sodium hydroxide: 3.8686e7; measured
  液碱，规格30%
- phosphorus trichloride: 1.6408e7; measured
  三氯化磷，规格98%
- methanal: 1.2e7; measured
  甲醛，规格36.5%
- Hydrochloric Acid: 6.667e6; measured
  盐酸，规格30%
- isopropamide: 2.622e6; measured
  异丙胺，规格0.98%
- Aqueous ammonia: 2e6; measured
  液氨，规格0.997%
- Sulfuric acid(98%): 1e7; measured
  硫酸，规格98%
- Water for industrial use: 2e9; measured
  水
- process water: 1.5e10; measured
  循环水
- electricity mix: 6.84e7; measured
  电
- process steam: 1.1e8; measured
  蒸汽，Mpa
- compressed air: 4.7e6; measured
  压缩空气，0.5MPa

## Review details
Inventory: The internal review was done by several iteration steps concerning raw data validation, raw data documentation, representativity, completeness and consistency of modelling with regard to ISO 14040 and 14044.; Documentation: The review of the documentation was performed by Ecobilan and is in compliance with ISO 14040 and 14044. The data set documentation is correct in view of the appropriateness of the information provided. It includes all relevant information in view of data quality and scope of application of the respective LCI result.

## Data sources
- 孙丽云. 龙达公司草甘膦扩建项目可行性研究. (中国海洋大学, 2009).
