# 氧化铝生产; 冶金用氧化铝 ; 铝土矿 ; 2013年

Dataset: ILCD process, Unit process, single operation
Geography: CN
Reference year: 2021
Classification: Unit processes / Materials production / Non-energetic raw materials
Generated by: 封羽真, fyz22
Owner: 天工LCI数据工作小组
Review: Dependent internal review by 天工LCI数据工作小组
Amounts: no units in this file; such an amount is in the reference unit of its flow, which a separate flow dataset defines
copyright: false
licenseType: Free of charge for all users and uses

## General comment
通过该工业过程生产的氧化铝用于冶金领域，特别是从铝土矿中提取和精炼铝。该氧化铝的高纯度适用于铝冶炼过程及铝产品的生产。

## Time period
文献发表日期

## Reference product
- aluminium oxide, metallurgical: 1000; software or database
  alumina

## Inputs
All rows: software or database
- soda ash, dense: 155.18
  soda ash
- Petroleum Coke: 1103.45
  Energy sources proportion of energy consumption is coal: fuel oil: coke: natural gas: coke even gas=46.0%: 11.0%: 7.1%: 14.1%: 21.7%
- coal gas: 3372.51
  (same comment as for Petroleum Coke)
- natural gas, high pressure: 2191.36
  (same comment as for Petroleum Coke)
- fuel oil, unspecified: 1709.57
  (same comment as for Petroleum Coke)
- hard coal: 7149.1
  (same comment as for Petroleum Coke)
- Water, unspecified natural origin: 2.52
  water consumption

## Data selection and combination
本研究的数据参考了PA、SA、电力等背景数据的LCA数据。PA数据来自统计数据源，SA数据主要来自文献。背景数据主要来自中国科学院生态环境研究中心CASRCEES 2018建立的中国本地化LCA数据库，涵盖能源、材料、交通、废物管理等LCA数据。

## Use advice
本LCA数据集的用户应注意，数据特定于2013年的冶金用氧化铝生产，并基于中国的生产工艺和标准。过程分析（PA）和敏感性分析（SA）的数据分别来自统计数据源和文献，使用时应相应地参考。用户在进行生命周期评估时应参考中国科学院生态环境研究中心（CAS RCEES）2018年的LCA数据库的背景数据，其中包括中国本地化的能源、材料、交通和废物管理数据。应用此数据到具体场景时，应考虑诸如是否包括回收等方法论考虑因素。

## Review details
清单： 内部审查通过几个迭代步骤完成，涉及原始数据验证、原始数据记录、代表性、完整性、与 ISO 14040 和 14044 有关的建模的一致性。

## Data sources
- Ding, N., Liu, N., Lu, B. & Yang, J. Life cycle greenhouse gas emissions of aluminum based on regional industrial transfer in China. J. Ind. Ecol. 25, 1657–1672 (2021).
