# Electricity/electricalenergy+heatenergy|Coalgangue/oilshale|Circulating fluidized bed boiler|All sizes / 电能/电能+热能|煤矸石/油页岩|循环流化床锅炉|所有规模

Dataset: ILCD process, Unit process, single operation
Geography: CN
Reference year: 2019
Classification: Energy carriers and technologies / Electricity
Generated by: The data was created by the Office of the Second National Pollution Source Census of the Ministry of Ecology and Environment, and the data was organized by the TianGong Plan team for ILCD format / 生态环境部第二次全国污染源普查工作办公室创建数据，天工计划团队常慧敏整理数据为ILCD格式
Owner: Tiangong LCI Data Working Group / 天工LCI数据工作小组
Review: Dependent internal review by Tiangong LCI Data Working Group / 天工LCI数据工作小组
Amounts: no units in this file; such an amount is in the reference unit of its flow, which a separate flow dataset defines
copyright: false
licenseType: Free of charge for all users and uses

## General comment
the Technical of end-of-pipe management technology for pollution volatile organic compoundis/

## Reference product
- Coal Gangue: 1000; input; calculated
  源文件中描述为为煤矸石/油页岩，此处对其进行了匹配工作，将其匹配到LCAflow库里面相最符合的流，污染物指标备注为工业废水量

## Outputs
All rows: calculated
- Waste water: 540
  污染物指标工业废水量的末端治理技术是其他（直排）。原文件中描述污染物类别为废水，污染物指标为工业废水量，此处对其进行了匹配工作，将其匹配到LCAflow库里面相最符合的流，污染物指标备注为工业废水量
- Waste water: 540
  污染物指标工业废水量的末端治理技术是其他（重复利用）。原文件中描述污染物类别为废水，污染物指标为工业废水量，此处对其进行了匹配工作，将其匹配到LCAflow库里面相最符合的流，污染物指标备注为工业废水量
- Waste water: 540
  污染物指标工业废水量的末端治理技术是其他（利用+直排）。原文件中描述污染物类别为废水，污染物指标为工业废水量，此处对其进行了匹配工作，将其匹配到LCAflow库里面相最符合的流，污染物指标备注为工业废水量
- chemical oxygen demand: 0.0233023
  污染物指标化学需氧量的末端治理技术是其他（物理处理法+化学处理法），其效率为63.76，末端治理设施实际运行率（k值）计算公式为（机组年实际运行小时数-废水总排口年事故排放小时数）/机组年实际运行小时数。原文件中描述污染物类别为废水，污染物指标为化学需氧量，此处对其进行了匹配工作，将其匹配到LCAflow库里面相最符合的流，污染物指标备注为化学需氧量
- Ammonia Nitrogen: 0.0024818
  污染物指标氨氮的末端治理技术是其他（物理处理法+化学处理法），其效率为79.54，末端治理设施实际运行率（k值）计算公式为（机组年实际运行小时数-废水总排口年事故排放小时数）/机组年实际运行小时数。原文件中描述污染物类别为废水，污染物指标为氨氮，此处对其进行了匹配工作，将其匹配到LCAflow库里面相最符合的流，污染物指标备注为氨氮
- Exhaust gas: 4806
  污染物指标工业废气量的末端治理技术是其他（直排）。原文件中描述污染物类别为废气，污染物指标为工业废气量，此处对其进行了匹配工作，将其匹配到LCAflow库里面相最符合的流，污染物指标备注为工业废气量
- particles (PM2.5 - PM10): 0.21474
  污染物指标颗粒物（无炉内脱硫）的末端治理技术是静电除尘，其效率为99.91，末端治理设施实际运行率（k值）计算公式为除尘设施年实际运行小时数/机组年实际运行小时数。原文件中描述污染物类别为废气，污染物指标为颗粒物（无炉内脱硫），此处对其进行了匹配工作，将其匹配到LCAflow库里面相最符合的流，污染物指标备注为颗粒物（无炉内脱硫）
- particles (PM2.5 - PM10): 0.21474
  污染物指标颗粒物（无炉内脱硫）的末端治理技术是电袋组合，其效率为99.91，末端治理设施实际运行率（k值）计算公式为除尘设施年实际运行小时数/机组年实际运行小时数。原文件中描述污染物类别为废气，污染物指标为颗粒物（无炉内脱硫），此处对其进行了匹配工作，将其匹配到LCAflow库里面相最符合的流，污染物指标备注为颗粒物（无炉内脱硫）
- particles (PM2.5 - PM10): 0.21474
  污染物指标颗粒物（无炉内脱硫）的末端治理技术是袋式除尘，其效率为99.91，末端治理设施实际运行率（k值）计算公式为除尘设施年实际运行小时数/机组年实际运行小时数。原文件中描述污染物类别为废气，污染物指标为颗粒物（无炉内脱硫），此处对其进行了匹配工作，将其匹配到LCAflow库里面相最符合的流，污染物指标备注为颗粒物（无炉内脱硫）
- particles (PM2.5 - PM10): 0.07158
  污染物指标颗粒物（无炉内脱硫）的末端治理技术是高效静电除尘①，其效率为99.97，末端治理设施实际运行率（k值）计算公式为除尘设施年实际运行小时数/机组年实际运行小时数，①高效颗粒物末端治理技术：采取高效电源供电、低低温电除尘、超净电袋、高效袋式除尘、湿法脱硫协同、湿式电除尘等技术，满足《燃煤电厂超低排放烟气
  治理工程技术规范》（HJ2053-2235）相关要求。
  。原文件中描述污染物类别为废气，污染物指标为颗粒物（无炉内脱硫），此处对其进行了匹配工作，将其匹配到LCAflow库里面相最符合的流，污染物指标备注为颗粒物（无炉内脱硫）
- particles (PM2.5 - PM10): 0.07158
  污染物指标颗粒物（无炉内脱硫）的末端治理技术是高效电袋组合①，其效率为99.97，末端治理设施实际运行率（k值）计算公式为除尘设施年实际运行小时数/机组年实际运行小时数，①高效颗粒物末端治理技术：采取高效电源供电、低低温电除尘、超净电袋、高效袋式除尘、湿法脱硫协同、湿式电除尘等技术，满足《燃煤电厂超低排放烟气
  治理工程技术规范》（HJ2053-2236）相关要求。
  。原文件中描述污染物类别为废气，污染物指标为颗粒物（无炉内脱硫），此处对其进行了匹配工作，将其匹配到LCAflow库里面相最符合的流，污染物指标备注为颗粒物（无炉内脱硫）
- particles (PM2.5 - PM10): 0.07158
  污染物指标颗粒物（无炉内脱硫）的末端治理技术是高效袋式除尘①，其效率为99.97，末端治理设施实际运行率（k值）计算公式为除尘设施年实际运行小时数/机组年实际运行小时数，①高效颗粒物末端治理技术：采取高效电源供电、低低温电除尘、超净电袋、高效袋式除尘、湿法脱硫协同、湿式电除尘等技术，满足《燃煤电厂超低排放烟气
  治理工程技术规范》（HJ2053-2237）相关要求。
  。原文件中描述污染物类别为废气，污染物指标为颗粒物（无炉内脱硫），此处对其进行了匹配工作，将其匹配到LCAflow库里面相最符合的流，污染物指标备注为颗粒物（无炉内脱硫）
- particles (PM2.5 - PM10): 0.02386
  污染物指标颗粒物（无炉内脱硫）的末端治理技术是高效静电除尘+其他（湿法脱硫协同）①，其效率为99.99，末端治理设施实际运行率（k值）计算公式为除尘设施年实际运行小时数/机组年实际运行小时数，①高效颗粒物末端治理技术：采取高效电源供电、低低温电除尘、超净电袋、高效袋式除尘、湿法脱硫协同、湿式电除尘等技术，满足《燃煤电厂超低排放烟气
  治理工程技术规范》（HJ2053-2238）相关要求。
  。原文件中描述污染物类别为废气，污染物指标为颗粒物（无炉内脱硫），此处对其进行了匹配工作，将其匹配到LCAflow库里面相最符合的流，污染物指标备注为颗粒物（无炉内脱硫）
- particles (PM2.5 - PM10): 0.02386
  污染物指标颗粒物（无炉内脱硫）的末端治理技术是高效电袋组合+其他（湿法脱硫协同）①，其效率为99.99，末端治理设施实际运行率（k值）计算公式为除尘设施年实际运行小时数/机组年实际运行小时数，①高效颗粒物末端治理技术：采取高效电源供电、低低温电除尘、超净电袋、高效袋式除尘、湿法脱硫协同、湿式电除尘等技术，满足《燃煤电厂超低排放烟气
  治理工程技术规范》（HJ2053-2239）相关要求。
  。原文件中描述污染物类别为废气，污染物指标为颗粒物（无炉内脱硫），此处对其进行了匹配工作，将其匹配到LCAflow库里面相最符合的流，污染物指标备注为颗粒物（无炉内脱硫）
- particles (PM2.5 - PM10): 0.02386
  污染物指标颗粒物（无炉内脱硫）的末端治理技术是高效袋式除尘+其他（湿法脱硫协同）①，其效率为99.99，末端治理设施实际运行率（k值）计算公式为除尘设施年实际运行小时数/机组年实际运行小时数，①高效颗粒物末端治理技术：采取高效电源供电、低低温电除尘、超净电袋、高效袋式除尘、湿法脱硫协同、湿式电除尘等技术，满足《燃煤电厂超低排放烟气
  治理工程技术规范》（HJ2053-2240）相关要求。
  。原文件中描述污染物类别为废气，污染物指标为颗粒物（无炉内脱硫），此处对其进行了匹配工作，将其匹配到LCAflow库里面相最符合的流，污染物指标备注为颗粒物（无炉内脱硫）
- particles (PM2.5 - PM10): 0.02386
  污染物指标颗粒物（无炉内脱硫）的末端治理技术是高效静电除尘+其他（湿式电除尘）①，其效率为99.99，末端治理设施实际运行率（k值）计算公式为除尘设施年实际运行小时数/机组年实际运行小时数，①高效颗粒物末端治理技术：采取高效电源供电、低低温电除尘、超净电袋、高效袋式除尘、湿法脱硫协同、湿式电除尘等技术，满足《燃煤电厂超低排放烟气
  治理工程技术规范》（HJ2053-2241）相关要求。
  。原文件中描述污染物类别为废气，污染物指标为颗粒物（无炉内脱硫），此处对其进行了匹配工作，将其匹配到LCAflow库里面相最符合的流，污染物指标备注为颗粒物（无炉内脱硫）
- particles (PM2.5 - PM10): 0.02386
  污染物指标颗粒物（无炉内脱硫）的末端治理技术是高效电袋组合+其他（湿式电除尘）①，其效率为99.99，末端治理设施实际运行率（k值）计算公式为除尘设施年实际运行小时数/机组年实际运行小时数，①高效颗粒物末端治理技术：采取高效电源供电、低低温电除尘、超净电袋、高效袋式除尘、湿法脱硫协同、湿式电除尘等技术，满足《燃煤电厂超低排放烟气
  治理工程技术规范》（HJ2053-2242）相关要求。
  。原文件中描述污染物类别为废气，污染物指标为颗粒物（无炉内脱硫），此处对其进行了匹配工作，将其匹配到LCAflow库里面相最符合的流，污染物指标备注为颗粒物（无炉内脱硫）
- particles (PM2.5 - PM10): 0.02386
  污染物指标颗粒物（无炉内脱硫）的末端治理技术是高效袋式除尘+其他（湿式电除尘）①，其效率为99.99，末端治理设施实际运行率（k值）计算公式为除尘设施年实际运行小时数/机组年实际运行小时数，①高效颗粒物末端治理技术：采取高效电源供电、低低温电除尘、超净电袋、高效袋式除尘、湿法脱硫协同、湿式电除尘等技术，满足《燃煤电厂超低排放烟气
  治理工程技术规范》（HJ2053-2243）相关要求。
  。原文件中描述污染物类别为废气，污染物指标为颗粒物（无炉内脱硫），此处对其进行了匹配工作，将其匹配到LCAflow库里面相最符合的流，污染物指标备注为颗粒物（无炉内脱硫）
- particles (PM2.5 - PM10): 0
  污染物指标颗粒物（无炉内脱硫）的末端治理技术是高效静电除尘+其他（湿法脱硫协同）+其他（湿式电除尘）①，其效率为100，末端治理设施实际运行率（k值）计算公式为除尘设施年实际运行小时数/机组年实际运行小时数，①高效颗粒物末端治理技术：采取高效电源供电、低低温电除尘、超净电袋、高效袋式除尘、湿法脱硫协同、湿式电除尘等技术，满足《燃煤电厂超低排放烟气
  治理工程技术规范》（HJ2053-2244）相关要求。
  。原文件中描述污染物类别为废气，污染物指标为颗粒物（无炉内脱硫），此处对其进行了匹配工作，将其匹配到LCAflow库里面相最符合的流，污染物指标备注为颗粒物（无炉内脱硫）
- particles (PM2.5 - PM10): 0
  污染物指标颗粒物（无炉内脱硫）的末端治理技术是高效电袋组合+其他（湿法脱硫协同）+其他（湿式电除尘）①，其效率为100，末端治理设施实际运行率（k值）计算公式为除尘设施年实际运行小时数/机组年实际运行小时数，①高效颗粒物末端治理技术：采取高效电源供电、低低温电除尘、超净电袋、高效袋式除尘、湿法脱硫协同、湿式电除尘等技术，满足《燃煤电厂超低排放烟气
  治理工程技术规范》（HJ2053-2245）相关要求。
  。原文件中描述污染物类别为废气，污染物指标为颗粒物（无炉内脱硫），此处对其进行了匹配工作，将其匹配到LCAflow库里面相最符合的流，污染物指标备注为颗粒物（无炉内脱硫）
- particles (PM2.5 - PM10): 0
  污染物指标颗粒物（无炉内脱硫）的末端治理技术是高效袋式除尘+其他（湿法脱硫协同）+其他（湿式电除尘）①，其效率为100，末端治理设施实际运行率（k值）计算公式为除尘设施年实际运行小时数/机组年实际运行小时数，①高效颗粒物末端治理技术：采取高效电源供电、低低温电除尘、超净电袋、高效袋式除尘、湿法脱硫协同、湿式电除尘等技术，满足《燃煤电厂超低排放烟气
  治理工程技术规范》（HJ2053-2246）相关要求。
  。原文件中描述污染物类别为废气，污染物指标为颗粒物（无炉内脱硫），此处对其进行了匹配工作，将其匹配到LCAflow库里面相最符合的流，污染物指标备注为颗粒物（无炉内脱硫）
- particles (PM2.5 - PM10): 0.09544
  污染物指标颗粒物（无炉内脱硫）的末端治理技术是静电除尘+其他（湿法脱硫协同），其效率为99.96，末端治理设施实际运行率（k值）计算公式为除尘设施年实际运行小时数/机组年实际运行小时数。原文件中描述污染物类别为废气，污染物指标为颗粒物（无炉内脱硫），此处对其进行了匹配工作，将其匹配到LCAflow库里面相最符合的流，污染物指标备注为颗粒物（无炉内脱硫）
- particles (PM2.5 - PM10): 0.09544
  污染物指标颗粒物（无炉内脱硫）的末端治理技术是电袋组合+其他（湿法脱硫协同），其效率为99.96，末端治理设施实际运行率（k值）计算公式为除尘设施年实际运行小时数/机组年实际运行小时数。原文件中描述污染物类别为废气，污染物指标为颗粒物（无炉内脱硫），此处对其进行了匹配工作，将其匹配到LCAflow库里面相最符合的流，污染物指标备注为颗粒物（无炉内脱硫）
- particles (PM2.5 - PM10): 0.09544
  污染物指标颗粒物（无炉内脱硫）的末端治理技术是袋式除尘+其他（湿法脱硫协同），其效率为99.96，末端治理设施实际运行率（k值）计算公式为除尘设施年实际运行小时数/机组年实际运行小时数。原文件中描述污染物类别为废气，污染物指标为颗粒物（无炉内脱硫），此处对其进行了匹配工作，将其匹配到LCAflow库里面相最符合的流，污染物指标备注为颗粒物（无炉内脱硫）
- particles (PM2.5 - PM10): 0.04772
  污染物指标颗粒物（无炉内脱硫）的末端治理技术是静电除尘+其他（湿式电除尘），其效率为99.98，末端治理设施实际运行率（k值）计算公式为除尘设施年实际运行小时数/机组年实际运行小时数。原文件中描述污染物类别为废气，污染物指标为颗粒物（无炉内脱硫），此处对其进行了匹配工作，将其匹配到LCAflow库里面相最符合的流，污染物指标备注为颗粒物（无炉内脱硫）
- particles (PM2.5 - PM10): 0.04772
  污染物指标颗粒物（无炉内脱硫）的末端治理技术是电袋组合+其他（湿式电除尘），其效率为99.98，末端治理设施实际运行率（k值）计算公式为除尘设施年实际运行小时数/机组年实际运行小时数。原文件中描述污染物类别为废气，污染物指标为颗粒物（无炉内脱硫），此处对其进行了匹配工作，将其匹配到LCAflow库里面相最符合的流，污染物指标备注为颗粒物（无炉内脱硫）
- particles (PM2.5 - PM10): 0.04772
  污染物指标颗粒物（无炉内脱硫）的末端治理技术是袋式除尘+其他（湿式电除尘），其效率为99.98，末端治理设施实际运行率（k值）计算公式为除尘设施年实际运行小时数/机组年实际运行小时数。原文件中描述污染物类别为废气，污染物指标为颗粒物（无炉内脱硫），此处对其进行了匹配工作，将其匹配到LCAflow库里面相最符合的流，污染物指标备注为颗粒物（无炉内脱硫）
- particles (PM2.5 - PM10): 0.02386
  污染物指标颗粒物（无炉内脱硫）的末端治理技术是静电除尘+其他（湿法脱硫协同）+其他（湿式电除尘），其效率为99.99，末端治理设施实际运行率（k值）计算公式为除尘设施年实际运行小时数/机组年实际运行小时数。原文件中描述污染物类别为废气，污染物指标为颗粒物（无炉内脱硫），此处对其进行了匹配工作，将其匹配到LCAflow库里面相最符合的流，污染物指标备注为颗粒物（无炉内脱硫）
- particles (PM2.5 - PM10): 0.02386
  污染物指标颗粒物（无炉内脱硫）的末端治理技术是电袋组合+其他（湿法脱硫协同）+其他（湿式电除尘），其效率为99.99，末端治理设施实际运行率（k值）计算公式为除尘设施年实际运行小时数/机组年实际运行小时数。原文件中描述污染物类别为废气，污染物指标为颗粒物（无炉内脱硫），此处对其进行了匹配工作，将其匹配到LCAflow库里面相最符合的流，污染物指标备注为颗粒物（无炉内脱硫）
- particles (PM2.5 - PM10): 0.02386
  污染物指标颗粒物（无炉内脱硫）的末端治理技术是袋式除尘+其他（湿法脱硫协同）+其他（湿式电除尘），其效率为99.99，末端治理设施实际运行率（k值）计算公式为除尘设施年实际运行小时数/机组年实际运行小时数。原文件中描述污染物类别为废气，污染物指标为颗粒物（无炉内脱硫），此处对其进行了匹配工作，将其匹配到LCAflow库里面相最符合的流，污染物指标备注为颗粒物（无炉内脱硫）
- particles (PM2.5 - PM10): nan
  污染物指标颗粒物（炉内脱硫）的末端治理技术是高效静电除尘①，其效率为0.0028Sar+99.975，末端治理设施实际运行率（k值）计算公式为除尘设施年实际运行小时数/机组年实际运行小时数，①高效颗粒物末端治理技术：采取高效电源供电、低低温电除尘、超净电袋、高效袋式除尘、湿法脱硫协同、湿式电除尘等技术，满足《燃煤电厂超低排放烟气
  治理工程技术规范》（HJ2053-2247）相关要求。
  。原文件中描述污染物类别为废气，污染物指标为颗粒物（炉内脱硫），此处对其进行了匹配工作，将其匹配到LCAflow库里面相最符合的流，污染物指标备注为颗粒物（炉内脱硫）
- particles (PM2.5 - PM10): nan
  污染物指标颗粒物（炉内脱硫）的末端治理技术是高效电袋组合①，其效率为0.003Sar+99.975，末端治理设施实际运行率（k值）计算公式为除尘设施年实际运行小时数/机组年实际运行小时数，①高效颗粒物末端治理技术：采取高效电源供电、低低温电除尘、超净电袋、高效袋式除尘、湿法脱硫协同、湿式电除尘等技术，满足《燃煤电厂超低排放烟气
  治理工程技术规范》（HJ2053-2248）相关要求。
  。原文件中描述污染物类别为废气，污染物指标为颗粒物（炉内脱硫），此处对其进行了匹配工作，将其匹配到LCAflow库里面相最符合的流，污染物指标备注为颗粒物（炉内脱硫）
- particles (PM2.5 - PM10): nan
  污染物指标颗粒物（炉内脱硫）的末端治理技术是高效袋式除尘①，其效率为0.0024Sar+99.98，末端治理设施实际运行率（k值）计算公式为除尘设施年实际运行小时数/机组年实际运行小时数，①高效颗粒物末端治理技术：采取高效电源供电、低低温电除尘、超净电袋、高效袋式除尘、湿法脱硫协同、湿式电除尘等技术，满足《燃煤电厂超低排放烟气
  治理工程技术规范》（HJ2053-2249）相关要求。
  。原文件中描述污染物类别为废气，污染物指标为颗粒物（炉内脱硫），此处对其进行了匹配工作，将其匹配到LCAflow库里面相最符合的流，污染物指标备注为颗粒物（炉内脱硫）
- particles (PM2.5 - PM10): nan
  污染物指标颗粒物（炉内脱硫）的末端治理技术是高效静电除尘+其他（湿法脱硫协同）①，其效率为0.00112Sar+99.99，末端治理设施实际运行率（k值）计算公式为除尘设施年实际运行小时数/机组年实际运行小时数，①高效颗粒物末端治理技术：采取高效电源供电、低低温电除尘、超净电袋、高效袋式除尘、湿法脱硫协同、湿式电除尘等技术，满足《燃煤电厂超低排放烟气
  治理工程技术规范》（HJ2053-2250）相关要求。
  。原文件中描述污染物类别为废气，污染物指标为颗粒物（炉内脱硫），此处对其进行了匹配工作，将其匹配到LCAflow库里面相最符合的流，污染物指标备注为颗粒物（炉内脱硫）
- particles (PM2.5 - PM10): nan
  污染物指标颗粒物（炉内脱硫）的末端治理技术是高效电袋组合+其他（湿法脱硫协同）①，其效率为0.0012Sar+99.99，末端治理设施实际运行率（k值）计算公式为除尘设施年实际运行小时数/机组年实际运行小时数，①高效颗粒物末端治理技术：采取高效电源供电、低低温电除尘、超净电袋、高效袋式除尘、湿法脱硫协同、湿式电除尘等技术，满足《燃煤电厂超低排放烟气
  治理工程技术规范》（HJ2053-2251）相关要求。
  。原文件中描述污染物类别为废气，污染物指标为颗粒物（炉内脱硫），此处对其进行了匹配工作，将其匹配到LCAflow库里面相最符合的流，污染物指标备注为颗粒物（炉内脱硫）
- particles (PM2.5 - PM10): nan
  污染物指标颗粒物（炉内脱硫）的末端治理技术是高效袋式除尘+其他（湿法脱硫协同）①，其效率为0.00096Sar+99.992，末端治理设施实际运行率（k值）计算公式为除尘设施年实际运行小时数/机组年实际运行小时数，①高效颗粒物末端治理技术：采取高效电源供电、低低温电除尘、超净电袋、高效袋式除尘、湿法脱硫协同、湿式电除尘等技术，满足《燃煤电厂超低排放烟气
  治理工程技术规范》（HJ2053-2252）相关要求。
  。原文件中描述污染物类别为废气，污染物指标为颗粒物（炉内脱硫），此处对其进行了匹配工作，将其匹配到LCAflow库里面相最符合的流，污染物指标备注为颗粒物（炉内脱硫）
- particles (PM2.5 - PM10): nan
  污染物指标颗粒物（炉内脱硫）的末端治理技术是高效静电除尘+其他（湿式电除尘）①，其效率为0.00056Sar+99.995，末端治理设施实际运行率（k值）计算公式为除尘设施年实际运行小时数/机组年实际运行小时数，①高效颗粒物末端治理技术：采取高效电源供电、低低温电除尘、超净电袋、高效袋式除尘、湿法脱硫协同、湿式电除尘等技术，满足《燃煤电厂超低排放烟气
  治理工程技术规范》（HJ2053-2253）相关要求。
  。原文件中描述污染物类别为废气，污染物指标为颗粒物（炉内脱硫），此处对其进行了匹配工作，将其匹配到LCAflow库里面相最符合的流，污染物指标备注为颗粒物（炉内脱硫）
- particles (PM2.5 - PM10): nan
  污染物指标颗粒物（炉内脱硫）的末端治理技术是高效电袋组合+其他（湿式电除尘）①，其效率为0.0006Sar+99.995，末端治理设施实际运行率（k值）计算公式为除尘设施年实际运行小时数/机组年实际运行小时数，①高效颗粒物末端治理技术：采取高效电源供电、低低温电除尘、超净电袋、高效袋式除尘、湿法脱硫协同、湿式电除尘等技术，满足《燃煤电厂超低排放烟气
  治理工程技术规范》（HJ2053-2254）相关要求。
  。原文件中描述污染物类别为废气，污染物指标为颗粒物（炉内脱硫），此处对其进行了匹配工作，将其匹配到LCAflow库里面相最符合的流，污染物指标备注为颗粒物（炉内脱硫）
- particles (PM2.5 - PM10): nan
  污染物指标颗粒物（炉内脱硫）的末端治理技术是高效袋式除尘+其他（湿式电除尘）①，其效率为0.00048Sar+99.996，末端治理设施实际运行率（k值）计算公式为除尘设施年实际运行小时数/机组年实际运行小时数，①高效颗粒物末端治理技术：采取高效电源供电、低低温电除尘、超净电袋、高效袋式除尘、湿法脱硫协同、湿式电除尘等技术，满足《燃煤电厂超低排放烟气
  治理工程技术规范》（HJ2053-2255）相关要求。
  。原文件中描述污染物类别为废气，污染物指标为颗粒物（炉内脱硫），此处对其进行了匹配工作，将其匹配到LCAflow库里面相最符合的流，污染物指标备注为颗粒物（炉内脱硫）
- particles (PM2.5 - PM10): nan
  污染物指标颗粒物（炉内脱硫）的末端治理技术是高效静电除尘+其他（湿法脱硫协同）+其他（湿式电除尘）①，其效率为0.000224Sar+99.998，末端治理设施实际运行率（k值）计算公式为除尘设施年实际运行小时数/机组年实际运行小时数，①高效颗粒物末端治理技术：采取高效电源供电、低低温电除尘、超净电袋、高效袋式除尘、湿法脱硫协同、湿式电除尘等技术，满足《燃煤电厂超低排放烟气
  治理工程技术规范》（HJ2053-2256）相关要求。
  。原文件中描述污染物类别为废气，污染物指标为颗粒物（炉内脱硫），此处对其进行了匹配工作，将其匹配到LCAflow库里面相最符合的流，污染物指标备注为颗粒物（炉内脱硫）
- particles (PM2.5 - PM10): nan
  污染物指标颗粒物（炉内脱硫）的末端治理技术是高效电袋组合+其他（湿法脱硫协同）+其他（湿式电除尘）①，其效率为0.00024Sar+99.998，末端治理设施实际运行率（k值）计算公式为除尘设施年实际运行小时数/机组年实际运行小时数，①高效颗粒物末端治理技术：采取高效电源供电、低低温电除尘、超净电袋、高效袋式除尘、湿法脱硫协同、湿式电除尘等技术，满足《燃煤电厂超低排放烟气
  治理工程技术规范》（HJ2053-2257）相关要求。
  。原文件中描述污染物类别为废气，污染物指标为颗粒物（炉内脱硫），此处对其进行了匹配工作，将其匹配到LCAflow库里面相最符合的流，污染物指标备注为颗粒物（炉内脱硫）
- particles (PM2.5 - PM10): nan
  污染物指标颗粒物（炉内脱硫）的末端治理技术是高效袋式除尘+其他（湿法脱硫协同）+其他（湿式电除尘）①，其效率为0.000192Sar+99.9984，末端治理设施实际运行率（k值）计算公式为除尘设施年实际运行小时数/机组年实际运行小时数，①高效颗粒物末端治理技术：采取高效电源供电、低低温电除尘、超净电袋、高效袋式除尘、湿法脱硫协同、湿式电除尘等技术，满足《燃煤电厂超低排放烟气
  治理工程技术规范》（HJ2053-2258）相关要求。
  。原文件中描述污染物类别为废气，污染物指标为颗粒物（炉内脱硫），此处对其进行了匹配工作，将其匹配到LCAflow库里面相最符合的流，污染物指标备注为颗粒物（炉内脱硫）
- particles (PM2.5 - PM10): nan
  污染物指标颗粒物（炉内脱硫）的末端治理技术是静电除尘，其效率为0.0084Sar+99.93，末端治理设施实际运行率（k值）计算公式为除尘设施年实际运行小时数/机组年实际运行小时数。原文件中描述污染物类别为废气，污染物指标为颗粒物（炉内脱硫），此处对其进行了匹配工作，将其匹配到LCAflow库里面相最符合的流，污染物指标备注为颗粒物（炉内脱硫）
- particles (PM2.5 - PM10): nan
  污染物指标颗粒物（炉内脱硫）的末端治理技术是电袋组合，其效率为0.009Sar+99.93，末端治理设施实际运行率（k值）计算公式为除尘设施年实际运行小时数/机组年实际运行小时数。原文件中描述污染物类别为废气，污染物指标为颗粒物（炉内脱硫），此处对其进行了匹配工作，将其匹配到LCAflow库里面相最符合的流，污染物指标备注为颗粒物（炉内脱硫）
- particles (PM2.5 - PM10): nan
  污染物指标颗粒物（炉内脱硫）的末端治理技术是袋式除尘，其效率为0.0072Sar+99.94，末端治理设施实际运行率（k值）计算公式为除尘设施年实际运行小时数/机组年实际运行小时数。原文件中描述污染物类别为废气，污染物指标为颗粒物（炉内脱硫），此处对其进行了匹配工作，将其匹配到LCAflow库里面相最符合的流，污染物指标备注为颗粒物（炉内脱硫）
- particles (PM2.5 - PM10): nan
  污染物指标颗粒物（炉内脱硫）的末端治理技术是静电除尘+其他（湿法脱硫协同），其效率为0.00336Sar+99.97，末端治理设施实际运行率（k值）计算公式为除尘设施年实际运行小时数/机组年实际运行小时数。原文件中描述污染物类别为废气，污染物指标为颗粒物（炉内脱硫），此处对其进行了匹配工作，将其匹配到LCAflow库里面相最符合的流，污染物指标备注为颗粒物（炉内脱硫）
- particles (PM2.5 - PM10): nan
  污染物指标颗粒物（炉内脱硫）的末端治理技术是电袋组合+其他（湿法脱硫协同），其效率为0.0036Sar+99.97，末端治理设施实际运行率（k值）计算公式为除尘设施年实际运行小时数/机组年实际运行小时数。原文件中描述污染物类别为废气，污染物指标为颗粒物（炉内脱硫），此处对其进行了匹配工作，将其匹配到LCAflow库里面相最符合的流，污染物指标备注为颗粒物（炉内脱硫）
- particles (PM2.5 - PM10): nan
  污染物指标颗粒物（炉内脱硫）的末端治理技术是袋式除尘+其他（湿法脱硫协同），其效率为0.00288Sar+99.976，末端治理设施实际运行率（k值）计算公式为除尘设施年实际运行小时数/机组年实际运行小时数。原文件中描述污染物类别为废气，污染物指标为颗粒物（炉内脱硫），此处对其进行了匹配工作，将其匹配到LCAflow库里面相最符合的流，污染物指标备注为颗粒物（炉内脱硫）
- particles (PM2.5 - PM10): nan
  污染物指标颗粒物（炉内脱硫）的末端治理技术是静电除尘+其他（湿式电除尘），其效率为0.00168Sar+99.985，末端治理设施实际运行率（k值）计算公式为除尘设施年实际运行小时数/机组年实际运行小时数。原文件中描述污染物类别为废气，污染物指标为颗粒物（炉内脱硫），此处对其进行了匹配工作，将其匹配到LCAflow库里面相最符合的流，污染物指标备注为颗粒物（炉内脱硫）
- particles (PM2.5 - PM10): nan
  污染物指标颗粒物（炉内脱硫）的末端治理技术是电袋组合+其他（湿式电除尘），其效率为0.0018Sar+99.985，末端治理设施实际运行率（k值）计算公式为除尘设施年实际运行小时数/机组年实际运行小时数。原文件中描述污染物类别为废气，污染物指标为颗粒物（炉内脱硫），此处对其进行了匹配工作，将其匹配到LCAflow库里面相最符合的流，污染物指标备注为颗粒物（炉内脱硫）
- particles (PM2.5 - PM10): nan
  污染物指标颗粒物（炉内脱硫）的末端治理技术是袋式除尘+其他（湿式电除尘），其效率为0.00144Sar+99.988，末端治理设施实际运行率（k值）计算公式为除尘设施年实际运行小时数/机组年实际运行小时数。原文件中描述污染物类别为废气，污染物指标为颗粒物（炉内脱硫），此处对其进行了匹配工作，将其匹配到LCAflow库里面相最符合的流，污染物指标备注为颗粒物（炉内脱硫）
- particles (PM2.5 - PM10): nan
  污染物指标颗粒物（炉内脱硫）的末端治理技术是静电除尘+其他（湿法脱硫协同）+其他（湿式电除尘），其效率为0.000672Sar+99.994，末端治理设施实际运行率（k值）计算公式为除尘设施年实际运行小时数/机组年实际运行小时数。原文件中描述污染物类别为废气，污染物指标为颗粒物（炉内脱硫），此处对其进行了匹配工作，将其匹配到LCAflow库里面相最符合的流，污染物指标备注为颗粒物（炉内脱硫）
- particles (PM2.5 - PM10): nan
  污染物指标颗粒物（炉内脱硫）的末端治理技术是电袋组合+其他（湿法脱硫协同）+其他（湿式电除尘），其效率为0.00072Sar+99.994，末端治理设施实际运行率（k值）计算公式为除尘设施年实际运行小时数/机组年实际运行小时数。原文件中描述污染物类别为废气，污染物指标为颗粒物（炉内脱硫），此处对其进行了匹配工作，将其匹配到LCAflow库里面相最符合的流，污染物指标备注为颗粒物（炉内脱硫）
- particles (PM2.5 - PM10): nan
  污染物指标颗粒物（炉内脱硫）的末端治理技术是袋式除尘+其他（湿法脱硫协同）+其他（湿式电除尘），其效率为0.000576Sar+99.995，末端治理设施实际运行率（k值）计算公式为除尘设施年实际运行小时数/机组年实际运行小时数。原文件中描述污染物类别为废气，污染物指标为颗粒物（炉内脱硫），此处对其进行了匹配工作，将其匹配到LCAflow库里面相最符合的流，污染物指标备注为颗粒物（炉内脱硫）
- sulfur dioxide: 0.16099
  污染物指标二氧化硫（无炉内脱硫）的末端治理技术是高效石灰石/石膏法②，其效率为98.3，末端治理设施实际运行率（k值）计算公式为脱硫设施年实际运行小时数/机组年实际运行小时数，②高效二氧化硫末端治理技术：采取空塔提效、强化气液传质、改善pH值分区等措施，满足《燃煤电厂超低排放烟气治理工程技术规范》（HJ2053-2225）相
  关要求。
  。原文件中描述污染物类别为废气，污染物指标为二氧化硫（无炉内脱硫），此处对其进行了匹配工作，将其匹配到LCAflow库里面相最符合的流，污染物指标备注为二氧化硫（无炉内脱硫）
- sulfur dioxide: 0.16099
  污染物指标二氧化硫（无炉内脱硫）的末端治理技术是高效石灰/石膏法②，其效率为98.3，末端治理设施实际运行率（k值）计算公式为脱硫设施年实际运行小时数/机组年实际运行小时数，②高效二氧化硫末端治理技术：采取空塔提效、强化气液传质、改善pH值分区等措施，满足《燃煤电厂超低排放烟气治理工程技术规范》（HJ2053-2226）相
  关要求。
  。原文件中描述污染物类别为废气，污染物指标为二氧化硫（无炉内脱硫），此处对其进行了匹配工作，将其匹配到LCAflow库里面相最符合的流，污染物指标备注为二氧化硫（无炉内脱硫）
- sulfur dioxide: 0.16099
  污染物指标二氧化硫（无炉内脱硫）的末端治理技术是高效氨法②，其效率为98.3，末端治理设施实际运行率（k值）计算公式为脱硫设施年实际运行小时数/机组年实际运行小时数，②高效二氧化硫末端治理技术：采取空塔提效、强化气液传质、改善pH值分区等措施，满足《燃煤电厂超低排放烟气治理工程技术规范》（HJ2053-2227）相
  关要求。
  。原文件中描述污染物类别为废气，污染物指标为二氧化硫（无炉内脱硫），此处对其进行了匹配工作，将其匹配到LCAflow库里面相最符合的流，污染物指标备注为二氧化硫（无炉内脱硫）
- sulfur dioxide: 0.16099
  污染物指标二氧化硫（无炉内脱硫）的末端治理技术是其他（高效电石渣法）②，其效率为98.3，末端治理设施实际运行率（k值）计算公式为脱硫设施年实际运行小时数/机组年实际运行小时数，②高效二氧化硫末端治理技术：采取空塔提效、强化气液传质、改善pH值分区等措施，满足《燃煤电厂超低排放烟气治理工程技术规范》（HJ2053-2228）相
  关要求。
  。原文件中描述污染物类别为废气，污染物指标为二氧化硫（无炉内脱硫），此处对其进行了匹配工作，将其匹配到LCAflow库里面相最符合的流，污染物指标备注为二氧化硫（无炉内脱硫）
- sulfur dioxide: 0.16099
  污染物指标二氧化硫（无炉内脱硫）的末端治理技术是其他（高效钠碱法）②，其效率为98.3，末端治理设施实际运行率（k值）计算公式为脱硫设施年实际运行小时数/机组年实际运行小时数，②高效二氧化硫末端治理技术：采取空塔提效、强化气液传质、改善pH值分区等措施，满足《燃煤电厂超低排放烟气治理工程技术规范》（HJ2053-2229）相
  关要求。
  。原文件中描述污染物类别为废气，污染物指标为二氧化硫（无炉内脱硫），此处对其进行了匹配工作，将其匹配到LCAflow库里面相最符合的流，污染物指标备注为二氧化硫（无炉内脱硫）
- sulfur dioxide: 0.16099
  污染物指标二氧化硫（无炉内脱硫）的末端治理技术是高效双碱法②，其效率为98.3，末端治理设施实际运行率（k值）计算公式为脱硫设施年实际运行小时数/机组年实际运行小时数，②高效二氧化硫末端治理技术：采取空塔提效、强化气液传质、改善pH值分区等措施，满足《燃煤电厂超低排放烟气治理工程技术规范》（HJ2053-2230）相
  关要求。
  。原文件中描述污染物类别为废气，污染物指标为二氧化硫（无炉内脱硫），此处对其进行了匹配工作，将其匹配到LCAflow库里面相最符合的流，污染物指标备注为二氧化硫（无炉内脱硫）
- sulfur dioxide: 0.16099
  污染物指标二氧化硫（无炉内脱硫）的末端治理技术是高效氧化镁法②，其效率为98.3，末端治理设施实际运行率（k值）计算公式为脱硫设施年实际运行小时数/机组年实际运行小时数，②高效二氧化硫末端治理技术：采取空塔提效、强化气液传质、改善pH值分区等措施，满足《燃煤电厂超低排放烟气治理工程技术规范》（HJ2053-2231）相
  关要求。
  。原文件中描述污染物类别为废气，污染物指标为二氧化硫（无炉内脱硫），此处对其进行了匹配工作，将其匹配到LCAflow库里面相最符合的流，污染物指标备注为二氧化硫（无炉内脱硫）
- sulfur dioxide: 0.16099
  污染物指标二氧化硫（无炉内脱硫）的末端治理技术是高效烟气循环流化床法②，其效率为98.3，末端治理设施实际运行率（k值）计算公式为脱硫设施年实际运行小时数/机组年实际运行小时数，②高效二氧化硫末端治理技术：采取空塔提效、强化气液传质、改善pH值分区等措施，满足《燃煤电厂超低排放烟气治理工程技术规范》（HJ2053-2232）相
  关要求。
  。原文件中描述污染物类别为废气，污染物指标为二氧化硫（无炉内脱硫），此处对其进行了匹配工作，将其匹配到LCAflow库里面相最符合的流，污染物指标备注为二氧化硫（无炉内脱硫）
- sulfur dioxide: 0.16099
  污染物指标二氧化硫（无炉内脱硫）的末端治理技术是其他（高效湿法脱硫除尘一体化）②，其效率为98.3，末端治理设施实际运行率（k值）计算公式为脱硫设施年实际运行小时数/机组年实际运行小时数，②高效二氧化硫末端治理技术：采取空塔提效、强化气液传质、改善pH值分区等措施，满足《燃煤电厂超低排放烟气治理工程技术规范》（HJ2053-2233）相
  关要求。
  。原文件中描述污染物类别为废气，污染物指标为二氧化硫（无炉内脱硫），此处对其进行了匹配工作，将其匹配到LCAflow库里面相最符合的流，污染物指标备注为二氧化硫（无炉内脱硫）
- sulfur dioxide: 0.45456
  污染物指标二氧化硫（无炉内脱硫）的末端治理技术是石灰石/石膏法，其效率为95.2，末端治理设施实际运行率（k值）计算公式为脱硫设施年实际运行小时数/机组年实际运行小时数。原文件中描述污染物类别为废气，污染物指标为二氧化硫（无炉内脱硫），此处对其进行了匹配工作，将其匹配到LCAflow库里面相最符合的流，污染物指标备注为二氧化硫（无炉内脱硫）
- sulfur dioxide: 0.45456
  污染物指标二氧化硫（无炉内脱硫）的末端治理技术是石灰/石膏法，其效率为95.2，末端治理设施实际运行率（k值）计算公式为脱硫设施年实际运行小时数/机组年实际运行小时数。原文件中描述污染物类别为废气，污染物指标为二氧化硫（无炉内脱硫），此处对其进行了匹配工作，将其匹配到LCAflow库里面相最符合的流，污染物指标备注为二氧化硫（无炉内脱硫）
- sulfur dioxide: 0.45456
  污染物指标二氧化硫（无炉内脱硫）的末端治理技术是氨法，其效率为95.2，末端治理设施实际运行率（k值）计算公式为脱硫设施年实际运行小时数/机组年实际运行小时数。原文件中描述污染物类别为废气，污染物指标为二氧化硫（无炉内脱硫），此处对其进行了匹配工作，将其匹配到LCAflow库里面相最符合的流，污染物指标备注为二氧化硫（无炉内脱硫）
- sulfur dioxide: 0.45456
  污染物指标二氧化硫（无炉内脱硫）的末端治理技术是其他（电石渣法），其效率为95.2，末端治理设施实际运行率（k值）计算公式为脱硫设施年实际运行小时数/机组年实际运行小时数。原文件中描述污染物类别为废气，污染物指标为二氧化硫（无炉内脱硫），此处对其进行了匹配工作，将其匹配到LCAflow库里面相最符合的流，污染物指标备注为二氧化硫（无炉内脱硫）
- sulfur dioxide: 0.45456
  污染物指标二氧化硫（无炉内脱硫）的末端治理技术是其他（钠碱法），其效率为95.2，末端治理设施实际运行率（k值）计算公式为脱硫设施年实际运行小时数/机组年实际运行小时数。原文件中描述污染物类别为废气，污染物指标为二氧化硫（无炉内脱硫），此处对其进行了匹配工作，将其匹配到LCAflow库里面相最符合的流，污染物指标备注为二氧化硫（无炉内脱硫）
- sulfur dioxide: 0.45456
  污染物指标二氧化硫（无炉内脱硫）的末端治理技术是双碱法，其效率为95.2，末端治理设施实际运行率（k值）计算公式为脱硫设施年实际运行小时数/机组年实际运行小时数。原文件中描述污染物类别为废气，污染物指标为二氧化硫（无炉内脱硫），此处对其进行了匹配工作，将其匹配到LCAflow库里面相最符合的流，污染物指标备注为二氧化硫（无炉内脱硫）
- sulfur dioxide: 0.45456
  污染物指标二氧化硫（无炉内脱硫）的末端治理技术是氧化镁法，其效率为95.2，末端治理设施实际运行率（k值）计算公式为脱硫设施年实际运行小时数/机组年实际运行小时数。原文件中描述污染物类别为废气，污染物指标为二氧化硫（无炉内脱硫），此处对其进行了匹配工作，将其匹配到LCAflow库里面相最符合的流，污染物指标备注为二氧化硫（无炉内脱硫）
- sulfur dioxide: 0.45456
  污染物指标二氧化硫（无炉内脱硫）的末端治理技术是烟气循环流化床法，其效率为95.2，末端治理设施实际运行率（k值）计算公式为脱硫设施年实际运行小时数/机组年实际运行小时数。原文件中描述污染物类别为废气，污染物指标为二氧化硫（无炉内脱硫），此处对其进行了匹配工作，将其匹配到LCAflow库里面相最符合的流，污染物指标备注为二氧化硫（无炉内脱硫）
- sulfur dioxide: 0.45456
  污染物指标二氧化硫（无炉内脱硫）的末端治理技术是其他（湿法脱硫除尘一体化），其效率为95.2，末端治理设施实际运行率（k值）计算公式为脱硫设施年实际运行小时数/机组年实际运行小时数。原文件中描述污染物类别为废气，污染物指标为二氧化硫（无炉内脱硫），此处对其进行了匹配工作，将其匹配到LCAflow库里面相最符合的流，污染物指标备注为二氧化硫（无炉内脱硫）
- sulfur dioxide: 0.1562
  污染物指标二氧化硫（炉内脱硫）的末端治理技术是高效石灰石/石膏法②，其效率为94.5，末端治理设施实际运行率（k值）计算公式为脱硫设施年实际运行小时数/机组年实际运行小时数，②高效二氧化硫末端治理技术：采取空塔提效、强化气液传质、改善pH值分区等措施，满足《燃煤电厂超低排放烟气治理工程技术规范》（HJ2053-2234）相
  关要求。
  。原文件中描述污染物类别为废气，污染物指标为二氧化硫（炉内脱硫），此处对其进行了匹配工作，将其匹配到LCAflow库里面相最符合的流，污染物指标备注为二氧化硫（炉内脱硫）
- sulfur dioxide: 0.1562
  污染物指标二氧化硫（炉内脱硫）的末端治理技术是高效石灰/石膏法②，其效率为94.5，末端治理设施实际运行率（k值）计算公式为脱硫设施年实际运行小时数/机组年实际运行小时数，②高效二氧化硫末端治理技术：采取空塔提效、强化气液传质、改善pH值分区等措施，满足《燃煤电厂超低排放烟气治理工程技术规范》（HJ2053-2235）相
  关要求。
  。原文件中描述污染物类别为废气，污染物指标为二氧化硫（炉内脱硫），此处对其进行了匹配工作，将其匹配到LCAflow库里面相最符合的流，污染物指标备注为二氧化硫（炉内脱硫）
- sulfur dioxide: 0.1562
  污染物指标二氧化硫（炉内脱硫）的末端治理技术是高效氨法②，其效率为94.5，末端治理设施实际运行率（k值）计算公式为脱硫设施年实际运行小时数/机组年实际运行小时数，②高效二氧化硫末端治理技术：采取空塔提效、强化气液传质、改善pH值分区等措施，满足《燃煤电厂超低排放烟气治理工程技术规范》（HJ2053-2236）相
  关要求。
  。原文件中描述污染物类别为废气，污染物指标为二氧化硫（炉内脱硫），此处对其进行了匹配工作，将其匹配到LCAflow库里面相最符合的流，污染物指标备注为二氧化硫（炉内脱硫）
- sulfur dioxide: 0.1562
  污染物指标二氧化硫（炉内脱硫）的末端治理技术是其他（高效电石渣法）②，其效率为94.5，末端治理设施实际运行率（k值）计算公式为脱硫设施年实际运行小时数/机组年实际运行小时数，②高效二氧化硫末端治理技术：采取空塔提效、强化气液传质、改善pH值分区等措施，满足《燃煤电厂超低排放烟气治理工程技术规范》（HJ2053-2237）相
  关要求。
  。原文件中描述污染物类别为废气，污染物指标为二氧化硫（炉内脱硫），此处对其进行了匹配工作，将其匹配到LCAflow库里面相最符合的流，污染物指标备注为二氧化硫（炉内脱硫）
- sulfur dioxide: 0.1562
  污染物指标二氧化硫（炉内脱硫）的末端治理技术是其他（高效钠碱法）②，其效率为94.5，末端治理设施实际运行率（k值）计算公式为脱硫设施年实际运行小时数/机组年实际运行小时数，②高效二氧化硫末端治理技术：采取空塔提效、强化气液传质、改善pH值分区等措施，满足《燃煤电厂超低排放烟气治理工程技术规范》（HJ2053-2238）相
  关要求。
  。原文件中描述污染物类别为废气，污染物指标为二氧化硫（炉内脱硫），此处对其进行了匹配工作，将其匹配到LCAflow库里面相最符合的流，污染物指标备注为二氧化硫（炉内脱硫）
- sulfur dioxide: 0.1562
  污染物指标二氧化硫（炉内脱硫）的末端治理技术是高效双碱法②，其效率为94.5，末端治理设施实际运行率（k值）计算公式为脱硫设施年实际运行小时数/机组年实际运行小时数，②高效二氧化硫末端治理技术：采取空塔提效、强化气液传质、改善pH值分区等措施，满足《燃煤电厂超低排放烟气治理工程技术规范》（HJ2053-2239）相
  关要求。
  。原文件中描述污染物类别为废气，污染物指标为二氧化硫（炉内脱硫），此处对其进行了匹配工作，将其匹配到LCAflow库里面相最符合的流，污染物指标备注为二氧化硫（炉内脱硫）
- sulfur dioxide: 0.1562
  污染物指标二氧化硫（炉内脱硫）的末端治理技术是高效氧化镁法②，其效率为94.5，末端治理设施实际运行率（k值）计算公式为脱硫设施年实际运行小时数/机组年实际运行小时数，②高效二氧化硫末端治理技术：采取空塔提效、强化气液传质、改善pH值分区等措施，满足《燃煤电厂超低排放烟气治理工程技术规范》（HJ2053-2240）相
  关要求。
  。原文件中描述污染物类别为废气，污染物指标为二氧化硫（炉内脱硫），此处对其进行了匹配工作，将其匹配到LCAflow库里面相最符合的流，污染物指标备注为二氧化硫（炉内脱硫）
- sulfur dioxide: 0.1562
  污染物指标二氧化硫（炉内脱硫）的末端治理技术是高效烟气循环流化床法②，其效率为94.5，末端治理设施实际运行率（k值）计算公式为脱硫设施年实际运行小时数/机组年实际运行小时数，②高效二氧化硫末端治理技术：采取空塔提效、强化气液传质、改善pH值分区等措施，满足《燃煤电厂超低排放烟气治理工程技术规范》（HJ2053-2241）相
  关要求。
  。原文件中描述污染物类别为废气，污染物指标为二氧化硫（炉内脱硫），此处对其进行了匹配工作，将其匹配到LCAflow库里面相最符合的流，污染物指标备注为二氧化硫（炉内脱硫）
- sulfur dioxide: 0.1562
  污染物指标二氧化硫（炉内脱硫）的末端治理技术是其他（高效湿法脱硫除尘一体化）②，其效率为94.5，末端治理设施实际运行率（k值）计算公式为脱硫设施年实际运行小时数/机组年实际运行小时数，②高效二氧化硫末端治理技术：采取空塔提效、强化气液传质、改善pH值分区等措施，满足《燃煤电厂超低排放烟气治理工程技术规范》（HJ2053-2242）相
  关要求。
  。原文件中描述污染物类别为废气，污染物指标为二氧化硫（炉内脱硫），此处对其进行了匹配工作，将其匹配到LCAflow库里面相最符合的流，污染物指标备注为二氧化硫（炉内脱硫）
- sulfur dioxide: 0.44588
  污染物指标二氧化硫（炉内脱硫）的末端治理技术是石灰石/石膏法，其效率为84.3，末端治理设施实际运行率（k值）计算公式为脱硫设施年实际运行小时数/机组年实际运行小时数。原文件中描述污染物类别为废气，污染物指标为二氧化硫（炉内脱硫），此处对其进行了匹配工作，将其匹配到LCAflow库里面相最符合的流，污染物指标备注为二氧化硫（炉内脱硫）
- sulfur dioxide: 0.44588
  污染物指标二氧化硫（炉内脱硫）的末端治理技术是石灰/石膏法，其效率为84.3，末端治理设施实际运行率（k值）计算公式为脱硫设施年实际运行小时数/机组年实际运行小时数。原文件中描述污染物类别为废气，污染物指标为二氧化硫（炉内脱硫），此处对其进行了匹配工作，将其匹配到LCAflow库里面相最符合的流，污染物指标备注为二氧化硫（炉内脱硫）
- sulfur dioxide: 0.44588
  污染物指标二氧化硫（炉内脱硫）的末端治理技术是氨法，其效率为84.3，末端治理设施实际运行率（k值）计算公式为脱硫设施年实际运行小时数/机组年实际运行小时数。原文件中描述污染物类别为废气，污染物指标为二氧化硫（炉内脱硫），此处对其进行了匹配工作，将其匹配到LCAflow库里面相最符合的流，污染物指标备注为二氧化硫（炉内脱硫）
- sulfur dioxide: 0.44588
  污染物指标二氧化硫（炉内脱硫）的末端治理技术是其他（电石渣法），其效率为84.3，末端治理设施实际运行率（k值）计算公式为脱硫设施年实际运行小时数/机组年实际运行小时数。原文件中描述污染物类别为废气，污染物指标为二氧化硫（炉内脱硫），此处对其进行了匹配工作，将其匹配到LCAflow库里面相最符合的流，污染物指标备注为二氧化硫（炉内脱硫）
- sulfur dioxide: 0.44588
  污染物指标二氧化硫（炉内脱硫）的末端治理技术是其他（钠碱法），其效率为84.3，末端治理设施实际运行率（k值）计算公式为脱硫设施年实际运行小时数/机组年实际运行小时数。原文件中描述污染物类别为废气，污染物指标为二氧化硫（炉内脱硫），此处对其进行了匹配工作，将其匹配到LCAflow库里面相最符合的流，污染物指标备注为二氧化硫（炉内脱硫）
- sulfur dioxide: 0.44588
  污染物指标二氧化硫（炉内脱硫）的末端治理技术是双碱法，其效率为84.3，末端治理设施实际运行率（k值）计算公式为脱硫设施年实际运行小时数/机组年实际运行小时数。原文件中描述污染物类别为废气，污染物指标为二氧化硫（炉内脱硫），此处对其进行了匹配工作，将其匹配到LCAflow库里面相最符合的流，污染物指标备注为二氧化硫（炉内脱硫）
- sulfur dioxide: 0.44588
  污染物指标二氧化硫（炉内脱硫）的末端治理技术是氧化镁法，其效率为84.3，末端治理设施实际运行率（k值）计算公式为脱硫设施年实际运行小时数/机组年实际运行小时数。原文件中描述污染物类别为废气，污染物指标为二氧化硫（炉内脱硫），此处对其进行了匹配工作，将其匹配到LCAflow库里面相最符合的流，污染物指标备注为二氧化硫（炉内脱硫）
- sulfur dioxide: 0.44588
  污染物指标二氧化硫（炉内脱硫）的末端治理技术是烟气循环流化床法，其效率为84.3，末端治理设施实际运行率（k值）计算公式为脱硫设施年实际运行小时数/机组年实际运行小时数。原文件中描述污染物类别为废气，污染物指标为二氧化硫（炉内脱硫），此处对其进行了匹配工作，将其匹配到LCAflow库里面相最符合的流，污染物指标备注为二氧化硫（炉内脱硫）
- sulfur dioxide: 0.44588
  污染物指标二氧化硫（炉内脱硫）的末端治理技术是其他（湿法脱硫除尘一体化），其效率为84.3，末端治理设施实际运行率（k值）计算公式为脱硫设施年实际运行小时数/机组年实际运行小时数。原文件中描述污染物类别为废气，污染物指标为二氧化硫（炉内脱硫），此处对其进行了匹配工作，将其匹配到LCAflow库里面相最符合的流，污染物指标备注为二氧化硫（炉内脱硫）
- Nitrogen oxides: 0.95
  污染物指标氮氧化物的末端治理技术是其他（直排），末端治理设施实际运行率（k值）计算公式为脱硝设施年实际运行小时数/机组年实际运行小时数。原文件中描述污染物类别为废气，污染物指标为氮氧化物，此处对其进行了匹配工作，将其匹配到LCAflow库里面相最符合的流，污染物指标备注为氮氧化物
- Nitrogen oxides: 0.2375
  污染物指标氮氧化物的末端治理技术是高效选择性催化还原法（SCR）③，其效率为75，末端治理设施实际运行率（k值）计算公式为脱硝设施年实际运行小时数/机组年实际运行小时数，③高效氮氧化物末端治理技术：采取高效低氮燃烧技术、增设脱硝催化剂层数等措施，满足《燃煤电厂超低排放烟气治理工程技术规范》（HJ2053-2114）相关
  要求。。原文件中描述污染物类别为废气，污染物指标为氮氧化物，此处对其进行了匹配工作，将其匹配到LCAflow库里面相最符合的流，污染物指标备注为氮氧化物
- Nitrogen oxides: 0.3325
  污染物指标氮氧化物的末端治理技术是选择性催化还原法（SCR），其效率为65，末端治理设施实际运行率（k值）计算公式为脱硝设施年实际运行小时数/机组年实际运行小时数。原文件中描述污染物类别为废气，污染物指标为氮氧化物，此处对其进行了匹配工作，将其匹配到LCAflow库里面相最符合的流，污染物指标备注为氮氧化物
- Nitrogen oxides: 0.48
  污染物指标氮氧化物（SNCR）的末端治理技术是其他（直排），末端治理设施实际运行率（k值）计算公式为脱硝设施年实际运行小时数/机组年实际运行小时数。原文件中描述污染物类别为废气，污染物指标为氮氧化物（SNCR），此处对其进行了匹配工作，将其匹配到LCAflow库里面相最符合的流，污染物指标备注为氮氧化物（SNCR）
- Nitrogen oxides: 0.168
  污染物指标氮氧化物（SNCR）的末端治理技术是高效选择性催化还原法（SCR）③，其效率为65，末端治理设施实际运行率（k值）计算公式为脱硝设施年实际运行小时数/机组年实际运行小时数，③高效氮氧化物末端治理技术：采取高效低氮燃烧技术、增设脱硝催化剂层数等措施，满足《燃煤电厂超低排放烟气治理工程技术规范》（HJ2053-2115）相关
  要求。。原文件中描述污染物类别为废气，污染物指标为氮氧化物（SNCR），此处对其进行了匹配工作，将其匹配到LCAflow库里面相最符合的流，污染物指标备注为氮氧化物（SNCR）
- Nitrogen oxides: 0.24
  污染物指标氮氧化物（SNCR）的末端治理技术是选择性催化还原法（SCR），其效率为50，末端治理设施实际运行率（k值）计算公式为脱硝设施年实际运行小时数/机组年实际运行小时数。原文件中描述污染物类别为废气，污染物指标为氮氧化物（SNCR），此处对其进行了匹配工作，将其匹配到LCAflow库里面相最符合的流，污染物指标备注为氮氧化物（SNCR）
- mercury: nan
  污染物指标汞及其化合物的末端治理技术是协同脱汞，其效率为25.73MHgar+84.12，末端治理设施实际运行率（k值）计算公式为取该机组除尘、脱硝脱硫K的最小值。原文件中描述污染物类别为废气，污染物指标为汞及其化合物，此处对其进行了匹配工作，将其匹配到LCAflow库里面相最符合的流，污染物指标备注为汞及其化合物
- volatile organic compound: nan
  污染物指标挥发性有机物的末端治理技术是/。原文件中描述污染物类别为废气，污染物指标为挥发性有机物，此处对其进行了匹配工作，将其匹配到LCAflow库里面相最符合的流，污染物指标备注为挥发性有机物

## Use advice
This dataset is derived from the Pollution Source Census Report and contains information on pollution emissions and related products. However, it does not include data on energy or chemical consumption, nor does it provide information on waste or co-product generation. When utilizing this dataset, please supplement the missing data based on actual conditions before use
该数据集来源于污染源普查报告，包含污染物排放及相关产品信息，但不包含能源或化学品消耗数据，也不提供废弃物或共生产物产生信息。在使用该数据集时，请根据实际情况补充缺失数据后再使用。

## Review details
Inventory: The internal review was done by several iteration steps concerning raw data validation, raw data documentation, representativity, completeness and consistency of modelling with regard to ISO 14040 and 14044.
清单： 内部审查通过几个迭代步骤完成，涉及原始数据验证、原始数据记录、代表性、完整性、与 ISO 14040 和 14044 有关的建模的一致性。

## Data sources
- 第二次全国污染源普查产排污核算系数手册（试用版）,四级代码4411、4412文件，在完整版文件中第5333页
