# Lithium Carbonate Production | Battery Grade Lithium Carbonate | Sulfuric Acid | Australia Exports Lithium Spodumene Concentrate

Dataset: ILCD process, Unit process, single operation
Geography: SZ-JS-CN
Reference year: 2014
Classification: Materials production / Other mineralic materials
Generated by: Sun Xin, x.i.n.s@foxmail.com
Review: Dependent internal review by Tiangong LCI Data Working Group
Amounts: no units in this file; such an amount is in the reference unit of its flow, which a separate flow dataset defines

## Reference product
- Lithium carbonate,Lithium carbonate: 1; article inperiodical

## Inputs
All rows: article inperiodical
- Spodumene concentrate (6% Li2O): 8.67
- Electricity: 13.788
- process steam: 7.77
- Natural gas, at consumer EU-27: 1.36
- water: 49.46
- Sulfuric acid: 3.02
- sodium carbonate: 2.26
- sodium hydroxide: 0.55
- diatomite: 0.06
- hydrogen chloride: 0.18
- Hydrogen peroxide (30%): 0.12
- hydrated lime dry slaked: 0.65
- carbon dioxide: 0.05

## Outputs
- municipal solid waste deposition: 13.04; article inperiodical
- sodium sulfate: 2.27; article inperiodical
- Water (river water from technosphere, waste water): 38.8
- chemical oxygen demand: 0.55
- Suspended solids, unspecified: 0.74
- Ammonia (NH4+, NH3, as N): 0.03
- sulphuric acid: 5e-5
- phosphate: 0.003
- sulfur dioxide: 9e-5
- nitrogen dioxide: 0.00131
- particles (PM2.5 - PM10): 0.00053

## Review details
Inventory: The internal review was done by several iteration steps concerning raw data validation, raw data documentation, representativity, completeness and consistency of modelling with regard to ISO 14040 and 14044.; Documentation: The review of the documentation was performed by Ecobilan and is in compliance with ISO 14040 and 14044. The data set documentation is correct in view of the appropriateness of the information provided. It includes all relevant information in view of data quality and scope of application of the respective LCI result.

## Data sources
- Jiang, S. et al. Environmental impacts of lithium production showing the importance of primary data of upstream process in life-cycle assessment. Journal of Environmental Management 262, 110253 (2020).
