# Anaerobic-anoxic-oxic (A2/O) | Wastewater | wastewater treatment

Dataset: ILCD process, Unit process, single operation
Geography: CN
Classification: Materials production / Other mineralic materials
Generated by: 于晨阳, yuchenyang0506@foxmail.com
Review: Dependent internal review by 天工LCI数据工作小组
Amounts: no units in this file; such an amount is in the reference unit of its flow, which a separate flow dataset defines

## Geography
17 WWTPs in China

## Reference product
- Wastewater: 1; input; measured

## Inputs
- Electricity: 1.188; measured
- Polyacrylamide: 0.00094; measured
- Polyferric chloride: 0.0858; measured
  Polymeric ferric sulfate

## Outputs
All rows: measured
- chemical oxygen demand: 0.01857
- Biochemical Oxygen Demand: 0.00486
  biochemical oxygen demand
- ammonia: 0.00044
  ammonia nitrogen
- nitrogen, total (excluding N2): 0.00894
- phosphorus, total: 0.0001
- Suspended solids, unspecified: 0.00691
- methane: 0.00354
- nitrous oxide: 0.00031

## Review details
清单： 内部审查通过几个迭代步骤完成，涉及原始数据验证、原始数据记录、代表性、完整性、与 ISO 14040 和 14044 有关的建模的一致性。

## Data sources
- Understanding the greenhouse gas emissions from China’s wastewater treatment plants: Based on life cycle assessment coupled with statistical data
