# 铝电解碳阳极生产 ; 碳阳极 ; 石油焦 ; 2013年

Dataset: ILCD process, Unit process, single operation
Geography: CN
Reference year: 2021
Classification: Unit processes / Materials production / Inorganic chemicals
Generated by: 蔡梓萌, caizm6178@163.com
Owner: 天工LCI数据工作小组
Review: Dependent internal review by 天工LCI数据工作小组
Amounts: no units in this file; such an amount is in the reference unit of its flow, which a separate flow dataset defines
copyright: false
licenseType: Free of charge for all users and uses

## General comment
该数据集描述了使用石油焦生产铝电解碳阳极的过程。碳阳极是铝冶炼过程中的关键组件，在氧化铝（Al2O3）的电解过程中用于传导电流。碳阳极的高电导率和热导率使其适合于此应用。所述的碳阳极专门为铝工业生产，不适用于其它应用，如燃料电池或电池技术。

## Time period
文献发表日期

## Reference product
- anode, for metal electrolysis: 1000; software or database
  anode

## Inputs
All rows: software or database
- electricity, high voltage, aluminium industry: 748.8
  electricty
- heavy fuel oil: 65
  fuel oil
- coal tar: 214
  coal tar pitch
- Petroleum Coke: 1089
  petroleum coak
- coal gas: 1277

## Data selection and combination
本研究的数据参考了PA、SA、电力等背景数据的LCA数据。PA数据来自统计数据源，SA数据主要来自文献。背景数据主要来自中国科学院生态环境研究中心CASRCEES 2018建立的中国本地化LCA数据库，涵盖能源、材料、交通、废物管理等LCA数据。

## Use advice
提供的LCA数据应谨慎应用，确保与研究基年(2013年)保持方法论的一致性。用户应注意，过程分析(PA)数据反映统计数据来源，而系统分析(SA)数据主要来自文献。背景数据来源于中国科学院生态环境研究中心建立的2018年中国本土化LCA数据库CAS RCEES。在使用这些数据进行当前评估时，重要的是要考虑基年以来技术进步和行业变化。此外，LCA数据库的地理特定性表明，这些数据对涉及中国情境的研究最有用。在考虑LCA回收时，用户必须承认数据可能不包括生命周期末期的考虑，因此可能需要单独对回收过程进行建模。

## Review details
清单： 内部审查通过几个迭代步骤完成，涉及原始数据验证、原始数据记录、代表性、完整性、与 ISO 14040 和 14044 有关的建模的一致性。

## Data sources
- Ding, N., Liu, N., Lu, B. & Yang, J. Life cycle greenhouse gas emissions of aluminum based on regional industrial transfer in China. J. Ind. Ecol. 25, 1657–1672 (2021).
