# 地下水修复;原位修复;吸附;吸附剂的制备;电解

Dataset: ILCD process, Unit process, single operation
Geography: ID
Reference year: 2022
Classification: Unit processes / Other Services / Repair and maintenance
Generated by: 肖萌, xiaomeng@mail.bnu.edu.cn
Owner: 天工LCI数据工作小组
Review: Dependent internal review by 天工LCI数据工作小组
Amounts: no units in this file; such an amount is in the reference unit of its flow, which a separate flow dataset defines
copyright: false
licenseType: Free of charge for all users and uses

## General comment
将铝电极电溶于蒸馏水中，电流密度为195A/m，制备AHNP2.电解过程持续2h，之后停止电解，让氢氧化铝纳米颗粒沉降在电化学反应器底部。过滤掉沉降的颗粒（沉淀物），用蒸馏水洗涤数次，除去电化学电池中使用的微量氯化钠，以增加电解质溶液的电导率。

## Technical purpose
所述工艺用于生产氢氧化铝纳米颗粒（AHNP2），这些纳米颗粒用于原位地下水修复应用。这些纳米颗粒旨在通过直接应用于受污染地点来吸附地下水中的污染物，从而在无需抽取水的情况下促进污染物的去除。

## Reference product
- Aluminium hydroxide/oxide nanoparticles adsorption (Electrolysis; prepeard; in water): 8.5; measured
  Wet Adsorbent

## Inputs
- Aluminium and aluminium alloy products: 1.05; measured
- Tap Water: 0.015; measured
- sodium chloride: 0.17; measured
- Electricity: 130.392; measured

## Outputs
- Wastewater: 0.0065; measured
  Washed water

## Use advice
在使用数据集进行建模和评估时，确保所有方法论遵循原位修复生命周期评估的最佳实践。这包括对AHNP2纳米颗粒的生产和应用以及系统中相关能源和物料输入的适当核算。应注意电解条件（如电流密度和持续时间）对纳米颗粒性质的影响。在环境影响评估中，还必须考虑纳米颗粒的去除效率及其后处理的命运。

## Review details
清单： 内部审查通过几个迭代步骤完成，涉及原始数据验证、原始数据记录、代表性、完整性、与 ISO 14040 和 14044 有关的建模的一致性。

## Data sources
- Goyal, H. & Mondal, P. Life cycle assessment (LCA) of the arsenic and fluoride removal from groundwater through adsorption and electrocoagulation: A comparative study. Chemosphere 304, 135243 (2022).
