# Electricity production ; Electricity ; Thermal power (61.6%) + hydropower (34.1%) + wind power (3.5%) + solar power (0.9%)

Dataset: ILCD process, Partly terminated system
Geography: GZ-CN
Reference year: 2019
Classification: Energy carriers and technologies / Electricity
LCI method principle: Other
Generated by: Ruoxi Xiong, xiongrx0126@163.com
Owner: Tiangong LCI Data Working Group
Review: Dependent internal review by Tiangong LCI Data Working Group
Amounts: no units in this file; such an amount is in the reference unit of its flow, which a separate flow dataset defines
copyright: false
licenseType: Free of charge for all users and uses

## General comment
Forms of electricity generation include thermal power, hydropower, wind power and solar power

## Time period
Calculated based on data from the 2019 Energy Statistics Yearbook

## Technical purpose
The dataset describes an industrial process for electricity production, which includes the generation of power through several methods: thermal power, hydropower, wind power, and solar power. The breakdown of electricity production is 61.6% from thermal power, 34.1% from hydropower, 3.5% from wind power, and 0.9% from solar power. This mixture of electric power generation forms can be used to supply the electricity grid, meeting the energy demands for residential, commercial, and industrial purposes.

## Reference product
- Electricity: 3.6; calculated

## Outputs
- carbon dioxide: 0.463; calculated
- sulfur dioxide: 9.9e-5; calculated
- Nitrogen oxides: 0.0001563; calculated
- Dust (unspecified, from stack): 1.9028e-5; calculated

## Data treatment and extrapolations
For the accounting method, please refer to the "Enterprise Greenhouse Gas Emissions Accounting Methods and Reporting Guidelines for Power Generation Facilities". Different forms of power generation and fuel consumption come from Chapter 3 (Energy Production) and Chapter 6 (Regional Energy Balance Sheet) in the "China Energy Statistical Yearbook 2020". The fuel parameters such as low calorific value and carbon content per unit calorific value used to calculate the carbon dioxide emission factor come from the "2019 China Regional Power Grid Carbon Dioxide Baseline Emission Factor Calculation Instructions OM" and the "Enterprise Greenhouse Gas Emission Accounting Method and Reporting Guide for Power Generation Facilities" 》

## Use advice
Users who apply this dataset for Life Cycle Assessment (LCA) should take into consideration the specific mix of electricity production when determining the environmental impact of products or systems requiring electricity. The carbon emission factors are calculated based on the 2019 Energy Statistics Yearbook data. When analyzing electricity-related emissions, it is crucial to adhere to the accounting method outlined in 'Enterprise Greenhouse Gas Emissions Accounting Methods and Reporting Guidelines for Power Generation Facilities.' The data set user should also be aware of the technological applicability and ensure that the data's regional relevance aligns with their assessment scope. Different forms of power generation and fuel usage, as well as fuel parameters for calculating CO2 emission factors, must be factored in accordingly.

## Review details
Inventory: The internal review was done by several iteration steps concerning raw data validation, raw data documentation, representativity, completeness and consistency of modelling with regard to ISO 14040 and 14044.

## Data sources
- 熊若熙. 中国电力生产和消费二氧化碳与污染物排放因子核算. (清华大学, 2023).
